# Cement

Dataset: ILCD process, EPD, average dataset
Geography: AT
Reference year: 2020
Valid until: 2025
Classification: OEKOBAU.DAT: Mineralische Baustoffe / Bindemittel / Zement
Classification: IBUCategories: 01 Grundstoffe und Vorprodukte / Zement, Baukalk und andere Bindemittel / Zement
Method details: Zement.pdf
Generated by: VDZ gGmbH
Registration number: EPD-VOZ-20200025-IAG1-DE
Owner: Vereinigung der Österreichischen Zementindustrie (VÖZ)
Compliance: DIN EN 15804+A2; ISO 14025
Review: Accredited third party review by Institut Bauen und Umwelt e. V.
Amounts: rows without a unit in brackets have none in this file; such an amount is in the reference unit of its flow, which a separate flow dataset defines
copyright: true
licenseType: Free of charge for all users and uses
accessRestrictions: None

## General comment
Zement ist ein hydraulisch erhärtender Baustoff. Er besteht aus einem Gemisch feingemahlener, nichtmetallisch-anorganischer Bestandteile. Zement kann durch gemeinsames Vermahlen des bis zur Sinterung gebrannten Zementklinkers mit anderen Haupt- und Nebenbestandteilen oder durch Mischen getrennt feingemahlener Haupt- und Nebenbestand-teile hergestellt werden. Nach Zugabe von Wasser entsteht eine Suspension (Zementleim), die aufgrund einsetzender Hydratationsreaktionen sowohl an der Luft als auch unter Wasser erstarrt und erhärtet sowie dauerhaft fest bleibt. Das deklarierte Produkt ist ein Zement mit einer Zusammensetzung, die der durchschnittlichen Zusammensetzung der in Österreich im Jahr 2017 produzierten Zemente entspricht. Die in der Durchschnittbildung betrachteten Zemente sind fast ausschließlich den Hauptzement-arten CEM I, CEM II und CEM III nach ÖNORM EN 197-1 zuzuordnen (Anteil an sonstigen Zementen <0,5%).

## Technology and included processes
The most important cement raw materials limestone, clay and their natural mixture, the limestone marl, are mainly extracted in quarries by blasting. Clay can be removed directly from the quarry wall with bucket chain, bucket wheel or dragline excavators. Vehicles transport the chunky raw material to hammer crushers, in which it is broken into gravel. The gravel can then z. B. be transported on belt conveyors from the quarry to the cement works. The raw material components are fed into a mill in predetermined mixing ratios via metering devices and finely ground to raw meal. In Austria, cement clinker is produced exclusively using the dry process in rotary kilns with cyclone preheaters. In the preheater, the raw meal is heated to over 800 ° C by the exhaust gases from the rotary kiln. The material emerging from the lower cyclone stage of the preheater enters the rotary kiln, which is inclined at 3 - 4 °, in which the material to be fired is moved from the kiln inlet in the direction of the burner installed at the kiln outlet. In the so-called sintering zone, the material to be fired reaches temperatures of around 1450 ° C. A clinker cooler is attached to the kiln outlet. After burning and cooling, the clinker is stored in silos or closed halls in order to avoid emissions of clinker dust as far as possible. For the production of cement, the clinker alone or with other main components is finely ground separately or together. A sulphate carrier is added to the grist to regulate the solidification. For this purpose, gypsum or anhydrite from natural deposits or from flue gas desulphurisation systems are used. The finished cement is usually stored in silos, from which the cement is dispatched in sacks or in silos. To ensure the quality of cement, quality assurance systems are now installed in all Austrian cement works, which are based on the requirements for in-house production control in ÖNORM EN 197-2 and the standard for quality management systems ÖNORM EN ISO 9001. In addition to the specific requirements for process control and for monitoring intermediate and end products, QM systems in accordance with ÖNORM EN ISO 9001 also include measures to improve the organizational structure and production processes as a whole.

## Technical purpose
Zement wird hauptsächlich als Bindemittel für Beton und Mörtel verwendet.

## Reference product
- Zement (): 1000

## Inputs
- Renewable primary energy as energy carrier (PERE) [MJ]: A1-A3 338
- Renewable primary energy resources as material utilization (PERM) [MJ]: A1-A3 0
- Total use of renewable primary energy resources (PERT) [MJ]: A1-A3 338
- Non renewable primary energy as energy carrier (PENRE) [MJ]: A1-A3 1620
- Non renewable primary energy as material utilization (PENRM) [MJ]: A1-A3 0
- Total use of non renewable primary energy resources (PENRT) [MJ]: A1-A3 1620
- Use of secondary material (SM) [kg]: A1-A3 121
- Use of renewable secondary fuels (RSF) [MJ]: A1-A3 577.8
- Use of non renewable secondary fuels (NRSF) [MJ]: A1-A3 1601.4
- Use of net fresh water (FW) [m^3]: A1-A3 0.2

## Outputs
- Hazardous waste disposed (HWD) [kg]
- Non hazardous waste disposed (NHWD) [kg]
- Radioactive waste disposed (RWD) [kg]
- Components for re-use (CRU) [kg]: A1-A3 0
- Materials for recycling (MFR) [kg]: A1-A3 0
- Materials for energy recovery (MER) [kg]: A1-A3 0
- Exported electrical energy (EEE) [MJ]: A1-A3 0
- Exported thermal energy (EET) [MJ]: A1-A3 0

## Impact indicators
- Global Warming Potential total (GWP-total) [kg CO_(2)-Äq.]: A1-A3 493
- Global Warming Potential fossil fuels (GWP-fossil) [kg CO_(2)-Äq.]: A1-A3 493
- Global Warming Potential biogenic (GWP-biogenic) [kg CO_(2)-Äq.]: A1-A3 0.29
- Global Warming Potential luluc (GWP-luluc) [kg CO_(2)-Äq.]: A1-A3 0.05
- Depletion potential of the stratospheric ozone layer (ODP) [kg CFC11-Äq.]: A1-A3 5.78e-6
- Acidification potential of land and water (AP) [mol H^(+)-Äq.]: A1-A3 0.833
- Eutrophication potential aquatic freshwater (EP-freshwater) [kg PO_(4)-Äq.]: A1-A3 0.111
- Eutrophication potential aquatic marine (EP-marine) [kg N-Äq.]: A1-A3 0.273
- Eutrophication potential terrestrial (EP-terrestrial) [mol N-Äq.]: A1-A3 3.39
- Formation potential of tropospheric ozone photochemical oxidants (POCP) [kg NMVOC-Äq.]: A1-A3 0.782
- Abiotic depletion potential for non fossil resources (ADPE) [kg Sb-Äq.]: A1-A3 5.47e-5
- Abiotic depletion potential for fossil resources (ADPF) [MJ]: A1-A3 1620
- Water use (WDP) [m^(3) Welt-Äq. entzogen]: A1-A3 41
- Incidence of disease due to PM emissions (PM) [Krankheitsfälle]: A1-A3 7.4e-6
- Human exposure efficiency relative to U235 (IR) [kBq U235-Äq.]: A1-A3 11.4
- Comparative toxic unit for ecosystems (ETP-fw) [CTUe]
- Comparative toxic unit for humans (carcinogenic) (HTP-c) [CTUh]
- Comparative toxic unit for humans (noncarcinogenic) (HTP-nc) [CTUh]
- Soil quality index (SQP) [SQP]

## Use advice
Gültigkeitsbereich:
Die vorliegende Umweltproduktdeklaration bildet die Ökobilanz der Herstellung eines Zements mit einer durchschnittlichen Zusammensetzung in Österreich im Jahr 2017 hergestellter Zemente ab. Die Ökobilanz, die der EPD zugrunde liegt, beruht auf Daten aller 9 österreichischen Zementwerke mit Ofenbetrieb. Da 100 % der Zementproduktion Österreichs erfasst wurden, ist die in der Ökobilanz abgebildete Technologie repräsentativ für die Zementherstellung in Österreich.
Systemgrenze:
Typ der EPD: Wiege-bis-Werkstor. Die gewählten Systemgrenzen umfassen die Herstellung des Zements einschließlich der Rohstoffgewinnung bis zum fertigen Produkt am Werkstor.

Das Produktstadium umfasst:

Modul A1: Gewinnung und Aufbereitung von Rohstoffen.

Modul A2: Transport der Rohstoffe zum Werkstor und interne Transporte.

Modul A3: Zementherstellung.

Das Baustadium, das Nutzungsstadium und das Entsorgungsstadium werden in der Ökobilanz für Zement im Einklang mit der Norm EN 15804 nicht berücksichtigt.

## Data sources
- ecoinvent database (all versions)
- ecoinvent 3.4 database
