# Vegetable oil fuel (rapeseed, 1 kg)

Dataset: ILCD process, EPD, generic dataset
Geography: DE
Reference year: 2021
Valid until: 2022
Classification: oekobau.dat: Sonstige / Energieträger - Bereitstellung frei Verbraucher / Pflanzenölkraftstoff
Owner: Sphera Solutions GmbH
Compliance: EN 15804+A2
Review: Dependent internal review by Sphera Solutions GmbH; Independent external review by GaBi user forum
Amounts: rows without a unit in brackets have none in this file; such an amount is in the reference unit of its flow, which a separate flow dataset defines
copyright: true
licenseType: Free of charge for all users and uses
accessRestrictions: The license conditions as stated on https://www.oekobaudat.de/ apply.
accessRestrictions: Es gelten die Lizenzbedingungen wie sie auf https://www.oekobaudat.de/ genannt sind.

## General comment
This data set has been modeled according to the European Standard EN 15804+A2 for Sustainable Building. Results are depicted in modules that allow the structured expression of results over the entire life cycle.

## Geography
The data set represents the country specific situation in Germany, focusing on the main technologies, the region specific characteristics and / or import statistics.

## Time period
Annual average

## Technology and included processes
Through the so-called transesterification, the physical properties of rapeseed oil are adapted to the requirements of the diesel engine.
The triglyceride is replaced by methanol by adding methanol to the refined rapeseed oil. With continuous processing, the resulting glycerine is gradually separated from the RME (rapeseed oil fatty acid methyl ester = vegetable oil fuel) and specifically processed.

## Technical purpose
Rapeseed methyl ester can be used as an energy source instead of diesel or light fuel oil.

## Safety margin
10 %. Product system almost completely covered. Good technological, temporal and geographic representativeness.

## Reference product
- Vegetable oil fuel (rapeseed, 1 kg): 1

## Inputs
- Use of renewable primary energy as energy carrier (PERE) [MJ]: B6 45.8556
- Use of renewable primary energy resources used as raw materials (PERM) [MJ]: B6 0
- Total use of renewable primary energy (PERT) [MJ]: B6 45.8556
- Use of non renewable primary energy as energy carrier (PENRE) [MJ]: B6 16.4078
- Use of non renewable primary energy resources used as raw materials (PENRM) [MJ]: B6 0
- Total use of non renewable primary energy resource (PENRT) [MJ]: B6 16.4078
- Use of secondary material (SM) [kg]: B6 0
- Use of renewable secondary fuels (SF) [MJ]: B6 0
- Use of non renewable secondary fuels (NRSF) [MJ]: B6 0
- Net use of fresh water (FW) [m3]: B6 0.0237472

## Outputs
- Hazardous waste disposed (HWD) [kg]: B6 2.2929e-9
- Non harzardous waste disposed (NHWD) [kg]: B6 0.166826
- Radioactive waste disposed (RWD) [kg]: B6 0.000121367
- Components for re-use (CRU) [kg]: B6 0
- Materials for recycling (MFR) [kg]: B6 0
- Materials for energy recovery (MER) [kg]: B6 0
- Exported electrical energy (EEE) [MJ]: B6 0
- Exported thermal energy (EET) [MJ]: B6 0

## Impact indicators
- Global Warming Potential - total (GWP-total) [kg CO2 eq.]: B6 -1.24475
- Global Warming Potential - fossil fuels (GWP-fossil) [kg CO2 eq.]: B6 1.42696
- Global Warming Potential - biogenic (GWP-biogenic) [kg CO2 eq.]: B6 -2.69521
- Global Warming Potential - land use and land use change (GWP-luluc) [kg CO2 eq.]: B6 0.0235018
- Depletion potenzial of the stratospheric ozone layer (ODP) [kg CFC-11 eq.]: B6 2.40206e-15
- Acidifcation potential, Accumulated Exceedance (AP) [Mole of H+ eq.]: B6 0.0311444
- Eutrophication potential - freshwater (EP-freshwater) [kg P eq.]: B6 0.000433817
- Eutrophication potential - marine (EP-marine) [kg N eq.]: B6 0.0101203
- Eutrophication potential - terrestrial (EP-terrestrial) [Mole of N eq.]: B6 0.137445
- Photochemical Ozone Creation Potential (POCP) [kg NMVOC eq.]: B6 0.00381986
- Abiotic depletion potential - non-fossil resources (ADPE) [kg Sb eq.]: B6 4.46492e-6
- Abiotic depletion potential - fossil resources (ADPF) [MJ]: B6 16.1967
- Water (user) deprivation potential (WDP) [m³ world equiv.]: B6 0.0591498

## Use advice
This data set refers to the production of 1 kg of vegetable oil fuel based on rapeseed oil (rapeseed methyl ester). The lower calorific value is 37 MJ/kg.

## Data sources
- Documentation of data quality management
- GaBi Database Edition 2021, CUP2021.01
- GaBi database (all versions)
