# SCHÜCO ADS 75.SI

Dataset: ILCD process, EPD, average dataset
Geography: DE
Reference year: 2017
Valid until: 2022
Classification: OEKOBAU.DAT: Komponenten von Fenstern und Vorhangfassaden / Türen und Tore / Aluminium
Classification: IBUCategories: 02 Bauprodukte / Türen, Fenster, Beschläge und Zubehör / Fenster und Türen
Method details: Fenster und Türen.pdf
Owner: Schüco International KG
Compliance: DIN EN 15804; ISO 14025
Review: Accredited third party review by IBU
Amounts: rows without a unit in brackets have none in this file; such an amount is in the reference unit of its flow, which a separate flow dataset defines
copyright: true

## General comment
Das Schüco Türystem ADS (Aluminium Door System) besteht aus gedämmten Aluminiumverbundprofilen. Das Türsystem Schüco ADS bietet funktionelle Vorteile verbunden mit architektonischen und gestalterischen Aspekten. In aufeinander abgestimmten Bauteilen vereinen sich Vorzüge wie hohe Wärmedämmungen, schlanke Ansichtsbreiten, verdeckt liegende, klassisch manuelle oder integrierte mechatronische Beschläge. Das System besteht aus den Bautiefen 50, 60, 65, 70, 75, 90, 112, 120 mm. Dabei können Türen mit Festfeldern oder Öffnungselementen des Schüco Systems verbunden werden. Die Profiloberflächen der Türelemente können nach Wahl eloxiert oder nass- oder pulverbeschichtet ausgeführt werden.

Das deklarierte Türelement ADS besteht aus folgenden Elementen:

• Hauptprofile, bestehend aus:

Aluminium

PA 66 (Polyamid)

• Beschläge, bestehend aus:

Aluminium

Aluminium/Edelstahl

Aluminium/Stahl

INOX (Edelstahl)

Messing

PA6 (Polyamid)

Stahl

• Zubehör, bestehend aus:

Aluminium

Aluminium-Guss

Aluminiumdruckguss

INOX A4 (Edelstahl A4)

INOX (Edelstahl)

PA6 (Polyamid)

PVC (Polyvinylchlorid)

Zellkautschuk

• Zubehörprofile, bestehend aus:

Aluminium

PVC (Polyvinylchlorid)

• Dichtungen, bestehend aus:

EPDM (Ethylen-Propylen-Dien)

PA6 (Polyamid)

Perlonfaser

• Verglasung, bestehend aus:

3-fach Isolierglas

• Beschichtung, bestehend aus:

Pulver

Das Schüco Fenstersystem ADS besteht aus folgenden

Ausführungen:

ADS 50

ADS 60

ADS 65

ADS 65 NI SP

ADS 65 NI FR 30

ADS 70

ADS 75A

ADS 80 FR 30

ADS 80 FR 60

ADS 90

ADS 112

ADS 120

Firestop T90/F90

Mit dieser Deklaration wird folgendes Element aus dem Schüco Türsystem ADS beschrieben:

Systemausführung: Schüco ADS 75.SI

B x H: 1100 mm x 2200 mm

Oberfläche Profile: Pulverbeschichtet

Anlagen: Elementübersicht

## Technology and included processes
Die oberflächenbehandelten Aluminiumprofile und die damit bereits verbundenen Isolierstege werden auf Maß geschnitten und für die entsprechende Rahmengröße konfektioniert. Der dabei entstehende Verschnitt an Aluminiumprofilen wird dem Recycling zugeführt. Anschließend werden die Profile zu Rahmen fest verbunden und die Dichtungen in die vorgesehenen Nuten eingezogen. Die beweglichen Türrahmen werden mit den Beschlagsbauteilen verbunden. Danach wird die Verglasung eingesetzt und mit Verglasungsprofilen gesichert. Abschließend erfolgt eine Funktionskontrolle und die Etikettierung des Elementes.
Technische Daten:
Gemäß CE-Kennzeichnung sind folgende bautechnische Daten für das Element zu nennen:
Deklarierte Einheit:
Die deklarierte Einheit ist eine Tür Typ Schüco ADS 75.SI in spezifischer Abmessung 1100 mm x 2200 mm.

## Technical purpose
Das Produkt wird im Allgemeinen in der Gebäudewand eingebaut, um einen Luftaustausch und Lichteinfall zu ermöglichen.

## Reference product
- Schüco ADS 75.SI B x H: 1100 mm x 2200 mm: 1

## Inputs
- Erneuerbare Primärenergie als Energieträger (PERE) [MJ]: A1-A3 869.26, A4 0, B6 0, C4 0, D 0
- Erneuerbare Primärenergie zur stofflichen Nutzung (PERM) [MJ]: A1-A3 0, A4 0, B6 0, C4 0, D 0
- Total erneuerbare Primärenergie (PERT) [MJ]: A1-A3 869.26, A4 0.059, B6 0, C4 0.779, D -578.1
- Nicht-erneuerbare Primärenergie als Energieträger (PENRE) [MJ]: A1-A3 4996.8, A4 0, B6 0, C4 0, D 0
- Nicht-erneuerbare Primärenergie zur stofflichen Nutzung (PENRM) [MJ]: A1-A3 194.29, A4 0, B6 0, C4 0, D 0
- Total nicht erneuerbare Primärenergie (PENRT) [MJ]: A1-A3 5191.09, A4 1.04, B6 0, C4 7.65, D -1887.05
- Einsatz von Sekundärstoffen (SM) [kg]: A1-A3 12, A4 0, B6 0, C4 0, D 0
- Erneuerbare Sekundärbrennstoffe (RSF) [MJ]: A1-A3 0, A4 0, B6 0, C4 0, D 0
- Nicht erneuerbare Sekundärbrennstoffe (NRSF) [MJ]: A1-A3 0, A4 0, B6 0, C4 0, D 0
- Einsatz von Süßwasserressourcen (FW) [m^3]: A1-A3 2.51, A4 0.000148, B6 0, C4 0.0354, D -1.17

## Outputs
- Gefährlicher Abfall zur Deponie (HWD) [kg]: A1-A3 0.0188, A4 7.87e-8, B6 0, C4 4.95e-8, D -2.99e-7
- Entsorgter nicht gefährlicher Abfall (NHWD) [kg]: A1-A3 50.97, A4 8.75e-5, B6 0, C4 3.1, D -31.77
- Entsorgter radioaktiver Abfall (RWD) [kg]: A1-A3 0.287, A4 1.49e-6, B6 0, C4 0.000269, D -0.184
- Komponenten für die Wiederverwendung (CRU) [kg]: A1-A3 0, A4 0, B6 0, C4 0, D 0
- Stoffe zum Recycling (MFR) [kg]: A1-A3 0, A4 0, B6 0, C4 0, D 87.5
- Stoffe für die Energierückgewinnung (MER) [kg]: A1-A3 0, A4 0, B6 0, C4 0, D 0
- Exportierte elektrische Energie (EEE) [MJ]: A1-A3 0, A4 0, B6 0, C4 21.21, D 0
- Exportierte thermische Energie (EET) [MJ]: A1-A3 0, A4 0, B6 0, C4 49.26, D 0

## Impact indicators
- Globales Erwärmungspotenzial (GWP) [kg CO_(2)-Äq.]: A1-A3 369.6, A4 0.0754, B6 0, C4 13.81, D -135.52
- Abbau Potential der stratosphärischen Ozonschicht (ODP) [kg CFC11-Äq.]: A1-A3 8.79e-6, A4 3.46e-13, B6 0, C4 5.09e-11, D -6.73e-6
- Versauerungspotenzial von Boden und Wasser (AP) [kg SO_(2)-Äq.]: A1-A3 1.26, A4 0.000185, B6 0, C4 0.0121, D -0.542
- Eutrophierungspotenzial (EP) [kg PO_(4)^(3)-Äq.]: A1-A3 0.154, A4 4.28e-5, B6 0, C4 0.00289, D -0.0315
- Bildungspotential für troposphärisches Ozon (POCP) [kg Ethen-Äq.]: A1-A3 0.132, A4 -5.15e-5, B6 0, C4 0.000732, D -0.0344
- Potenzial für den abiotischen Abbau nicht fossiler Ressourcen (ADPE) [kg Sb-Äq.]: A1-A3 0.00232, A4 5.02e-9, B6 0, C4 5.86e-7, D -0.000264
- Potenzial für den abiotischen Abbau fossiler Brennstoffe (ADPF) [MJ]: A1-A3 4489.63, A4 1.04, B6 0, C4 6.97, D -1440.33

## Use advice
Gültigkeitsbereich:
Die Umweltproduktdeklaration bezieht sich auf eine TürTyp Schüco ADS 75.SI in spezifischer Abmessung Breite x Höhe. Die für die Systembauteile Schüco ADS 75.SI verwendeten Kennwerte in der Ökobilanz werden von der Schüco International KG bereitgestellt. Produktionsort ist der Standort des Erstellers. Der Ersteller ist für die in dieser EPD beschriebenen Spezifikation und die Herstellung der Tür verantwortlich.
Systemgrenze:
Bei dieser EPD handelt es sich um eine EPD vom Typ Wiege bis Werkstor - mit Optionen. Die Ökobilanz berücksichtigt das Produktstadium (Modul A1-A3, inklusive Rohstoffbereitstellung, Transport zum Werk und Herstellung), den Transport zur Baustelle (Modul A4), sowie die End-of-Life- Module C4: Abfallbehandlung und D: Gutschriften und Lasten außerhalb der Systemgrenzen.

## Data sources
- SCHÜCO ADS 75.SI.pdf
- GaBi Database (all versions)
- GaBi database SP29 2016
