# Automatic Swing Door Operators ED 100 and ED 250

Dataset: ILCD process, EPD, specific dataset
Geography: DE
Reference year: 2016
Valid until: 2021
Classification: OEKOBAU.DAT: Komponenten von Fenstern und Vorhangfassaden / Antriebssysteme / elektrisch
Classification: IBUCategories: 02 Bauprodukte / Türen, Fenster, Beschläge und Zubehör / Antriebssysteme für Automatiktüren und -tore
Method details: Antriebssysteme für Automatiktüren und -tore.pdf
Owner: DORMA Deutschland GmbH
Compliance: DIN EN 15804; ISO 14025
Review: Accredited third party review by IBU
Amounts: rows without a unit in brackets have none in this file; such an amount is in the reference unit of its flow, which a separate flow dataset defines
copyright: true

## General comment
The automatic swing door operators manufactured by DORMA are electromechanical swing door operators designed for single- or double-leaf swing doors. Depending on the width and weight of the door leaf, the ED 100 or the ED 250 is required. Both operators can be mounted with standard arm as push-version and with sliding channel as pull-version. Apart from the extended cover, an integrated door coordinator is also available for double-leaf operators, which is also easily fitted. By using the DORMA Upgrade Card, the functional scope can be adapted to a variety of door situations.

Flexible configuration of the functions actually required
Inexpensive transport and easy assembly thanks to lower weights
Low-noise application thanks to multi-stage gear
Elegant design: DORMA Contur Design with an operator height of only 70 mm

The two ED 100 and ED 250 variants are particularly distinguished by their drive units. For this reason, the ED 250 was taken into consideration in the analysis (maximum characteristics of a swing door operator). Only formation of the average for energy consumption during the usage phase follows the arithmetic average. Using this conservative implementation method, the LCA results are indicated as averages for both swing door operators (ED100 / 250).

## Technology and included processes
The automatic swing door operators manufactured by DORMA are electromechanical swing door operators designed for single- or double-leaf swing doors. Depending on the width and weight of the door leaf, the ED 100 or the ED 250 is required. Both operators can be mounted with standard arm as push-version and with sliding channel as pull-version. Apart from the extended cover, an integrated door coordinator is also available for double-leaf operators, which is also easily fitted. By using the DORMA Upgrade Card, the functional scope can be adapted to a variety of door situations.  Flexible configuration of the functions actually required  Inexpensive transport and easy assembly thanks to lower weights  Low-noise application thanks to multi-stage gear  Elegant design: DORMA Contur Design with an operator height of only 70 mm The two ED 100 and ED 250 variants are particularly distinguished by their drive units. For this reason, the ED 250 was taken into consideration in the analysis (maximum characteristics of a swing door operator). Only formation of the average for energy consumption during the usage phase follows the arithmetic average. Using this conservative implementation method, the LCA results are indicated as averages for both swing door operators (ED100 / 250). The ED 100 and ED 250 swing door operators each comprise a swing door operator, a slide channel set and a cover made of high-quality aluminium. The individual components made of steel and nonferrous metals are largely manufactured in the Ennepetal plant. Electronic components are selfproduced (incl. circuit boards) and bought in externally (incl. drive motors). During assembly, the swing door operator, the slide channel sets and covers are assembled, packaged and stored separately. The certified Quality Management System in accordance with /ISO 9001/ ensures the high quality standard of the DORMA products for all production sites.
Declared unit:
The declared unit is the average for one (1) ED 100 and ED 250 automatic swing door operator, incl. ED slide channel set, ED BASIC cover and packaging materials. For the calculation of the average the arithmetic mean was used.

## Technical purpose
DORMA swing door operators are suitable for various applications:

For single- or double-leaf swing doors
Assembly on smoke and fire doors: as pull-version with slide channels and as push-version with standard arm
Automation of doors with low traffic capacity (Low-Energy Mode) and heavily frequented doors (Full-Energy Mode)
High torque for full-automatic swing doors with radar detector control
Suitable for internal and external doors

## Reference product
- ED 100 und ED 250: 1

## Inputs
- Erneuerbare Primärenergie als Energieträger (PERE) [MJ]: A1-A3 334, A4 0.417, A5 0.075, B6 1480, C2 0.0211, C3 1.35, D -212
- Erneuerbare Primärenergie zur stofflichen Nutzung (PERM) [MJ]: A1-A3 12.2, A4 4.4e-13, A5 2.46e-12, B6 4.14e-8, C2 1.99e-14, C3 1.32e-6, D -7.73
- Total erneuerbare Primärenergie (PERT) [MJ]: A1-A3 346, A4 0.417, A5 0.075, B6 1480, C2 0.0211, C3 1.35, D -220
- Nicht-erneuerbare Primärenergie als Energieträger (PENRE) [MJ]: A1-A3 1120, A4 8.51, A5 0.783, B6 7020, C2 0.377, C3 39.5, D -664
- Nicht-erneuerbare Primärenergie zur stofflichen Nutzung (PENRM) [MJ]: A1-A3 7.1, A4 0, A5 0, B6 0, C2 0, C3 5.52e-11, D -4.2
- Total nicht erneuerbare Primärenergie (PENRT) [MJ]: A1-A3 1130, A4 8.51, A5 0.783, B6 7020, C2 0.377, C3 39.5, D -669
- Einsatz von Sekundärstoffen (SM) [kg]: A1-A3 6.31, A4 0, A5 0, B6 0, C2 0, C3 0, D 0
- Erneuerbare Sekundärbrennstoffe (RSF) [MJ]: A1-A3 0, A4 5.6e-5, A5 2.84e-5, B6 0.0926, C2 2.5e-6, C3 0.000594, D 0
- Nicht erneuerbare Sekundärbrennstoffe (NRSF) [MJ]: A1-A3 0, A4 0.000587, A5 0.000131, B6 0.967, C2 2.62e-5, C3 0.00456, D 0
- Einsatz von Süßwasserressourcen (FW) [m^3]: A1-A3 464, A4 0.0359, A5 0.0697, B6 1330, C2 0.00169, C3 1.86, D -539

## Outputs
- Gefährlicher Abfall zur Deponie (HWD) [kg]: A1-A3 0.902, A4 0, A5 0, B6 0, C2 0, C3 0, D -0.00579
- Entsorgter nicht gefährlicher Abfall (NHWD) [kg]: A1-A3 221, A4 0.0305, A5 0.158, B6 1630, C2 0.00142, C3 2.63, D -77.2
- Entsorgter radioaktiver Abfall (RWD) [kg]: A1-A3 0.0582, A4 1.15e-5, A5 4.75e-5, B6 1.05, C2 5.15e-7, C3 0.00126, D -0.0324
- Komponenten für die Wiederverwendung (CRU) [kg]: A1-A3 0, A4 0, A5 0, B6 0, C2 0, C3 0, D 0
- Stoffe zum Recycling (MFR) [kg]: A1-A3 0.347, A4 0, A5 0, B6 0, C2 0, C3 0, D 9.37
- Stoffe für die Energierückgewinnung (MER) [kg]: A1-A3 0, A4 0, A5 1.72, B6 0, C2 0, C3 0, D 1.02
- Exportierte elektrische Energie (EEE) [MJ]: A1-A3 0, A4 0, A5 9.38, B6 0, C2 0, C3 0, D 23.7
- Exportierte thermische Energie (EET) [MJ]: A1-A3 0, A4 0, A5 25.9, B6 0, C2 0, C3 0, D 62

## Impact indicators
- Globales Erwärmungspotenzial (GWP) [kg CO_(2)-Äq.]: A1-A3 63.3, A4 0.628, A5 2.55, B6 394, C2 0.0274, C3 4.29, D -52.5
- Abbau Potential der stratosphärischen Ozonschicht (ODP) [kg CFC11-Äq.]: A1-A3 1.87e-6, A4 2.54e-12, A5 1.21e-11, B6 2.93e-7, C2 1.12e-13, C3 3.22e-8, D -1.16e-6
- Versauerungspotenzial von Boden und Wasser (AP) [kg SO_(2)-Äq.]: A1-A3 0.426, A4 0.00612, A5 0.00054, B6 1.98, C2 0.000174, C3 0.00635, D -0.29
- Eutrophierungspotenzial (EP) [kg PO_(4)^(3)-Äq.]: A1-A3 0.146, A4 0.00116, A5 9.49e-5, B6 0.108, C2 4.46e-5, C3 0.000875, D -0.0158
- Bildungspotential für troposphärisches Ozon (POCP) [kg Ethen-Äq.]: A1-A3 0.0804, A4 -0.00128, A5 3.92e-5, B6 0.115, C2 -7.15e-5, C3 0.000557, D -0.0183
- Potenzial für den abiotischen Abbau nicht fossiler Ressourcen (ADPE) [kg Sb-Äq.]: A1-A3 0.00949, A4 2.34e-8, A5 4.27e-8, B6 6.24e-5, C2 1.07e-9, C3 3.27e-6, D -0.000515
- Potenzial für den abiotischen Abbau fossiler Brennstoffe (ADPF) [MJ]: A1-A3 946, A4 8.49, A5 0.664, B6 4390, C2 0.376, C3 36.5, D -586

## Use advice
Scope:
This EPD refers to the calculated average of DORMA ED 100 and ED 250 swing door operators. Deviations by the individual products from the calculated average are significantly below 10 %. The production location for both products is DORMA Ennepetal, Germany. The material and energy flows were taken into consideration accordingly.
System boundary:
Type of EPD: cradle to gate with options.

Modules A1-3, A4 and A5

The product stage commences with consideration of the material and energy flows required for manufacturing the product, including all of the associated upstream chains and requisite transport associated with procurement. Furthermore the whole production phase was mapped, including the treatment of production waste towards achieving the End-of-Waste status (EoW). Distribution transports and the installation into the building were considered as well.

Module B6

Average energy consumption for the two ED 100 and ED 250 automatic swing door operators in Full-Energy Mode is depicted using the arithmetic average over the entire operating life time of 10 years.

Modules C2-3

The modules include the environmental impacts of waste treatment at the end of the product life cycle as well as the transport associated with this.

Module D

Evidence of credits incurred by waste treatment as a result of energetic (MVA route) or material recycling (recycling route) of packaging (A5) and the product at the End-of-Life (C3).

## Data sources
- Automatische Drehflügeltürantriebe ED 100 und ED 250.pdf
- GaBi Database (all versions)
- GaBi database SP28 2015
