# Pipework for electric heat pump (water-water) 10 kW

Dataset: ILCD process, EPD, generic dataset
Geography: DE
Reference year: 2021
Valid until: 2022
Classification: oekobau.dat: Gebäudetechnik / Heizung / Wärmeerzeuger
Owner: Sphera Solutions GmbH
Compliance: EN 15804+A2
Review: Dependent internal review by Sphera Solutions GmbH; Independent external review by GaBi user forum
Amounts: rows without a unit in brackets have none in this file; such an amount is in the reference unit of its flow, which a separate flow dataset defines
copyright: true
licenseType: Free of charge for all users and uses
accessRestrictions: The license conditions as stated on https://www.oekobaudat.de/ apply.
accessRestrictions: Es gelten die Lizenzbedingungen wie sie auf https://www.oekobaudat.de/ genannt sind.

## General comment
This data set has been modeled according to the European Standard EN 15804+A2 for Sustainable Building. Results are depicted in modules that allow the structured expression of results over the entire life cycle.

## Geography
The data set represents the country specific situation in Germany, focusing on the main technologies, the region specific characteristics and / or import statistics.

## Time period
Annual average

## Technology and included processes
Foreground system:
The illustrated pipework (probe, ground collector or well and supply line) is modelled here. The parts that depend on the output of the heat pump are scaled accordingly. This scaling is performed linearly as a function of the power to be provided. In this case, the pipe lines are divided into the supply pipe and the ground collector pipe, or the probe / well pipe. The pipe length is gradually increased as the power to be provided is increased by connecting further ground probes or collector circuits. The additional material expenditure is scaled linearly according to the power to be provided by means of typical pipe diameters and wall thicknesses as additional material expenditure. A tube with the dimensions 32x2.9 mm was used. According to VDI guideline 2067, a 20-year reference period can be used for the heat pump.
The pipes remain in the ground after the reference service life of the heat pump, so no recycling potential is considered here.

Background system:
Electricity: Electricity is modelled according to the individual country-specific situations. The country-specific modelling is achieved on multiple levels. Firstly, individual energy carrier specific power plants and plants for renewable energy sources are modelled according to the current national electricity grid mix. Modelling the electricity consumption mix includes transmission / distribution losses and the own use by energy producers (own consumption of power plants and "other" own consumption e.g. due to pumped storage hydro power etc.), as well as imported electricity. Secondly, the national emission and efficiency standards of the power plants are modelled as well as the share of electricity plants and combined heat and power plants (CHP). Thirdly, the country-specific energy carrier supply (share of imports and / or domestic supply) including the country-specific energy carrier properties (e.g. element and energy content) are accounted for. Fourthly, the exploration, mining/production, processing and transport processes of the energy carrier supply chains are modelled according to the specific situation of each electricity producing country. The different production and processing techniques (emissions and efficiencies) in the different energy producing countries are considered, e.g. different crude oil production technologies or different flaring rates at the oil platforms.
Thermal energy, process steam: The thermal energy and process steam supply is modelled according to the individual country-specific situation with regard to emission standards and considered energy carriers. The thermal energy and process steam are produced at heat plants. Efficiencies for thermal energy production are by definition 100% in relation to the corresponding energy carrier input. For process steam the efficiency ranges from 85%, 90% to 95%. The energy carriers used for the generation of thermal energy and process steam are modelled according to the specific import situation (see electricity above).
Transports: All relevant and known transport processes are included. Ocean-going and inland ship transport as well as rail, truck and pipeline transport of bulk commodities are considered.
Energy carriers: The energy carriers are modelled according to the specific supply situation (see electricity above).
Refinery products: Diesel fuel, gasoline, technical gases, fuel oils, lubricants and residues such as bitumen are modelled with a parameterised country-specific refinery model. The refinery model represents the current national standard in refining techniques (e.g. emission level, internal energy consumption, etc.) as well as the individual country-specific product output spectrum, which can be quite different from country to country. The supply of crude oil is modelled, again, according to the country-specific situation with the respective properties of the resources.

## Technical purpose
This product can be used in construction.

## Safety margin
20 %. Product system depicted except for a few missing processes / flows. Technological, temporal and geographic representativeness partly given.

## Reference product
- Pipework for electric heat pump (water-water) 10 kW: 1

## Inputs
- Use of renewable primary energy as energy carrier (PERE) [MJ]: A1-A3 346.756, C2 0.729025, C3 0, C4 0.029276, D 30.4687
- Use of renewable primary energy resources used as raw materials (PERM) [MJ]: A1-A3 0, C2 0, C3 0, C4 0, D 0
- Total use of renewable primary energy (PERT) [MJ]: A1-A3 346.756, C2 0.729025, C3 0, C4 0.029276, D 30.4687
- Use of non renewable primary energy as energy carrier (PENRE) [MJ]: A1-A3 2232.94, C2 2.33939, C3 99, C4 0.216776, D -167.875
- Use of non renewable primary energy resources used as raw materials (PENRM) [MJ]: A1-A3 82.5, C2 0, C3 -82.5, C4 0, D 0
- Total use of non renewable primary energy resource (PENRT) [MJ]: A1-A3 2315.44, C2 2.33939, C3 16.5, C4 0.216776, D -167.875
- Use of secondary material (SM) [kg]: A1-A3 5.43168, C2 0, C3 0, C4 0, D 0
- Use of renewable secondary fuels (SF) [MJ]: A1-A3 0, C2 0, C3 0, C4 0, D 0
- Use of non renewable secondary fuels (NRSF) [MJ]: A1-A3 0, C2 0, C3 0, C4 0, D 0
- Net use of fresh water (FW) [m3]: A1-A3 0.395712, C2 0.000317023, C3 0, C4 5.33967e-5, D -0.0153158

## Outputs
- Hazardous waste disposed (HWD) [kg]: A1-A3 3.10832e-7, C2 3.90512e-10, C3 0, C4 2.30627e-11, D 2.93112e-8
- Non harzardous waste disposed (NHWD) [kg]: A1-A3 5.57859, C2 0.000888463, C3 0, C4 1.08106, D -0.3292
- Radioactive waste disposed (RWD) [kg]: A1-A3 0.0385513, C2 6.98551e-5, C3 0, C4 2.23784e-6, D 0.00393251
- Components for re-use (CRU) [kg]: A1-A3 0, C2 0, C3 0, C4 0, D 0
- Materials for recycling (MFR) [kg]: A1-A3 0, C2 0, C3 0, C4 0, D 0
- Materials for energy recovery (MER) [kg]: A1-A3 0, C2 0, C3 0, C4 0, D 0
- Exported electrical energy (EEE) [MJ]: A1-A3 0, C2 0, C3 0, C4 0, D 0
- Exported thermal energy (EET) [MJ]: A1-A3 0, C2 0, C3 0, C4 0, D 0

## Impact indicators
- Global Warming Potential - total (GWP-total) [kg CO2 eq.]: A1-A3 135.678, C2 0.175804, C3 0, C4 0.0159957, D -22.7101
- Global Warming Potential - fossil fuels (GWP-fossil) [kg CO2 eq.]: A1-A3 134.924, C2 0.174091, C3 0, C4 0.0163429, D -22.7571
- Global Warming Potential - biogenic (GWP-biogenic) [kg CO2 eq.]: A1-A3 0.588477, C2 0.00075438, C3 0, C4 -0.00039526, D 0.0476111
- Global Warming Potential - land use and land use change (GWP-luluc) [kg CO2 eq.]: A1-A3 0.16554, C2 0.000958839, C3 0, C4 4.80489e-5, D -0.00053484
- Depletion potenzial of the stratospheric ozone layer (ODP) [kg CFC-11 eq.]: A1-A3 1.3872e-12, C2 2.80948e-15, C3 0, C4 6.4126e-17, D 1.5332e-13
- Acidifcation potential, Accumulated Exceedance (AP) [Mole of H+ eq.]: A1-A3 0.442822, C2 0.00107519, C3 0, C4 0.000116329, D -0.0628678
- Eutrophication potential - freshwater (EP-freshwater) [kg P eq.]: A1-A3 0.000237646, C2 5.37994e-7, C3 0, C4 2.75062e-8, D -3.933e-6
- Eutrophication potential - marine (EP-marine) [kg N eq.]: A1-A3 0.0753827, C2 0.000525538, C3 0, C4 3.01998e-5, D -0.0130558
- Eutrophication potential - terrestrial (EP-terrestrial) [Mole of N eq.]: A1-A3 0.801782, C2 0.00578313, C3 0, C4 0.000331796, D -0.141449
- Photochemical Ozone Creation Potential (POCP) [kg NMVOC eq.]: A1-A3 0.259233, C2 0.000997277, C3 0, C4 9.15082e-5, D -0.0436429
- Abiotic depletion potential - non-fossil resources (ADPE) [kg Sb eq.]: A1-A3 0.0085358, C2 4.30093e-8, C3 0, C4 1.54906e-9, D 7.0096e-7
- Abiotic depletion potential - fossil resources (ADPF) [MJ]: A1-A3 2326.65, C2 2.33907, C3 0, C4 0.216662, D -165.981
- Water (user) deprivation potential (WDP) [m³ world equiv.]: A1-A3 8.99934, C2 0.0018769, C3 0, C4 0.00174903, D 0.673555

## Use advice
The data set represents a cradle to gate inventory. It can be used to characterise the supply chain situation of the respective commodity in a representative manner. Combination with individual unit processes using this commodity enables the generation of user-specific (product) LCAs.

## Data sources
- Documentation of data quality management
- GaBi Database Edition 2021, CUP2021.01
- GaBi database (all versions)
