# Grey cast iron part; cast iron

Dataset: ILCD process, EPD, generic dataset
Geography: DE
Reference year: 2021
Valid until: 2022
Classification: oekobau.dat: Metalle / Stahl und Eisen / Guss- und Schmiedeteile aus Stahl und Eisen
Owner: Sphera Solutions GmbH
Compliance: EN 15804+A2
Review: Dependent internal review by Sphera Solutions GmbH; Independent external review by GaBi user forum
Amounts: rows without a unit in brackets have none in this file; such an amount is in the reference unit of its flow, which a separate flow dataset defines
copyright: true
licenseType: Free of charge for all users and uses
accessRestrictions: The license conditions as stated on https://www.oekobaudat.de/ apply.
accessRestrictions: Es gelten die Lizenzbedingungen wie sie auf https://www.oekobaudat.de/ genannt sind.

## General comment
This data set has been modeled according to the European Standard EN 15804+A2 for Sustainable Building. Results are depicted in modules that allow the structured expression of results over the entire life cycle.

## Geography
The data set represents the country specific situation in Germany, focusing on the main technologies, the region specific characteristics and / or import statistics.

## Time period
Annual average

## Technology and included processes
Steel scrap, cast iron scrap and alloy components are melted in a cupola furnace. A model is formed in sand (as moulding material), the model is removed and the resting cavity effused with melted metal. The life cycle analysis of the grey iron part covers the cradle-to-gate phase. The system boundaries are represented by the finished product at the factory gate. Transports from the factory to the building site are not considered and must be included according to the system boundaries. In the present data set 100 per cent secondary material is assumed as basic material. Increased demand for steel scrap is satisfied with primary steel.

In the disposal phase, mechanical dismantling is accounted for in module C1 for steel products (excavator), for all other metals a manual dismantling is assumed (no loads). Collecting losses are neglected. It is assumed that all metals reach the end of the waste status immediately after dismantling. This means that the loads for processing and the credits for the substitution of primary material are shown in Module D.
The transport in module C2 to the treatment plant takes place with a truck (50km).
Module D includes loads for sorting, remelting, slag treatment, landfill, filtration of dusts and dross treatment. Credits are given for the net scrap amount (amount returned minus secondary material content, minus processing losses) for the average material mix (from different alloys).

## Technical purpose
This product can be used in construction.

## Safety margin
20 %. Product system depicted except for a few missing processes / flows. Technological, temporal and geographic representativeness partly given.

## Reference product
- Grey cast iron part: 1

## Inputs
- Use of renewable primary energy as energy carrier (PERE) [MJ]: A1-A3 4.11193, C1 0.000250036, C2 0.00218616, D -0.0756238
- Use of renewable primary energy resources used as raw materials (PERM) [MJ]: A1-A3 0, C1 0, C2 0, D 0
- Total use of renewable primary energy (PERT) [MJ]: A1-A3 4.11193, C1 0.000250036, C2 0.00218616, D -0.0756238
- Use of non renewable primary energy as energy carrier (PENRE) [MJ]: A1-A3 15.335, C1 0.00430813, C2 0.0376677, D 0.864004
- Use of non renewable primary energy resources used as raw materials (PENRM) [MJ]: A1-A3 0, C1 0, C2 0, D 0
- Total use of non renewable primary energy resource (PENRT) [MJ]: A1-A3 15.335, C1 0.00430813, C2 0.0376677, D 0.864004
- Use of secondary material (SM) [kg]: A1-A3 0, C1 0, C2 0, D 0
- Use of renewable secondary fuels (SF) [MJ]: A1-A3 0, C1 0, C2 0, D 0
- Use of non renewable secondary fuels (NRSF) [MJ]: A1-A3 0, C1 0, C2 0, D 0
- Net use of fresh water (FW) [m3]: A1-A3 0.00230106, C1 2.2222e-7, C2 1.94295e-6, D 7.88262e-5

## Outputs
- Hazardous waste disposed (HWD) [kg]: A1-A3 2.78759e-9, C1 1.80066e-13, C2 1.57439e-12, D -7.27509e-11
- Non harzardous waste disposed (NHWD) [kg]: A1-A3 0.2867, C1 6.9543e-7, C2 6.08042e-6, D 0.0016943
- Radioactive waste disposed (RWD) [kg]: A1-A3 0.000507013, C1 4.13421e-9, C2 3.61471e-8, D -9.76057e-6
- Components for re-use (CRU) [kg]: A1-A3 0, C1 0, C2 0, D 0
- Materials for recycling (MFR) [kg]: A1-A3 0, C1 1, C2 0, D 0
- Materials for energy recovery (MER) [kg]: A1-A3 0, C1 0, C2 0, D 0
- Exported electrical energy (EEE) [MJ]: A1-A3 0, C1 0, C2 0, D 0
- Exported thermal energy (EET) [MJ]: A1-A3 0, C1 0, C2 0, D 0

## Impact indicators
- Global Warming Potential - total (GWP-total) [kg CO2 eq.]: A1-A3 1.62997, C1 0.000322305, C2 0.00286116, D 0.116957
- Global Warming Potential - fossil fuels (GWP-fossil) [kg CO2 eq.]: A1-A3 1.62368, C1 0.000320149, C2 0.00284173, D 0.117124
- Global Warming Potential - biogenic (GWP-biogenic) [kg CO2 eq.]: A1-A3 0.00495557, C1 6.93722e-8, C2 1.17716e-6, D -0.000170167
- Global Warming Potential - land use and land use change (GWP-luluc) [kg CO2 eq.]: A1-A3 0.00133197, C1 2.08733e-6, C2 1.82504e-5, D 2.75267e-6
- Depletion potenzial of the stratospheric ozone layer (ODP) [kg CFC-11 eq.]: A1-A3 1.67611e-14, C1 8.31628e-20, C2 7.27125e-19, D -3.80543e-16
- Acidifcation potential, Accumulated Exceedance (AP) [Mole of H+ eq.]: A1-A3 0.0018042, C1 4.31043e-6, C2 8.05696e-6, D 0.000323563
- Eutrophication potential - freshwater (EP-freshwater) [kg P eq.]: A1-A3 2.21668e-6, C1 6.6843e-10, C2 5.84435e-9, D 2.0242e-8
- Eutrophication potential - marine (EP-marine) [kg N eq.]: A1-A3 0.000502365, C1 1.96097e-6, C2 3.71167e-6, D 6.71947e-5
- Eutrophication potential - terrestrial (EP-terrestrial) [Mole of N eq.]: A1-A3 0.00539894, C1 2.15611e-5, C2 4.15269e-5, D 0.000728
- Photochemical Ozone Creation Potential (POCP) [kg NMVOC eq.]: A1-A3 0.00150822, C1 5.87288e-6, C2 7.23785e-6, D 0.000224617
- Abiotic depletion potential - non-fossil resources (ADPE) [kg Sb eq.]: A1-A3 2.2716e-7, C1 2.82717e-11, C2 2.47191e-10, D -1.7398e-9
- Abiotic depletion potential - fossil resources (ADPF) [MJ]: A1-A3 15.3233, C1 0.00430795, C2 0.0376661, D 0.854256
- Water (user) deprivation potential (WDP) [m³ world equiv.]: A1-A3 0.0232301, C1 1.26344e-6, C2 1.10468e-5, D -0.00167178

## Use advice
The data set represents a cradle to gate inventory. It can be used to characterise the supply chain situation of the respective commodity in a representative manner. Combination with individual unit processes using this commodity enables the generation of user-specific (product) LCAs.

## Data sources
- Documentation of data quality management
- GaBi Database Edition 2021, CUP2021.01
- GaBi database (all versions)
