# Marble slab

Dataset: ILCD process, EPD, generic dataset
Geography: DE
Reference year: 2021
Valid until: 2022
Classification: oekobau.dat: Mineralische Baustoffe / Steine und Elemente / Naturwerkstein
Owner: Sphera Solutions GmbH
Compliance: EN 15804+A2
Review: Dependent internal review by Sphera Solutions GmbH; Independent external review by GaBi user forum
Amounts: rows without a unit in brackets have none in this file; such an amount is in the reference unit of its flow, which a separate flow dataset defines
copyright: true
licenseType: Free of charge for all users and uses
accessRestrictions: The license conditions as stated on https://www.oekobaudat.de/ apply.
accessRestrictions: Es gelten die Lizenzbedingungen wie sie auf https://www.oekobaudat.de/ genannt sind.

## General comment
This data set has been modeled according to the European Standard EN 15804+A2 for Sustainable Building. Results are depicted in modules that allow the structured expression of results over the entire life cycle.

## Geography
The data set represents the country specific situation in Germany, focusing on the main technologies, the region specific characteristics and / or import statistics.

## Time period
Annual average

## Technology and included processes
Marble ingots are obtained from quarries by blasting and sawing. After transport to the factory, the rough cut is done with a special saw, as well as the gate in plate blanks. These are further refined by grinding and polishing and then formatted. The life cycle assessment is dominated by the energy used for the individual processing steps as well as by the transport.

In the disposal phase, a mechanical dismantling (excavator) is assumed in module C1. The transport in module C2 to the treatment plant takes place with a truck (50km). In module C3, the material is processed, any reinforcement is fed to a sink (no loads, no credits). A treatment loss of 25% was assumed. This loss is fed to an inert material landfill within Module C3 (average landfill emissions). In Module D, a credit for the net amount of material (excluding reinforcement and treatment losses) for the substitution of natural gravel as backfill material is given.

## Technical purpose
Marble slabs are mainly used as floor- or wall covering as well as for the production of kitchen worktops or window sills.

## Safety margin
20 %. Product system depicted except for a few missing processes / flows. Technological, temporal and geographic representativeness partly given.

## Reference product
- Marble slab: 1

## Inputs
- Use of renewable primary energy as energy carrier (PERE) [MJ]: A1-A3 67.7249, A4 9.56663, C1 0.0130019, C2 0.113681, C3 0.687813, D -0.26931
- Use of renewable primary energy resources used as raw materials (PERM) [MJ]: A1-A3 0, A4 0, C1 0, C2 0, C3 0, D 0
- Total use of renewable primary energy (PERT) [MJ]: A1-A3 67.7249, A4 9.56663, C1 0.0130019, C2 0.113681, C3 0.687813, D -0.26931
- Use of non renewable primary energy as energy carrier (PENRE) [MJ]: A1-A3 207.521, A4 85.3964, C1 0.224023, C2 1.95872, C3 6.17914, D -0.98903
- Use of non renewable primary energy resources used as raw materials (PENRM) [MJ]: A1-A3 0, A4 0, C1 0, C2 0, C3 0, D 0
- Total use of non renewable primary energy resource (PENRT) [MJ]: A1-A3 207.521, A4 85.3964, C1 0.224023, C2 1.95872, C3 6.17914, D -0.98903
- Use of secondary material (SM) [kg]: A1-A3 0, A4 0, C1 0, C2 0, C3 0, D 0
- Use of renewable secondary fuels (SF) [MJ]: A1-A3 0, A4 0, C1 0, C2 0, C3 0, D 0
- Use of non renewable secondary fuels (NRSF) [MJ]: A1-A3 0, A4 0, C1 0, C2 0, C3 0, D 0
- Net use of fresh water (FW) [m3]: A1-A3 0.112569, A4 0.0040387, C1 1.15554e-5, C2 0.000101034, C3 0.00156287, D -0.000163256

## Outputs
- Hazardous waste disposed (HWD) [kg]: A1-A3 3.67383e-8, A4 5.33122e-9, C1 9.36342e-12, C2 8.18681e-11, C3 5.0563e-10, D -1.59348e-10
- Non harzardous waste disposed (NHWD) [kg]: A1-A3 9.4768, A4 0.0167481, C1 3.61624e-5, C2 0.000316182, C3 15.1478, D -0.656778
- Radioactive waste disposed (RWD) [kg]: A1-A3 0.0140419, A4 0.0010439, C1 2.14979e-7, C2 1.87965e-6, C3 5.44857e-5, D -2.91685e-5
- Components for re-use (CRU) [kg]: A1-A3 0, A4 0, C1 0, C2 0, C3 0, D 0
- Materials for recycling (MFR) [kg]: A1-A3 0, A4 0, C1 0, C2 0, C3 37.83, D 0
- Materials for energy recovery (MER) [kg]: A1-A3 0, A4 0, C1 0, C2 0, C3 0, D 0
- Exported electrical energy (EEE) [MJ]: A1-A3 0, A4 0, C1 0, C2 0, C3 0, D 0
- Exported thermal energy (EET) [MJ]: A1-A3 0, A4 0, C1 0, C2 0, C3 0, D 0

## Impact indicators
- Global Warming Potential - total (GWP-total) [kg CO2 eq.]: A1-A3 16.4968, A4 6.26366, C1 0.0167599, C2 0.14878, C3 0.391931, D -0.075358
- Global Warming Potential - fossil fuels (GWP-fossil) [kg CO2 eq.]: A1-A3 16.4177, A4 6.24155, C1 0.0166477, C2 0.14777, C3 0.395527, D -0.0749487
- Global Warming Potential - biogenic (GWP-biogenic) [kg CO2 eq.]: A1-A3 0.0560724, A4 0.0158917, C1 3.60735e-6, C2 6.12122e-5, C3 -0.00518167, D -6.68405e-5
- Global Warming Potential - land use and land use change (GWP-luluc) [kg CO2 eq.]: A1-A3 0.023022, A4 0.00621081, C1 0.000108541, C2 0.00094902, C3 0.00158542, D -0.000342388
- Depletion potenzial of the stratospheric ozone layer (ODP) [kg CFC-11 eq.]: A1-A3 2.02948e-13, A4 3.984e-14, C1 4.32446e-18, C2 3.78105e-17, C3 1.64113e-15, D -9.67734e-16
- Acidifcation potential, Accumulated Exceedance (AP) [Mole of H+ eq.]: A1-A3 0.0480913, A4 0.186969, C1 0.000224142, C2 0.000418962, C3 0.003182, D -0.00024823
- Eutrophication potential - freshwater (EP-freshwater) [kg P eq.]: A1-A3 2.10587e-5, A4 6.31392e-6, C1 3.47584e-8, C2 3.03906e-7, C3 7.64658e-7, D -2.08549e-7
- Eutrophication potential - marine (EP-marine) [kg N eq.]: A1-A3 0.011108, A4 0.0503614, C1 0.00010197, C2 0.000193007, C3 0.00119093, D -9.65424e-5
- Eutrophication potential - terrestrial (EP-terrestrial) [Mole of N eq.]: A1-A3 0.120139, A4 0.551491, C1 0.00112118, C2 0.0021594, C3 0.0130867, D -0.00106281
- Photochemical Ozone Creation Potential (POCP) [kg NMVOC eq.]: A1-A3 0.0324144, A4 0.139026, C1 0.00030539, C2 0.000376368, C3 0.00351387, D -0.000228344
- Abiotic depletion potential - non-fossil resources (ADPE) [kg Sb eq.]: A1-A3 2.6069e-6, A4 6.67323e-7, C1 1.47013e-9, C2 1.28539e-8, C3 2.05239e-7, D -1.5307e-8
- Abiotic depletion potential - fossil resources (ADPF) [MJ]: A1-A3 207.477, A4 85.2994, C1 0.224013, C2 1.95864, C3 6.17735, D -0.988833
- Water (user) deprivation potential (WDP) [m³ world equiv.]: A1-A3 3.85754, A4 0.0308019, C1 6.56991e-5, C2 0.000574433, C3 0.0524761, D -0.00182697

## Use advice
This dataset refers to the production of 1 m² marble slab with a thickness of 2 cm. The surface weight is 52 kg. The data set can be used approximately for the estimation of other stone thicknesses.

The data set represents a cradle to gate inventory. It can be used to characterise the supply chain situation of the respective commodity in a representative manner. Combination with individual unit processes using this commodity enables the generation of user-specific (product) LCAs.

## Data sources
- GaBi databases
- Documentation of data quality management
- GaBi Database Edition 2021, CUP2021.01
- GaBi database (all versions)
