# Brickwork Support Brackets JVAeco+

Dataset: ILCD process, EPD, specific dataset
Geography: DE
Reference year: 2021
Valid until: 2026
Classification: OEKOBAU.DAT: Metalle / Edelstahl / Befestigungsmittel
Classification: IBUCategories: 02 Bauprodukte / Metallbauprodukte und Zubehör / Baustähle
Method details: Baustähle.pdf
Generated by: myclimate Deutschland gGmbH
Registration number: EPD-JDL-20200259-IBA1-DE
Owner: Jordahl GmbH
Compliance: DIN EN 15804; ISO 14025
Review: Accredited third party review by Institut Bauen und Umwelt e. V.
Amounts: rows without a unit in brackets have none in this file; such an amount is in the reference unit of its flow, which a separate flow dataset defines
copyright: true
licenseType: Free of charge for all users and uses
accessRestrictions: None

## General comment
The JORDAHL brickwork support brackets are part of a system for brickwork with which facades are permanently fixed. Different designs allow their use both in new buildings and in renovations. They take up the dead weight of the facing brickwork and transfer it via anchor channels or wall plugs into the load-bearing inner wall of reinforced concrete. The anchor channels or dowel fastenings are not part of the declared product. Together with the supporting structure, a double skinned construction is formed. The triangular recess in the bracket body (JVAeco+) reduces the material expenditure to the essential static tasks and additionally minimizes the heat flow in the area of the brickwork support bracket.

The brackets are designed as standard to support masonry with a width of 90 mm to 115 mm and air layers between 60 and 300 mm.

The declared product is a system made of Lean Duplex stainless steel, consisting of bracket head and bracket body of different types, sizes and load levels.

The bracket head, consisting of two serrated plates, is welded to a web plate (bracket body). Depending on the design, a support plate or an angle is welded to the

console body to support the facing brickwork. A pressure plate on the brickwork support bracket, which is supported by the load-bearing anchoring base (see figure 1), is used to transfer the compressive forces generated. In the case of special design variants, it may be necessary to fix several bracket backs with welded bracket heads to one support structure (with angles).

The bracket head reaches over serrated plates into a bend of an inclined hole plate and is braced with the anchoring base by means of an approved fastening means (clamping disc and special screw or wall plugs) and thus held horizontally and vertically.

Figure 1: Brickwork support bracket with cast-in anchor channel

Bracket body (Fig.1)

For placing the products on the market in the EU/EFTA (except Switzerland) the regulation (EU) No. 305/2011 (CPR) applies.

The products require a declaration of performance in accordance with the harmonized standards DIN EN 1090-1:2009+A1:2011 and the CE marking. For the use of the products the test report TP-12-0009 and the respective national regulations apply.

Bracket head (Fig.1)

The use of the product is subject to the respective national regulations at the place of use, in Germany for example the building regulations of the federal states, and the technical regulations based on these regulations. General technical approval Z-21.8-1868 dated April 15, 2020 according to DIBt.

## Technology and included processes
After the stainless steel sheets have been delivered, a laser is used to cut the bracket backs, which are available in various sizes, from the metal plates. The accumulated metal waste and filter dust is stored in containers, collected by a scrap dealer and recycled in accordance with regulations. Shaping & Processing The bracket heads and the bracket back are formed by a press brake. The pre-formed individual parts of the brickwork support bracket are passed on for further processing. The bracket head is welded together by a welding robot. Afterwards, the individual parts of the brickwork support bracket (welded bracket head, bracket back, support plate/angle, pressure plate) are joined to form a product by manual welding. Shot peening The manufactured brickwork support brackets are shot-blasted to prevent corrosion.
Technical data:
The following technical data apply to facing brickwork made of stainless steel. The test standard is DIN EN 845-1.
Declared unit:
The declaration refers to the production of 1 kg brickwork support brackets JVAeco+ made of stainless steel.

## Technical purpose
JVAeco+ N, NA, NU intercept closed wall surfaces.

JVAeco+ P, PAR are preferably used in normal wall areas and edge areas (e.g. inside corners or vertical joints).

JVAeco+ E, EA are used in the end area of facing masonry panels (inner corners or vertical joints).

JVAeco+ F, FAR are combined support brackets with continuous support angle and two or more bracket backs, for visible or invisible building openings.

JVAeco+ NFT, NAFT are mainly used for openings that are supported by prefabricated columns and do not have a lateral support.

The respective types have a further variant which serves to overcome a certain height by means of a step, downwards.

Examples of this are: JVAeco+

NA-
PAR-
EA-
FAR-
NAFT- (with lowered bracket support)
NU- (with raised bracket support)

## Reference product
- Verblenderkonsole JVAeco+ (): 1

## Inputs
- Renewable primary energy as energy carrier (PERE) [MJ]: A1-A3 1.8958, C2 -0.0624143, C3 0, C4 4.73537e-5, D 9.07645e-6
- Renewable primary energy resources as material utilization (PERM) [MJ]: A1-A3 0, C2 0, C3 0, C4 0, D 0
- Total use of renewable primary energy resources (PERT) [MJ]: A1-A3 1.8958, C2 -0.0624143, C3 0, C4 4.73537e-5, D 9.07645e-6
- Non renewable primary energy as energy carrier (PENRE) [MJ]: A1-A3 52.1359, C2 -1.54349, C3 0, C4 0.127876, D 0.00355358
- Non renewable primary energy as material utilization (PENRM) [MJ]: A1-A3 0, C2 0, C3 0, C4 0, D 0
- Total use of non renewable primary energy resources (PENRT) [MJ]: A1-A3 52.1359, C2 -1.54349, C3 0, C4 0.127876, D 0.00355358
- Use of secondary material (SM) [kg]: A1-A3 0.4944, C2 0, C3 0, C4 0, D 0.455532
- Use of renewable secondary fuels (RSF) [MJ]: A1-A3 0, C2 0, C3 0, C4 0, D 0
- Use of non renewable secondary fuels (NRSF) [MJ]: A1-A3 0, C2 0, C3 0, C4 0, D 0
- Use of net fresh water (FW) [m^3]: A1-A3 1.12815, C2 -0.0151177, C3 0, C4 -2.65747e-5, D -4.35589e-6

## Outputs
- Hazardous waste disposed (HWD) [kg]: A1-A3 3.67259e-5, C2 -5.72505e-7, C3 0, C4 3.19503e-7, D 8.50222e-9
- Non hazardous waste disposed (NHWD) [kg]: A1-A3 5.3919, C2 -0.223301, C3 0, C4 5.01311e-6, D 0.0496399
- Radioactive waste disposed (RWD) [kg]: A1-A3 0.00016906, C2 -3.21964e-6, C3 0, C4 8.74591e-7, D 2.41956e-8
- Components for re-use (CRU) [kg]: A1-A3 0, C2 0, C3 0, C4 0, D 0
- Materials for recycling (MFR) [kg]: A1-A3 0, C2 0, C3 0.95, C4 0, D 0
- Materials for energy recovery (MER) [kg]: A1-A3 0, C2 0, C3 0, C4 0, D 0
- Exported electrical energy (EEE) [MJ]: A1-A3 0, C2 0, C3 0, C4 0, D 0
- Exported thermal energy (EET) [MJ]: A1-A3 0, C2 0, C3 0, C4 0, D 0

## Impact indicators
- Global warming potential (GWP) [kg CO_(2)-Äq.]: A1-A3 4.4346, C2 0.00859495, C3 0, C4 0.000242229, D -2.72347
- Depletion potential of the stratospheric ozone layer (ODP) [kg CFC11-Äq.]: A1-A3 2.41318e-7, C2 1.56198e-9, C3 0, C4 4.22567e-11, D -1.11794e-7
- Acidification potential of land and water (AP) [kg SO_(2)-Äq.]: A1-A3 0.0222394, C2 2.23066e-5, C3 0, C4 1.45689e-6, D -0.0158553
- Eutrophication potential (EP) [kg PO_(4)^(3)-Äq.]: A1-A3 0.00237281, C2 3.80438e-6, C3 0, C4 3.046e-7, D -0.00142349
- Formation potential of tropospheric ozone photochemical oxidants (POCP) [kg Ethen-Äq.]: A1-A3 0.00107114, C2 8.18499e-7, C3 0, C4 5.08797e-8, D -0.000651819
- Abiotic depletion potential for non fossil resources (ADPE) [kg Sb-Äq.]: A1-A3 0.00014221, C2 5.02954e-10, C3 0, C4 6.63967e-11, D -0.000120102
- Abiotic depletion potential for fossil resources (ADPF) [MJ]: A1-A3 46.8325, C2 0.120435, C3 0, C4 0.00334465, D -27.169

## Use advice
Scope:
This document refers to the Brickwork Support Bracket Systems JVAeco+, manufactured in Trebbin, Germany. The declared unit refers to 1 kg Brickwork Support Bracket System as specific product. The data collection for the production was collected on a plant-specific basis with current annual data from 2019. The declaration holder is responsible for the underlying data and its verification.
System boundary:
The Life Cycle Assessment considers the system boundaries "cradle to gate - with options" and follows the modular construction system described by EN 15804. The LCA takes into account the following modules:

A1: Raw material supply: extraction of raw material, production of precursors, processing of secondary material

A2: Transport: transport of raw materials to manufacturing plant
A3: Manufacturing: Production of brickwork support brackets
C2: Transportation towards disposal: transport of discarded product as part of waste processing

C3: Waste processing: Waste management for reuse, recovery and/or recycling

C4: Disposal
D: Reuse, recovery or recycling potential as net flows and credits (benefits) for stainless steel

## Data sources
- ecoinvent database (all versions)
- ecoinvent 3.6 database
