# Joint sealing strips, butyl; Polybutadiene rubber

Dataset: ILCD process, EPD, generic dataset
Geography: DE
Reference year: 2021
Valid until: 2022
Classification: oekobau.dat: Komponenten von Fenstern und Vorhangfassaden / Dichtungskomponenten / -materialien / Fugendichtungsbänder
Owner: Sphera Solutions GmbH
Compliance: EN 15804+A2
Review: Dependent internal review by Sphera Solutions GmbH; Independent external review by GaBi user forum
Amounts: rows without a unit in brackets have none in this file; such an amount is in the reference unit of its flow, which a separate flow dataset defines
copyright: true
licenseType: Free of charge for all users and uses
accessRestrictions: The license conditions as stated on https://www.oekobaudat.de/ apply.
accessRestrictions: Es gelten die Lizenzbedingungen wie sie auf https://www.oekobaudat.de/ genannt sind.

## General comment
This data set has been modeled according to the European Standard EN 15804+A2 for Sustainable Building. Results are depicted in modules that allow the structured expression of results over the entire life cycle.

## Geography
The data set represents the country specific situation in Germany, focusing on the main technologies, the region specific characteristics and / or import statistics.

## Time period
Annual average

## Technology and included processes
The LCA of butyl joint sealing tapes covers basically the production of polybutadiene rubber. The system boundaries are represented by the finished product at the factory gate, with a density of 1.2g/cm3 and different thickness and width. Transports from the factory to the building site are not considered and must be included according to the system boundaries.
The rubber is produced by the polymerization of 1,3,- Butadiene. The reaction is started with an initiator and carried out in a solution or an emulsion. A catalyst, which can be a transition metal like Nickel or an alkyl metal like butyllithium, is used. The reaction is carried out in solvents and is highly exothermic. The solvents reduce the reaction rate and prevent runaway reactions. Either a batch process or a continuous process can be used.

In module C1, a manual dismantling (no loads) is assumed, collecting losses are neglected.
The transport in module C2 to the recycling plant takes place with a truck (50km).
Module C3 takes into account the grinding and thermal treatment (combustion) of the material. When calculating combustion emissions and credits, the specific calorific value of each material and the material composition are taken into account.
In module D credits for the substitution of electricity (German electricity mix) and thermal energy (from natural gas) are given.

## Technical purpose
This product can be used in construction.

## Safety margin
20 %. Product system depicted except for a few missing processes / flows. Technological, temporal and geographic representativeness partly given.

## Reference product
- Joint sealing strips, butyl: 1

## Inputs
- Use of renewable primary energy as energy carrier (PERE) [MJ]: A1-A3 11.1292, C2 0.00218616, C3 0.413212, D -5.87615
- Use of renewable primary energy resources used as raw materials (PERM) [MJ]: A1-A3 0, C2 0, C3 0, D 0
- Total use of renewable primary energy (PERT) [MJ]: A1-A3 11.1292, C2 0.00218616, C3 0.413212, D -5.87615
- Use of non renewable primary energy as energy carrier (PENRE) [MJ]: A1-A3 89.2475, C2 0.0376677, C3 44.6368, D -17.3795
- Use of non renewable primary energy resources used as raw materials (PENRM) [MJ]: A1-A3 36, C2 0, C3 -36, D 0
- Total use of non renewable primary energy resource (PENRT) [MJ]: A1-A3 125.247, C2 0.0376677, C3 8.63676, D -17.3795
- Use of secondary material (SM) [kg]: A1-A3 0, C2 0, C3 0, D 0
- Use of renewable secondary fuels (SF) [MJ]: A1-A3 0, C2 0, C3 0, D 0
- Use of non renewable secondary fuels (NRSF) [MJ]: A1-A3 0, C2 0, C3 0, D 0
- Net use of fresh water (FW) [m3]: A1-A3 0.0137276, C2 1.94295e-6, C3 0.00745769, D -0.00218593

## Outputs
- Hazardous waste disposed (HWD) [kg]: A1-A3 1.69412e-8, C2 1.57439e-12, C3 3.11505e-10, D -6.0336e-9
- Non harzardous waste disposed (NHWD) [kg]: A1-A3 0.0497211, C2 6.08042e-6, C3 0.316808, D -0.00916646
- Radioactive waste disposed (RWD) [kg]: A1-A3 0.00127997, C2 3.61471e-8, C3 4.99999e-5, D -0.000631987
- Components for re-use (CRU) [kg]: A1-A3 0, C2 0, C3 0, D 0
- Materials for recycling (MFR) [kg]: A1-A3 0, C2 0, C3 0, D 0
- Materials for energy recovery (MER) [kg]: A1-A3 0, C2 0, C3 1, D 0
- Exported electrical energy (EEE) [MJ]: A1-A3 0, C2 0, C3 4.70734, D 0
- Exported thermal energy (EET) [MJ]: A1-A3 0, C2 0, C3 10.8077, D 0

## Impact indicators
- Global Warming Potential - total (GWP-total) [kg CO2 eq.]: A1-A3 5.77848, C2 0.00286116, C3 3.05014, D -1.11841
- Global Warming Potential - fossil fuels (GWP-fossil) [kg CO2 eq.]: A1-A3 5.64917, C2 0.00284173, C3 3.04963, D -1.10488
- Global Warming Potential - biogenic (GWP-biogenic) [kg CO2 eq.]: A1-A3 0.125763, C2 1.17716e-6, C3 0.000312854, D -0.0119044
- Global Warming Potential - land use and land use change (GWP-luluc) [kg CO2 eq.]: A1-A3 0.00354039, C2 1.82504e-5, C3 0.000190205, D -0.00162326
- Depletion potenzial of the stratospheric ozone layer (ODP) [kg CFC-11 eq.]: A1-A3 4.7158e-14, C2 7.27125e-19, C3 1.67472e-15, D -2.56528e-14
- Acidifcation potential, Accumulated Exceedance (AP) [Mole of H+ eq.]: A1-A3 0.00712752, C2 8.05696e-6, C3 0.000528889, D -0.00113372
- Eutrophication potential - freshwater (EP-freshwater) [kg P eq.]: A1-A3 7.31237e-6, C2 5.84435e-9, C3 2.42603e-7, D -2.70068e-6
- Eutrophication potential - marine (EP-marine) [kg N eq.]: A1-A3 0.00237057, C2 3.71167e-6, C3 0.000119315, D -0.000416984
- Eutrophication potential - terrestrial (EP-terrestrial) [Mole of N eq.]: A1-A3 0.0255049, C2 4.15269e-5, C3 0.00243837, D -0.00444236
- Photochemical Ozone Creation Potential (POCP) [kg NMVOC eq.]: A1-A3 0.00721321, C2 7.23785e-6, C3 0.000332237, D -0.0010921
- Abiotic depletion potential - non-fossil resources (ADPE) [kg Sb eq.]: A1-A3 9.30403e-7, C2 2.47191e-10, C3 2.27434e-8, D -3.46566e-7
- Abiotic depletion potential - fossil resources (ADPF) [MJ]: A1-A3 132.441, C2 0.0376661, C3 1.43642, D -17.3771
- Water (user) deprivation potential (WDP) [m³ world equiv.]: A1-A3 0.0391738, C2 1.10468e-5, C3 0.311883, D -0.0132705

## Use advice
The data set represents a cradle to gate inventory. It can be used to characterise the supply chain situation of the respective commodity in a representative manner. Combination with individual unit processes using this commodity enables the generation of user-specific (product) LCAs.

## Data sources
- Polybutadiene: Properties and Applications
- dsir.gov: Polybutadiene
- IBU-Declaration Dt. Bauchemie; MA resin products, high-filled. flow (EPD-DIV-20130101-IBE1-EN), 2013
- Documentation of data quality management
- GaBi Database Edition 2021, CUP2021.01
- GaBi database (all versions)
