# Incineration plastics in municipal solid waste plant (incl. credits); plastic incineration

Dataset: ILCD process, EPD, generic dataset
Geography: DE
Reference year: 2018
Valid until: 2022
Classification: oekobau.dat: End of Life / Generisch / Kunststoffe
Owner: thinkstep
Compliance: DIN EN 15804
Review: Dependent internal review by thinkstep, IABP-GaBi, IBP-GaBi; Independent external review by GaBi user forum, GaBi bug forum, GaBi user community
Amounts: rows without a unit in brackets have none in this file; such an amount is in the reference unit of its flow, which a separate flow dataset defines
copyright: true

## General comment
This data set has been modeled according to the European Standard EN 15804 for Sustainable Building. Results are depicted in modules that allow the structured expression of results over the entire life cycle.

## Geography
The data set represents the country specific situation in Germany, focusing on the main technologies, the region specific characteristics and / or import statistics.

## Time period
Annual average

## Technology and included processes
The dataset covers the incineration of plastic in a waste incinerator including energy credits.
Background system:
Electricity: Electricity is modelled according to the individual country-specific situations. The country-specific modelling is achieved on multiple levels. Firstly, individual energy carrier specific power plants and plants for renewable energy sources are modelled according to the current national electricity grid mix. Modelling the electricity consumption mix includes transmission / distribution losses and the own use by energy producers (own consumption of power plants and "other" own consumption e.g. due to pumped storage hydro power etc.), as well as imported electricity. Secondly, the national emission and efficiency standards of the power plants are modelled as well as the share of electricity plants and combined heat and power plants (CHP). Thirdly, the country-specific energy carrier supply (share of imports and / or domestic supply) including the country-specific energy carrier properties (e.g. element and energy content) are accounted for. Fourthly, the exploration, mining/production, processing and transport processes of the energy carrier supply chains are modelled according to the specific situation of each electricity producing country. The different production and processing techniques (emissions and efficiencies) in the different energy producing countries are considered, e.g. different crude oil production technologies or different flaring rates at the oil platforms.
Thermal energy, process steam: The thermal energy and process steam supply is modelled according to the individual country-specific situation with regard to emission standards and considered energy carriers. The thermal energy and process steam are produced at heat plants. Efficiencies for thermal energy production are by definition 100% in relation to the corresponding energy carrier input. For process steam the efficiency ranges from 85%, 90% to 95%. The energy carriers used for the generation of thermal energy and process steam are modelled according to the specific import situation (see electricity above).
Transports: All relevant and known transport processes are included. Ocean-going and inland ship transport as well as rail, truck and pipeline transport of bulk commodities are considered.
Energy carriers: The energy carriers are modelled according to the specific supply situation (see electricity above).
Refinery products: Diesel fuel, gasoline, technical gases, fuel oils, lubricants and residues such as bitumen are modelled with a parameterised country-specific refinery model. The refinery model represents the current national standard in refining techniques (e.g. emission level, internal energy consumption, etc.) as well as the individual country-specific product output spectrum, which can be quite different from country to country. The supply of crude oil is modelled, again, according to the country-specific situation with the respective properties of the resources.

## Technical purpose
This product can be used in construction.

## Safety margin
0 %.

## Reference product
- Waste incineration of plastics (unspecified) fraction in municipal solid waste (MSW): 1

## Inputs
- Use of renewable primary energy (PERE) [MJ]: C3 0.306423, D -5.89084
- Primary energy resources used as raw materials (PERM) [MJ]: C3 0, D 0
- Total use of renewable primary energy resources (PERT) [MJ]: C3 0.306423, D -5.89084
- Use of non-renewable primary energy (PENRE) [MJ]: C3 1.17855, D -20.561
- Non-renewable primary energy resources used as raw materials (PENRM) [MJ]: C3 0, D 0
- Total use of non-renewable primary energy resources (PENRT) [MJ]: C3 1.17855, D -20.561
- Input of secondary material (SM) [kg]: C3 0, D 0
- Use of renewable secondary fuels (RSF) [MJ]: C3 0, D 0
- Use of non renewable secondary fuels (NRSF) [MJ]: C3 0, D 0
- Use of net fresh water (FW) [m3]: C3 0.00621797, D -0.00274784

## Outputs
- Hazardous waste disposed (HWD) [kg]: C3 4.49086e-9, D -1.08752e-8
- Non-hazardous waste disposed (NHWD) [kg]: C3 0.263974, D -0.00968417
- Radioactive waste disposed (RWD) [kg]: C3 4.37289e-5, D -0.000711708
- Components for re-use (CRU) [kg]: C3 0, D 0
- Materials for Recycling (MFR) [kg]: C3 0, D 0
- Material for Energy Recovery (MER) [kg]: C3 0, D 0
- Exported electrical energy (EEE) [MJ]: C3 4.70734, D 0
- Exported thermal energy (EET) [MJ]: C3 10.8077, D 0

## Impact indicators
- Global warming potential (GWP) [kg CO2 eq.]: C3 2.52745, D -1.40543
- Ozone Depletion Potential (ODP) [kg R11 eq.]: C3 1.70912e-15, D -3.25739e-14
- Acidification potential (AP) [kg SO2 eq.]: C3 0.000280596, D -0.00118723
- Eutrophication potential (EP) [kg Phosphate eq.]: C3 6.25215e-5, D -0.000225006
- Photochemical Ozone Creation Potential (POCP) [kg Ethene eq.]: C3 2.60162e-5, D -0.000120883
- Abiotic depletion potential for non fossil resources (ADPE) [kg Sb eq.]: C3 1.78439e-8, D -3.49583e-7
- Abiotic depletion potential for fossil resources (ADPF) [MJ]: C3 1.06816, D -18.7643

## Use advice
The data set represents a cradle to gate inventory. It can be used to characterise the supply chain situation of the respective commodity in a representative manner. Combination with individual unit processes using this commodity enables the generation of user-specific (product) LCAs.

## Data sources
- GaBi Database Edition 2020, SP40
- GaBi database (all versions)
