# EVA-Dach- und Dichtungsbahnen EVALON®V,VG,VSK, dual

Dataset: ILCD process, EPD, average dataset
Geography: DE
Reference year: 2020
Valid until: 2025
Classification: OEKOBAU.DAT: Kunststoffe / Dachbahnen / EVA-Dachbahnen (Etylen-Vinylacetat)
Classification: IBUCategories: 02 Bauprodukte / Abdichtungen / Dach- und Dichtungsbahnsysteme aus Kunststoffen und Elastomeren
Method details: Dach- und Dichtungsbahnsysteme aus Kunststoffen und Elastomeren.pdf
Registration number: EPD-ALW-201900185-IBC1-DE
Owner: alwitra GmbH & Co.
Compliance: DIN EN 15804; ISO 14025
Review: Accredited third party review by Institut Bauen und Umwelt e. V.
Amounts: rows without a unit in brackets have none in this file; such an amount is in the reference unit of its flow, which a separate flow dataset defines
copyright: true

## General comment
In dieser Umweltproduktdeklaration werden bitumen-verträgliche Dach- und Dichtungsbahnensysteme aus EVAC –Ethylen-Vinyacetat-Terpolymer/Copolymere (in Deutschland EVA) beschrieben. Die deklarierten Produkte bestehen aus einer Hochpolymerlegierung aus EVA-Terpolymer und PVC (Polyvinylchlorid) inkl. Zusatzstoffen. EVALON® Bahnen sind unterseitig mit Polyestervlies (ggf. zusätzlich mit Glasvlies) kaschiert. Als Selbst-klebebahnen sind die Bahnen zusätzlich mit einer Selbstklebeschicht inkl. Schutzfolie kaschiert.

EVALON® Bahnen können auch mit einem mittigen Polyestergelege gefertigt werden. Die deklarierten Produkte werden im Kalanderverfahren hergestellt. Die Nahtfügung erfolgt mit Heißluft oder Tetrahydrofuran (THF).

Die Produktserie EVALON® umfasst folgende Varianten:

EVALON® V mit Polyestervlieskaschierung

(eff. Dicke 1,2/1,5 mm; Gesamtdicke 2,1/2,4 mm)

EVALON® VG mit Polyester-/Glasvlieskaschierung

(eff. Dicke 1,2/1,5 mm; Gesamtdicke 2,1/2,4 mm)

EVALON® VSK mit Polyestervlieskaschierung und Selbstklebeschicht (eff. Dicke 1,2/1,5 mm; Gesamtdicke 2,2/2,5 mm)

EVALON® VGSK mit Polyester-/Glasvlieskaschierung und Selbstklebeschicht (eff. Dicke 1,2/1,5 mm; Gesamtdicke 2,2/2,5 mm)

EVALON® dual mit mittiger Verstärkung, eff. Dicke/Gesamtdicke 1,5 mm

## Technology and included processes
Die Grundstoffe und Vorprodukte (außer der Kaschierung und der Selbstklebeschicht) werden in einem Mischer vorgemischt und anschließend zusammen mit den anderen Rezepturbestandteilen in einem Extruder plastifiziert. Die Kunststoffmasse wird über ein Mischwalzwerk als Zwischenstufe einem Kalander zugeführt, hier zu einer homogenen Bahn ausgewalzt und bekommt (je nach Bahnentyp) eine Kaschierlage (ggf. mit Selbstklebeschicht und Trennfolie) unterseitig zugeführt. Über spezielle Kühlwalzen erfolgt die Abkühlung der fertigen Bahn, die anschließend zu den endgültigen Maßen beschnitten und als Rollenware konfektioniert wird. Bei der verstärkten Bahnentype wird mittig ein Polystergelege eingebracht. Alle anfallenden unkaschierten Produktionsreste (Randstreifen) werden recycelt, d.h. der Produktion wieder direkt zugeführt. Die Herstellung unterliegt dem eingeführten Qualitätsmanagementsystem nach /ISO 9001/. Außerdem erfolgen externe Qualitätsprüfungen (Fremdüberwachung) durch die Staatliche Materialprüfanstalt Darmstadt.
Technische Daten:
2.3.1 Für kaschierte Bahnen

EVALON® V, VG, VSK, VGSK Dach- und Dichtungsbahn
Deklarierte Einheit:
Die deklarierte Einheit ist 1 m² durchschnittlich produziertes, installiertes und entsorgtes/recyceltes EVALON© Dach-und Dichtungsbahnsystem mit einer Dicke von 1,5 mm. Die Durchschnittsbildung erfolgte anhand der jährlichen Produktionsdaten (gesamte In- und Outputs pro Jahr). Die so errechneten Werte wurden auf eine repräsentative Dicke skaliert und entsprechen ca. 90% Marktanteil der ausgelieferten Produkte. Die näherungsweise Berechnung anderer Dicken kann durch folgende Rechenformel erfolgen:

Id,neu=(Idekl*dneu)/1,2, mit

Id,neu: Indikatorergebnis in Bezug auf eine neue Dicke

Idekl: Indikatorergebnis der jeweiligen Lebenszyklusphase

dneu: zu berechnende Dicke in mm

Die ökobilanziellen Abweichungen innerhalb der produzierten Produktvarianten können als gering eingestuft werden (< 5%).

Die Abweichungen kommen z.B. durch unterschiedliche Kaschierungen und oder Selbstklebeschichten von geringer Masse

## Technical purpose
Die Einsatzzwecke des deklarierten Produktes sind:

Dachabdichtung

Einlagige Abdichtung von nicht genutzten und genutzten Dächern in flacher und geneigter Form. Die Bahnen werden je nach Anforderung wie folgt verlegt:

EVALON® V und EVALON® VG

- lose verlegt unter Auflast

- mechanisch befestigt

- verklebt verlegt mit Systemklebstoff

EVALON® VSK

- verklebt verlegt (Selbstklebeschicht) auf diverse, bauübliche Untergründe mit alwitra Haftgrund SK oder SK-L.

EVALON® VGSK

- verklebt aufgrund der integrierten Brandschutzlage direkt und ohne Haftgrund auf unkaschierte EPS-Wärmedämmplatten. Sie können auch mit alwitra-Haftgrund wie EVALON®VSK verklebt werden

EVALON® dual

- lose verlegt unter Auflast

- mechanisch befestigt

Bauwerksabdichtung

Einlagige Abdichtung von nicht wasserdichten Bauwerken oder Bauteilen gegen Bodenfeuchte und nicht drückendes Wasser. Die Bahnen werden je nach Anforderung wie zuvor beschrieben verklebt verlegt oder lose verlegt.

Bei der Verarbeitung ist die Verlegeanleitung des Herstellers einzuhalten.

## Scenarios
- S1: Szenario 1
- S2: Szenario 2

## Reference product
- durchschnittlich produziertes und installiertes EVALON: 1

## Inputs
- Erneuerbare Primärenergie als Energieträger (PERE) [MJ]: A1-A3 23.7854, A4 0.0275, A5 2.62461, C2 (S1) 0.00373, C2 (S2) 0.055, C3 (S1) 0.42, C3 (S2) 5.35, D (S1) -7.58, D (S2) -16.1
- Erneuerbare Primärenergie zur stofflichen Nutzung (PERM) [MJ]: A1-A3 1.31461, A4 0, A5 -1.31461, C2 (S1) 0, C2 (S2) 0, C3 (S1) 0, C3 (S2) 0, D (S1) 0, D (S2) 0
- Total erneuerbare Primärenergie (PERT) [MJ]: A1-A3 25.1, A4 0.0275, A5 1.31, C2 (S1) 0.00373, C2 (S2) 0.055, C3 (S1) 0.42, C3 (S2) 5.35, D (S1) -7.58, D (S2) -16.1
- Nicht-erneuerbare Primärenergie als Energieträger (PENRE) [MJ]: A1-A3 102.403, A4 0.451, A5 8.42696, C2 (S1) 0.0613, C2 (S2) 0.904, C3 (S1) 53.92, C3 (S2) 10.7, D (S1) -32.1, D (S2) -107
- Nicht-erneuerbare Primärenergie zur stofflichen Nutzung (PENRM) [MJ]: A1-A3 52.597, A4 0, A5 -0.35696, C2 (S1) 0, C2 (S2) 0, C3 (S1) -52.24, C3 (S2) 0, D (S1) 0, D (S2) 0
- Total nicht erneuerbare Primärenergie (PENRT) [MJ]: A1-A3 155, A4 0.451, A5 8.07, C2 (S1) 0.0613, C2 (S2) 0.904, C3 (S1) 1.68, C3 (S2) 10.7, D (S1) -32.1, D (S2) -107
- Einsatz von Sekundärstoffen (SM) [kg]: A1-A3 0, A4 0, A5 0, C2 (S1) 0, C2 (S2) 0, C3 (S1) 0, C3 (S2) 0, D (S1) 0, D (S2) 0
- Erneuerbare Sekundärbrennstoffe (RSF) [MJ]: A1-A3 0, A4 0, A5 0, C2 (S1) 0, C2 (S2) 0, C3 (S1) 0, C3 (S2) 0, D (S1) 0, D (S2) 0
- Nicht erneuerbare Sekundärbrennstoffe (NRSF) [MJ]: A1-A3 0, A4 0, A5 0, C2 (S1) 0, C2 (S2) 0, C3 (S1) 0, C3 (S2) 0, D (S1) 0, D (S2) 0
- Einsatz von Süßwasserressourcen (FW) [m^3]: A1-A3 0.0763, A4 3.15e-5, A5 0.00437, C2 (S1) 4.28e-6, C2 (S2) 6.31e-5, C3 (S1) 0.00884, C3 (S2) 0.00292, D (S1) -0.0041, D (S2) -0.0523

## Outputs
- Gefährlicher Abfall zur Deponie (HWD) [kg]: A1-A3 8.82e-7, A4 2.57e-8, A5 4.56e-8, C2 (S1) 3.49e-9, C2 (S2) 5.15e-8, C3 (S1) 9.27e-9, C3 (S2) 5.91e-8, D (S1) -1.8e-8, D (S2) -5.94e-7
- Entsorgter nicht gefährlicher Abfall (NHWD) [kg]: A1-A3 0.51, A4 3.03e-5, A5 0.0278, C2 (S1) 4.12e-6, C2 (S2) 6.07e-5, C3 (S1) 0.376, C3 (S2) 0.0102, D (S1) -0.0169, D (S2) -0.351
- Entsorgter radioaktiver Abfall (RWD) [kg]: A1-A3 0.00425, A4 5.36e-7, A5 0.000221, C2 (S1) 7.29e-8, C2 (S2) 1.07e-6, C3 (S1) 7.17e-5, C3 (S2) 0.000925, D (S1) -0.00132, D (S2) -0.00295
- Komponenten für die Wiederverwendung (CRU) [kg]: A1-A3 0, A4 0, A5 0, C2 (S1) 0, C2 (S2) 0, C3 (S1) 0, C3 (S2) 0, D (S1) 0, D (S2) 0
- Stoffe zum Recycling (MFR) [kg]: A1-A3 0, A4 0, A5 0, C2 (S1) 0, C2 (S2) 0, C3 (S1) 0, C3 (S2) 2, D (S1) 0, D (S2) 0
- Stoffe für die Energierückgewinnung (MER) [kg]: A1-A3 0, A4 0, A5 0, C2 (S1) 0, C2 (S2) 0, C3 (S1) 2, C3 (S2) 0, D (S1) 0, D (S2) 0
- Exportierte elektrische Energie (EEE) [MJ]: A1-A3 0, A4 0, A5 0.271, C2 (S1) 0, C2 (S2) 0, C3 (S1) 6.7, C3 (S2) 0, D (S1) 0, D (S2) 0
- Exportierte thermische Energie (EET) [MJ]: A1-A3 0, A4 0, A5 0.633, C2 (S1) 0, C2 (S2) 0, C3 (S1) 15.4, C3 (S2) 0, D (S1) 0, D (S2) 0

## Impact indicators
- Globales Erwärmungspotenzial (GWP) [kg CO_(2)-Äq.]: A1-A3 6.76, A4 0.0337, A5 0.559, C2 (S1) 0.00458, C2 (S2) 0.0676, C3 (S1) 3.6, C3 (S2) 0.835, D (S1) -2.2, D (S2) -4.79
- Abbau Potential der stratosphärischen Ozonschicht (ODP) [kg CFC11-Äq.]: A1-A3 1.24e-10, A4 1.15e-17, A5 6.21e-12, C2 (S1) 1.56e-18, C2 (S2) 2.3e-17, C3 (S1) 2.48e-15, C3 (S2) 3.21e-14, D (S1) -4.59e-14, D (S2) -8.49e-11
- Versauerungspotenzial von Boden und Wasser (AP) [kg SO_(2)-Äq.]: A1-A3 0.0169, A4 6.99e-5, A5 0.000898, C2 (S1) 9.5e-6, C2 (S2) 0.00014, C3 (S1) 0.000928, C3 (S2) 0.00133, D (S1) -0.00232, D (S2) -0.0116
- Eutrophierungspotenzial (EP) [kg PO_(4)^(3)-Äq.]: A1-A3 0.00308, A4 1.74e-5, A5 0.000163, C2 (S1) 2.36e-6, C2 (S2) 3.48e-5, C3 (S1) 9.02e-5, C3 (S2) 0.000228, D (S1) -0.000393, D (S2) -0.0021
- Bildungspotential für troposphärisches Ozon (POCP) [kg Ethen-Äq.]: A1-A3 0.00191, A4 -2.4e-5, A5 0.000323, C2 (S1) -3.26e-6, C2 (S2) -4.81e-5, C3 (S1) 3.8e-5, C3 (S2) 3.04e-5, D (S1) -0.0002, D (S2) -0.00131
- Potenzial für den abiotischen Abbau nicht fossiler Ressourcen (ADPE) [kg Sb-Äq.]: A1-A3 3.34e-5, A4 3.18e-9, A5 1.67e-6, C2 (S1) 4.33e-10, C2 (S2) 6.38e-9, C3 (S1) 5.32e-7, C3 (S2) 3.27e-7, D (S1) -5.18e-7, D (S2) -2.29e-5
- Potenzial für den abiotischen Abbau fossiler Brennstoffe (ADPF) [MJ]: A1-A3 145, A4 0.45, A5 7.51, C2 (S1) 0.0611, C2 (S2) 0.901, C3 (S1) 1.5, C3 (S2) 8.38, D (S1) -28.7, D (S2) -99.8

## Use advice
Gültigkeitsbereich:
Bei der vorliegenden EPD handelt es sich um eine Durchschnitts EPD der Produkte EVALON® V,VG, VSK, VGSK, dual -Dach-und Dichtungsbahnen der alwitra GmbH. Die Produkte werden am Standort 54411 Hermeskeil gefertigt.
Systemgrenze:
Diese Ökobilanz adressiert neben dem Lebenszyklusstadium der Produktherstellung (Wiege bis Werkstor) weitere Optionen, die nachfolgend aufgelistet werden:

- Rohstoffgewinnung und –bereitstellung (A1)

- Transporte der Grundstoffe (A2)

- ggfs. Kaschierung (A1)

- Herstellung der Bahnen (A3)

- Verpackung der Bahnen (inklusive Transporte der Verpackungsmaterialien und End-of-Life

- Transport zur Baustelle (A4)

- Installation auf der Baustelle (Lagesicherung mit Klebstoffen und Nahtverschweißung) (A5)

- End-of-Life der Bahnen (inklusive Transporte) – stofflich und thermisch (Module C2, C3 und D)

## Data sources
- EVA-Dach- und Dichtungsbahnen EVALON®V,VG,VSK, dual.pdf
- GaBi Database (all versions)
- GaBi database SP39 2019
