# wedi building board

Dataset: ILCD process, EPD, specific dataset
Geography: DE
Reference year: 2019
Valid until: 2024
Classification: OEKOBAU.DAT: Komposite / Systembauteile / Innenwände
Classification: IBUCategories: 02 Bauprodukte / Wärmedämmungsprodukte / Dämmstoffe aus Schaumkunststoffen
Method details: Dämmstoffe aus Schaumkunststoffen.pdf
Generated by: WESSLING GmbH
Registration number: EPD-WDI-20190016-IAA1-DE
Owner: wedi GmbH
Compliance: DIN EN 15804; ISO 14025
Review: Accredited third party review by Institut Bauen und Umwelt e. V.
Amounts: rows without a unit in brackets have none in this file; such an amount is in the reference unit of its flow, which a separate flow dataset defines
copyright: true
licenseType: Free of charge for all users and uses
accessRestrictions: None

## General comment
The wedi building board consists of an extruded rigid polystyrene foam core with fibre glass reinforcement on both sides and a cement mortar coating.

Extruded rigid polystyrene foam (XPS) is a plastic foam insulation material which complies with /EN 13164/, which is produced in the form of boards within the bulk density range of 35 kg/m³ (+/-3).

The wedi building board including the coating has an arithmetical density of 177 kg/m³. wedi building boards are supplied in thicknesses from 4 mm to 100 mm and with trimmed edges.

## Technology and included processes
XPS is produced from polystyrene granulate in a continuous extrusion process. The polystyrene is melted and homogenised with the additives in a tandem extruder under high pressure. The propellant is dissolved in the melting process and subsequently discharged through a slot die. The propellant foams up the melt in the ambient temperature due to the strongly reducing counter-pressure caused. The melt cools down in the process and the polystyrene foam solidifies. Closed-cell rigid polystyrene foam is produced. This continues to cool down and can be packaged after removal of the extrusion skin. Polymer-modified mortar is mixed with water and applied to the XPS core together with the fibre glass fabric to coat the rigid foam board. The dried board can then be cut to size. wedi building boards are packed on pallets with polyethylene foil. XPS from production cuts and milling dust are recycled directly into production and re-used to produce XPS. Polystyrene is a thermoplastic material and can therefore be recycled simply and cheaply through melting.
Declared unit:
The declared unit for this study is a wedi building board coated on both sides with a surface area of 1 m² and a thickness of 20 mm.

## Technical purpose
The wedi building board can be attached to almost any surface, is impervious to water, heat-insulating, light and stable. The wedi building board can be coated with plastering and tiles of all kinds.

The wedi building board is especially suitable for wet areas in baths and wellness facilities. It is used for both new construction and renovation. As a tile carrier component it is deployed on walls, as a partition wall and in floors.

Wedi building boards can be used as a construction element to make bath furniture, wash basins, benches and loungers (heated and unheated), niches and shelves in wet areas in private or public baths and toilet and wellness facilities.

## Reference product
- wedi Bauplatte, 20 mm: 1

## Inputs
- Renewable primary energy as energy carrier (PERE) [MJ]: A1-A3 0.91, A5 0
- Renewable primary energy resources as material utilization (PERM) [MJ]: A1-A3 7.96, A5 0.00182
- Total use of renewable primary energy resources (PERT) [MJ]: A1-A3 8.87, A5 0.00182
- Non renewable primary energy as energy carrier (PENRE) [MJ]: A1-A3 4.22, A5 0
- Non renewable primary energy as material utilization (PENRM) [MJ]: A1-A3 94.65, A5 0.0085
- Total use of non renewable primary energy resources (PENRT) [MJ]: A1-A3 98.87, A5 0.0085
- Use of secondary material (SM) [kg]: A1-A3 0, A5 0
- Use of renewable secondary fuels (RSF) [MJ]: A1-A3 0.044, A5 0
- Use of non renewable secondary fuels (NRSF) [MJ]: A1-A3 0.46, A5 0
- Use of net fresh water (FW) [m^3]: A1-A3 0.0124, A5 5.37e-5

## Outputs
- Hazardous waste disposed (HWD) [kg]: A1-A3 3.13e-6, A5 4.38e-11
- Non hazardous waste disposed (NHWD) [kg]: A1-A3 0.0384, A5 0.00162
- Radioactive waste disposed (RWD) [kg]: A1-A3 0.00132, A5 3.81e-7
- Components for re-use (CRU) [kg]: A1-A3 0, A5 0
- Materials for recycling (MFR) [kg]: A1-A3 0, A5 0
- Materials for energy recovery (MER) [kg]: A1-A3 0.63, A5 0
- Exported electrical energy (EEE) [MJ]: A1-A3 0, A5 0
- Exported thermal energy (EET) [MJ]: A1-A3 0, A5 0

## Impact indicators
- Global warming potential (GWP) [kg CO_(2)-Äq.]: A1-A3 4.63, A5 0.021
- Depletion potential of the stratospheric ozone layer (ODP) [kg CFC11-Äq.]: A1-A3 1.4e-8, A5 1.48e-15
- Acidification potential of land and water (AP) [kg SO_(2)-Äq.]: A1-A3 0.01, A5 2.45e-6
- Eutrophication potential (EP) [kg PO_(4)^(3)-Äq.]: A1-A3 0.00116, A5 5.12e-7
- Formation potential of tropospheric ozone photochemical oxidants (POCP) [kg Ethen-Äq.]: A1-A3 0.00154, A5 2.39e-7
- Abiotic depletion potential for non fossil resources (ADPE) [kg Sb-Äq.]: A1-A3 2.13e-5, A5 1.65e-10
- Abiotic depletion potential for fossil resources (ADPF) [MJ]: A1-A3 93.48, A5 0.0076

## Use advice
Scope:
The lifecycle assessment shown in the EPD relates to data for 2016 from the wedi GmbH production facility in Emsdetten, Germany.

The owner of the declaration is liable for the basic information and supporting evidence; any liability of the IBU in relation to manufacturer’s information, LCA data and supporting evidence is excluded. This document is a translation from German to English. It is based on the original declaration number EPD-WDI-20190016-IAA1-DE.
System boundary:
The environmental information in this EPD is based on a cradle-to-gate assumption and therefore exclusively includes the modules of the production stage and those of the manufacturing phase A1-A3 as well as Module A5 to describe the End-of-Life process of the packaging material.

A1: Raw materials production and processing

1. Extruded rigid polystyrene foam core

2. Fibre glass fabric reinforcement

3. Plasticised mortar

A2: Transport to manufacturer

Provision of diesel and the use of transport vehicles (trucks) for the specified distances and capacity utilisation are included.

A3: wedi production process

The preparation of preliminary products before composition and the general production process of the building board up to packaging and storage are included.

A5: Construction stage: packaging material End of Life

For the sake of completeness, disposal of the packaging material used in the plant has been included with Module A5.

## Data sources
- GaBi Database (all versions)
- GaBi database SP34 2017
