# Municipal waste landfill

Dataset: ILCD process, EPD, generic dataset
Geography: DE
Reference year: 2018
Valid until: 2022
Classification: oekobau.dat: End of Life / Generisch / Hausmüll
Owner: thinkstep
Compliance: DIN EN 15804
Review: Dependent internal review by thinkstep, IABP-GaBi, IBP-GaBi; Independent external review by GaBi user forum, GaBi bug forum, GaBi user community
Amounts: rows without a unit in brackets have none in this file; such an amount is in the reference unit of its flow, which a separate flow dataset defines
copyright: true

## General comment
This data set has been modeled according to the European Standard EN 15804 for Sustainable Building. Results are depicted in modules that allow the structured expression of results over the entire life cycle.

## Geography
The data set represents the country specific situation in Germany, focusing on the main technologies, the region specific characteristics and / or import statistics.

## Time period
Annual average

## Technology and included processes
Municipal waste landfill with surface and basic sealing. Site is including landfill gas treatment, leachate treatment and sludge treatment and deposition. Landfill height 30 m, landfill area 40.000 sqm; 100 years deposit. The effort for sealing materials (clay, mineral coating, PE film) and diesel for the compactor is included in the data set. Landfill gas production calculated according to [WEBER]. Distribution of landfill gas: 22 % flare, 28 % used, 49 % emissions [KRUEMPELBECK]. Use of landfill gas represents industrial country standard. Average landfill gas composition and amount for stabile methane phase. [Thomé-Kozmienski]. Precipitation data from [BAUMGARTNER & LIEBSCHER] (666 mm/a). A rate of 60 % transpiration/run off is assumed. Landfill leachate: exponential solubility of fluids is assumed. Solubility factors are used for different solubility calculations. [Finnveden]. Leachate and landfill body are assumed to be homogeneous. Landfill body is saturated. No circulation of leachate. Basic sealing effectively for leachate: 70 %. Leachate treatment includes active carbon and flocculation/precipitation processing. Sludge treatment and deposition is included.

Background system:
Electricity: Electricity is modelled according to the individual country-specific situations. The country-specific modelling is achieved on multiple levels. Firstly, individual energy carrier specific power plants and plants for renewable energy sources are modelled according to the current national electricity grid mix. Modelling the electricity consumption mix includes transmission / distribution losses and the own use by energy producers (own consumption of power plants and "other" own consumption e.g. due to pumped storage hydro power etc.), as well as imported electricity. Secondly, the national emission and efficiency standards of the power plants are modelled as well as the share of electricity plants and combined heat and power plants (CHP). Thirdly, the country-specific energy carrier supply (share of imports and / or domestic supply) including the country-specific energy carrier properties (e.g. element and energy content) are accounted for. Fourthly, the exploration, mining/production, processing and transport processes of the energy carrier supply chains are modelled according to the specific situation of each electricity producing country. The different production and processing techniques (emissions and efficiencies) in the different energy producing countries are considered, e.g. different crude oil production technologies or different flaring rates at the oil platforms.
Thermal energy, process steam: The thermal energy and process steam supply is modelled according to the individual country-specific situation with regard to emission standards and considered energy carriers. The thermal energy and process steam are produced at heat plants. Efficiencies for thermal energy production are by definition 100% in relation to the corresponding energy carrier input. For process steam the efficiency ranges from 85%, 90% to 95%. The energy carriers used for the generation of thermal energy and process steam are modelled according to the specific import situation (see electricity above).
Transports: All relevant and known transport processes are included. Ocean-going and inland ship transport as well as rail, truck and pipeline transport of bulk commodities are considered.
Energy carriers: The energy carriers are modelled according to the specific supply situation (see electricity above).
Refinery products: Diesel fuel, gasoline, technical gases, fuel oils, lubricants and residues such as bitumen are modelled with a parameterised country-specific refinery model. The refinery model represents the current national standard in refining techniques (e.g. emission level, internal energy consumption, etc.) as well as the individual country-specific product output spectrum, which can be quite different from country to country. The supply of crude oil is modelled, again, according to the country-specific situation with the respective properties of the resources.

## Technical purpose
This product can be used in construction.

## Safety margin
0 %.

## Reference product
- Municipal waste: 1

## Inputs
- Use of renewable primary energy (PERE) [MJ]: C4 -0.309024
- Primary energy resources used as raw materials (PERM) [MJ]: C4 0
- Total use of renewable primary energy resources (PERT) [MJ]: C4 -0.309024
- Use of non-renewable primary energy (PENRE) [MJ]: C4 0.22251
- Non-renewable primary energy resources used as raw materials (PENRM) [MJ]: C4 0
- Total use of non-renewable primary energy resources (PENRT) [MJ]: C4 0.22251
- Input of secondary material (SM) [kg]: C4 0
- Use of renewable secondary fuels (RSF) [MJ]: C4 0
- Use of non renewable secondary fuels (NRSF) [MJ]: C4 0
- Use of net fresh water (FW) [m3]: C4 -6.09159e-5

## Outputs
- Hazardous waste disposed (HWD) [kg]: C4 2.98109e-9
- Non-hazardous waste disposed (NHWD) [kg]: C4 0.807691
- Radioactive waste disposed (RWD) [kg]: C4 -3.4632e-5
- Components for re-use (CRU) [kg]: C4 0
- Materials for Recycling (MFR) [kg]: C4 0
- Material for Energy Recovery (MER) [kg]: C4 0
- Exported electrical energy (EEE) [MJ]: C4 0
- Exported thermal energy (EET) [MJ]: C4 0

## Impact indicators
- Global warming potential (GWP) [kg CO2 eq.]: C4 0.753563
- Ozone Depletion Potential (ODP) [kg R11 eq.]: C4 -1.85738e-15
- Acidification potential (AP) [kg SO2 eq.]: C4 0.000163116
- Eutrophication potential (EP) [kg Phosphate eq.]: C4 0.000804198
- Photochemical Ozone Creation Potential (POCP) [kg Ethene eq.]: C4 0.000194731
- Abiotic depletion potential for non fossil resources (ADPE) [kg Sb eq.]: C4 -1.54176e-8
- Abiotic depletion potential for fossil resources (ADPF) [MJ]: C4 0.309737

## Use advice
The data set represents a cradle to gate inventory. It can be used to characterise the supply chain situation of the respective commodity in a representative manner. Combination with individual unit processes using this commodity enables the generation of user-specific (product) LCAs.

## Data sources
- GaBi Database Edition 2020, SP40
- GaBi database (all versions)
