# HEBEL Bewehrter Porenbeton

Dataset: ILCD process, EPD, average dataset
Geography: DE
Reference year: 2016
Valid until: 2022
Classification: OEKOBAU.DAT: Mineralische Baustoffe / Mörtel und Beton / Beton
Classification: IBUCategories: 02 Bauprodukte / Mauerwerk und Mörtel / Porenbeton
Method details: Porenbeton.pdf
Registration number: EPD-IAD-20160116-IAC1-DE
Owner: Xella Deutschland GmbH
Compliance: DIN EN 15804; ISO 14025
Review: Accredited third party review by Institut Bauen und Umwelt e. V.
Amounts: rows without a unit in brackets have none in this file; such an amount is in the reference unit of its flow, which a separate flow dataset defines
copyright: true

## General comment
The products under review are reinforced elements of various formats made of Autoclaved Aerated Concrete (AAC). AAC is classified as a porous, steam-cured lightweight concrete.

/EU Directive No. 305/2011/ applies for placing the product on the market in the EU/EFTA (with the exception of Switzerland). The products require a Declaration of Performance taking consideration of the /DIN EN 12602: 2013-10 Prefabricated reinforced components of Autoclaved Aerated Concrete/ and CE marking.

## Technology and included processes
Die vorliegenden EPD-Ergebnisse beruhen auf der Ökobilanz von bewehrten Porenbeton-Produkten unterschiedlicher Formate. Porenbeton gehört zur Gruppe der porosierten dampfgehärteten Leichtbetone. Hauptgrundstoffe sind Sand, Zement, Branntkalk und Aluminium als Porenbildner. Herstellung: Der gemahlene Quarzsand wird mit den anderen Grundstoffen unter Zugabe von Wasser und Aluminiumpaste, in einem Mischer zu einer Rohmasse gemischt und in Gießformen gegossen. Die Stahlbewehrung wird im Porenbetonwerk gefertigt. Die Bewehrungselemente werden vor dem Einbau in die Gießform durch Tauchbaden korrosionsschutzbehandelt. Das Wasser löscht unter Wärmeentwicklung den Kalk. Das Aluminium reagiert im alkalischen Milieu. Dabei bildet sich gasförmiger Wasserstoff, der die Poren in der Masse erzeugt und ohne Rückstände entweicht. Die Poren besitzen meist einen Durchmesser von 0,5 – 1,5 mm und sind ausschließlich mit Luft gefüllt. Nach dem ersten Abbinden entstehen halbfeste Rohblöcke, aus denen maschinell und mit hoher Genauigkeit die Elemente geschnitten werden. Die Ausbildung der endgültigen Eigenschaften der Bauteile erfolgt während der anschließenden Dampfhärtung über 5 – 12 Stunden bei etwa 190 °C und einem Druck von ca. 12 bar in Dampfdruckkesseln, den sog. Autoklaven. Hier bilden sich aus den eingesetzten Stoffen Calcium-Silikathydrate, die dem in der Natur vorkommenden Mineral Tobermorit entsprechen. Die Reaktion des Materials ist mit der Entnahme aus dem Autoklaven abgeschlossen. Der Dampf wird nach Abschluss des Härtungsprozesses für weitere Autoklavzyklen verwandt. Das anfallende Kondensat wird als Prozesswasser genutzt. Auf diese Weise wird Energie eingespart und es fällt kein Abwasser an. Systemgrenzen: Im Einzelnen werden folgende Prozesse der Herstellung der Porenbetonprodukte einbezogen: Bereitstellungsprozesse von Rohstoffen, Verpackungen und Energie, Transporte der Rohstoffe (Zement, Kalk, Sand, Bewehrungsstahl etc.) zum Produktionsstandort, Herstellprozess im Werk inklusive energetischer Aufwendungen, Herstellung von Hilfsstoffen, Entsorgung anfallender Reststoffe. Alle beschriebenen Prozesse sind Teil der Module A1-A3. Hintergrundsystem: Zur Modellierung der Porenbeton-Herstellung wurde das von der thinkstep AG entwickelte Software-System zur Ganzheitlichen Bilanzierung "GaBi ts" eingesetzt. Die in der GaBi-Datenbank enthaltenen konsistenten Datensätze sind in der online GaBi-Dokumentation dokumentiert. Die Ökobilanz wurde für den Bezugsraum Deutschland erstellt.
Declared unit:
The declaration refers to the manufacture of 1 m³ reinforced HEBEL AAC with an average gross density of 550 kg/m³, including 25.6 kg reinforcing steel.

## Technical purpose
Reinforced components for roofs, ceilings and supporting and non-supporting walls. Direct contact with water is avoided for technical structural reasons.

## Reference product
- 1 m³ HEBEL bewehrter Porenbeton (550 kg/m³): 1

## Inputs
- Renewable primary energy as energy carrier (PERE) [MJ]: A1-A3 346.646
- Renewable primary energy resources as material utilization (PERM) [MJ]: A1-A3 40.5438
- Total use of renewable primary energy resources (PERT) [MJ]: A1-A3 387.19
- Non renewable primary energy as energy carrier (PENRE) [MJ]: A1-A3 2110.2
- Non renewable primary energy as material utilization (PENRM) [MJ]: A1-A3 25.9699
- Total use of non renewable primary energy resources (PENRT) [MJ]: A1-A3 2136.17
- Use of secondary material (SM) [kg]: A1-A3 0
- Use of renewable secondary fuels (RSF) [MJ]: A1-A3 18.3426
- Use of non renewable secondary fuels (NRSF) [MJ]: A1-A3 281.795
- Use of net fresh water (FW) [m^3]: A1-A3 1.10143

## Outputs
- Hazardous waste disposed (HWD) [kg]: A1-A3 1.21859e-5
- Non hazardous waste disposed (NHWD) [kg]: A1-A3 9.23072
- Radioactive waste disposed (RWD) [kg]: A1-A3 0.0725272
- Components for re-use (CRU) [kg]: A1-A3 0
- Materials for recycling (MFR) [kg]: A1-A3 0
- Materials for energy recovery (MER) [kg]: A1-A3 0
- Exported electrical energy (EEE) [MJ]: A1-A3 0
- Exported thermal energy (EET) [MJ]: A1-A3 0

## Impact indicators
- Global warming potential (GWP) [kg CO_(2)-Äq.]: A1-A3 307.029
- Depletion potential of the stratospheric ozone layer (ODP) [kg CFC11-Äq.]: A1-A3 5.21172e-9
- Acidification potential of land and water (AP) [kg SO_(2)-Äq.]: A1-A3 0.341596
- Eutrophication potential (EP) [kg PO_(4)^(3)-Äq.]: A1-A3 0.0412382
- Formation potential of tropospheric ozone photochemical oxidants (POCP) [kg Ethen-Äq.]: A1-A3 0.0378786
- Abiotic depletion potential for non fossil resources (ADPE) [kg Sb-Äq.]: A1-A3 0.0002159
- Abiotic depletion potential for fossil resources (ADPF) [MJ]: A1-A3 1953.44

## Use advice
Scope:
The LCA is based on data for 2014 from the German Xella plants in Alzenau, Laußig and Rotenburg. In Germany, Xella only produces reinforced Autoclaved Aerated Concrete in these plants.
System boundary:
Type of EPD: cradle to plant gate
The following individual processes are included in the Product stage A1-A3 of manufacturing the AAC products:

Raw material, packaging and energy supply processes
Transporting the raw materials to the production facility
Manufacturing process in the plant including energy, manufacturing auxiliaries, disposing of any residual materials incurre.

## Data sources
- HEBEL Bewehrter Porenbeton.pdf
- GaBi Database (all versions)
- GaBi database SP27 2015
