# Wakaflex

Dataset: ILCD process, EPD, specific dataset
Geography: DE
Reference year: 2019
Valid until: 2024
Classification: OEKOBAU.DAT: Kunststoffe / Folien und Vliese / Unterspannbahn
Classification: IBUCategories: 02 Bauprodukte / Abdichtungen / Dach- und Dichtungsbahnsysteme aus Kunststoffen und Elastomeren
Method details: Dach- und Dichtungsbahnsysteme aus Kunststoffen und Elastomeren.pdf
Registration number: EPD-MON-20190047-IBA1-DE
Owner: Monier Roofing Components GmbH
Compliance: DIN EN 15804; ISO 14025
Review: Accredited third party review by Institut Bauen und Umwelt e. V.
Amounts: rows without a unit in brackets have none in this file; such an amount is in the reference unit of its flow, which a separate flow dataset defines
copyright: true

## General comment
Wakaflex ist eine flexible Dach- und Wand-Anschlussbahn in verschiedenen Farben, Längen und Breiten. Es wird für den universellen und handwerksgerechten Anschluss an Wand, Kamin,

aufgehenden Bauteilen und anderen Anschlüssen am Dach verwendet und substituiert die Verarbeitung von Rollblei.

Wakaflex besteht aus zwei Schichten Polyisobutylen (PIB), inkl. funktionaler Zusatzstoffe, einer mittig vollständig eingebetteten Aluminium-Streckgittereinlage und einer Klebeschicht. Es verfügt über eine glatte stabile Oberfläche, ist UV- und temperaturbeständig, in beide Richtungen dehnbar (50 % längs und ca. 15 % quer) und selbstverschweißend. Die vollständig eingebettete Aluminium-Streckgittereinlage trägt zur mechanischen Sicherheit und dauerhaften Formstabilität bei.

## Technology and included processes
Die Produktion der Dachanschlussrolle ist nach /ISO 9001/ zertifiziert. Wakaflex wird in vier Prozessschritten anwendungsfertig produziert: Halbzeugherstellung Die Vorprodukte der Ober- und Unterfolie werden im identischen Produktionsverfahren hergestellt. Alle Bestandteile werden in einem Kneter vermengt. Überschüsse aus vorhergehenden Produktionen und Randabschnitte werden als Eigenregenerat den übrigen Bestandteilen zugefügt. Anschließend wird die Knetermasse mit Hilfe eines Extruders in Folienform gebracht. Die Oberfolie unterscheidet sich dabei von der Unterfolie lediglich in der Folienstärke und ggf. durch das Vorhandensein von Farbpigmenten. Zusätzlich sind der Oberfolie UV-Stabilisatoren beigefügt. Thermische Laminierung In diesem Prozessschritt werden die Ober- und Unterfolie und das dazwischenliegende Aluminium- Streckgitter zusammengeführt, mittels Wärme und Druck miteinander fest verbunden, nachfolgend gekühlt und über ein Fördersystem weitergeleitet. Auftragslaminierung Auf die nun funktionsfähige Wakaflex-Folie werden Verschweißkleber (vollflächig aufgetragen zum späteren Verschweißen überlappender Folien), 2 längsseitig aufgebrachte Kleberaupen (zur Befestigung auf dem Untergrund für zusätzliche Sicherheit vor Regen, Schnee und Staubeintrieb) und eine Release-Folie (ablösbare Schutzfolie für den Transport) aufgetragen. Konfektionierung Nach dem Randbeschnitt durchläuft die Wakaflex-Folie eine Messerstation um auf die gewünschten Konfektionierungen zugeschnitten zu werden. Anschließend werden die Folien über ein Wickelsystem aufgerollt.
Technische Daten:
Es gelten die Leistungswerte des Produkts entsprechend der Leistungserklärung in Bezug auf dessen wesentliche Merkmale gemäß /DIN EN 13956:2013-03/, Abdichtungsbahnen- und Elastomerbahnen für Dachabdichtungen – Definitionen und Eigenschaften.

Sowie die folgenden bautechnischen Daten.
Deklarierte Einheit:
Die Deklaration bezieht sich auf die Herstellung von 1 m² Dach- und Wand-Anschlussbahn Wakaflex.

## Technical purpose
Wakaflex wird für den handwerklichen Anschluss an Wand, Kamin, aufgehenden Bauteilen und anderen Anschlüssen am geneigten Dach eingesetzt.

## Reference product
- Wakaflex: 1

## Inputs
- Erneuerbare Primärenergie als Energieträger (PERE) [MJ]: A1 30.1599, A2 0.173, A3 2.05, C2 0.0236, C3 0.378, D -16.7
- Erneuerbare Primärenergie zur stofflichen Nutzung (PERM) [MJ]: A1 1.74005, A2 0, A3 0, C2 0, C3 0, D 0
- Total erneuerbare Primärenergie (PERT) [MJ]: A1 31.9, A2 0.173, A3 2.05, C2 0.0236, C3 0.378, D -16.7
- Nicht-erneuerbare Primärenergie als Energieträger (PENRE) [MJ]: A1 114.189, A2 2.58, A3 4.01, C2 0.35, C3 -54.2563, D -46.9
- Nicht-erneuerbare Primärenergie zur stofflichen Nutzung (PENRM) [MJ]: A1 56.8106, A2 0, A3 0, C2 0, C3 56.1663, D 0
- Total nicht erneuerbare Primärenergie (PENRT) [MJ]: A1 171, A2 2.58, A3 4.01, C2 0.35, C3 1.91, D -46.9
- Einsatz von Sekundärstoffen (SM) [kg]: A1 0, A2 0, A3 0, C2 0, C3 0, D 0
- Erneuerbare Sekundärbrennstoffe (RSF) [MJ]: A1 0, A2 0, A3 0, C2 0, C3 0, D 0
- Nicht erneuerbare Sekundärbrennstoffe (NRSF) [MJ]: A1 0, A2 0, A3 0, C2 0, C3 0, D 0
- Einsatz von Süßwasserressourcen (FW) [m^3]: A1 0.0754, A2 0.000201, A3 0.000739, C2 2.73e-5, C3 0, D -0.0366

## Outputs
- Gefährlicher Abfall zur Deponie (HWD) [kg]: A1 0.00391086, A2 1.65175e-7, A3 4.35531e-9, C2 2.24353e-8, C3 9.18296e-9, D -3.2492e-8
- Entsorgter nicht gefährlicher Abfall (NHWD) [kg]: A1 12.4166, A2 0.0138853, A3 2.43946, C2 0.001886, C3 0.64357, D -6.40523
- Entsorgter radioaktiver Abfall (RWD) [kg]: A1 0.00466325, A2 3.11014e-6, A3 0.000467538, C2 4.22442e-7, C3 7.84714e-5, D -0.00267757
- Komponenten für die Wiederverwendung (CRU) [kg]: A1 0, A2 0, A3 0, C2 0, C3 0, D 0
- Stoffe zum Recycling (MFR) [kg]: A1 0, A2 0, A3 0, C2 0, C3 0, D 0.298
- Stoffe für die Energierückgewinnung (MER) [kg]: A1 0, A2 0, A3 0, C2 0, C3 0, D 0
- Exportierte elektrische Energie (EEE) [MJ]: A1 0, A2 0, A3 0, C2 0, C3 3.64, D 0
- Exportierte thermische Energie (EET) [MJ]: A1 0, A2 0, A3 0, C2 0, C3 8.45, D 0

## Impact indicators
- Globales Erwärmungspotenzial (GWP) [kg CO_(2)-Äq.]: A1 8.7, A2 0.191, A3 0.466, C2 0.0259, C3 4, D -3.48
- Abbau Potential der stratosphärischen Ozonschicht (ODP) [kg CFC11-Äq.]: A1 0.000685, A2 4.03e-15, A3 5.14e-13, C2 5.47e-16, C3 8.96e-14, D -3.7e-12
- Versauerungspotenzial von Boden und Wasser (AP) [kg SO_(2)-Äq.]: A1 0.0291, A2 0.000787, A3 0.000259, C2 9.92e-5, C3 0.00167, D -0.0125
- Eutrophierungspotenzial (EP) [kg PO_(4)^(3)-Äq.]: A1 0.00221, A2 0.0002, A3 9.05e-5, C2 2.51e-5, C3 0.000325, D -0.000859
- Bildungspotential für troposphärisches Ozon (POCP) [kg Ethen-Äq.]: A1 0.00369, A2 -0.000301, A3 1.94e-5, C2 -3.73e-5, C3 9.75e-5, D -0.000714
- Potenzial für den abiotischen Abbau nicht fossiler Ressourcen (ADPE) [kg Sb-Äq.]: A1 1.04e-5, A2 1.99e-8, A3 2.55e-7, C2 2.7e-9, C3 3.57e-7, D -1.59e-6
- Potenzial für den abiotischen Abbau fossiler Brennstoffe (ADPF) [MJ]: A1 159, A2 2.57, A3 2.83, C2 0.349, C3 1.71, D -40.1

## Use advice
Gültigkeitsbereich:
Dieses Dokument bezieht sich auf Wakaflex der Firma Monier Roofing Components GmbH, hergestellt in Berlin, Deutschland. Die deklarierte Einheit bezieht sich auf 1 m2 Dach- und Wand-Anschlussbahn. Die Datenerhebung für die Herstellung des deklarierten Produktes erfolgte werksspezifisch mit aktuellen Jahresdaten von 2016. Der Deklarationsinhaber ist verantwortlich für die zugrunde liegenden Daten und deren Verifizierung.
Systemgrenze:
Die Ökobilanz betrachtet die Systemgrenzen "von der Wiege bis zum Werkstor" mit Optionen und folgt dem modularen Aufbau nach /EN 15804/. Die Ökobilanz berücksichtigt folgende Module:

A1: Rohstoffversorgung (Herstellung der Vorprodukte, Verpackung)
A2: Transporte der Vorprodukte
A3: Herstellung (Energieeinsatz, Verwertung von Produktionsreststoffen
C2: Transport
C3: Abfallbehandlung (Rohstoffliche und thermische Verwertung)
D: Wiederverwendungs-, Rückgewinnungs- oder Recycling potenzial

## Data sources
- Wakaflex.pdf
- GaBi Database (all versions)
- GaBi database SP35 2018
