# Chipboard (generic); 700 kg/m3

Dataset: ILCD process, EPD, generic dataset
Geography: DE
Reference year: 2021
Valid until: 2022
Classification: oekobau.dat: Holz / Holzwerkstoffe / Spanplatten
Owner: Sphera Solutions GmbH
Compliance: EN 15804+A2
Review: Dependent internal review by Sphera Solutions GmbH; Independent external review by GaBi user forum
Amounts: rows without a unit in brackets have none in this file; such an amount is in the reference unit of its flow, which a separate flow dataset defines
copyright: true
licenseType: Free of charge for all users and uses
accessRestrictions: The license conditions as stated on https://www.oekobaudat.de/ apply.
accessRestrictions: Es gelten die Lizenzbedingungen wie sie auf https://www.oekobaudat.de/ genannt sind.

## General comment
This data set has been modeled according to the European Standard EN 15804+A2 for Sustainable Building. Results are depicted in modules that allow the structured expression of results over the entire life cycle.

## Geography
The data set represents the country specific situation in Germany, focusing on the main technologies, the region specific characteristics and / or import statistics.

## Time period
Annual average

## Technology and included processes
Wood of different sortings (mainly wood scraps) is cut mechanically. The following drying of the wood shavings is carried out with the help of a drying cylinder. When they have reached their working moisture, they are sticked together. In a hollow the different wood chips sortings are piled up in boards. Due to the compression under the influence of heat and pressure the primary boards are produced. The boards are processed application-specifically with cutter and sawing machine. The primary processing of the plates is finished with a smoothing. The boards can be further processed depending on their purpose. They are stacked and sealed with PE foil. Production residues (e.g. from smoothing and cutting) are reentered into the production production (e.g. for heat production).

In module C1, a manual dismantling (no loads) is assumed, collecting losses are neglected.
The transport in module C2 to the recycling plant takes place with a truck (50km).
Module C3 takes into account the grinding and thermal treatment (combustion) of the material. It is assumed that the material reaches the end of the waste status immediately after dismantling. The CO2 absorbed and stored in the material by photosynthesis (from module A1) is written off in C3 (CO2 neutrality within the product system according to EN 16485: Round and sawn timber - Environmental Product Declarations - Product category rules for wood and wood-based products for use in construction, 2014).
Module D contains the loads through the operation of the recovery facility (excluding biogenic CO2, see above) and credits for the substitution of electricity (German electricity mix) and thermal energy (from natural gas). The calculation of combustion emissions and credits takes into account the specific calorific value of the material and the material composition.

## Technical purpose
This product can be used in construction.

## Safety margin
20 %. Product system depicted except for a few missing processes / flows. Technological, temporal and geographic representativeness partly given.

## Reference product
- Chipboard (generic): 1

## Inputs
- Use of renewable primary energy as energy carrier (PERE) [MJ]: A1-A3 5474.39, C2 1.53031, C3 13314.7, D -1759.95
- Use of renewable primary energy resources used as raw materials (PERM) [MJ]: A1-A3 11000, C2 0, C3 -11000, D 0
- Total use of renewable primary energy (PERT) [MJ]: A1-A3 16474.4, C2 1.53031, C3 2314.67, D -1759.95
- Use of non renewable primary energy as energy carrier (PENRE) [MJ]: A1-A3 4131.19, C2 26.3674, C3 1344.48, D -5123.39
- Use of non renewable primary energy resources used as raw materials (PENRM) [MJ]: A1-A3 645, C2 0, C3 -645, D 0
- Total use of non renewable primary energy resource (PENRT) [MJ]: A1-A3 4776.19, C2 26.3674, C3 699.478, D -5123.39
- Use of secondary material (SM) [kg]: A1-A3 0, C2 0, C3 0, D 0
- Use of renewable secondary fuels (SF) [MJ]: A1-A3 0, C2 0, C3 0, D 0
- Use of non renewable secondary fuels (NRSF) [MJ]: A1-A3 0, C2 0, C3 0, D 0
- Net use of fresh water (FW) [m3]: A1-A3 2.78469, C2 0.00136007, C3 4.00059, D -0.654505

## Outputs
- Hazardous waste disposed (HWD) [kg]: A1-A3 1.20525e-5, C2 1.10207e-9, C3 1.37977e-7, D -1.78387e-6
- Non harzardous waste disposed (NHWD) [kg]: A1-A3 7.67092, C2 0.0042563, C3 11.9136, D -2.71975
- Radioactive waste disposed (RWD) [kg]: A1-A3 0.0741411, C2 2.53029e-5, C3 0.0140779, D -0.189286
- Components for re-use (CRU) [kg]: A1-A3 0, C2 0, C3 0, D 0
- Materials for recycling (MFR) [kg]: A1-A3 0, C2 0, C3 0, D 0
- Materials for energy recovery (MER) [kg]: A1-A3 0, C2 0, C3 0, D 0
- Exported electrical energy (EEE) [MJ]: A1-A3 0.054824, C2 0, C3 1410.04, D 0
- Exported thermal energy (EET) [MJ]: A1-A3 0.125872, C2 0, C3 3154.54, D 0

## Impact indicators
- Global Warming Potential - total (GWP-total) [kg CO2 eq.]: A1-A3 -842.273, C2 2.00281, C3 1477, D -330.294
- Global Warming Potential - fossil fuels (GWP-fossil) [kg CO2 eq.]: A1-A3 196.728, C2 1.98921, C3 39.9618, D -326.261
- Global Warming Potential - biogenic (GWP-biogenic) [kg CO2 eq.]: A1-A3 -1039.63, C2 0.00082401, C3 1437, D -3.54618
- Global Warming Potential - land use and land use change (GWP-luluc) [kg CO2 eq.]: A1-A3 0.62531, C2 0.0127753, C3 0.0380083, D -0.486013
- Depletion potenzial of the stratospheric ozone layer (ODP) [kg CFC-11 eq.]: A1-A3 3.42412e-11, C2 5.08988e-16, C3 4.71031e-13, D -7.68369e-12
- Acidifcation potential, Accumulated Exceedance (AP) [Mole of H+ eq.]: A1-A3 0.900726, C2 0.00563987, C3 0.961731, D -0.336647
- Eutrophication potential - freshwater (EP-freshwater) [kg P eq.]: A1-A3 0.00429919, C2 4.09105e-6, C3 6.77278e-5, D -0.00080849
- Eutrophication potential - marine (EP-marine) [kg N eq.]: A1-A3 0.492607, C2 0.00259817, C3 0.431234, D -0.123555
- Eutrophication potential - terrestrial (EP-terrestrial) [Mole of N eq.]: A1-A3 3.65037, C2 0.0290688, C3 5.24191, D -1.31578
- Photochemical Ozone Creation Potential (POCP) [kg NMVOC eq.]: A1-A3 1.16435, C2 0.00506649, C3 1.10311, D -0.323279
- Abiotic depletion potential - non-fossil resources (ADPE) [kg Sb eq.]: A1-A3 -2.43949e-5, C2 1.73034e-7, C3 7.11232e-6, D -0.000103441
- Abiotic depletion potential - fossil resources (ADPF) [MJ]: A1-A3 4903.92, C2 26.3663, C3 570.359, D -5122.65
- Water (user) deprivation potential (WDP) [m³ world equiv.]: A1-A3 63.4707, C2 0.00773275, C3 169.455, D -3.97232

## Use advice
The data set represents a cradle to gate inventory. It can be used to characterise the supply chain situation of the respective commodity in a representative manner. Combination with individual unit processes using this commodity enables the generation of user-specific (product) LCAs.

## Data sources
- IBU-Deklaration Egger: Egger EUROSPAN (EPD-EHW-2008511-D), 2009
- IBU-Deklaration Pfleiderer: Living Board Spanplatte (EPD-PFL-2009111-D), 2009
- Documentation of data quality management
- GaBi Database Edition 2021, CUP2021.01
- GaBi database (all versions)
