# AQUAPANEL® Cement Board Rooftop

Dataset: ILCD process, EPD, specific dataset
Geography: DE
Reference year: 2021
Valid until: 2026
Classification: OEKOBAU.DAT: Komposite / Systembauteile / Decken
Classification: IBUCategories: 02 Bauprodukte / Normal- Leicht- und Porenbeton / Faserzement / Faserbeton
Method details: Faserzement / Faserbeton.pdf
Generated by: WESSLING GmbH
Registration number: EPD-USG-20210120-IBA1-DE
Owner: Knauf AQUAPANEL GmbH & Co. KG
Compliance: DIN EN 15804+A2; ISO 14025
Review: Accredited third party review by Institut Bauen und Umwelt e. V.
Amounts: rows without a unit in brackets have none in this file; such an amount is in the reference unit of its flow, which a separate flow dataset defines
copyright: true
licenseType: Free of charge for all users and uses
accessRestrictions: None

## General comment
Zementgebundene, mineralische Bauplatte mit flächigen Gitterstrukturen aus in Längs- und Querrichtung angeordneten Glasgelegen für den Einsatz im Flachdachbau.

## Technology and included processes
The aggregates and binders are stored in silos outside the production hall. The raw materials for the panel core are dosed according to the recipe via belt scales and differential feeders and then via a central conveying device to the Weighing container transported. The binding agent for the production of the top layer is transported directly to the production unit of the “slurry” (cement mixture) via a screw conveyor. The glass fabrics required for production are stored in the basement of the production hall. The dry mixture in the weighing container is emptied into the compulsory mixer below and water is added according to the recipe. The core mixture is mixed homogeneously and moist and conveyed to the forming station by belt conveyor. At the same time, the "slurry" for the top layer is homogeneously premixed and conveyed to the forming station by screw pumps and hoses. In the forming station, the 3-layer element is produced continuously using the extrusion process and then cut to the appropriate length in the subsequent cutting device. The cut panels are hardened in the rack store. The production process is certified according to ISO 9001.

## Technical purpose
AQUAPANEL® Cement Board Rooftop ist Bestandteil von Flachdachsystemen, insbesondere gewerblich bzw. industriell genutzter Gebäude. Sie verbessert die Leistungsfähigkeit des Flachdaches in verschiedener Hinsicht:

1. Als Deckplatte zwischen der Dämmung und der Dachabdichtung:

■ schützt die darunterliegende Wärmedämmung

■ reduziert die Beanspruchung der Abdichtungsbahnen

■ verleiht dem gesamten Dachsystem zusätzliche strukturelle Festigkeit

■ bietet einen soliden Untergrund für begehbare Dächer und Dächer mit Auflast.

2. Als Trägerplatte, die direkt auf das Profilblech befestigt wird, dient sie als:

■ Träger für die Dampfsperre

■ Arbeitsplattform für die Dachdecker

## Reference product
- AQUAPANEL® Cement Board Rooftop 12,5 mm (AQUAPANEL® Cement Board Rooftop 12,5 mm ): 1

## Inputs
- Renewable primary energy as energy carrier (PERE) [MJ]: A1 5.24, A2 0.04, A3 2.04, C1 0.01, C2 0.08, C3 0, C4 0.43, D 0
- Renewable primary energy resources as material utilization (PERM) [MJ]: A1 0, A2 0, A3 0, C1 0, C2 0, C3 0, C4 0, D 0
- Total use of renewable primary energy resources (PERT) [MJ]: A1 5.24, A2 0.04, A3 2.04, C1 0.01, C2 0.08, C3 0, C4 0.43, D 0
- Non renewable primary energy as energy carrier (PENRE) [MJ]: A1 36.44, A2 0.62, A3 3.55, C1 0.13, C2 1.32, C3 0, C4 3.26, D 0
- Non renewable primary energy as material utilization (PENRM) [MJ]: A1 0, A2 0, A3 0, C1 0, C2 0, C3 0, C4 0, D 0
- Total use of non renewable primary energy resources (PENRT) [MJ]: A1 36.44, A2 0.62, A3 3.55, C1 0.13, C2 1.32, C3 0, C4 3.26, D 0
- Use of secondary material (SM) [kg]: A1 0.06, A2 0, A3 0, C1 0, C2 0, C3 0, C4 0, D 0
- Use of renewable secondary fuels (RSF) [MJ]: A1 2.4, A2 0, A3 0, C1 0, C2 0, C3 0, C4 0, D 0
- Use of non renewable secondary fuels (NRSF) [MJ]: A1 4.57, A2 0, A3 0, C1 0, C2 0, C3 0, C4 0, D 0
- Use of net fresh water (FW) [m^3]: A1 0.00817, A2 3.23e-5, A3 0.0011, C1 6.91e-6, C2 6.88e-5, C3 0, C4 0.00082, D 0

## Outputs
- Hazardous waste disposed (HWD) [kg]: A1 1.49e-5, A2 2.31e-8, A3 2.38e-9, C1 4.95e-9, C2 4.93e-8, C3 0, C4 4.96e-8, D 0
- Non hazardous waste disposed (NHWD) [kg]: A1 0.0731, A2 0.000109, A3 0.00273, C1 2.33e-5, C2 0.000232, C3 0, C4 16.4, D 0
- Radioactive waste disposed (RWD) [kg]: A1 0.000772, A2 6.52e-7, A3 0.000296, C1 1.4e-7, C2 1.39e-6, C3 0, C4 3.7e-5, D 0
- Components for re-use (CRU) [kg]: A1 0.4, A2 0, A3 0, C1 0, C2 0, C3 0, C4 0, D 0
- Materials for recycling (MFR) [kg]: A1 0, A2 0, A3 0, C1 0, C2 0, C3 0, C4 0, D 0
- Materials for energy recovery (MER) [kg]: A1 0, A2 0, A3 0, C1 0, C2 0, C3 0, C4 0, D 0
- Exported electrical energy (EEE) [MJ]: A1 0, A2 0, A3 0, C1 0, C2 0, C3 0, C4 0, D 0
- Exported thermal energy (EET) [MJ]: A1 0, A2 0, A3 0, C1 0, C2 0, C3 0, C4 0, D 0

## Impact indicators
- Global Warming Potential total (GWP-total) [kg CO_(2)-Äq.]: A1 4.94, A2 0.05, A3 0.29, C1 0.01, C2 0.1, C3 0, C4 0.23, D 0
- Global Warming Potential fossil fuels (GWP-fossil) [kg CO_(2)-Äq.]: A1 4.91, A2 0.05, A3 0.28, C1 0.01, C2 0.1, C3 0, C4 0.25, D 0
- Global Warming Potential biogenic (GWP-biogenic) [kg CO_(2)-Äq.]: A1 0.0276, A2 1.87e-5, A3 0.00186, C1 -0.000442, C2 4e-5, C3 0, C4 -0.0197, D 0
- Global Warming Potential luluc (GWP-luluc) [kg CO_(2)-Äq.]: A1 0.00237, A2 0.000195, A3 0.000721, C1 4.18e-5, C2 0.000416, C3 0, C4 0.000714, D 0
- Depletion potential of the stratospheric ozone layer (ODP) [kg CFC11-Äq.]: A1 2.17e-14, A2 1.14e-17, A3 8.73e-15, C1 2.45e-18, C2 2.44e-17, C3 0, C4 9.91e-16, D 0
- Acidification potential of land and water (AP) [mol H^(+)-Äq.]: A1 0.00803, A2 0.000269, A3 0.000433, C1 4.92e-5, C2 0.000573, C3 0, C4 0.00178, D 0
- Eutrophication potential aquatic freshwater (EP-freshwater) [kg PO_(4)-Äq.]: A1 4.05e-6, A2 1.01e-7, A3 1.18e-6, C1 2.17e-8, C2 2.16e-7, C3 0, C4 4.26e-7, D 0
- Eutrophication potential aquatic marine (EP-marine) [kg N-Äq.]: A1 0.00217, A2 0.000132, A3 0.000133, C1 2.32e-5, C2 0.000281, C3 0, C4 0.000458, D 0
- Eutrophication potential terrestrial (EP-terrestrial) [mol N-Äq.]: A1 0.0236, A2 0.00146, A3 0.00139, C1 0.000257, C2 0.00312, C3 0, C4 0.00503, D 0
- Formation potential of tropospheric ozone photochemical oxidants (POCP) [kg NMVOC-Äq.]: A1 0.00666, A2 0.000252, A3 0.000333, C1 6.49e-5, C2 0.000537, C3 0, C4 0.00139, D 0
- Abiotic depletion potential for non fossil resources (ADPE) [kg Sb-Äq.]: A1 3.97e-7, A2 3.87e-9, A3 1.07e-7, C1 8.29e-10, C2 8.25e-9, C3 0, C4 2.23e-8, D 0
- Abiotic depletion potential for fossil resources (ADPF) [MJ]: A1 36.19, A2 0.62, A3 3.54, C1 0.133, C2 1.32, C3 0, C4 3.25, D 0
- Water use (WDP) [m^(3) Welt-Äq. entzogen]: A1 0.236, A2 0.000201, A3 0.00629, C1 4.3e-5, C2 0.000428, C3 0, C4 0.026, D 0
- Incidence of disease due to PM emissions (PM) [Krankheitsfälle]
- Human exposure efficiency relative to U235 (IR) [kBq U235-Äq.]
- Comparative toxic unit for ecosystems (ETP-fw) [CTUe]
- Comparative toxic unit for humans (carcinogenic) (HTP-c) [CTUh]
- Comparative toxic unit for humans (noncarcinogenic) (HTP-nc) [CTUh]
- Soil quality index (SQP) [SQP]

## Use advice
Gültigkeitsbereich:
Diese Umweltproduktdeklaration bezieht sich auf AQUAPANEL® Cement Board Rooftop aus der Produktionsstätte Iserlohn, Deutschland.
Systemgrenze:
Im Rahmen der durchgeführten Ökobilanz sind die Herstellung bzw. Bereitstellung und der Transport der Vorprodukte/Rohstoffe sowie die Produktion des Endprodukts (A1–A3) berücksichtigt. Weiterhin wird die End-of-life-Phase (C1–C4) unter Anwendung technischer Szenarien betrachtet.

Die Daten der Zementplattenherstellung wurden am Produktionsstandort ermittelt. Die Rezeptur und die eingesetzten Ausgangsstoffe, die eingesetzte elektrische Energie sowie alle direkten Produktionsabfälle wurden in der Bilanzierung berücksichtigt. Innerhalb der Phase A2 wurden alle spezifischen Transportwege der Edukte hinterlegt.

## Data sources
- GaBi Database (all versions)
- GaBi database SP40 2020
