# STEICOflex F

Dataset: ILCD process, EPD, specific dataset
Geography: RER
Reference year: 2020
Valid until: 2025
Classification: OEKOBAU.DAT: Dämmstoffe / Holzfasern / Holzfaserdämmplatte
Classification: IBUCategories: 02 Bauprodukte / Holzwerkstoffe / Holzwerkstoffe
Method details: Holzwerkstoffe.pdf
Registration number: EPD-STE-20200001-IBA1-DE
Owner: STEICO SE
Compliance: DIN EN 15804; ISO 14025
Review: Accredited third party review by Institut Bauen und Umwelt e. V.
Amounts: rows without a unit in brackets have none in this file; such an amount is in the reference unit of its flow, which a separate flow dataset defines
copyright: true

## General comment
STEICOflex F are flexible wood fibre insulation boards produced in a dry process. To achieve the flexibility of the product, a small amount of textile binding fibre must be added.

## Technology and included processes
STEICOflex F is produced in a dry process: Processing of the raw wood into wood chips Heating the wood chips under steam pressure Defibration of the wood chips by means of a defibration process Drying the fibres in a cyclone dryer Addition of the bi-component fibre Feeding the batch to the production line Heating and pressing of the mixture to form an insulating mat Cutting the wood fibre insulation Stacking, packaging All residual materials arising during production are either returned to production or internally recycled for energy recovery. Quality assurance systems: CE marking according to /DIN EN 13171/MPA North Rhine-Westphalia, D /PEFC/10-34-76/
Technical data:
The following information refers to the product STEICOflex F as delivered.

Further data is available for download at www.steico.com.
Declared unit:
The declared unit is 1 m³ wood fibre insulation material with an average gross density of 51.7 kg with a water content of 2%. The proportion of additives is 8.7%.

## Technical purpose
The flexible wood fibre thermal insulation STEICOflex F is used as compartment insulation in roof, wall and ceiling constructions, as well as cavity insulation for partition walls, facing shells and installation levels.

## Reference product
- STEICOflex F (): 1

## Inputs
- Renewable primary energy as energy carrier (PERE) [MJ]: A1 5.23677, A2 0.633859, A3 101.463, A5 0.43348, C2 0.120865, C3 0.335642, D -165.725
- Renewable primary energy resources as material utilization (PERM) [MJ]: A1 890.104, A2 0, A3 40.5435, A5 -40.5435, C2 0, C3 -890.104, D 0
- Total use of renewable primary energy resources (PERT) [MJ]: A1 895.341, A2 0.633859, A3 142.007, A5 -40.11, C2 0.120865, C3 -889.768, D -165.725
- Non renewable primary energy as energy carrier (PENRE) [MJ]: A1 9.02449, A2 10.9275, A3 559.81, A5 2.21749, C2 2.08367, C3 5.5136, D -626.972
- Non renewable primary energy as material utilization (PENRM) [MJ]: A1 161.18, A2 0, A3 31.4357, A5 -31.4357, C2 0, C3 -161.18, D 0
- Total use of non renewable primary energy resources (PENRT) [MJ]: A1 170.204, A2 10.9275, A3 591.246, A5 -29.2182, C2 2.08367, C3 -155.666, D -626.972
- Use of secondary material (SM) [kg]: A1 0, A2 0, A3 0, A5 0, C2 0, C3 0, D 0
- Use of renewable secondary fuels (RSF) [MJ]: A1 0, A2 0, A3 258.496, A5 0, C2 0, C3 0, D 890.104
- Use of non renewable secondary fuels (NRSF) [MJ]: A1 0, A2 0, A3 0, A5 0, C2 0, C3 0, D 161.18
- Use of net fresh water (FW) [m^3]: A1 0.0701887, A2 0.00107163, A3 0.382453, A5 0.0183206, C2 0.00020434, C3 0.000385045, D 0.0899334

## Outputs
- Hazardous waste disposed (HWD) [kg]: A1 5.30918e-7, A2 6.10411e-7, A3 1.18444e-6, A5 9.78325e-9, C2 1.16394e-7, C3 3.1416e-7, D -3.40316e-7
- Non hazardous waste disposed (NHWD) [kg]: A1 0.0317367, A2 0.000888299, A3 0.347663, A5 0.247763, C2 0.000169383, C3 0.000370197, D 1.14906
- Radioactive waste disposed (RWD) [kg]: A1 0.00157786, A2 1.48264e-5, A3 0.0866502, A5 8.54718e-5, C2 2.82712e-6, C3 6.55331e-6, D -0.028807
- Components for re-use (CRU) [kg]: A1 0, A2 0, A3 0, A5 0, C2 0, C3 0, D 0
- Materials for recycling (MFR) [kg]: A1 0, A2 0, A3 0, A5 0, C2 0, C3 0, D 0
- Materials for energy recovery (MER) [kg]: A1 0, A2 0, A3 0, A5 0, C2 0, C3 51.7, D 0
- Exported electrical energy (EEE) [MJ]: A1 0, A2 0, A3 0, A5 11.3501, C2 0, C3 0, D 0
- Exported thermal energy (EET) [MJ]: A1 0, A2 0, A3 0, A5 23.9896, C2 0, C3 0, D 0

## Impact indicators
- Global warming potential (GWP) [kg CO_(2)-Äq.]: A1 -79.0291, A2 0.79192, A3 17.0793, A5 6.1351, C2 0.151005, C3 85.104, D -32.7376
- Depletion potential of the stratospheric ozone layer (ODP) [kg CFC11-Äq.]: A1 7.75523e-11, A2 1.32712e-16, A3 2.10315e-13, A5 2.43776e-15, C2 2.53058e-17, C3 1.40404e-16, D -1.00397e-12
- Acidification potential of land and water (AP) [kg SO_(2)-Äq.]: A1 0.0118945, A2 0.00334461, A3 0.0264189, A5 0.00117721, C2 0.000637755, C3 0.00373648, D -0.0392877
- Eutrophication potential (EP) [kg PO_(4)^(3)-Äq.]: A1 0.0019861, A2 0.000851266, A3 0.00480722, A5 0.00018735, C2 0.000162321, C3 0.000809305, D -0.00645236
- Formation potential of tropospheric ozone photochemical oxidants (POCP) [kg Ethen-Äq.]: A1 0.00227084, A2 -0.00138107, A3 0.00263989, A5 5.26505e-5, C2 -0.000263344, C3 0.000367027, D -0.00351958
- Abiotic depletion potential for non fossil resources (ADPE) [kg Sb-Äq.]: A1 1.43173e-6, A2 6.19127e-8, A3 7.19489e-6, A5 2.14662e-7, C2 1.18056e-8, C3 3.88892e-8, D -9.82264e-6
- Abiotic depletion potential for fossil resources (ADPF) [MJ]: A1 166.216, A2 10.8894, A3 361.948, A5 2.00169, C2 2.07642, C3 5.49676, D -554.213

## Use advice
Scope:
This Environmental Product Declaration applies to the flexible wood fibre insulation boards STEICOflex F 036/038, which are manufactured in the following plant:

STEICO Casteljaloux SAS

30 rue de Belloc

47700 Casteljaloux
System boundary:
The declaration type corresponds to an EPD "Weight to factory gate - with options". Contents are the stage of production, i.e. from the provision of raw materials to the factory gate of production (cradle to gate, Modules A1 to A3), as well as Module A5 and parts of the end of the life cycle (Modules C2 and C3). In addition, the potential benefits and burdens beyond the life cycle of the product are considered (Module D).

Module A1 includes the provision of wood from the forest as well as the provision of additives. The transports of these substances are considered in Module A2. Module A3 includes the costs of manufacturing the product, such as the provision of fuels, operating materials and energy, as well as the packaging of the product. Waste wood purchased for the heat supply is available without environmental impact.

Module A5 covers only the disposal of the product packaging, which includes the output of the biogenic carbon and the primary energy contained (PERM and PENRM).

Module C2 considers the transport to the disposal company and Module C3 the processing and sorting of the waste wood. Due to a lack of data, the conservative assumption was made that the material is shredded, as would be the case with waste wood, before it is ready for re-use. In addition, in Module C3 according to /EN 16485/, the CO2 equivalents of the wood-inherent carbon contained in the product, as well as the renewable and non-renewable primary energy (PERM and PENRM) contained in the product, are recorded as disposals.

In Module D, the thermal utilization of the product at the end of its life cycle and the resulting potential benefits and burdens are balanced in the form of a system expansion.

## Data sources
- STEICOflex F.pdf
- GaBi Database (all versions)
- GaBi database SP39 2019
