# Cement-based insulation foam: MasterProtect NFF 2070 IN

Dataset: ILCD process, EPD, specific dataset
Geography: RER
Reference year: 2021
Valid until: 2026
Classification: OEKOBAU.DAT: Dämmstoffe / Ortschaum / Mineralisch
Classification: IBUCategories: 02 Building products / Thermal insulation products / cement-based foams
Method details: cement-based foams.pdf
Generated by: Sphera Solutions GmbH
Registration number: EPD-MDS-20210038-CBA1-EN
Owner: Master Builders Solutions Deutschland GmbH
Compliance: DIN EN 15804; ISO 14025
Review: Accredited third party review by Institut Bauen und Umwelt e. V.
Amounts: rows without a unit in brackets have none in this file; such an amount is in the reference unit of its flow, which a separate flow dataset defines
copyright: true
licenseType: Free of charge for all users and uses
accessRestrictions: None

## General comment
Under the MBCC Group, the Master Builders Solutions brand combines its technological know-how and comprehensive product portfolio to provide the right solutions, based on our experience gained in countless construction projects worldwide.

SwissPorit / MasterProtect NFF 2070 IN boards are an inorganic insulation material consisting of an inorganic binder and inorganic fillers. It is an easy to process material for light, non-flammable and thermally insulating as well as completely recyclable products used in the construction industry.

MasterProtect NFF 2070 IN has been specially developed for permanent, energy-efficient and heat-insulating prefabrication and construction site applications.

At high, medium and low densities, the product is frost-resistant and shows little water absorption because it has a high proportion of closed pores. Furthermore, it has a high level of stability when exposed to cyclical temperature and humidity.

The product is manufactured in a chemical foaming process (reaction of hydrogen peroxide and a catalyst to form water and oxygen). This can be carried out continuously or in a batch process.

For the use of the product, the respective national regulations at the place of use apply, in Germany for example the building regulations of the federal states, and the technical regulations based on these regulations.

## Technology and included processes
The production of the insulation material is divided in two steps: 1.Manufacturing of the compound (compounding) In this production step the raw materials of the (foam-able) compound are mixed. The result is a dry powder which serves as raw material of the second manufacturing step (foaming, see below). All activities related to step 1 of the manufacturing process are allocated to module A1 (raw material supply, transport of raw materials etc.). 2.Manufacturing of the insulation foam (foaming) Once the compound is produced it is transported to clients. To manufacture the insulation foam, the dry compound is mixed with water and hydrogen peroxide. Through a chemical reaction of hydrogen peroxide with other reactive ingredients Oxygen occurs, which serves as foaming agent. At this point the “raw-foam” is formed. After 14 days curing time, the foam can be used as building material. The transport of the compound is allocated to module A2. The foaming and curing process itself is allocated to module A3.
Declared unit:
The declared unit is 1 m³ of MasterProtect NFF 2070 IN foam with an average density at factory gate of 76,02 kg/m³.

## Technical purpose
Renovation, repair and new construction
Interior insulation of ceiling, wall and roof
Underside insulation ceiling / roof
Insulation between rafters
Core insulation
Insulation of double-leaf walls
Insulation wood frame construction
External insulation of the wall behind the cladding (ventilated facade)
External insulation wall behind plaster (External Thermal Insulation Composite Systems, ETICS)
Insulation of apartment and room partition walls
Screed insulation
Brick cavity insulation (brick and concrete)

The insulation panels are processed and applied by hand. The cutting is done using a band saw or hard metal saws. The insulation panels are attached with an adapted mortar and plaster system. Plastic dowels can also be used. The insulation boards can be plastered, painted or coated.

## Scenarios
- S1: 1
- S2: 100% Recycling

## Reference product
- cement-based insulation foam: 1

## Inputs
- Renewable primary energy as energy carrier (PERE) [MJ]: A1-A3 133.17, A4 0.365, A5 52.5, B1 0, C2 0.342, C3 (S1) 0.238, C3 (S2) 0.238, D (S1) -44.88, D (S2) -10.378
- Renewable primary energy resources as material utilization (PERM) [MJ]: A1-A3 52.19, A4 0, A5 -52.2, B1 0, C2 0, C3 (S1) 0, C3 (S2) 0, D (S1) 0, D (S2) 0
- Total use of renewable primary energy resources (PERT) [MJ]: A1-A3 185.47, A4 0.365, A5 0.265, B1 0, C2 0.342, C3 (S1) 0.238, C3 (S2) 0.238, D (S1) -44.88, D (S2) -10.378
- Non renewable primary energy as energy carrier (PENRE) [MJ]: A1-A3 657.8, A4 6.5, A5 33.7, B1 0, C2 6.08, C3 (S1) 14.1, C3 (S2) 14.1, D (S1) -517, D (S2) -46.99
- Non renewable primary energy as material utilization (PENRM) [MJ]: A1-A3 43.1, A4 0, A5 -32.3, B1 0, C2 0, C3 (S1) -10.8, C3 (S2) -10.8, D (S1) 0, D (S2) 0
- Total use of non renewable primary energy resources (PENRT) [MJ]: A1-A3 700.8, A4 6.5, A5 1.42, B1 0, C2 6.08, C3 (S1) 3.3, C3 (S2) 3.3, D (S1) -517, D (S2) -46.99
- Use of secondary material (SM) [kg]: A1-A3 13, A4 0, A5 0, B1 0, C2 0, C3 (S1) 0, C3 (S2) 0, D (S1) 0, D (S2) 0
- Use of renewable secondary fuels (RSF) [MJ]: A1-A3 0, A4 0, A5 0, B1 0, C2 0, C3 (S1) 0, C3 (S2) 0, D (S1) 0, D (S2) 0
- Use of non renewable secondary fuels (NRSF) [MJ]: A1-A3 0, A4 0, A5 0, B1 0, C2 0, C3 (S1) 0, C3 (S2) 0, D (S1) 0, D (S2) 0
- Use of net fresh water (FW) [m^3]: A1-A3 0.17167, A4 0.000423, A5 0.0179, B1 0, C2 0.000395, C3 (S1) 0.000929, C3 (S2) 0.000929, D (S1) -0.0326, D (S2) -0.012013

## Outputs
- Hazardous waste disposed (HWD) [kg]: A1-A3 0.000584679, A4 3.03e-7, A5 9.82e-10, B1 0, C2 2.83e-7, C3 (S1) 8.64e-8, C3 (S2) 8.64e-8, D (S1) -3.63e-7, D (S2) -5.42e-8
- Non hazardous waste disposed (NHWD) [kg]: A1-A3 1.04691, A4 0.000995, A5 0.0469, B1 0, C2 0.000931, C3 (S1) 0.000892, C3 (S2) 0.000892, D (S1) -1.4609, D (S2) -2.6509
- Radioactive waste disposed (RWD) [kg]: A1-A3 0.0056958, A4 8.05e-6, A5 8.15e-5, B1 0, C2 7.53e-6, C3 (S1) 4.36e-5, C3 (S2) 4.36e-5, D (S1) -0.00838, D (S2) -0.003504
- Components for re-use (CRU) [kg]: A1-A3 0, A4 0, A5 0, B1 0, C2 0, C3 (S1) 0, C3 (S2) 0, D (S1) 0, D (S2) 0
- Materials for recycling (MFR) [kg]: A1-A3 0, A4 0, A5 0, B1 0, C2 0, C3 (S1) 63, C3 (S2) 63, D (S1) 0, D (S2) 0
- Materials for energy recovery (MER) [kg]: A1-A3 0, A4 0, A5 0, B1 0, C2 0, C3 (S1) 0, C3 (S2) 0, D (S1) 0, D (S2) 0
- Exported electrical energy (EEE) [MJ]: A1-A3 0, A4 0, A5 11.3, B1 0, C2 0, C3 (S1) 0, C3 (S2) 0, D (S1) 0, D (S2) 0
- Exported thermal energy (EET) [MJ]: A1-A3 0, A4 0, A5 20.2, B1 0, C2 0, C3 (S1) 0, C3 (S2) 0, D (S1) 0, D (S2) 0

## Impact indicators
- Global warming potential (GWP) [kg CO_(2)-Äq.]: A1-A3 45.59, A4 0.478, A5 7.62, B1 -1.46, C2 0.447, C3 (S1) 0.164, C3 (S2) 0.164, D (S1) -32.39, D (S2) -2.718
- Depletion potential of the stratospheric ozone layer (ODP) [kg CFC11-Äq.]: A1-A3 1.05001e-6, A4 7.82e-17, A5 1.08e-15, B1 0, C2 7.31e-17, C3 (S1) 5.46e-16, C3 (S2) 5.46e-16, D (S1) -2.321e-13, D (S2) -3.87e-14
- Acidification potential of land and water (AP) [kg SO_(2)-Äq.]: A1-A3 0.10859, A4 0.000373, A5 0.000642, B1 0, C2 0.000349, C3 (S1) 0.00115, C3 (S2) 0.00115, D (S1) -0.02686, D (S2) -0.003644
- Eutrophication potential (EP) [kg PO_(4)^(3)-Äq.]: A1-A3 0.034956, A4 6.86e-5, A5 0.000139, B1 0, C2 6.42e-5, C3 (S1) 0.000276, C3 (S2) 0.000276, D (S1) -0.004856, D (S2) -0.000529
- Formation potential of tropospheric ozone photochemical oxidants (POCP) [kg Ethen-Äq.]: A1-A3 0.0069578, A4 -1.61e-6, A5 5.67e-5, B1 0, C2 -1.5e-6, C3 (S1) 0.000127, C3 (S2) 0.000127, D (S1) -0.00304, D (S2) -0.0003636
- Abiotic depletion potential for non fossil resources (ADPE) [kg Sb-Äq.]: A1-A3 7.3531e-5, A4 3.5e-8, A5 1.33e-8, B1 0, C2 3.28e-8, C3 (S1) 1.85e-7, C3 (S2) 1.85e-7, D (S1) -3.748e-6, D (S2) -4.819e-7
- Abiotic depletion potential for fossil resources (ADPF) [MJ]: A1-A3 660.7, A4 6.48, A5 1.21, B1 0, C2 6.06, C3 (S1) 3.19, C3 (S2) 3.19, D (S1) -495.5, D (S2) -38.16

## Use advice
Scope:
The ecobalance is based on the compound MasterProtect NFF 2000 IN produced by BauMineral GmbH by order of Master Builders Solutions Deutschland GmbH. The board SwissPorit, MasterProtect NFF 2070 IN produced out of the compound, is produced by Eberhard Bau AG (CH) until the end of 2021 and by the Swiss Porit AG from the beginning of 2022. The results of the ecobalance are mainly dominated by the compound production. Therefore, the results may serve as a good approximation for other board production locations.
System boundary:
Type of the EPD: cradle to gate - with options.

Module A1:

Raw material and energy supply for production of the (foamable) compound. Packaging materials.

Module A2:

Transport of the compound to the converter Switzerland.

Module A3:

Foaming, forming and cutting of the compound. Treatment of compound packaging. Foam curing incl. carbonation (carbonation rate of 40% within A3, which leads to a carbon uptake of 1.04 kg CO2). Packaging of foam.

Module A4:

Transport to the construction site (100 km by truck). Trnasport distance may be adjusted on building level if relevant.

Module A5:

Packaging treatment. Installation losses have not been accounted for since these highly depend on the building context and application. Eventual losses may be estimated using the indicator results for the manufacturing phase (modules A1-A3) multiplied with the respective loss rate.

Module B1:

Carbonation of Ettringite (55% carbonation rate; 95% carbonation rate in total).

Module C1:

Manual deconstruction (no loads).

Module C2:

Transport to the waste treatment plant (50 km by truck). Transport distance may be adjusted on building level if relevant.

Module C3/1:

Recycling as admixture in cement foam production. Average efforts for waste treatment (shredding).

Module C3/2:

Recycling as backfill material. Average efforts for waste treatment (shredding).

Module D/1:

Avoided burdens for substitution of kaolin and calcium carbonate (non-reactive compound constituents).

Module D/2:

Avoided burdens for substitution of gravel.

## Data sources
- GaBi Database (all versions)
- GaBi database SP39 2019
