# TIGER Drylac® Series 75

Dataset: ILCD process, EPD, average dataset
Geography: GLO
Reference year: 2021
Valid until: 2026
Classification: OEKOBAU.DAT: Beschichtungen / Fassadenfarben / Dispersion
Classification: IBUCategories: 02 Building products / Construction adhesives and coatings / Coatings with organic binders
Method details: Coatings with organic binders.pdf
Generated by: Daxner & Merl GmbH
Registration number: EPD-TIG-20200056-IAD1-EN
Owner: TIGER Coatings GmbH & Co. KG
Compliance: DIN EN 15804; ISO 14025
Review: Accredited third party review by Institut Bauen und Umwelt e. V.
Amounts: rows without a unit in brackets have none in this file; such an amount is in the reference unit of its flow, which a separate flow dataset defines
copyright: true
licenseType: Free of charge for all users and uses
accessRestrictions: None

## General comment
This Environmental Product Declaration declares a thermosetting powder coating for exterior architectural application with hyper durable weatherability.

TIGER Drylac® Series 75 is a highly weather-resistant duroplastic powder coating in a smooth matte finish based on Fluoropolymer, the corresponding hardener, and UV-light resistant pigments.

For the use and application of the product, the respective national provisions at the place of use apply by way of example, in Germany, these are the building codes of the federal states and the corresponding national specifications.

## Technology and included processes
The production process of TIGER Drylac® Series 75 is the same in the three locations. Quality management systems: · TCA: IATF 16949, ISO 9001, ISO 14001 · TDU: ISO 9001, ISO 14001 · TDV: ISO 9001, ISO 14001 The powder coating is produced in the following order:[ 1. Weighing the raw materials 2. Premixing 3. Extrusion (plastification and homogenization) 4. Cooling and crushing 5. Grinding and sieving 6. Packing and Labeling 7. Metallic effects require an additional bonding process
Technical data:
The powder coating TIGER Drylac® Series 75 applied with a film thickness between 50 – 65µm and cured according to our technical data sheet on a suitable pretreated aluminium part has the following characteristics (according to AAMA 2605*):
Declared unit:
The environmental product declaration refers to a declared unit of 1 kg TIGER Drylac® Series 75 with a raw density between 1,4 – 1,8 g/cm³.

## Technical purpose
TIGER Drylac® Series 75 is typically used for the powder coating of curtain walls and window frames on pretreated aluminium. Due to the very high weather resistance, the main application is in the field of high-quality building objects.

## Reference product
- Drylac Series 75 (): 1

## Inputs
- Renewable primary energy as energy carrier (PERE) [MJ]: A1-A3 15.8
- Renewable primary energy resources as material utilization (PERM) [MJ]: A1-A3 0.89
- Total use of renewable primary energy resources (PERT) [MJ]: A1-A3 16.7
- Non renewable primary energy as energy carrier (PENRE) [MJ]: A1-A3 274
- Non renewable primary energy as material utilization (PENRM) [MJ]: A1-A3 9.45
- Total use of non renewable primary energy resources (PENRT) [MJ]: A1-A3 284
- Use of secondary material (SM) [kg]: A1-A3 0.048
- Use of renewable secondary fuels (RSF) [MJ]: A1-A3 0
- Use of non renewable secondary fuels (NRSF) [MJ]: A1-A3 0
- Use of net fresh water (FW) [m^3]: A1-A3 0.0139

## Outputs
- Hazardous waste disposed (HWD) [kg]: A1-A3 7.85e-6
- Non hazardous waste disposed (NHWD) [kg]: A1-A3 1.8
- Radioactive waste disposed (RWD) [kg]: A1-A3 0.00302
- Components for re-use (CRU) [kg]: A1-A3 0
- Materials for recycling (MFR) [kg]: A1-A3 0
- Materials for energy recovery (MER) [kg]: A1-A3 0
- Exported electrical energy (EEE) [MJ]: A1-A3 0
- Exported thermal energy (EET) [MJ]: A1-A3 0

## Impact indicators
- Global warming potential (GWP) [kg CO_(2)-Äq.]: A1-A3 14.1
- Depletion potential of the stratospheric ozone layer (ODP) [kg CFC11-Äq.]: A1-A3 9.83e-8
- Acidification potential of land and water (AP) [kg SO_(2)-Äq.]: A1-A3 0.0493
- Eutrophication potential (EP) [kg PO_(4)^(3)-Äq.]: A1-A3 0.0043
- Formation potential of tropospheric ozone photochemical oxidants (POCP) [kg Ethen-Äq.]: A1-A3 0.00833
- Abiotic depletion potential for non fossil resources (ADPE) [kg Sb-Äq.]: A1-A3 0.00148
- Abiotic depletion potential for fossil resources (ADPF) [MJ]: A1-A3 281

## Use advice
Scope:
This EPD is based on a declared unit of 1 kg TIGER Drylac® Series 75 with a raw density between 1,4 – 1,8 g/cm³ produced at the TIGER sites

- TIGER Coatings GmbH u Co.KG located in Wels, Austria (TCA),

- TIGER Drylac U.S.A., Inc. located in St. Charles, USA (TDU) and

- TIGER Drylac Vietnam Co., Ltd. located in Binh Duong, Vietnam (TDV).
System boundary:
The life cycle assessment of average TIGER Drylac® Series 75 refers to a cradle-to-gate analysis:

Module A1-A3 | Production stage

The production stage includes the upstream burdens of raw material supply, their transport and the manufacturing at the TIGER production plants. The main inputs include the binding agents, pigments and other additives. This EPD refers to a weighted average of the three production sites in Austria, USA and Vietnam.

The end of life of the product is not part of this analysis. The product under study is physically integrated with other products during its installation and thus cannot be physically separated at end of life. As a result, the end of life of the product is determined by the coated structure (e.g. facades, metallic surfaces, etc.). When applied to metallic parts, the product most likely is part of the metal recycling process at its end of life.

## Data sources
- GaBi Database (all versions)
- GaBi database SP40 2020
