# Betonpflastersteine

Dataset: ILCD process, EPD, average dataset
Geography: DE
Reference year: 2017
Valid until: 2022
Classification: OEKOBAU.DAT: Mineralische Baustoffe / Steine und Elemente / Betonfertigteile und Betonwaren
Classification: IBUCategories: 02 Bauprodukte / Tiefbauprodukte / Oberbaumaterialien für Verkehrswege im Aussenbereich
Method details: Oberbaumaterialien für Verkehrswege im Aussenbereich.pdf
Registration number: EPD-KLO-20170147-IAC1-DE
Owner: H. Klostermann GmbH & Co. KG Betonwerke
Compliance: DIN EN 15804; ISO 14025
Review: Accredited third party review by Institut Bauen und Umwelt e. V.
Amounts: rows without a unit in brackets have none in this file; such an amount is in the reference unit of its flow, which a separate flow dataset defines
copyright: true

## General comment
KLOSTERMANN Pflastersteine/Platten aus Beton unterschiedlicher Größen und Dicke dienen zur ganzheitlichen Gestaltung von Verkehrsflächen und Freiräumen. Die Pflastersteinmodelle unterscheiden sich in ihren Abmessungen, Formen, Oberflächen und Farben. Die Produktionsschritte und die Material-zusammensetzung sind nahezu identisch, weshalb sich diese Deklaration auf ein durchschnittliches Produkt bezieht. Betonpflastersteine/Platten werden aus natürlichen Gesteinskörnungen, hydraulischen Bindemitteln (Zement) unter Zugabe von Wasser und speziellen Betonzusatzmitteln hergestellt.

## Technology and included processes
Rohstoffaufbereitung Die mineralischen Vorprodukte werden angeliefert und in Silos zwischengelagert. Im Mischturm wird jeweils der Vorsatz- und Kernbeton nach fest vorgegebenen Rezepten vermischt. Dabei werden die Rohstoffe Zement, Sand, Kies, Wasser sowie die Hilfs-, Zusatzstoffe und Zusatzmittel in einen Betonmischer gegeben und zu einem erdfeuchten Beton vermischt. Nach der fertigen Mixtur wird der Beton zur Formgebung transportiert. Formgebung Der frische Kern- und Vorsatzbeton werden über eine Förderanlage bis zur Form transportiert und der Reihenfolge nach aufgeschichtet. Durch ein Rüttelpressverfahren werden die beiden Schichten miteinander verpresst, sodass der Betonpflasterstein seine Form erhält. Dabei bildet der Vorsatzbeton die sichtbare Oberfläche des Pflastersteins und der Kernbeton den nicht sichtbaren Teil des Pflastersteins. Aushärtung und Auslagerung Im Anschluss an die Formgebung findet die Entschalung statt, wobei der erdfeuchte Beton aus der Form geholt wird. Die Aushärtung der Betonpflastersteine erfolgt in einer thermisch regulierten Aushärtungshalle. Nach 24 Stunden haben die Betonpflastersteine/Platten 50% ihrer Normfestigkeit erreicht und können ausgelagert, weiterverarbeitet oder einer Oberflächenbehandlung (Strahlen, Schleifen etc.) unterzogen werden. Die Normfestigkeit ist nach 28 Tagen nach der Herstellung erreicht.
Technische Daten:
Es gelten die Daten entsprechend den Leistungserklärungen nach /DIN EN 1338:2010 Pflastersteine aus Beton - Anforderungen und Prüfverfahren/, /1339:2010 Platten aus Beton - Anforderungen und Prüfverfahren/ sowie /DIN 18507 Pflastersteine aus haufwerksporigem Beton/.
Deklarierte Einheit:
Die Deklaration bezieht sich auf die Herstellung von 1 m2 spezfisch produziertem Betonpflasterstein mit einer Schichtdicke von 8 cm der KLOSTERMANN GmbH & Co. KG. Die Durchschnittsbildung erfolgte gewichtsbezogen auf Basis der in Coesfeld produzierten Betonpflastersteine/Platten.

## Technical purpose
Betonpflastersteine und -platten dienen der Verwendung als Bodenbelag im Freien und auf Dächern.

## Reference product
- 1 m2 Betonpflasterstein: 1

## Inputs
- Erneuerbare Primärenergie als Energieträger (PERE) [MJ]: A1 22.6883, A2 1.51918, A3 21.4342
- Erneuerbare Primärenergie zur stofflichen Nutzung (PERM) [MJ]: A1 0, A2 0, A3 0
- Total erneuerbare Primärenergie (PERT) [MJ]: A1 22.6883, A2 1.51918, A3 21.4342
- Nicht-erneuerbare Primärenergie als Energieträger (PENRE) [MJ]: A1 108.947, A2 23.016, A3 41.425
- Nicht-erneuerbare Primärenergie zur stofflichen Nutzung (PENRM) [MJ]: A1 0, A2 0, A3 0
- Total nicht erneuerbare Primärenergie (PENRT) [MJ]: A1 108.947, A2 23.016, A3 41.425
- Einsatz von Sekundärstoffen (SM) [kg]: A1 15, A2 0, A3 0
- Erneuerbare Sekundärbrennstoffe (RSF) [MJ]: A1 0, A2 0, A3 0
- Nicht erneuerbare Sekundärbrennstoffe (NRSF) [MJ]: A1 0, A2 0, A3 0
- Einsatz von Süßwasserressourcen (FW) [m^3]: A1 0.00025317, A2 7.28928e-7, A3 5.27208e-7

## Outputs
- Gefährlicher Abfall zur Deponie (HWD) [kg]: A1 9.62339e-5, A2 1.45039e-6, A3 2.14007e-8
- Entsorgter nicht gefährlicher Abfall (NHWD) [kg]: A1 94.6524, A2 0.126692, A3 11.8975
- Entsorgter radioaktiver Abfall (RWD) [kg]: A1 0.00499392, A2 2.64326e-5, A3 0.00235046
- Komponenten für die Wiederverwendung (CRU) [kg]: A1 0, A2 0, A3 0
- Stoffe zum Recycling (MFR) [kg]: A1 0, A2 0, A3 0
- Stoffe für die Energierückgewinnung (MER) [kg]: A1 0, A2 0, A3 0
- Exportierte elektrische Energie (EEE) [MJ]: A1 0, A2 0, A3 0
- Exportierte thermische Energie (EET) [MJ]: A1 0, A2 0, A3 0

## Impact indicators
- Globales Erwärmungspotenzial (GWP) [kg CO_(2)-Äq.]: A1 20.6208, A2 1.68958, A3 3.16532
- Abbau Potential der stratosphärischen Ozonschicht (ODP) [kg CFC11-Äq.]: A1 4.59787e-11, A2 2.14223e-13, A3 8.18184e-12
- Versauerungspotenzial von Boden und Wasser (AP) [kg SO_(2)-Äq.]: A1 0.0329974, A2 0.00716335, A3 0.00402728
- Eutrophierungspotenzial (EP) [kg PO_(4)^(3)-Äq.]: A1 0.00385313, A2 0.0017798, A3 0.000614704
- Bildungspotential für troposphärisches Ozon (POCP) [kg Ethen-Äq.]: A1 0.00368836, A2 -0.00266796, A3 0.000348862
- Potenzial für den abiotischen Abbau nicht fossiler Ressourcen (ADPE) [kg Sb-Äq.]: A1 3.39846e-5, A2 1.75678e-7, A3 2.60213e-6
- Potenzial für den abiotischen Abbau fossiler Brennstoffe (ADPF) [MJ]: A1 96.2351, A2 22.9451, A3 35.4805

## Use advice
Gültigkeitsbereich:
Dieses Dokument bezieht sich auf Betonpflastersteine/Platten der Firma KLOSTERMANN GmbH & Co. KG, hergestellt im Werk Coesfeld, Deutschland. Es handelt sich um eine Durchschnitts-EPD: ein durchschnittliches Pflasterstein-Produkt aus Beton, welches sich auf die deklarierte Einheit von 1 m2 bezieht. Die Datenerhebung für die ökologische Berechnung erfolgte werksspezifisch mit aktuellen Jahresdaten von 2016. Die Ökobilanz ist somit repräsentativ für Betonpflastersteine/Platten der KLOSTERMANN GmbH & Co. KG. Der Deklarationsinhaber ist verantwortlich für die zugrunde liegenden Daten und deren Verifizierung.
Systemgrenze:
Die Ökobilanz betrachtet die Systemgrenzen "von der Wiege bis zum Werkstor" und folgt dem modularen Aufbau nach /DIN EN 15804/. Die Ökobilanz berücksichtigt folgende Module:

A1: Bereitstellung aller Vorprodukte und Verpackung
A2: Transport zum Hersteller
A3: Herstellungsprozesse und -aufwendungen

## Data sources
- Betonpflastersteine.pdf
- GaBi Database (all versions)
- GaBi database SP29 2016
