# Profiled sheets made of aluminium for roof, wall and ceiling constructions

Dataset: ILCD process, EPD, average dataset
Geography: RER
Reference year: 2018
Valid until: 2023
Classification: OEKOBAU.DAT: Metalle / Aluminium / Aluminiumbleche
Classification: IBUCategories: 02 Building products / Metallic products and ancillaries / Thin walled profiles and profiled panels of metal
Method details: Thin walled profiles and profiled panels of metal.pdf
Generated by: thinkstep AG
Registration number: EPD-PPA-20180078-CBG2-EN
Owner: PPA-Europe
Compliance: DIN EN 15804; ISO 14025
Review: Accredited third party review by Institut Bauen und Umwelt e. V.
Amounts: rows without a unit in brackets have none in this file; such an amount is in the reference unit of its flow, which a separate flow dataset defines
copyright: true
licenseType: Free of charge for all users and uses
accessRestrictions: None

## General comment
The EPD is valid for prefabricated thin walled profiled sheets made of aluminium for loadbearing, self-supporting and non-supporting applications in single- and double-layer roof, wall and ceiling structures. The profiled sheets are made of a core of aluminium with organic coatings. The LCA is based on vertical averaging of the specific producer datasets under consideration of the respective yearly production amounts.

## Technology and included processes
The profiled sheets made of aluminium, such as trapezoidal profiles or standing seam profiles are prefabricated thin walled elements for load-bearing, self-supporting and non-supporting applications in single- and double-layer roof, wall and ceiling structures. They are made of a core of aluminium with organic coating. The aluminium profiles are produced on continuously operating roll formers. This is a cold forming process, which begings by unwinding the aluminium coil. The roll forming machine is set in correspondence with the wished profile type. After forming, the sheets are cut at the wished length and stacked on each other.
Technical data:
Technical specifications for profiled sheets are:

/EN 14782/
/EN 508/
/EN 1090/
Declared unit:
The declared unit is 1 m2 of aluminium profile. The averaging is done weighted based on the production volume (in m²) per company.

## Technical purpose
The products are used as covering components in single- and double-layer roof and wall structures, as well as in single- and double-layer roof and ceiling structures for mainly static loads. The profiled sheets are used in interior and exterior application.

## Reference product
- Aluminium profile (2.9 kg/m²): 1

## Inputs
- Renewable primary energy as energy carrier (PERE) [MJ]: A1-A3 146.316, A4 0.0115015, C4 0.00720948, D -115.934
- Renewable primary energy resources as material utilization (PERM) [MJ]: A1-A3 1.50054, A4 0, C4 0, D 0
- Total use of renewable primary energy resources (PERT) [MJ]: A1-A3 147.817, A4 0.0115015, C4 0.00720948, D -115.934
- Non renewable primary energy as energy carrier (PENRE) [MJ]: A1-A3 358.16, A4 0.229108, C4 0.0618214, D -262.771
- Non renewable primary energy as material utilization (PENRM) [MJ]: A1-A3 2.09152, A4 0, C4 0, D 0
- Total use of non renewable primary energy resources (PENRT) [MJ]: A1-A3 360.252, A4 0.229108, C4 0.0618214, D -262.771
- Use of secondary material (SM) [kg]: A1-A3 0, A4 0, A5 0.37, C4 0, D 2.57
- Use of renewable secondary fuels (RSF) [MJ]: A1-A3 5.68283e-22, A4 0, C4 0, D 0
- Use of non renewable secondary fuels (NRSF) [MJ]: A1-A3 6.67517e-21, A4 0, C4 0, D 0
- Use of net fresh water (FW) [m^3]: A1-A3 0.371473, A4 2.12809e-5, C4 1.17695e-5, D -0.31508

## Outputs
- Hazardous waste disposed (HWD) [kg]: A1-A3 6.6646e-7, A4 1.20243e-8, C4 9.77242e-10, D 3.4109e-11
- Non hazardous waste disposed (NHWD) [kg]: A1-A3 7.24352, A4 1.74983e-5, C4 0.286497, D -5.87562
- Radioactive waste disposed (RWD) [kg]: A1-A3 0.0219955, A4 3.13677e-7, C4 8.46541e-7, D -0.0175294
- Components for re-use (CRU) [kg]: A1-A3 0, A4 0, C4 0, D 0
- Materials for recycling (MFR) [kg]: A1-A3 0, A4 0, C4 2.574, D 0
- Materials for energy recovery (MER) [kg]: A1-A3 0, A4 0, C4 0, D 0
- Exported electrical energy (EEE) [MJ]: A1-A3 0, A4 0, C4 0, D 0
- Exported thermal energy (EET) [MJ]: A1-A3 0, A4 0, C4 0, D 0

## Impact indicators
- Global warming potential (GWP) [kg CO_(2)-Äq.]: A1-A3 27.0322, A4 0.0165142, A5 0.76, C4 0.00461238, D -21.0653
- Depletion potential of the stratospheric ozone layer (ODP) [kg CFC11-Äq.]: A1-A3 4.65038e-10, A4 5.53548e-15, C4 4.72632e-15, D -6.38773e-7
- Acidification potential of land and water (AP) [kg SO_(2)-Äq.]: A1-A3 0.130772, A4 6.98086e-5, C4 2.73033e-5, D -0.118656
- Eutrophication potential (EP) [kg PO_(4)^(3)-Äq.]: A1-A3 0.00793889, A4 1.73753e-5, C4 3.71837e-6, D -0.00614662
- Formation potential of tropospheric ozone photochemical oxidants (POCP) [kg Ethen-Äq.]: A1-A3 0.00734261, A4 -2.56477e-5, C4 2.14776e-6, D -0.00638185
- Abiotic depletion potential for non fossil resources (ADPE) [kg Sb-Äq.]: A1-A3 1.36763e-5, A4 1.32852e-9, C4 1.6535e-9, D -1.07996e-5
- Abiotic depletion potential for fossil resources (ADPF) [MJ]: A1-A3 304.45, A4 0.228185, C4 0.0596855, D -220.165

## Use advice
Scope:
This document is an association EPD and it represents an average EPD, based on vertical averaging of the specific producer data under consideration of the yearly production amounts. Its applicability is limited to profiled sheets made of aluminium, which are manufactured by member companies of the European Association for Panels and Profiles and one additional company.

Five member companies of the European Association for Panels and Profiles and one additional company have provided data for the year 2016:

1. Italpannelli

2. Kalzip

3. Montana Bausysteme

4. Wurzer Profiliertechnik

5. Zambelli RIB-ROOF

6. Aluform System. These companies are representative for the European production of profiled sheets made of aluminium.
System boundary:
Type of the EPD: cradle to gate - with options

Production stage (modules A1-A3) includes processes that provide materials and energy input for the system, manufacturing and transport processes up to the factory gate, as well as waste processing.

For the end of life a collection rate of 90% is assumed. The 10% lost product is modelled with landfilling. The 90% recollected aluminium is modelled with a credit given as if it was pre-treated (as old scrap) and re-melted to produce secondary aluminium ingot and substituted by the same amount of primary aluminium ingot. The credit is declared in module D.

## Data sources
- GaBi Database (all versions)
- GaBi database SP34 2017
