# Sandwich wall

Dataset: ILCD process, EPD, average dataset
Geography: RER
Reference year: 2020
Valid until: 2025
Classification: OEKOBAU.DAT: Mineralische Baustoffe / Steine und Elemente / Betonfertigteile und Betonwaren
Classification: IBUCategories: 02 Bauprodukte / Normal- Leicht- und Porenbeton / Betonfertigteile
Method details: Betonfertigteile.pdf
Generated by: myclimate Deutschland gGmbH
Registration number: EPD-THO-20200192-IBD1-DE
Owner: thomas gruppe - Geschäftsfeld Betonbauteile
Compliance: DIN EN 15804; ISO 14025
Review: Accredited third party review by Institut Bauen und Umwelt e. V.
Amounts: rows without a unit in brackets have none in this file; such an amount is in the reference unit of its flow, which a separate flow dataset defines
copyright: true
licenseType: Free of charge for all users and uses
accessRestrictions: None

## General comment
This declaration refers to the product group of Sandwich walls. The manufacturing of Sandwich walls is carried out on flat tracks, in the automatic circulation systems or on tilting tables of the precast concrete plants.

Sandwich walls consist of prefabricated reinforced concrete slabs. They differ in their size, dimensions and intended use. Sandwich walls are characterized by a three-layer structure. The insulation layer is used according to customer specifications and is not part of the product declaration.

For the placing on the market of the product in the European Union/European Free Trade Association (EU/EFTA) (with the exception of Switzerland) Regulation (EU) No. 305/2011 (CPR) applies. The product needs a declaration of performance taking into consideration EN 14992, 2012, Precast concrete products - wall elements; EN 1520, 2011 Prefabricated reinforced components of lightweight aggregate concrete with open structure with structural or non-structural reinforcement.and the CE-marking.
For the application and use the respective national provisions apply.

## Technology and included processes
Shaping The preliminary products such as aggregates, cement and reinforced steel for Sandwich walls are delivered. The concrete is mixed together according to predefined recipes. Before casting the Sandwich walls, the formwork is created with the desired dimensions. The reinforcing bars for the reinforced concrete slabs are attached and then filled with concrete. Curing and Outplacement Sandwich walls cured for 8-10 hours in drying chambers. After curing, they can be removed and can be loaded. The standard strength is reached after 28 days after production.
Technical data:
The following technical data apply to Sandwich walls. The standard EN 14992, 2012, Precast concrete products - wall elements and EN 1520, 2011, Prefabricated reinforced components of lightweight aggregate concrete with open structure with structural or non-structural reinforcement, applies.
Declared unit:
The declaration applies to 1 t of Sandwich walls. Sandwich walls vary in volume, mass and slightly in composition. The average calculation is based on the average annual production of the individual locations and thus forms the production mix.

## Technical purpose
Sandwich walls of the thomas group from the business field of concrete components are used as exterior walls in residential, industrial and agricultural construction.

## Reference product
- Sandwichwand: 1000

## Inputs
- Renewable primary energy as energy carrier (PERE) [MJ]: A1-A3 380, C1 0.0535, C2 1.61, C4 25.5
- Renewable primary energy resources as material utilization (PERM) [MJ]: A1-A3 0, C1 0, C2 0, C4 0
- Total use of renewable primary energy resources (PERT) [MJ]: A1-A3 380, C1 0.0535, C2 1.61, C4 25.5
- Non renewable primary energy as energy carrier (PENRE) [MJ]: A1-A3 1820, C1 11.9, C2 25.8, C4 200
- Non renewable primary energy as material utilization (PENRM) [MJ]: A1-A3 0, C1 0, C2 0, C4 0
- Total use of non renewable primary energy resources (PENRT) [MJ]: A1-A3 1820, C1 11.9, C2 25.8, C4 200
- Use of secondary material (SM) [kg]: C1 0, C2 0, C4 0
- Use of renewable secondary fuels (RSF) [MJ]: A1-A3 0, C1 0, C2 0, C4 0
- Use of non renewable secondary fuels (NRSF) [MJ]: A1-A3 0, C1 0, C2 0, C4 0
- Use of net fresh water (FW) [m^3]: A1-A3 0.625, C1 8.45e-5, C2 0.00182, C4 0.0504

## Outputs
- Hazardous waste disposed (HWD) [kg]: A1-A3 0.000657, C1 1.69e-9, C2 1.46e-6, C4 3.42e-6
- Non hazardous waste disposed (NHWD) [kg]: A1-A3 83.8, C1 0.00151, C2 0.00183, C4 931
- Radioactive waste disposed (RWD) [kg]: A1-A3 0.042, C1 1.18e-5, C2 3.9e-5, C4 0.00266
- Components for re-use (CRU) [kg]: A1-A3 0, C1 0, C2 0, C4 0
- Materials for recycling (MFR) [kg]: A1-A3 1.31, C1 0, C2 70.5, C4 0
- Materials for energy recovery (MER) [kg]: A1-A3 0, C1 0, C2 0, C4 0
- Exported electrical energy (EEE) [MJ]: A1-A3 0, C1 0, C2 0, C4 0
- Exported thermal energy (EET) [MJ]: A1-A3 0, C1 0, C2 0, C4 0

## Impact indicators
- Global warming potential (GWP) [kg CO_(2)-Äq.]: A1-A3 244, C1 0.863, C2 1.92, C4 13.8
- Depletion potential of the stratospheric ozone layer (ODP) [kg CFC11-Äq.]: A1-A3 1.16e-6, C1 2.84e-16, C2 9.11e-16, C4 8.12e-14
- Acidification potential of land and water (AP) [kg SO_(2)-Äq.]: A1-A3 0.331, C1 0.000607, C2 0.00433, C4 0.0829
- Eutrophication potential (EP) [kg PO_(4)^(3)-Äq.]: A1-A3 0.0817, C1 8.7e-5, C2 0.00106, C4 0.0094
- Formation potential of tropospheric ozone photochemical oxidants (POCP) [kg Ethen-Äq.]: A1-A3 0.0396, C1 9.06e-5, C2 -0.00134, C4 0.00636
- Abiotic depletion potential for non fossil resources (ADPE) [kg Sb-Äq.]: A1-A3 8.03e-5, C1 3.02e-8, C2 1.86e-7, C4 5.09e-6
- Abiotic depletion potential for fossil resources (ADPF) [MJ]: A1-A3 1710, C1 11.8, C2 25.7, C4 194

## Use advice
Scope:
This document refers to Sandwich walls of the concrete components business area of the thomas group, produced in 2 out of 15 locatios:

thomas betonbauteile Melsdorf GmbH & Co. KG
Am Ihlberg 22-24
24109 Melsdorf

thomas praefab Międzyrzecz Sp. z o.o.
ul. Budowlanych 9
66-300 Międzyrzecz

The declared unit is 1 t Sandwich wall. The data for the production of the declared product was collected on a plant-specific basis with current annual data from 2018. The declarant is responsible for the underlying data and their verification.
System boundary:
The Life Cycle Assessment considers the system boundaries "cradle to grave" and follows the modular construction system described by EN 15804. The LCA takes into account the following modules:
A1: Raw material supply: extraction of raw material, production of precursors, processing of cement and aggregates, steel production, casting and processing of recycling materials
A2: Transport of precursors: transport of raw materials to manufacturing plant
A3: Manufacturing: production of Sandwich walls
C1: De-Construction & Demolition of Sandwich walls

C2: Transportation towards disposal
C4: Disposal of Sandwich walls

## Data sources
- ecoinvent database (all versions)
- ecoinvent 3.6 database
