# THERMATEX Basic & Standard

Dataset: ILCD process, EPD, average dataset
Geography: DE
Reference year: 2021
Valid until: 2026
Classification: OEKOBAU.DAT: Mineralische Baustoffe / Steine und Elemente / Deckenplatten
Classification: IBUCategories: 02 Bauprodukte / Innen-, Außenwand und Deckenbekleidungen / Mineralplatten
Method details: Mineralplatten.pdf
Generated by: Daxner & Merl GmbH
Registration number: EPD-KNA-20210052-IBC1-DE
Owner: Knauf Ceiling Solutions GmbH & Co. KG
Compliance: DIN EN 15804+A2; ISO 14025
Review: Accredited third party review by Institut Bauen und Umwelt e. V.
Amounts: rows without a unit in brackets have none in this file; such an amount is in the reference unit of its flow, which a separate flow dataset defines
copyright: true
licenseType: Free of charge for all users and uses
accessRestrictions: None

## General comment
The ceiling tiles are manufactured using a wet felt process and consist of biosoluble mineral wool, perlite, clay and starch. The ceiling tiles meet the requirements of DIN 18177 and EN 13964.

The AMF and Armstrong mineral tiles are available in a wide range of different surface designs and product properties. Depending on the design, the ceiling tiles are available in different formats and edge finishes.

This EPD applies to the following products:

Basic Range:
ECOMIN Fligran, ECOMIN Planet, ECOMIN Trento, ECOMIN Nevada, ECOMIN Orbit (micro), Armstrong Aleria L, Armstrong Atlas, Armstrong Bajkal, Armstrong Retail, Armstrong Savanna, Armstrong Scala

Standard Range:
THERMATEX Star, THERMATEX Star Complete, THERMATEX Schlicht, THERMATEX Laguna (micro), THERMATEX Feinstratos (micro), THERMATEX Feinstratos (micro) Complete, THERMATEX Mercure, THERMATEX Mercure Complete, THERMATEX Fresko, THERMATEX Feinfresko, THERMATEX Symetra, Armstrong Plain, Armstrong Casa, Armstrong Casa Max, Armstrong Dune Max, Armstrong Dune Supreme, Armstrong Dune, Armstrong Dune eVo, Armstrong Dune eVo dB, Armstrong Sahara, Armstrong Sahara dB, Armstrong Fine Fissured, Armstrong Fine Fissured High NRC, Armstrong Tatra, Armstrong Cortega

## Technology and included processes
The mineral tiles are produced in the traditional wet process (wet-felt). The raw materials are mixed with water to form a homogeneous suspension, which is pumped onto a belt conveyor (Fourdrinier). The water is removed mechanically (gravity and vacuum) and by evaporation in the drying oven. As far as possible, the process water is reused. It is treated accordingly and fed back into the process water circuit. Depending on the desired appearance the panels can be sanded, colour-treated, patterned, eroded or embossed. Production waste and dust are reused in the process in the sense of an internal cycle. The manufacturing plant is certified according to ISO 9001, ISO 14001, ISO 45001 and ISO 50001.
Technical data:
Mineral boards (wet-felt) are regulated by EN 13964 and have corresponding labelling and declaration of performance. The following data provide an overview of results:
Declared unit:
This EPD refers to a declared unit of 1 m² THERMATEX/ARMSTRONG Standard Range ceiling tiles with an average surface weight of 3,35 kg/m².

## Technical purpose
Mineral tiles (wet-felt) are typically used as lay in for suspended ceiling constructions. They are primarily used as optical cladding, but also for sound absorption and sound insulation, for fire resistance and against fire spreading, for cleanrooms and high hygiene requirements.

## Reference product
- THERMATEX/ARMSTRONG Standard Range Mineralplatte: 1

## Inputs
- Renewable primary energy as energy carrier (PERE) [MJ]: A1-A3 3.43, C1 0, C2 0.00769, C3 0, C4 0.0873, D 0
- Renewable primary energy resources as material utilization (PERM) [MJ]: A1-A3 5.79, C1 0, C2 0, C3 0, C4 0, D 0
- Total use of renewable primary energy resources (PERT) [MJ]: A1-A3 9.22, C1 0, C2 0.00769, C3 0, C4 0.0873, D 0
- Non renewable primary energy as energy carrier (PENRE) [MJ]: A1-A3 70.8, C1 0, C2 0.134, C3 0, C4 0.667, D 0
- Non renewable primary energy as material utilization (PENRM) [MJ]: A1-A3 6.19, C1 0, C2 0, C3 0, C4 0, D 0
- Total use of non renewable primary energy resources (PENRT) [MJ]: A1-A3 77, C1 0, C2 0.134, C3 0, C4 0.667, D 0
- Use of secondary material (SM) [kg]: A1-A3 0.75, C1 0, C2 0, C3 0, C4 0, D 0
- Use of renewable secondary fuels (RSF) [MJ]: A1-A3 0, C1 0, C2 0, C3 0, C4 0, D 0
- Use of non renewable secondary fuels (NRSF) [MJ]: A1-A3 0, C1 0, C2 0, C3 0, C4 0, D 0
- Use of net fresh water (FW) [m^3]: A1-A3 0.0134, C1 0, C2 8.97e-6, C3 0, C4 0.000168, D 0

## Outputs
- Hazardous waste disposed (HWD) [kg]: A1-A3 1.07e-5, C1 0, C2 6.18e-9, C3 0, C4 1.02e-8, D 0
- Non hazardous waste disposed (NHWD) [kg]: A1-A3 0.188, C1 0, C2 2.12e-5, C3 0, C4 3.35, D 0
- Radioactive waste disposed (RWD) [kg]: A1-A3 0.000969, C1 0, C2 2.46e-7, C3 0, C4 7.58e-6, D 0
- Components for re-use (CRU) [kg]: A1-A3 0, C1 0, C2 0, C3 0, C4 0, D 0
- Materials for recycling (MFR) [kg]: A1-A3 0, C1 0, C2 0, C3 0, C4 0, D 0
- Materials for energy recovery (MER) [kg]: A1-A3 0, C1 0, C2 0, C3 0, C4 0, D 0
- Exported electrical energy (EEE) [MJ]: A1-A3 0, C1 0, C2 0, C3 0, C4 0, D 0
- Exported thermal energy (EET) [MJ]: A1-A3 0, C1 0, C2 0, C3 0, C4 0, D 0

## Impact indicators
- Global Warming Potential total (GWP-total) [kg CO_(2)-Äq.]: A1-A3 4.49, C1 0, C2 0.0101, C3 0, C4 0.559, D 0
- Global Warming Potential fossil fuels (GWP-fossil) [kg CO_(2)-Äq.]: A1-A3 5, C1 0, C2 0.01, C3 0, C4 0.0508, D 0
- Global Warming Potential biogenic (GWP-biogenic) [kg CO_(2)-Äq.]: A1-A3 -0.509, C1 0, C2 -1.67e-5, C3 0, C4 0.509, D 0
- Global Warming Potential luluc (GWP-luluc) [kg CO_(2)-Äq.]: A1-A3 0.00327, C1 0, C2 8.07e-5, C3 0, C4 0.000146, D 0
- Depletion potential of the stratospheric ozone layer (ODP) [kg CFC11-Äq.]: A1-A3 9.28e-11, C1 0, C2 1.83e-18, C3 0, C4 1.88e-16, D 0
- Acidification potential of land and water (AP) [mol H^(+)-Äq.]: A1-A3 0.00981, C1 0, C2 3.39e-5, C3 0, C4 0.000365, D 0
- Eutrophication potential aquatic freshwater (EP-freshwater) [kg PO_(4)-Äq.]: A1-A3 8.16e-5, C1 0, C2 3.04e-8, C3 0, C4 8.73e-8, D 0
- Eutrophication potential aquatic marine (EP-marine) [kg N-Äq.]: A1-A3 0.00334, C1 0, C2 1.53e-5, C3 0, C4 9.38e-5, D 0
- Eutrophication potential terrestrial (EP-terrestrial) [mol N-Äq.]: A1-A3 0.0362, C1 0, C2 0.000171, C3 0, C4 0.00103, D 0
- Formation potential of tropospheric ozone photochemical oxidants (POCP) [kg NMVOC-Äq.]: A1-A3 0.00618, C1 0, C2 3e-5, C3 0, C4 0.000284, D 0
- Abiotic depletion potential for non fossil resources (ADPE) [kg Sb-Äq.]: A1-A3 1.33e-6, C1 0, C2 8.06e-10, C3 0, C4 4.56e-9, D 0
- Abiotic depletion potential for fossil resources (ADPF) [MJ]: A1-A3 77, C1 0, C2 0.133, C3 0, C4 0.667, D 0
- Water use (WDP) [m^(3) Welt-Äq. entzogen]: A1-A3 0.0667, C1 0, C2 9.72e-5, C3 0, C4 0.00533, D 0
- Incidence of disease due to PM emissions (PM) [Krankheitsfälle]: A1-A3 1.1e-7, C1 0, C2 1.92e-10, C3 0, C4 4.51e-9, D 0
- Human exposure efficiency relative to U235 (IR) [kBq U235-Äq.]: A1-A3 0.115, C1 0, C2 3.63e-5, C3 0, C4 0.000778, D 0
- Comparative toxic unit for ecosystems (ETP-fw) [CTUe]: A1-A3 14.9, C1 0, C2 0.0996, C3 0, C4 0.381, D 0
- Comparative toxic unit for humans (carcinogenic) (HTP-c) [CTUh]: A1-A3 1.19e-9, C1 0, C2 2.06e-12, C3 0, C4 5.64e-11, D 0
- Comparative toxic unit for humans (noncarcinogenic) (HTP-nc) [CTUh]: A1-A3 3.72e-8, C1 0, C2 1.18e-10, C3 0, C4 6.22e-9, D 0
- Soil quality index (SQP) [SQP]: A1-A3 69.2, C1 0, C2 0.0467, C3 0, C4 0.139, D 0

## Use advice
Scope:
This document refers to 1 m² THERMATEX/ARMSTRONG Standard Range mineral ceiling tiles with an average recipe and an average surface weight of 3,35 kg/m², manufactured at the production facility in Grafenau, Germany under the brand names THERMATEX and ARMSTRONG.
System boundary:
The life cycle assessment of average THERMATEX/ARMSTRONG Standard Range mineral ceiling tiles includes a cradle-to-gate analysis of the products’ environmental impacts with modules (C1-C4 and D). Subsequent life cycle phases are part of the analysis:

Module A1–A3 | Production stage

The production stage includes the upstream burdens of raw material supply, their transports and the manufacturing plant of Knauf Ceiling Solutions located in Grafenau (Germany). Mineral ceiling tiles are produced in the wet-felt process. Main raw material inputs, therefore, refer to mineral wool, perlite, clay and starch. The production site is supplied with electricity from the German power grid and thermal energy from natural gas.

Module C1 | Deconstruction and demolition

Disassembly of the product is done either manually or using smaller tools. Referring energy demand is considered to be negligible.

Modul C2 | Transport to disposal

The transport to the disposal of the material is estimated declaring a 50 km radius to the landfill. In reality, this scenario may vary depending on the actual location of deconstruction and referring waste treatment.

Module C3 | Waste processing

The declared scenario assumes landfilling of the product. Referring environmental impacts are accounted for in module C4.

Module C4 | Disposal

Module C4 refers to the emissions from the disposal of the mineral ceiling tiles. The chosen scenario, therefore, includes the environmental burdens of landfilling of the product.

Module D | Benefits and loads beyond the system boundaryThe declared scenario assumes landfilling of the product. Referring environmental impacts are accounted for in module C4.

## Data sources
- GaBi Database (all versions)
- GaBi database SP40 2020
