# Argeton

Dataset: ILCD process, EPD, specific dataset
Geography: DE
Reference year: 2019
Valid until: 2024
Classification: OEKOBAU.DAT: Mineralische Baustoffe / Steine und Elemente / Fliesen und Platten
Classification: IBUCategories: 02 Bauprodukte / Fassaden / Keramische Bekleidung
Method details: Keramische Bekleidung.pdf
Generated by: PE INTERNATIONAL AG
Registration number: EPD-WIN-20140143-ICA2-DE
Owner: Wienerberger GmbH
Compliance: DIN EN 15804; ISO 14025
Review: Accredited third party review by Institut Bauen und Umwelt e. V.
Amounts: rows without a unit in brackets have none in this file; such an amount is in the reference unit of its flow, which a separate flow dataset defines
copyright: true
licenseType: Free of charge for all users and uses
accessRestrictions: None

## General comment
Argeton clay brick facades consist of plane ceramic

facade panels manufactured from different clay

mixtures. Both single-leaf panels and panels with

cavities are produced for ventilated facade linings. The

facade panels are fit to a primary facade strapping by

use of system-oriented aluminium structural systems.

Argeton facade panels are available in different

shipping sizes and dimensions with or without cavities,

hence they differentiate in area density. The raw

materials utilized according to recipe and the

manufacturing process are identical. The declared area density makes up an annual average based on the production volume manufactured in 2013.

## Technology and included processes
Production of Argeton facade panels is made in nine steps: Raw material extraction, preparation, shaping, dehydration, colouring, burning, cutting, quality control and packaging. Clay is exploited in clay quarries near the factory. Transport into the factory is followed by the preparation process. It involves milling, mixing, moistening and scouring the clay from foreign particles like stones, and the admixture of construction aggregates. During the extrusion process the clay is pressed through a form(die) and roughly cut to length. During dehydration the soft clay is dehumidified. An engobe or glaze will be applied on the dried square bricks if required. Depending on the clay the square bricks are burnt in a roller kiln at a temperature of 1000°C to 1200°C. The burning process is followed by cutting to the exact length. The square bricks are examined visually and measured randomly in terms of their trueness of shape. Packaging is made semi-automatic with foil and additional packaging materials on pallets. The quality management system meets the requirements of /ISO 9001/norm.
Technical data:
The technical specifications of the product within the scope of the EPD are listed below.
Declared unit:
The declaration refers to 1 m² of ceramic façade panels inclusive system-oriented aluminium strapping. The average area density of ceramic facade panels (without strapping) is 40 kg/m², the one of the strapping 0,57 kg/m².

## Technical purpose
Argeton clay brick panels are used as lining material with ventilated facade linings, and with decorative linings for interior work. The facade panels are also used with ceilings, window reveals, window lintels, cover panels, or in the roof section.

## Reference product
- 1m² keramische Fassadenplatten inklusive Unterkonstruktion: 1

## Inputs
- Renewable primary energy as energy carrier (PERE) [MJ]: A1-A3 48
- Renewable primary energy resources as material utilization (PERM) [MJ]: A1-A3 0
- Total use of renewable primary energy resources (PERT) [MJ]: A1-A3 48, A4 0.0072805, A5 0.01, B1 0, B2 0, B3 0, B4 0, B5 0, C1 0, C2 0.09, C3 0, C4 0.62, D -13.4
- Non renewable primary energy as energy carrier (PENRE) [MJ]: A1-A3 646
- Non renewable primary energy as material utilization (PENRM) [MJ]: A1-A3 0
- Total use of non renewable primary energy resources (PENRT) [MJ]: A1-A3 646, A4 3.29212, A5 0.15, B1 0, B2 0, B3 0, B4 0, B5 0, C1 0, C2 1.58, C3 0, C4 7.46, D -37.6
- Use of secondary material (SM) [kg]: A1-A3 0.39, A4 0, A5 0, B1 0, B2 0, B3 0, B4 0, B5 0, C1 0, C2 0, C3 0, C4 0, D 0
- Use of renewable secondary fuels (RSF) [MJ]: A1-A3 0, A4 0, A5 0, B1 0, B2 0, B3 0, B4 0, B5 0, C1 0, C2 0, C3 0, C4 0, D 0
- Use of non renewable secondary fuels (NRSF) [MJ]: A1-A3 0, A4 0, A5 0, B1 0, B2 0, B3 0, B4 0, B5 0, C1 0, C2 0, C3 0, C4 0, D 0
- Use of net fresh water (FW) [m^3]: A1-A3 0.0856, A4 2.3715e-5, A5 0.00117, B1 0, B2 0, B3 0, B4 0, B5 0, C1 0, C2 6e-5, C3 0, C4 -0.0225, D -0.0284

## Outputs
- Hazardous waste disposed (HWD) [kg]: A1-A3 0.0449, A4 8.63934e-6, A5 1.99e-5, B1 0, B2 0, B3 0, B4 0, B5 0, C1 0, C2 6.99e-6, C3 0, C4 0.000338, D -0.00399
- Non hazardous waste disposed (NHWD) [kg]: A1-A3 1.32, A4 1.58394e-5, A5 0.0146, B1 0, B2 0, B3 0, B4 0, B5 0, C1 0, C2 0.000301, C3 0, C4 40.1, D -0.43
- Radioactive waste disposed (RWD) [kg]: A1-A3 0.0186, A4 3.8617e-6, A5 7.64e-6, B1 0, B2 0, B3 0, B4 0, B5 0, C1 0, C2 2.2e-6, C3 0, C4 0.00013, D -0.00238
- Components for re-use (CRU) [kg]: A1-A3 0, A4 0, A5 0, B1 0, B2 0, B3 0, B4 0, B5 0, C1 0, C2 0, C3 0, C4 0
- Materials for recycling (MFR) [kg]: A1-A3 0, A4 0, A5 0, B1 0, B2 0, B3 0, B4 0, B5 0, C1 0, C2 0.51, C3 0, C4 0
- Materials for energy recovery (MER) [kg]: A1-A3 0, A4 0, A5 0, B1 0, B2 0, B3 0, B4 0, B5 0, C1 0, C2 0, C3 0, C4 0
- Exported electrical energy (EEE) [MJ]: A1-A3 0, A4 0, A5 0.6945, B1 0, B2 0, B3 0, B4 0, B5 0, C1 0, C2 0, C3 0, C4 0
- Exported thermal energy (EET) [MJ]: A1-A3 0, A4 0, A5 1.677, B1 0, B2 0, B3 0, B4 0, B5 0, C1 0, C2 0, C3 0, C4 0

## Impact indicators
- Global warming potential (GWP) [kg CO_(2)-Äq.]: A1-A3 43.4, A4 0.236048, A5 0.484, B1 0, B2 0, B3 0, B4 0, B5 0, C1 0, C2 0.11529, C3 0, C4 0.542915, D -3.18
- Depletion potential of the stratospheric ozone layer (ODP) [kg CFC11-Äq.]: A1-A3 2.71e-9, A4 1.7919e-13, A5 3.59e-13, B1 0, B2 0, B3 0, B4 0, B5 0, C1 0, C2 2.75863e-13, C3 0, C4 6.80837e-12, D 1.56e-9
- Acidification potential of land and water (AP) [kg SO_(2)-Äq.]: A1-A3 0.111, A4 0.000525203, A5 6.81e-5, B1 0, B2 0, B3 0, B4 0, B5 0, C1 0, C2 0.00031508, C3 0, C4 0.00344926, D -0.0191
- Eutrophication potential (EP) [kg PO_(4)^(3)-Äq.]: A1-A3 0.0103, A4 0.000103144, A5 9.8e-6, B1 0, B2 0, B3 0, B4 0, B5 0, C1 0, C2 7.06206e-5, C3 0, C4 0.000473313, D -0.000912
- Formation potential of tropospheric ozone photochemical oxidants (POCP) [kg Ethen-Äq.]: A1-A3 0.00668, A4 -0.000158075, A5 4.99e-6, B1 0, B2 0, B3 0, B4 0, B5 0, C1 0, C2 -8.87927e-5, C3 0, C4 0.000323881, D -0.000966
- Abiotic depletion potential for non fossil resources (ADPE) [kg Sb-Äq.]: A1-A3 0.000247, A4 8.1021e-9, A5 2.34e-8, B1 0, B2 0, B3 0, B4 0, B5 0, C1 0, C2 5.40816e-9, C3 0, C4 2.04318e-7, D -8.14e-7
- Abiotic depletion potential for fossil resources (ADPF) [MJ]: A1-A3 599, A4 3.28236, A5 0.13, B1 0, B2 0, B3 0, B4 0, B5 0, C1 0, C2 1.57026, C3 0, C4 7.13725, D -31.6

## Use advice
Scope:
The EPD applies to ceramic facade elements of the Görlitz production facility (Am Dachziegelwerk 1, 02829 Schöpstal, Germany), which are carried by Wienerberger GmbH under the brand name of Argeton. The collected production data refers to 2013. The life cycle assessment based on plausible, transparently comprehensible base data represents the mentioned products at 100%.

The holder of the declaration is liable for the underlying information and evidence; a liability of IBU regarding manufacturer information, life cycle assessment data and evidence is excluded.
System boundary:
EPD type: Cradle to grave.

Life cycle assessment considers raw material production, raw material transports and the actual product manufacturing including consideration of packaging materials (modules A1-A3).

Transport to construction site (module A4) and treatment of packaging materials in refuse destructors after installation of the product (module A5) are part of the system boundaries too.

After the end of service life, the product will be dismantled manually (module C1). After the transport of the dismantled product (module C2) the facade panel is destined for disposal on an inert waste disposal (module C4), the aluminium strapping may be recycled.

Allowances owing to the recycling of primary aluminium are declared in module D. Allowances for electricity and thermal energy owing to the thermal recovery of packing within module A5 are considered in module D as well. The stage of use (modules B1-B5) is considered in this study. Since modules B6 and B7 refer to the operation of the building they are not declared in the EPD for the Argeton facade system. The use of the product is not related to the operational use of energy and water for buildings.

## Data sources
- GaBi Database (all versions)
- GaBi database SP26 2014
