# Tyvek® Monolayer 60 (1060B, 1560B, 2460B)

Dataset: ILCD process, EPD, average dataset
Geography: LU
Reference year: 2016
Valid until: 2022
Classification: OEKOBAU.DAT: Kunststoffe / Folien und Vliese / Folien zur Abdichtung
Classification: IBUCategories: 02 Building products / Membranes, including Liquid applied and kits / False ceiling and underlay sheeting
Method details: False ceiling and underlay sheeting.pdf
Generated by: Luxembourg Institute of Science and Technology (LIST)
Registration number: EPD-DUP-20150235-IBE1-EN
Owner: DuPont de Nemours (Luxembourg) s.à r.l.
Compliance: DIN EN 15804; ISO 14025
Review: Accredited third party review by Institut Bauen und Umwelt e. V.
Amounts: rows without a unit in brackets have none in this file; such an amount is in the reference unit of its flow, which a separate flow dataset defines
copyright: true
licenseType: Free of charge for all users and uses
accessRestrictions: None

## General comment
DuPont™ Tyvek® is a nonwoven material made of HDPE, which is diffusion open but watertight. It is used as a roof and wall underlay.

## Technology and included processes
The production process follows different steps. First, the monolayer is produced at DuPont in Luxembourg-Contern from the spinning and bonding of high-density polyethylene (HDPE). The rolls are then put on pallets using cardboard, stretch film and cores as packaging materials. The HDPE waste is pelletized with water and is either internally recycled or externally sold depending on the quality. The various machines and the daily functioning of the site lead to the consumption of water, steam, compressed air, electricity, diesel oil and natural gas. The printing and converting to customers’ dimensions specifications is done in another plant in Germany. The production line (printing, cutting and packaging) consumes colour paste, water, electricity, diesel oil, natural gas, forklift gas and packaging materials (pallets, carton cores, stretch film and carton edge protection). The plant generates Tyvek® and hazardous chemicals (colours) waste which are incinerated, as well as PE film waste which is recycled externally.
Technical data:
The following chapter comprises technical data for the characteristics listed in the Declaration of Performance according to the harmonized technical specifications /EN 13859-1:2010/ and /EN 13859-2:2010/.
Declared unit:
This declaration applies to 1 m2 of DuPont™ Tyvek® 1060B, 1560B and 2460B membranes, with a declared unit weight of 58 g/m2.

## Technical purpose
Tyvek® underlays are used in roofs and walls. They constitute the second water shedding layer and at the same time protect the insulation from trapped moisture, wind penetration, dust and insects. Insulation installed below Tyvek® is kept dry and performs as designed.

## Reference product
- 1 m2 DuPont™ Tyvek® Monolayer 60 (1060B, 1560B and 2460B): 1

## Inputs
- Renewable primary energy as energy carrier (PERE) [MJ]: A1-A3 0.399, A4 0.00463, A5 0.000178, C4 0.00223, D -0.169
- Renewable primary energy resources as material utilization (PERM) [MJ]: A1-A3 0, A4 0, A5 0, C4 0, D 0
- Total use of renewable primary energy resources (PERT) [MJ]: A1-A3 0.399, A4 0.00463, A5 0.000178, C4 0.00223, D -0.169
- Non renewable primary energy as energy carrier (PENRE) [MJ]: A1-A3 7.55, A4 0.089, A5 0.00291, C4 0.0245, D -1.97
- Non renewable primary energy as material utilization (PENRM) [MJ]: A1-A3 8.32e-7, A4 1.33e-13, A5 1.81e-14, C4 2.6e-13, D -1.85e-11
- Total use of non renewable primary energy resources (PENRT) [MJ]: A1-A3 7.55, A4 0.089, A5 0.00291, C4 0.0245, D -1.97
- Use of secondary material (SM) [kg]: A1-A3 0.0059, A4 0, A5 0, C4 0, D 0
- Use of renewable secondary fuels (RSF) [MJ]: A1-A3 5.27e-5, A4 5.78e-7, A5 1.42e-6, C4 3.19e-7, D -1.94e-5
- Use of non renewable secondary fuels (NRSF) [MJ]: A1-A3 0.000558, A4 6.05e-6, A5 3.05e-6, C4 2.87e-6, D -0.000203
- Use of net fresh water (FW) [m^3]: A1-A3 0.167, A4 0.00127, A5 0.000126, C4 0.00232, D -0.151

## Outputs
- Hazardous waste disposed (HWD) [kg]: A1-A3 -3.96e-7, A4 0, A5 0, C4 0, D 0
- Non hazardous waste disposed (NHWD) [kg]: A1-A3 -0.000185, A4 0, A5 0.00186, C4 0, D 0
- Radioactive waste disposed (RWD) [kg]: A1-A3 0.000149, A4 8.61e-7, A5 7.53e-8, C4 1.5e-6, D -0.000119
- Components for re-use (CRU) [kg]
- Materials for recycling (MFR) [kg]
- Materials for energy recovery (MER) [kg]
- Exported electrical energy (EEE) [MJ]: A1-A3 0, A4 0, A5 0.0217, C4 0.343, D 0
- Exported thermal energy (EET) [MJ]: A1-A3 0, A4 0, A5 0.0703, C4 0.779, D 0

## Impact indicators
- Global warming potential (GWP) [kg CO_(2)-Äq.]: A1-A3 0.283, A4 0.00606, A5 0.00547, C4 0.182, D -0.106
- Depletion potential of the stratospheric ozone layer (ODP) [kg CFC11-Äq.]: A1-A3 4.63e-11, A4 2.34e-13, A5 1.68e-14, C4 4.01e-13, D -3.31e-11
- Acidification potential of land and water (AP) [kg SO_(2)-Äq.]: A1-A3 0.0012, A4 6.65e-5, A5 1.02e-6, C4 1.31e-5, D -0.000261
- Eutrophication potential (EP) [kg PO_(4)^(3)-Äq.]: A1-A3 7.32e-5, A4 1.12e-5, A5 4.83e-7, C4 2.49e-6, D -1.84e-5
- Formation potential of tropospheric ozone photochemical oxidants (POCP) [kg Ethen-Äq.]: A1-A3 0.000124, A4 -9.79e-6, A5 7.14e-7, C4 1.56e-6, D -2.25e-5
- Abiotic depletion potential for non fossil resources (ADPE) [kg Sb-Äq.]: A1-A3 5.63e-8, A4 2.62e-10, A5 5.38e-11, C4 8.83e-10, D -1.02e-8
- Abiotic depletion potential for fossil resources (ADPF) [MJ]: A1-A3 6.6, A4 0.0809, A5 0.00249, C4 0.019, D -1.51

## Use advice
Scope:
This document applies to DuPont™ Tyvek® 1060B, 1560B and 2460B monolayer high density polyethylene (HDPE) membranes manufactured by DuPont in L-2984 Contern and printed in Germany, with a declared unit weight of 58 g/m2. The LCA data were compiled using production data from the year 2013 by DuPont Luxembourg s.à r.l. The declaration holder is responsible for the underlying data and its verification.
System boundary:
Type of EPD: Cradle-to-gate (with options)

The system boundaries of the EPD follow the modular construction system as described by /EN 15804:2012/. The LCA takes into account the following modules:

A1-A3: Manufacturing of pre-products, packaging, ancillary materials, transport to the factory, production including energy supply and waste handling
A4: Transport to the construction site
A5: Installation into the building (disposal of packaging)
C4: Waste disposal (incineration)

D: Potential for reuse, recovery and/or recycling (benefits for incineration and recovery of packaging materials from module A5 and envelopes incineration from module C4).

## Data sources
- GaBi Database (all versions)
- GaBi database SP28 2015
