# Spanplatte, roh (Durchschnitt DE)

Dataset: ILCD process, EPD, representative dataset
Geography: DE
Reference year: 2020
Valid until: 2025
Classification: OEKOBAU.DAT: Holz / Holzwerkstoffe / Spanplatten
Method details: EN 15804; ILCD format
Owner: Thünen-Institut für Holzforschung
Compliance: EN 15804
Review: Independent external review by Dr. Frank Werner - Umwelt & Entwicklung
Amounts: rows without a unit in brackets have none in this file; such an amount is in the reference unit of its flow, which a separate flow dataset defines
copyright: true

## General comment
Weitere Informationen zur deklarierten Einheit (Zusammensetzung) und die auf Herstellerangaben beruhende Sachbilanz (In- und Output der Stoff- und Energieströme) stehen als Excel-Datei unter der Überschrift Hintergrundbericht zum Download bereit.
Der Datensatz wurde 2020 als Aktualisierung mit gleichbleibendem Vordergrundsystem erstellt. Alle Hintergrunddaten entstammen der GaBi Professional Datenbank 2020 im Service Pack 40. Die Modellierung und Berechnung der Ökobilanz basiert auf den europäischen Normen EN 15804:2012+A1:2013 und EN 16485:2014. Bei Rückfragen wenden Sie sich bitte an holzundklima@thuenen.de.

## Geography
Die Produktion der an der Ökobilanzstudie beteiligten Projektpartner lag bei 3.525.000 m³/a, was einer deutschlandweiten Abdeckung von 99 % entspricht.

## Time period
Der Datensatz basiert auf Produktionsdaten aus den Jahren 2009 bis 2011 (Vordergrundsystem).
Eine Aktualisierung des Hintergrundsystems erfolgte 2020.

## Technology and included processes
Spanplatten sind plattenförmige Holzwerkstoffe. Sie bestehen hauptsächlich aus kleinteiligen Holzpartikeln wie Spänen und Mehl und werden mit duroplastischen Bindemitteln verpresst. Zur Herstellung dieser spanbasierten Holzwerkstoffe werden Holzrohstoffe aus Waldholz (Industrie-holz oder Waldhackschnitzel), Industrieresteholz (Industrierestholz, Hackschnitzel, Holzmehl) und Recyclingholz (Altholz, Ausschuss der eigenen Produktion) zunächst aufbereitet und getrocknet. Die Fraktionen werden sortiert (teilweise auch schon vor der Trocknung) und mit Bindemitteln vermischt bevor sie gleichmäßig in horizontalen Schichten gestreut und anschließend verpresst werden. Die verpressten Platten bzw. der verpresste Plattenstrang wird aufgetrennt und formatiert. Nachdem die Klebstoffe vollständig ausgehärtet sind, werden die Platten verpackt.
Die Holzfeuchte des Produktes liegt bei 7%.

## Technical purpose
Spanplatten können im dekorativen Innenausbau, Holzbau sowie im Möbelbau eingesetzt werden. Röhrenspanplatten werden für die Herstellung von Innentüren verwendet.

## Scenarios
- energetisch: therm. Verwertung
- stofflich: stoffl. Verwertung

## Reference product
- Spanplatte, roh (7% Feuchte): 1

## Inputs
- Use of renewable primary energy (PERE) [MJ]: A1 131.549, A2 10.383, A3 956.036, A1-A3 1097.97, A5 0.280187, C2 0.525923, C3 30.8332, D (energetisch) 6870.17, D (stofflich) -32.8423
- Use of renewable primary energy resources used as raw materials (PERM) [MJ]: A1 8250.49, A2 0, A3 43.387, A1-A3 8293.88, A5 -43.387, C2 0, C3 -8250.49, D (energetisch) 0, D (stofflich) 0
- Total use of renewable primary energy resources (PERT) [MJ]: A1 8382.04, A2 10.383, A3 999.423, A1-A3 9391.85, A5 -43.1068, C2 0.525923, C3 -8219.66, D (energetisch) 6870.17, D (stofflich) -32.8423
- Use of non renewable primary energy (PENRE) [MJ]: A1 1763.33, A2 110.221, A3 1040.31, A1-A3 2913.87, A5 1.47691, C2 9.36545, C3 53.6094, D (energetisch) -5679.74, D (stofflich) -163.581
- Use of non renewable primary energy resources used as raw materials (PENRM) [MJ]: A1 580.361, A2 0, A3 5.796, A1-A3 586.157, A5 -5.796, C2 0, C3 -580.361, D (energetisch) 0, D (stofflich) 0
- Total use of non renewable primary energy resource (PENRT) [MJ]: A1 2343.69, A2 110.221, A3 1046.11, A1-A3 3500.02, A5 -4.31909, C2 9.36545, C3 -526.752, D (energetisch) -5679.74, D (stofflich) -163.581
- Use of secondary material (SM) [kg]: A1 109.521, A2 0, A3 0, A1-A3 109.521, A5 0, C2 0, C3 0, D (energetisch) 0, D (stofflich) 504.299
- Use of renewable secondary fuels (RSF) [MJ]: A1 0, A2 0, A3 1158.3, A1-A3 1158.3, A5 0, C2 0, C3 0, D (energetisch) 0, D (stofflich) 0
- Use of non renewable secondary fuels (NRSF) [MJ]: A1 0, A2 0, A3 0, A1-A3 0, A5 0, C2 0, C3 0, D (energetisch) 0, D (stofflich) 0
- Use of net fresh water (FW) [m3]: A1 0.435522, A2 0.0120147, A3 0.262608, A1-A3 0.710144, A5 0.0149792, C2 0.000608982, C3 0.0166923, D (energetisch) 1.12942, D (stofflich) -0.019901

## Outputs
- Hazardous waste disposed (HWD) [kg]: A1 2.35061e-5, A2 4.62954e-6, A3 3.67095e-6, A1-A3 3.18066e-5, A5 4.06901e-9, C2 4.35839e-7, C3 3.60527e-8, D (energetisch) -2.74637e-6, D (stofflich) -5.4294e-6
- Non hazardous waste dispose (NHWD) [kg]: A1 0.557881, A2 0.0228969, A3 1.8915, A1-A3 2.47228, A5 0.0838592, C2 0.00143327, C3 0.0412596, D (energetisch) 24.7273, D (stofflich) -0.0399747
- Radioactive waste disposed (RWD) [kg]: A1 0.0200411, A2 0.00176723, A3 0.065483, A1-A3 0.0872913, A5 7.73619e-5, C2 1.1592e-5, C3 0.00448112, D (energetisch) -0.338925, D (stofflich) -0.00405052
- Components for re-use (CRU) [kg]: A1 0, A2 0, A3 0, A1-A3 0, A5 0, C2 0, C3 0, D (energetisch) 0, D (stofflich) 0
- Materials for recycling (MFR) [kg]: A1 0, A2 0, A3 0, A1-A3 0, A5 0, C2 0, C3 633.306, D (energetisch) 0, D (stofflich) 0
- Materials for energy recovery (MER) [kg]: A1 0, A2 0, A3 0, A1-A3 0, A5 0, C2 0, C3 633.306, D (energetisch) 0, D (stofflich) 0
- Exported electrical energy (EEE) [MJ]: A1 0, A2 0, A3 0.0165354, A1-A3 0.0165354, A5 8.98737, C2 0, C3 0, D (energetisch) 0, D (stofflich) 0
- Exported thermal energy (EET) [MJ]: A1 0, A2 0, A3 0.0384137, A1-A3 0.0384137, A5 16.5154, C2 0, C3 0, D (energetisch) 0, D (stofflich) 0

## Impact indicators
- Global warming potential (GWP) [kg CO2-Äqv.]: A1 -889.636, A2 7.78454, A3 71.9896, A1-A3 -809.862, A5 4.55654, C2 0.676339, C3 989.251, D (energetisch) -173.361, D (stofflich) -12.4493
- Depletion potential of the stratospheric ozone layer (ODP) [kg R11 eq.]: A1 7.01462e-13, A2 1.92698e-14, A3 3.43914e-12, A1-A3 4.15987e-12, A5 1.1982e-15, C2 1.12585e-16, C3 1.7597e-13, D (energetisch) -1.33087e-11, D (stofflich) -1.5734e-13
- Acidification potential of soil and water (AP) [kg SO2-Äqv.]: A1 0.166478, A2 0.0313405, A3 0.203889, A1-A3 0.401707, A5 0.000674173, C2 0.00283382, C3 0.00587833, D (energetisch) -0.346682, D (stofflich) -0.0464376
- Eutrophication potential (EP) [kg Phosphat-Äqv.]: A1 0.0748896, A2 0.00770552, A3 0.0435508, A1-A3 0.126146, A5 0.000134185, C2 0.000712896, C3 0.00104827, D (energetisch) -0.0621648, D (stofflich) -0.0110387
- Formation potential of tropospheric ozone (POCP) [kg Ethen-Äqv.]: A1 0.0101689, A2 -0.0125561, A3 0.204433, A1-A3 0.202046, A5 4.29219e-5, C2 -0.00119172, C3 0.000414745, D (energetisch) -0.029191, D (stofflich) -0.000215336
- Abiotic depletion potential for non fossil resources (ADPE) [kg Sb-Äqv.]: A1 3.08579e-5, A2 8.06213e-7, A3 3.69063e-5, A1-A3 6.85705e-5, A5 1.07561e-7, C2 5.69508e-8, C3 1.75259e-6, D (energetisch) -9.89834e-5, D (stofflich) -2.27918e-6
- Abiotic depletion potential for fossil resources (ADPF) [MJ]: A1 2293.06, A2 105.768, A3 878.239, A1-A3 3277.07, A5 1.28208, C2 9.33586, C3 42.2985, D (energetisch) -4243.89, D (stofflich) -153.353

## Use advice
Aufgrund der hohen Abdeckung bildet der Datensatz die durchschnittlichen Produktionsverhältnisse und die damit verbundenen Umweltwirkungen repräsentativ für Deutschland ab. Liegen keine herstellerspezifischen Ökobilanzergebnisse des verwendeten Produkts vor, empfiehlt sich die Verwendung dieses Durchschnittsdatensatzes.

## Data sources
- Rüter S, Diederichs S (2012) Ökobilanz Basisdaten für Bauprodukte aus Holz, Hamburg, Johann Heinrich von Thünen Institut, Institut für Holztechnologie und Holzbiologie, Abschlussbericht
- GaBi database SP40 2020
- GaBi database (general)
