# Pulastic Multifunctional Sports Floor

Dataset: ILCD process, EPD, specific dataset
Geography: NL
Reference year: 2019
Valid until: 2024
Classification: OEKOBAU.DAT: Komposite / Systembauteile / Decken
Classification: IBUCategories: 02 Building products / Floor coverings / Floor coverings
Method details: Floor coverings.pdf
Registration number: EPD-SIK-20180123-ICA1-EN
Owner: Sika Services AG
Compliance: DIN EN 15804; ISO 14025
Review: Accredited third party review by Institut Bauen und Umwelt e. V.
Amounts: rows without a unit in brackets have none in this file; such an amount is in the reference unit of its flow, which a separate flow dataset defines
copyright: true

## General comment
The Pulastic Multifunctional Sports Floor is a high-end sports floor providing outstanding comfort and safety for intensive training and competition combined with outstanding resistance to mechanical loads. The sports floor is approved according to the /EN 14904/ standard in category M3. Moreover, the sports floor is approved by the /F.I.B.A./ (International Basketball Federation) and /I.H.F./ (International Handball Federation). It is manufactured under /ISO 9001/ for quality management and /ISO 14001/ for environmental care.

The material consists of a special granulate rubber shock-pad of approximately 14 mm thickness, a pore sealing and levelling layer, in which a tear-proof polyurethane layer is applied which is embedded in a cast between two layers of flexible polyurethane. Then there is a seamless polyurethane wearing surface, finished with a special slightly structured durable mat-coat finish and line marking, is applied.

For the placing on the market of the product in the EU/EFTA (with the exception of Switzerland) Regulation (EU) No. 305/2011 (CPR) applies. The product needs a Declaration of Performance taking into consideration /Alternative 1a. EN 14904 Surfaces for sports areas - Indoor surfaces for multi-sports use - specification. ICS 97.220.10. For the application and use the respective national provisions apply.

## Technology and included processes
Various mixing machines are used for manufacturing the different materials. In these mixing machines the various raw materials are combined and mixed for a certain period. After mixing, the material is filled into cans, which are provided with a label with the product name. After mixing and filling, the products are packed in accordance with all laws and regulations. The Pulastic Multifunctional Sports Floor is manufactured under /ISO 9001/ for quality management.
Technical data:
Product Data
16 Classic colours and 16 Design colours are available as per manufacturer's colour brochure.
Declared unit:
This declaration applies to 1 m2 of Pulastic Multifunctional Sports Floor, with a thickness of 19.5 mm. The study period is 40 years.

## Technical purpose
The Pulastic Multifunctional Sports Floor is a comfortable, durable and resistant floor for sports halls and school gymnasia, which are used for a wide variety of indoor sports on a high level as well as for multifunctional purposes. This version meets all requirements of the /N.O.C.*N.S.F. Class 1/.

The subfloor shall correspond to the manufacturer's document "Requirements prior to the installation of a Pulastic Sports Floor". The nature of the different products requires highly (manufacturer-) trained specialists to execute the installation.

## Scenarios
- S1: 100% thermal energy recovery
- S2: Scenario 2: 100% landfill
- S3: Scenario 3: 100% recycling

## Reference product
- Pulastic Multifunctional Sports Floor: 1

## Inputs
- Renewable primary energy as energy carrier (PERE) [MJ]: A1-A3 199.695, A4 0.74252, A5 0.714069, B2 24, B5 (S1) 39.4501, B5 (S2) 24, B5 (S3) 41.2481, C1 0.35, C2 0.0675, C3 (S1) 0.422, C3 (S2) 0, C3 (S3) 21.5, C4 (S1) 0, C4 (S2) 0.859, C4 (S3) 0, D (S1) -60.6, D (S2) -12.1, D (S3) -14.7
- Renewable primary energy resources as material utilization (PERM) [MJ]: A1-A3 8.18485, A4 0, A5 -0.506289, B2 0, B5 (S1) 0, B5 (S2) 0, B5 (S3) 0, C1 0, C2 0, C3 (S1) 0, C3 (S2) 0, C3 (S3) 0, C4 (S1) 0, C4 (S2) 0, C4 (S3) 0, D (S1) 0, D (S2) 0, D (S3) 0
- Total use of renewable primary energy resources (PERT) [MJ]: A1-A3 207.88, A4 0.74252, A5 0.20778, B2 24, B5 (S1) 39.4501, B5 (S2) 39.3871, B5 (S3) 41.2481, C1 0.35, C2 0.0675, C3 (S1) 0.422, C3 (S2) 0, C3 (S3) 21.5, C4 (S1) 0, C4 (S2) 0.859, C4 (S3) 0, D (S1) -60.6, D (S2) -12.1, D (S3) -14.7
- Non renewable primary energy as energy carrier (PENRE) [MJ]: A1-A3 336.757, A4 14.8303, A5 -0.70687, B2 34.7, B5 (S1) 71.833, B5 (S2) 71.333, B5 (S3) 75.433, C1 1.03, C2 1.35, C3 (S1) 167.99, C3 (S2) 0, C3 (S3) 208.39, C4 (S1) 0, C4 (S2) 168.49, C4 (S3) 0, D (S1) -346, D (S2) -15.8, D (S3) -35
- Non renewable primary energy as material utilization (PENRM) [MJ]: A1-A3 158.283, A4 0, A5 -0.29343, B2 0, B5 (S1) 0, B5 (S2) 0, B5 (S3) 0, C1 0, C2 0, C3 (S1) -157.99, C3 (S2) 0, C3 (S3) -157.99, C4 (S1) 0, C4 (S2) -157.99, C4 (S3) 0, D (S1) 0, D (S2) 0, D (S3) 0
- Total use of non renewable primary energy resources (PENRT) [MJ]: A1-A3 495.04, A4 14.8303, A5 -1.0003, B2 34.7, B5 (S1) 71.833, B5 (S2) 71.333, B5 (S3) 75.433, C1 1.03, C2 1.35, C3 (S1) 10, C3 (S2) 0, C3 (S3) 50.4, C4 (S1) 0, C4 (S2) 10.5, C4 (S3) 0, D (S1) -346, D (S2) -15.8, D (S3) -35
- Use of secondary material (SM) [kg]: A1-A3 7.1973, A4 0, A5 0.0727, B2 0, B5 (S1) 0, B5 (S2) 0, B5 (S3) 0, C1 0, C2 0, C3 (S1) 0, C3 (S2) 0, C3 (S3) 0, C4 (S1) 0, C4 (S2) 0, C4 (S3) 0, D (S1) 0, D (S2) 0, D (S3) -10.05
- Use of renewable secondary fuels (RSF) [MJ]: A1-A3 0, A4 0, A5 0, B2 0, B5 (S1) 0, B5 (S2) 0, B5 (S3) 0, C1 0, C2 0, C3 (S1) 0, C3 (S2) 0, C3 (S3) 0, C4 (S1) 0, C4 (S2) 0, C4 (S3) 0, D (S1) 0, D (S2) 0, D (S3) 0
- Use of non renewable secondary fuels (NRSF) [MJ]: A1-A3 0, A4 0, A5 0, B2 0, B5 (S1) 0, B5 (S2) 0, B5 (S3) 0, C1 0, C2 0, C3 (S1) 0, C3 (S2) 0, C3 (S3) 0, C4 (S1) 0, C4 (S2) 0, C4 (S3) 0, D (S1) 0, D (S2) 0, D (S3) 0
- Use of net fresh water (FW) [m^3]: A1-A3 16.2, A4 0.00137356, A5 0.00213644, B2 0.104, B5 (S1) 3.30869, B5 (S2) 3.30085, B5 (S3) 3.30259, C1 0.0005, C2 0.000125, C3 (S1) 0.0911, C3 (S2) 0, C3 (S3) 0.0193, C4 (S1) 0, C4 (S2) 0.0004, C4 (S3) 0, D (S1) -0.0775, D (S2) -0.00865, D (S3) -0.0123

## Outputs
- Hazardous waste disposed (HWD) [kg]: A1-A3 9.8693e-6, A4 7.7636e-7, A5 5.93e-9, B2 2.92e-8, B5 (S1) 1.71275e-6, B5 (S2) 1.71768e-6, B5 (S3) 1.71538e-6, C1 4.16e-10, C2 7.07e-8, C3 (S1) 2.19e-9, C3 (S2) 0, C3 (S3) 3.27e-8, C4 (S1) 0, C4 (S2) 6.46e-8, C4 (S3) 0, D (S1) -8.29e-7, D (S2) -7.46e-7, D (S3) -7.51e-7
- Non hazardous waste disposed (NHWD) [kg]: A1-A3 0.6526, A4 0.00113466, A5 0.00153534, B2 0.27, B5 (S1) 0.249409, B5 (S2) 1.84591, B5 (S3) 0.250109, C1 0.000676, C2 0.000103, C3 (S1) 0.021, C3 (S2) 0, C3 (S3) 0.0471, C4 (S1) 0, C4 (S2) 17.2, C4 (S3) 0, D (S1) 0.00418, D (S2) 0.122, D (S3) 0.115
- Radioactive waste disposed (RWD) [kg]: A1-A3 0.0088467, A4 2.0205e-5, A5 0.000240395, B2 0.0042, B5 (S1) 0.00096306, B5 (S2) 0.00092606, B5 (S3) 0.00134106, C1 0.00016, C2 1.84e-6, C3 (S1) 0.000502, C3 (S2) 0, C3 (S3) 0.00461, C4 (S1) 0, C4 (S2) 0.000156, C4 (S3) 0, D (S1) -0.0221, D (S2) -0.000135, D (S3) -0.00129
- Components for re-use (CRU) [kg]: A1-A3 0, A4 0, A5 0, B2 0, B5 (S1) 0, B5 (S2) 0, B5 (S3) 0, C1 0, C2 0, C3 (S1) 0, C3 (S2) 0, C3 (S3) 0, C4 (S1) 0, C4 (S2) 0, C4 (S3) 0, D (S1) 0, D (S2) 0, D (S3) 0
- Materials for recycling (MFR) [kg]: A1-A3 0, A4 0, A5 0.6, B2 0, B5 (S1) 0, B5 (S2) 0, B5 (S3) 0, C1 0, C2 0, C3 (S1) 0, C3 (S2) 0, C3 (S3) 17.25, C4 (S1) 0, C4 (S2) 0, C4 (S3) 0, D (S1) 0, D (S2) 0, D (S3) 0
- Materials for energy recovery (MER) [kg]: A1-A3 0, A4 0, A5 0, B2 0, B5 (S1) 0, B5 (S2) 0, B5 (S3) 0, C1 0, C2 0, C3 (S1) 0, C3 (S2) 0, C3 (S3) 0, C4 (S1) 0, C4 (S2) 0, C4 (S3) 0, D (S1) 0, D (S2) 0, D (S3) 0
- Exported electrical energy (EEE) [MJ]: A1-A3 0, A4 0, A5 0.383, B2 0, B5 (S1) 5.2, B5 (S2) 0, B5 (S3) 0.28, C1 0, C2 0, C3 (S1) 59.6, C3 (S2) 0, C3 (S3) 3.12, C4 (S1) 0, C4 (S2) 0, C4 (S3) 0, D (S1) 0, D (S2) 0, D (S3) 0
- Exported thermal energy (EET) [MJ]: A1-A3 0, A4 0, A5 1.18, B2 0, B5 (S1) 12, B5 (S2) 0, B5 (S3) 0.9, C1 0, C2 0, C3 (S1) 164, C3 (S2) 0, C3 (S3) 10.1, C4 (S1) 0, C4 (S2) 0, C4 (S3) 0, D (S1) 0, D (S2) 0, D (S3) 0

## Impact indicators
- Global warming potential (GWP) [kg CO_(2)-Äq.]: A1-A3 20.353, A4 1.02541, A5 0.14489, B2 2.5, B5 (S1) 6.2361, B5 (S2) 2.8611, B5 (S3) 3.3661, C1 0.0585, C2 0.097, C3 (S1) 38.6, C3 (S2) 0, C3 (S3) 5.89, C4 (S1) 0, C4 (S2) 0.722, C4 (S3) 0, D (S1) -20.3, D (S2) -0.398, D (S3) -1.56
- Depletion potential of the stratospheric ozone layer (ODP) [kg CFC11-Äq.]: A1-A3 4.36e-7, A4 3.5832e-13, A5 1.32e-8, B2 9.56e-8, B5 (S1) 8.222e-8, B5 (S2) 8.22201e-8, B5 (S3) 8.244e-8, C1 2.6e-12, C2 3.26e-14, C3 (S1) 2.16e-8, C3 (S2) 0, C3 (S3) 2.34e-9, C4 (S1) 0, C4 (S2) 1.55e-12, C4 (S3) 0, D (S1) -1.09e-8, D (S2) -1.05e-8, D (S3) -1.05e-8
- Acidification potential of land and water (AP) [kg SO_(2)-Äq.]: A1-A3 0.11392, A4 0.0023195, A5 -0.0002845, B2 0.0114, B5 (S1) 0.0225997, B5 (S2) 0.0214397, B5 (S3) 0.0218597, C1 0.000167, C2 0.000217, C3 (S1) 0.0114, C3 (S2) 0, C3 (S3) 0.00619, C4 (S1) 0, C4 (S2) 0.00247, C4 (S3) 0, D (S1) -0.0341, D (S2) -0.00332, D (S3) -0.00502
- Eutrophication potential (EP) [kg PO_(4)^(3)-Äq.]: A1-A3 0.067288, A4 0.00054754, A5 -2.164e-5, B2 0.00779, B5 (S1) 0.0138135, B5 (S2) 0.0134835, B5 (S3) 0.0135535, C1 1.52e-5, C2 5.15e-5, C3 (S1) 0.00274, C3 (S2) 0, C3 (S3) 0.00101, C4 (S1) 0, C4 (S2) 0.00169, C4 (S3) 0, D (S1) -0.0038, D (S2) -0.000528, D (S3) -0.000712
- Formation potential of tropospheric ozone photochemical oxidants (POCP) [kg Ethen-Äq.]: A1-A3 0.0073811, A4 -0.00071683, A5 0.00041473, B2 0.00149, B5 (S1) 0.00119135, B5 (S2) 0.00111535, B5 (S3) 0.00114135, C1 1.07e-5, C2 -6.85e-5, C3 (S1) 0.000711, C3 (S2) 0, C3 (S3) 0.000426, C4 (S1) 0, C4 (S2) 0.00025, C4 (S3) 0, D (S1) -0.0036, D (S2) -0.000727, D (S3) -0.000892
- Abiotic depletion potential for non fossil resources (ADPE) [kg Sb-Äq.]: A1-A3 0.0001539, A4 8.5798e-8, A5 -1.39996e-5, B2 7.17e-6, B5 (S1) 2.26589e-5, B5 (S2) 2.26379e-5, B5 (S3) 2.27289e-5, C1 2.34e-8, C2 7.81e-9, C3 (S1) -8.25e-6, C3 (S2) 0, C3 (S3) 1.07e-6, C4 (S1) 0, C4 (S2) 1.72e-7, C4 (S3) 0, D (S1) -7.62e-6, D (S2) -3.83e-6, D (S3) -4.04e-6
- Abiotic depletion potential for fossil resources (ADPF) [MJ]: A1-A3 462.14, A4 14.731, A5 -1.631, B2 23.5, B5 (S1) 66.3507, B5 (S2) 65.9507, B5 (S3) 69.0507, C1 0.625, C2 1.34, C3 (S1) 8.47, C3 (S2) 0, C3 (S3) 38.7, C4 (S1) 0, C4 (S2) 10.1, C4 (S3) 0, D (S1) -291, D (S2) -15.6, D (S3) -32

## Use advice
Scope:
This document applies to the Pulastic Multifunctional Sports Floor system manufactured by Sika Nederland B.V. in 7418 CK Deventer, Netherlands. The lifecycle assessment data are based on production data from 2017 collected by Sika Technology AG. The declared results refer to the product with the maximum layer thickness. It can be assumed that products with lower thickness and mass, but manufactured out of the same components, will show the same or less environmental impact.
System boundary:
Type of EPD: Cradle to Grave.

The system boundaries of the EPD follow the modular structuring system described by /EN 15804/. The LCA takes into account the following modules:

A1-A3: Manufacture of pre-products and the product, packaging, ancillary materials, processing (recycling) of secondary materials, transport to the factory, production including energy supply and emissions, waste handling (incineration of production waste, waste water treatment).
A4: Transport to the building site.
A5: Installation in the building (including disposal of packaging waste (incineration, recycling, reuse) and emissions during installation), production and transport of the amount of shock-pad that occurs as installation waste.
B2: Maintenance including electricity for vacuum cleaner, water and cleaning agent as well as waste water treatment.
B5: Refurbishment (production, transport application of the materials included in the facelift, electricity, emissions and waste processing) - (B5/1: incineration scenario, B5/2: landfill scenario, B5/3: recycling scenario).
C1: Deconstruction and demolition (energy for the machinery to remove the floor).
C2: Transport to waste-processing facility.
C3: Waste processing for incineration (C3/1) or recycling (C3/3).
C4: Impact from landfill disposal (C4/2).
D: Potential for reuse, recovery and/or recycling as net flows and benefits.

## Data sources
- Pulastic Multifunctional Sports Floor.pdf
- GaBi Database (all versions)
- GaBi database SP34 2017
