# TERRART Fassadenplatte

Dataset: ILCD process, EPD, specific dataset
Geography: DE
Reference year: 2016
Valid until: 2021
Classification: OEKOBAU.DAT: Mineralische Baustoffe / Steine und Elemente / Fliesen und Platten
Classification: IBUCategories: 02 Bauprodukte / Fassaden / Keramische Bekleidung
Method details: Keramische Bekleidung.pdf
Owner: NBK
Compliance: DIN EN 15804; ISO 14025
Review: Accredited third party review by IBU
Amounts: rows without a unit in brackets have none in this file; such an amount is in the reference unit of its flow, which a separate flow dataset defines
copyright: true

## General comment
TERRART® sind keramische Fassadenplatten aus gebranntem Ton. Die Platten werden aus verschiedenen Tonmischungen (weißer & roter Ton und Schamotte) hergestellt und erhalten durch abgestimmte Brennkurven ihre Oberflächen bzw. ihre Farben. Sie sind sowohl als zweischalige Platten (mit Hohlkammern) als auch als einschalige Platten für vorgehängte hinterlüftete Fassaden erhältlich. Die Fassadenplatten werden mittels systemgebundener Aluminium-Unterkonstruktion an primäre Tragsysteme der Fassade angebunden. Die in dieser EPD berücksichtigte Unterkonstruktion bezieht sich auf eine typische Unterkonstruktion für die Verwendung als Fassadenplatten.

## Technology and included processes
TERRART® sind keramische Fassadenplatten aus gebranntem Ton. Die Platten werden aus verschiedenen Tonmischungen (weißer & roter Ton und Schamotte) hergestellt und erhalten durch abgestimmte Brennkurven ihre Oberflächen bzw. ihre Farben. Sie sind sowohl als zweischalige Platten (mit Hohlkammern) als auch als einschalige Platten für vorgehängte hinterlüftete Fassaden erhältlich. Die Fassadenplatten werden mittels systemgebundener Aluminium-Unterkonstruktion an primäre Tragsysteme der Fassade angebunden. Die in dieser EPD berücksichtigte Unterkonstruktion bezieht sich auf eine typische Unterkonstruktion für die Verwendung als Fassadenplatten.
Technische Daten:
TERRART® Keramische Fassadenplatten besitzen folgende technische Eigenschaften:
Deklarierte Einheit:
Die Deklaration bezieht sich auf die Herstellung von 1 m² durchschnittlicher keramischer Fassadenplatte für das repräsentative Produkt TERRART® inklusive systemgebundener Unterkonstruktion aus Aluminium-Profilen.

## Technical purpose
TERRART® findet seine Anwendung als Bekleidungsmaterial in vorgehängten hinterlüfteten Fassaden sowie für den dekorativen Innenausbau. Die Fassadenplatten werden auch für Unterdecken, Leibungen und Abdeckungen verwendet.

## Reference product
- 1 m² TERRART Fassadenplatte incl. Unterkonstruktion (67,07 kg/m²): 1

## Inputs
- Erneuerbare Primärenergie als Energieträger (PERE) [MJ]: A1-A3 125.548, C3 0, C4 0, D 0
- Erneuerbare Primärenergie zur stofflichen Nutzung (PERM) [MJ]: A1-A3 2.32196, C3 0, C4 0, D 0
- Total erneuerbare Primärenergie (PERT) [MJ]: A1-A3 127.87, C3 0, C4 1.4095, D -62.898
- Nicht-erneuerbare Primärenergie als Energieträger (PENRE) [MJ]: A1-A3 1360.44, C3 0, C4 0, D 0
- Nicht-erneuerbare Primärenergie zur stofflichen Nutzung (PENRM) [MJ]: A1-A3 1.46, C3 0, C4 0, D 0
- Total nicht erneuerbare Primärenergie (PENRT) [MJ]: A1-A3 1361.9, C3 0, C4 14.311, D -215.05
- Einsatz von Sekundärstoffen (SM) [kg]: A1-A3 19.295, C3 0, C4 0, D 0
- Erneuerbare Sekundärbrennstoffe (RSF) [MJ]: A1-A3 0, C3 0, C4 0, D 0
- Nicht erneuerbare Sekundärbrennstoffe (NRSF) [MJ]: A1-A3 0, C3 0, C4 0, D 0
- Einsatz von Süßwasserressourcen (FW) [m^3]: A1-A3 0.21989, C3 0, C4 0.0037081, D -0.13752

## Outputs
- Gefährlicher Abfall zur Deponie (HWD) [kg]: A1-A3 0.00033154, C3 0, C4 4.4514e-6, D -5.9756e-5
- Entsorgter nicht gefährlicher Abfall (NHWD) [kg]: A1-A3 6.1463, C3 0, C4 65.115, D -3.4124
- Entsorgter radioaktiver Abfall (RWD) [kg]: A1-A3 0.037967, C3 0, C4 0.00022942, D -0.017519
- Komponenten für die Wiederverwendung (CRU) [kg]: A1-A3 0, C3 0, C4 0, D 0
- Stoffe zum Recycling (MFR) [kg]: A1-A3 0, C3 2.07, C4 0, D 0
- Stoffe für die Energierückgewinnung (MER) [kg]: A1-A3 0, C3 0, C4 0, D 0
- Exportierte elektrische Energie (EEE) [MJ]: A1-A3 0, C3 0, C4 0, D 0
- Exportierte thermische Energie (EET) [MJ]: A1-A3 0, C3 0, C4 0, D 0

## Impact indicators
- Globales Erwärmungspotenzial (GWP) [kg CO_(2)-Äq.]: A1-A3 90.507, C3 0, C4 1.5186, D -16.074
- Abbau Potential der stratosphärischen Ozonschicht (ODP) [kg CFC11-Äq.]: A1-A3 8.6932e-9, C3 0, C4 1.6954e-11, D 4.7354e-9
- Versauerungspotenzial von Boden und Wasser (AP) [kg SO_(2)-Äq.]: A1-A3 0.20252, C3 0, C4 0.0063901, D -0.070457
- Eutrophierungspotenzial (EP) [kg PO_(4)^(3)-Äq.]: A1-A3 0.01737, C3 0, C4 0.00087903, D -0.004694
- Bildungspotential für troposphärisches Ozon (POCP) [kg Ethen-Äq.]: A1-A3 0.015011, C3 0, C4 0.00060046, D -0.0044341
- Potenzial für den abiotischen Abbau nicht fossiler Ressourcen (ADPE) [kg Sb-Äq.]: A1-A3 0.00027621, C3 0, C4 3.9232e-7, D -6.0833e-5
- Potenzial für den abiotischen Abbau fossiler Brennstoffe (ADPF) [MJ]: A1-A3 1266.1, C3 0, C4 13.734, D -170.74

## Use advice
Gültigkeitsbereich:
Diese EPD gilt für 1 m² TERRART® - keramische Fassadenplatte produziert von der NBK Keramik GmbH in Emmerich am Rhein.
Systemgrenze:
Die Systemgrenze der EPD vom Typ "Wiege bis Werkstor mit Optionen" folgt dem modularen Aufbau der /EN 15804/. Die Ökobilanz des betrachteten Produktes berücksichtigt die folgenden Lebenszyklusphasen und Module:

A1-A3 (Produktionsstadium): Rohstoffbereitstellung, Transport zum Hersteller, Herstellung (inkl. Energieerzeugung, Bereitstellung von Hilfsstoffen, Verpackungsmaterialien und Entsorgung der Abfälle).

C4 (Beseitigung im Entsorgungsstadium):
Das Entsorgungsszenario betrachtet die Deponierung der Platten auf einer Bauschuttdeponie. Weiterhin geht der Entsorgungsaufwand für Teile der Unterkonstruktion, die nicht stofflich verwertet werden, in dieses Modul ein.

D (Gutschriften und Lasten außerhalb der Systemgrenze):

Gutschriften ergeben sich aus dem stofflichen Recycling der Aluminium-Unterkonstruktion.

## Data sources
- TERRART Fassadenplatte .pdf
- GaBi Database (all versions)
- GaBi database SP28 2015
