# Double skin steel faced sandwich panels with a core made of mineral wool

Dataset: ILCD process, EPD, average dataset
Geography: RER
Reference year: 2018
Valid until: 2023
Classification: OEKOBAU.DAT: Dämmstoffe / Mineralwolle / Mineralwolle
Classification: IBUCategories: 02 Building products / Facades / Double skin metal faced sandwich panels
Method details: Double skin metal faced sandwich panels.pdf
Generated by: thinkstep AG
Registration number: EPD-PPA-20180075-CBG2-EN
Owner: PPA-Europe
Compliance: DIN EN 15804; ISO 14025
Review: Accredited third party review by Institut Bauen und Umwelt e. V.
Amounts: rows without a unit in brackets have none in this file; such an amount is in the reference unit of its flow, which a separate flow dataset defines
copyright: true
licenseType: Free of charge for all users and uses
accessRestrictions: None

## General comment
The EPD applies to prefabricated double skin steel faced sandwich panels with a core made of mineral wool, which are produced by member companies of PPA-Europe.

The profiled internal and external faces are made of a core of steel, which is protected against corrosion with zinc and organic coatings. The thermal insulating core material is made of mineral wool according to /EN 13162/ with sealing tapes. The core is bonded with adhesive to the steel sheets on both sides, to ensure a certain resistance to shear forces of the panel.

The LCA is based on vertical averaging of the specific producer datasets under consideration of the respective yearly production amounts.

## Technology and included processes
Double skin steel faced sandwich panels with a core made of mineral wool (MW) are prefabricated elements used for structural, self-supporting and non-supporting applications in roof, wall and ceiling structures. Sandwich panels in wall and roof applications take on tasks of the building physics, especially sound, heat and moisture safety. They simultaneously perform the function of air tightness of the building envelope. The MW cored sandwich panels are manufactured on a continuous production line. The faces of the panel consist of steel sheets with zinc and organic coatings for protection against corrosion. The production process begins by unwinding the steel coils and continues with the roll forming of the sheets. MW plates are cut in lamellas and inserted between the two sheets. Adhesive is applied between the mineral wool core and the steel faces on both sides of the line. The sheets together with the MW core are pulled in the double belt press, where the bond gets stabilized. Afterwards, the panels are cut at the wished length, stacked and packaged.
Technical data:
Technical specifications for sandwich panels with a core made of mineral wool are:

/EN 14509/
/EN 13162/
Declared unit:
The declared unit is 1 m² of sandwich element. The averaging is done based on the production volume per company.

## Technical purpose
The products are used for structural, self-supporting and non-supporting applications in roof, wall and ceiling structures. Sandwich panels in wall and roof applications take on tasks of the building physics, especially sound, heat and moisture safety. They simultaneously perform the function of air tightness of the building envelope.

## Reference product
- MW Sandwich panel 100 mm (20.2 kg/m²): 1

## Inputs
- Renewable primary energy as energy carrier (PERE) [MJ]: A1-A3 42.9807, A4 0.0754182, C4 0.286763, D 7.42567
- Renewable primary energy resources as material utilization (PERM) [MJ]: A1-A3 3.53795, A4 0, C4 0, D 0
- Total use of renewable primary energy resources (PERT) [MJ]: A1-A3 46.5186, A4 0.0754182, C4 0.286763, D 7.42567
- Non renewable primary energy as energy carrier (PENRE) [MJ]: A1-A3 432.169, A4 1.50231, C4 2.4601, D -117.75
- Non renewable primary energy as material utilization (PENRM) [MJ]: A1-A3 30.2685, A4 0, C4 0, D 0
- Total use of non renewable primary energy resources (PENRT) [MJ]: A1-A3 462.438, A4 1.50231, C4 2.4601, D -117.75
- Use of secondary material (SM) [kg]: A1-A3 0.74, A4 0, A5 0.43, C4 0, D 7.32
- Use of renewable secondary fuels (RSF) [MJ]: A1-A3 0, A4 0, C4 0, D 0
- Use of non renewable secondary fuels (NRSF) [MJ]: A1-A3 0, A4 0, C4 0, D 0
- Use of net fresh water (FW) [m^3]: A1-A3 0.144121, A4 0.000139544, C4 0.000468182, D -0.00753214

## Outputs
- Hazardous waste disposed (HWD) [kg]: A1-A3 1.31544e-6, A4 7.88463e-8, C4 3.88968e-8, D -8.72082e-8
- Non hazardous waste disposed (NHWD) [kg]: A1-A3 5.44396, A4 0.000114741, C4 11.4037, D 0.221892
- Radioactive waste disposed (RWD) [kg]: A1-A3 0.0109549, A4 2.05686e-6, C4 3.36056e-5, D 0.00203414
- Components for re-use (CRU) [kg]: A1-A3 0, A4 0, C4 0, D 0
- Materials for recycling (MFR) [kg]: A1-A3 0, A4 0, C4 8.06, D 0
- Materials for energy recovery (MER) [kg]: A1-A3 0, A4 0, C4 0, D 0
- Exported electrical energy (EEE) [MJ]: A1-A3 0, A4 0, C4 0, D 0
- Exported thermal energy (EET) [MJ]: A1-A3 0, A4 0, C4 0, D 0

## Impact indicators
- Global warming potential (GWP) [kg CO_(2)-Äq.]: A1-A3 35.9088, A4 0.108288, A5 1.26, C4 0.183554, D -13.0812
- Depletion potential of the stratospheric ozone layer (ODP) [kg CFC11-Äq.]: A1-A3 2.41546e-7, A4 3.62975e-14, C4 1.86645e-13, D -5.97623e-11
- Acidification potential of land and water (AP) [kg SO_(2)-Äq.]: A1-A3 0.168445, A4 0.000457752, C4 0.00108666, D -0.0501287
- Eutrophication potential (EP) [kg PO_(4)^(3)-Äq.]: A1-A3 0.0179138, A4 0.000113934, C4 0.000147993, D -0.00392923
- Formation potential of tropospheric ozone photochemical oxidants (POCP) [kg Ethen-Äq.]: A1-A3 0.0154038, A4 -0.000168179, C4 8.5481e-5, D -0.0072295
- Abiotic depletion potential for non fossil resources (ADPE) [kg Sb-Äq.]: A1-A3 0.00165387, A4 8.71141e-9, C4 6.58011e-8, D 1.17492e-6
- Abiotic depletion potential for fossil resources (ADPF) [MJ]: A1-A3 434.931, A4 1.49627, C4 2.37531, D -122.896

## Use advice
Scope:
This document is an association EPD and it represents an average EPD. Its applicability is limited to continuously produced double skin steel faced sandwich panels with an insulating core made of mineral wool, which are manufactured by member companies of the European Association for Panels and Profiles.

The following eight member companies of the European Association for Panels and Profiles have provided data for the year 2016:

1. Hoesch Bausysteme

2. ISOCAB France

3. Isolpack

4. Italpannelli

5. Metecno Bausysteme

6. N.V. Joris Ide Belgium

7. Romakowski

8. Trimo
System boundary:
Type of the EPD: cradle to gate - with options

Production stage (modules A1-A3) includes processes that provide materials and energy input for the system, manufacturing and transport processes up to the factory gate, as well as waste processing. For the end of life it is assumed that the steel proportion is recycled with credit for the recycling potential declared in module D and the MW proportion is landfilled without any credit.

## Data sources
- GaBi Database (all versions)
- GaBi database SP34 2017
