# EGGER Laminate

Dataset: ILCD process, EPD, average dataset
Geography: DE
Reference year: 2021
Valid until: 2026
Classification: OEKOBAU.DAT: Beschichtungen / Innenbeschichtungen / Wand- und Deckenbeläge
Classification: IBUCategories: 02 Bauprodukte / Inneneinrichtung / Schichtpressstoffe
Method details: Schichtpressstoffe.pdf
Generated by: Daxner & Merl GmbH
Registration number: EPD-EGG-20210049-IBC1-DE
Owner: Fritz EGGER GmbH & Co. OG
Compliance: DIN EN 15804+A2; ISO 14025
Review: Accredited third party review by Institut Bauen und Umwelt e. V.
Amounts: rows without a unit in brackets have none in this file; such an amount is in the reference unit of its flow, which a separate flow dataset defines
copyright: true
licenseType: Free of charge for all users and uses
accessRestrictions: None

## General comment
EGGER Laminate is a versatile material which is processed in combination with classic wood-based materials such as MDF (medium density fibreboard), HDF (high density fibreboard) and chipboard or other core materials to form so-called laminate composite elements. Traditional applications and areas in which they can be used include the kitchen and door industries, the office furniture sector, exhibition stand construction, shopfitting, interior design and the shipbuilding and automotive industries.

Laminates consist of paper webs, impregnated with heat-setting resins. They have a multilayer structure and consist of melamine resin impregnated decorative paper and one or more layers of soda kraft paper impregnated with phenolic resins, which are laminated under high pressure and heat. The laminate structure, the resin and paper quality, the surface texture, the use of special overlays and the press parameters during production determine the laminate quality and therefore the subsequent use or area of application.

The declared product is an area-weighted average of the various EGGER products in this product family.

## Technology and included processes
EGGER laminates are only produced using a continuous process. Dual-belt presses allow the continuous production of various laminate thicknesses and grades. This grade or type of laminate production is generally known as CPL (Continuous Pressed Laminate). Depending on the pressure during production, EGGER laminates are produced in accordance with or based on EN 438-3. The laminates consist of layers of cellulose fibre webs (usually paper) that are impregnated with curable resins. The one-sided outer layer(s) with decorative colours or patterns is (are) impregnated with melamine-based resins. The core layers are impregnated with phenolic resins. Applying heat and pressure causes the resins to flow and subsequently cure. Cross-linking of the resins, reinforced by the cellulose fibres of the papers, results in a very dense material with a sealed surface.
Technical data:
EGGER laminate is tested according to the testing procedure described in EN 438-2 and complies with the requirements stipulated in EN 438-3. The technical sheet "EGGER Laminate" contains detailed information concerning quality features and product characteristics at www.egger.com/laminate.
Declared unit:
This environmental product declaration refers to a declared unit of one square meter of EGGER laminate produced with an average grammage of 961 g/m².

## Technical purpose
Laminates are non load-bearing and only serve as lamination materials. EGGER laminates are only suitable for indoor applications. The laminate is used for coating wood-based materials or other core materials as a so-called composite element in the interior for furniture or interior fittings.

## Reference product
- Schichtstoff: 1

## Inputs
- Renewable primary energy as energy carrier (PERE) [MJ]: A1-A3 8.60349, C1 0, C2 0.00441408, C3 0, C4 0.094631, D -2.26211
- Renewable primary energy resources as material utilization (PERM) [MJ]: A1-A3 7.37758, C1 0, C2 0, C3 0, C4 0, D 0
- Total use of renewable primary energy resources (PERT) [MJ]: A1-A3 15.9811, C1 0, C2 0.00441408, C3 0, C4 0.094631, D -2.26211
- Non renewable primary energy as energy carrier (PENRE) [MJ]: A1-A3 37.206, C1 0, C2 0.076647, C3 0, C4 0.488775, D -10.3594
- Non renewable primary energy as material utilization (PENRM) [MJ]: A1-A3 10.0585, C1 0, C2 0, C3 0, C4 0, D 0
- Total use of non renewable primary energy resources (PENRT) [MJ]: A1-A3 47.2645, C1 0, C2 0.076647, C3 0, C4 0.488775, D -10.3594
- Use of secondary material (SM) [kg]: A1-A3 0, C1 0, C2 0, C3 0, C4 0, D 0
- Use of renewable secondary fuels (RSF) [MJ]: A1-A3 0.0407079, C1 0, C2 0, C3 0, C4 0, D 0
- Use of non renewable secondary fuels (NRSF) [MJ]: A1-A3 0, C1 0, C2 0, C3 0, C4 0, D 0
- Use of net fresh water (FW) [m^3]: A1-A3 0.0110055, C1 0, C2 5.14389e-6, C3 0, C4 0.00374131, D -0.00261956

## Outputs
- Hazardous waste disposed (HWD) [kg]: A1-A3 4.67432e-7, C1 0, C2 3.54428e-9, C3 0, C4 1.23506e-9, D -4.1311e-9
- Non hazardous waste disposed (NHWD) [kg]: A1-A3 0.582943, C1 0, C2 1.2148e-5, C3 0, C4 0.0886039, D -0.00478618
- Radioactive waste disposed (RWD) [kg]: A1-A3 0.000609891, C1 0, C2 1.41268e-7, C3 0, C4 2.25859e-5, D -0.000772492
- Components for re-use (CRU) [kg]: A1-A3 0, C1 0, C2 0, C3 0, C4 0, D 0
- Materials for recycling (MFR) [kg]: A1-A3 0, C1 0, C2 0, C3 0, C4 0, D 0
- Materials for energy recovery (MER) [kg]: A1-A3 0, C1 0, C2 0, C3 0, C4 0, D 0
- Exported electrical energy (EEE) [MJ]: A1-A3 0, C1 0, C2 0, C3 0, C4 2.58, D 0
- Exported thermal energy (EET) [MJ]: A1-A3 0, C1 0, C2 0, C3 0, C4 4.67, D 0

## Impact indicators
- Global Warming Potential total (GWP-total) [kg CO_(2)-Äq.]: A1-A3 2.02609, C1 0, C2 0.00579138, C3 0, C4 1.38765, D -0.61255
- Global Warming Potential fossil fuels (GWP-fossil) [kg CO_(2)-Äq.]: A1-A3 2.68691, C1 0, C2 0.00575467, C3 0, C4 0.710189, D -0.610689
- Global Warming Potential biogenic (GWP-biogenic) [kg CO_(2)-Äq.]: A1-A3 -0.662397, C1 0, C2 -9.60538e-6, C3 0, C4 0.67743, D -0.00143418
- Global Warming Potential luluc (GWP-luluc) [kg CO_(2)-Äq.]: A1-A3 0.00157664, C1 0, C2 4.63141e-5, C3 0, C4 3.57504e-5, D -0.000427509
- Depletion potential of the stratospheric ozone layer (ODP) [kg CFC11-Äq.]: A1-A3 4.2625e-12, C1 0, C2 1.05013e-18, C3 0, C4 3.26591e-16, D -6.37244e-15
- Acidification potential of land and water (AP) [mol H^(+)-Äq.]: A1-A3 0.0074472, C1 0, C2 1.94464e-5, C3 0, C4 0.000286548, D -0.000855052
- Eutrophication potential aquatic freshwater (EP-freshwater) [kg PO_(4)-Äq.]: A1-A3 1.14174e-5, C1 0, C2 1.74277e-8, C3 0, C4 5.84693e-8, D -7.87293e-7
- Eutrophication potential aquatic marine (EP-marine) [kg N-Äq.]: A1-A3 0.00338443, C1 0, C2 8.77293e-6, C3 0, C4 9.51504e-5, D -0.000221153
- Eutrophication potential terrestrial (EP-terrestrial) [mol N-Äq.]: A1-A3 0.0215146, C1 0, C2 9.7999e-5, C3 0, C4 0.00128728, D -0.00236968
- Formation potential of tropospheric ozone photochemical oxidants (POCP) [kg NMVOC-Äq.]: A1-A3 0.00704106, C1 0, C2 1.7236e-5, C3 0, C4 0.000257615, D -0.000635482
- Abiotic depletion potential for non fossil resources (ADPE) [kg Sb-Äq.]: A1-A3 6.271e-6, C1 0, C2 4.6267e-10, C3 0, C4 4.94951e-9, D -1.00224e-7
- Abiotic depletion potential for fossil resources (ADPF) [MJ]: A1-A3 47.2494, C1 0, C2 0.0763409, C3 0, C4 0.488642, D -10.3583
- Water use (WDP) [m^(3) Welt-Äq. entzogen]: A1-A3 0.0428021, C1 0, C2 5.57929e-5, C3 0, C4 0.158354, D -0.0632786
- Incidence of disease due to PM emissions (PM) [Krankheitsfälle]: A1-A3 7.17563e-8, C1 0, C2 1.09877e-10, C3 0, C4 2.36233e-9, D -7.26106e-9
- Human exposure efficiency relative to U235 (IR) [kBq U235-Äq.]: A1-A3 0.0727484, C1 0, C2 2.08405e-5, C3 0, C4 0.0032085, D -0.126692
- Comparative toxic unit for ecosystems (ETP-fw) [CTUe]: A1-A3 21.829, C1 0, C2 0.0571178, C3 0, C4 0.298674, D -2.23497
- Comparative toxic unit for humans (carcinogenic) (HTP-c) [CTUh]: A1-A3 5.04269e-10, C1 0, C2 1.18055e-12, C3 0, C4 1.59563e-11, D -9.68026e-11
- Comparative toxic unit for humans (noncarcinogenic) (HTP-nc) [CTUh]: A1-A3 3.03616e-8, C1 0, C2 6.80236e-11, C3 0, C4 1.36396e-9, D -3.59739e-9
- Soil quality index (SQP) [SQP]: A1-A3 111.702, C1 0, C2 0.0267965, C3 0, C4 0.125159, D -1.62627

## Use advice
Scope:
This document applies to the laminate manufactured by EGGER Kunststoffe GmbH & Co. KG in its Gifhorn (Germany) plant. It is an average standard EGGER laminate.
System boundary:
The LCA of the average EGGER laminate includes a cradle-to-gate consideration of the occurring environmental impact with the modules C1-C4 and module D (A1-A3, +C, +D). The following life cycle phases are taken into account in the analysis:

Module A1-A3 | Production stage
The production stage includes the expenses for the supply of raw materials (cellulose pulp webs - usually paper such as kraft, decorative and parchment paper, production of the basic chemicals used as well as components for phenolic and melamine resin impregnation, auxiliary materials, etc.) as well as the associated transports related to the production site in Gifhorn. Within the plant boundaries, the impregnation of the papers with melamine and phenolic resins, the pressing process in the double belt presses, formatting and reverse side sanding including packaging are taken into account. The electrical energy used is obtained from the German power grid. Thermal energy is provided by natural gas as an energy source.

Module C1 | Dismantling / Demolition

Manual dismantling was assumed for the laminates. The associated efforts are negligible, which means that no environmental impact from the dismantling of the products is declared.

Module C2 | Transport to waste treatment

Module C2 includes transport to waste treatment. For this purpose, transport by lorry over a distance of 50 km is used as a representative scenario.

Module C3 | Waste processing

The scenario used declares the energy recovery of the laminates. Corresponding environmental impacts are considered in Module C4.

Module C4 | Disposal
Module C4 declares the emissions from the energy recovery of the laminates after removal in a waste incineration plant as a fictitious scenario. In reality, the product is always removed together with other wood-based materials, for example, and recycled accordingly.

Module D | Credits and charges beyond the limits of the product system

In Module D, the substitution potentials for heat and electricity from energy recovery of the product in Module C4 are described in the form of a European average scenario.

## Data sources
- GaBi Database (all versions)
- GaBi database SP40 2020
