# Dachsteine

Dataset: ILCD process, EPD, average dataset
Geography: DE
Reference year: 2021
Valid until: 2026
Classification: OEKOBAU.DAT: Mineralische Baustoffe / Steine und Elemente / Dachsteine
Classification: IBUCategories: 02 Bauprodukte / Bedachungen / Betondachsteine
Method details: Betondachsteine.pdf
Generated by: Kiwa GmbH
Registration number: EPD-NEL-20150325-IBD1-DE
Owner: Dachziegelwerke Nelskamp GmbH
Compliance: DIN EN 15804; ISO 14025
Review: Accredited third party review by Institut Bauen und Umwelt e. V.
Amounts: rows without a unit in brackets have none in this file; such an amount is in the reference unit of its flow, which a separate flow dataset defines
copyright: true
licenseType: Free of charge for all users and uses
accessRestrictions: None

## General comment
Die Dachziegelwerke Nelskamp GmbH produzieren an den Standorten Dieburg, Gartrop und Schönerlinde unbewehrte Betondachsteine unterschiedlicher Formate und Profilierungen. Die Produktartikel

· Finkenberger Pfanne

· Kronen-Pfanne

· S-Pfanne

· Sigma-Pfanne

· Planum
sind sowohl in der Zusammensetzung, als auch in der Produktionsweise nahezu identisch. Um die potenziellen Umweltauswirkungen zu berechnen, wurden die prozessspezifischen Daten für den Produktionsstandort Dieburg erfasst und über die Produktionsmengen gemittelt. Erfasst wurden die Gesamtmenge der produzierten Dachsteine sowie alle zur Herstellung notwendigen Eingangsstoffe (Rohstoffe, Vorprodukte, Energie und Hilfsstoffe) sowie die anfallenden Co-Produkte und Abfälle.

Die Deklaration gilt auch für die Dachsteine Longlife und Climalife. Allerdings muss für den Produktartikel Longlife die Oberflächenbeschichtung gesondert betrachtet werden. Für den Produktartikel Climalife muss der Anteil an Titandioxid-Partikeln gesondert betrachtet werden.

## Technology and included processes
The raw materials sand, cement, color penetration, coating color and water are required for the production of the concrete roof tiles. The raw materials are added to an intensive mixer one after the other and then fed to the shaping machine. The profiled fresh concrete leaves the shaping machine as an endless strand and is cut to roof tile length with a knife controlled by compressed air. The Dachstein is coated with a water-based plastic dispersion for the purpose of surface refinement. The roof tiles go through two drying processes during production. The finished products are packaged and are then ready for transport.

## Technical purpose
Betondachsteine werden als Dacheindeckungsmaterial für jede Dacharchitektur verwendet. Die Regeldachneigung beträgt 22°, als Unterbaukonstruktion werden Dachlatten verwendet.

## Reference product
- 1t Betondachsteine (): 1000

## Inputs
- Renewable primary energy as energy carrier (PERE) [MJ]: A1-A3 158, A4 13.7
- Renewable primary energy resources as material utilization (PERM) [MJ]
- Total use of renewable primary energy resources (PERT) [MJ]: A1-A3 158, A4 13.7
- Non renewable primary energy as energy carrier (PENRE) [MJ]: A1-A3 1220, A4 179
- Non renewable primary energy as material utilization (PENRM) [MJ]: A1-A3 133
- Total use of non renewable primary energy resources (PENRT) [MJ]: A1-A3 1350, A4 179
- Use of secondary material (SM) [kg]
- Use of renewable secondary fuels (RSF) [MJ]
- Use of non renewable secondary fuels (NRSF) [MJ]
- Use of net fresh water (FW) [m^3]: A1-A3 0.288, A4 0.00992

## Outputs
- Hazardous waste disposed (HWD) [kg]: A1-A3 0.0219, A4 0.000144
- Non hazardous waste disposed (NHWD) [kg]: A1-A3 517, A4 1.2
- Radioactive waste disposed (RWD) [kg]: A1-A3 0.0525, A4 0.000238
- Components for re-use (CRU) [kg]
- Materials for recycling (MFR) [kg]: A1-A3 67.6
- Materials for energy recovery (MER) [kg]
- Exported electrical energy (EEE) [MJ]
- Exported thermal energy (EET) [MJ]

## Impact indicators
- Global warming potential (GWP) [kg CO_(2)-Äq.]: A1-A3 209, A4 13.1
- Depletion potential of the stratospheric ozone layer (ODP) [kg CFC11-Äq.]: A1-A3 6.06e-9, A4 1.61e-11
- Acidification potential of land and water (AP) [kg SO_(2)-Äq.]: A1-A3 0.309, A4 0.0341
- Eutrophication potential (EP) [kg PO_(4)^(3)-Äq.]: A1-A3 0.0364, A4 0.00958
- Formation potential of tropospheric ozone photochemical oxidants (POCP) [kg Ethen-Äq.]: A1-A3 0.0395, A4 -0.01
- Abiotic depletion potential for non fossil resources (ADPE) [kg Sb-Äq.]: A1-A3 0.000459, A4 6.76e-7
- Abiotic depletion potential for fossil resources (ADPF) [MJ]: A1-A3 1210, A4 178

## Use advice
Gültigkeitsbereich:
Dieses Dokument bezieht sich auf Betondachsteine der Dachziegelwerke Nelskamp GmbH. Dies betrifft neben den aufgezählten Produktartikeln auch Sonderformate und die Betondachsteine Longlife und Climalife. Die prozessspezifischen Daten wurden für das Bezugsjahr 2014 erhoben. Die Erfassung der Daten erfolgt für das Werk in Dieburg.
Durch die Erfassung der prozessspezifischen Daten in einem repräsentativen Produktionswerk beruht die hier zugrunde gelegte Ökobilanz auf plausiblen, nachvollziehbaren und transparenten Daten und ist repräsentativ für Dachsteine der Dachziegelwerke Nelskamp GmbH.
Systemgrenze:
Bei der Umweltproduktdeklaration handelt es sich um eine cradle-to-gate EPD mit Optionen, d.h. es werden alle potenziellen Umweltauswirkungen des Produkts von der Wiege bis zum Werkstor betrachtet. Nach /DIN EN 15804/ entspricht dies den Produktphasen A1-A3. Zusätzlich wird der Transport vom Werkstor zu den jeweiligen Baustellen (A4) betrachtet.
Im Einzelnen wurden folgende Prozesse der Dachsteinherstellung mit einbezogen:

Rohstoffbereitstellung
Transport der Rohstoffe zum Produktionsstandort
Herstellungsprozess im Werk einschließlich der energetischen Aufwendungen, Herstellung von Hilfsstoffen, Entsorgung anfallender Reststoffe
Herstellung der anteiligen Verpackung
Transport zur jeweiligen Baustelle

## Data sources
- GaBi Database (all versions)
- GaBi database SP27 2015
