# Lithium iron phosphate (LiFePO4) battery (per 1kWh storage); 1kWh storage capacity

Dataset: ILCD process, EPD, generic dataset
Geography: DE
Reference year: 2018
Valid until: 2022
Classification: oekobau.dat: Gebäudetechnik / Elektro / Batteriespeicher
Owner: thinkstep
Compliance: DIN EN 15804
Review: Dependent internal review by thinkstep, IABP-GaBi, IBP-GaBi; Independent external review by GaBi user forum, GaBi bug forum, GaBi user community
Amounts: rows without a unit in brackets have none in this file; such an amount is in the reference unit of its flow, which a separate flow dataset defines
copyright: true

## General comment
This data set has been modeled according to the European Standard EN 15804 for Sustainable Building. Results are depicted in modules that allow the structured expression of results over the entire life cycle.

## Geography
The data set represents the country specific situation in Germany, focusing on the main technologies, the region specific characteristics and / or import statistics.

## Time period
Annual average

## Technology and included processes
Foreground system:
This dataset describes a domestic battery for storage of electricity. The model is related to 1kWh of storage capacity, based on a 12KWh battery.

Information on the battery:
Battery supporting 6000 charging cycles. At 6000 cycles only 70% of the capacity is available. This dataset is based on a 12kWh battery and should be used for such order of magnitude for electricity storage.
The round trip energy efficiency of a LFP battery is 92% = for 1kWh of electricity stored in the battery 0,92kWh can be get back.

Motivation- storage of electricity from photovoltaics:
The peak power of a photovoltaic system is reached at noon, while the peaks of electricity demand are in the morning and in the evening. A picture attached is showing the energy curves. Without energy storage, large amounts of electricity are fed to the grid at noon and cannot be used for own consumption. After sunset and before sunrise, large amounts have to be taken from the grid. Based on a yearly energy consumption of 4000 kWh and a 5kWp PV system, the degree of self- sufficiency is about 50 %. If a battery with more than 8kWh is added, it can reach 85%. In the attached source Photovoltaik Web, a table is showing more examples.

Background system:
Electricity: Electricity is modelled according to the individual country-specific situations. The country-specific modelling is achieved on multiple levels. Firstly, individual energy carrier specific power plants and plants for renewable energy sources are modelled according to the current national electricity grid mix. Modelling the electricity consumption mix includes transmission / distribution losses and the own use by energy producers (own consumption of power plants and "other" own consumption e.g. due to pumped storage hydro power etc.), as well as imported electricity. Secondly, the national emission and efficiency standards of the power plants are modelled as well as the share of electricity plants and combined heat and power plants (CHP). Thirdly, the country-specific energy carrier supply (share of imports and / or domestic supply) including the country-specific energy carrier properties (e.g. element and energy content) are accounted for. Fourthly, the exploration, mining/production, processing and transport processes of the energy carrier supply chains are modelled according to the specific situation of each electricity producing country. The different production and processing techniques (emissions and efficiencies) in the different energy producing countries are considered, e.g. different crude oil production technologies or different flaring rates at the oil platforms.
Thermal energy, process steam: The thermal energy and process steam supply is modelled according to the individual country-specific situation with regard to emission standards and considered energy carriers. The thermal energy and process steam are produced at heat plants. Efficiencies for thermal energy production are by definition 100% in relation to the corresponding energy carrier input. For process steam the efficiency ranges from 85%, 90% to 95%. The energy carriers used for the generation of thermal energy and process steam are modelled according to the specific import situation (see electricity above).
Transports: All relevant and known transport processes are included. Ocean-going and inland ship transport as well as rail, truck and pipeline transport of bulk commodities are considered.
Energy carriers: The energy carriers are modelled according to the specific supply situation (see electricity above).
Refinery products: Diesel fuel, gasoline, technical gases, fuel oils, lubricants and residues such as bitumen are modelled with a parameterised country-specific refinery model. The refinery model represents the current national standard in refining techniques (e.g. emission level, internal energy consumption, etc.) as well as the individual country-specific product output spectrum, which can be quite different from country to country. The supply of crude oil is modelled, again, according to the country-specific situation with the respective properties of the resources.

## Technical purpose
This product can be used in construction.

## Safety margin
10 %. Product system almost completely covered. Good technological, temporal and geographic representativeness.

## Reference product
- Lithium iron phosphate battery (per 1 kWh storage capacity): 1

## Inputs
- Use of renewable primary energy (PERE) [MJ]: A1-A3 1071.42, C1 0, C2 0.0558059, C4 11.1312, D -152.946
- Primary energy resources used as raw materials (PERM) [MJ]: A1-A3 0, C1 0, C2 0, C4 0, D 0
- Total use of renewable primary energy resources (PERT) [MJ]: A1-A3 1071.42, C1 0, C2 0.0558059, C4 11.1312, D -152.946
- Use of non-renewable primary energy (PENRE) [MJ]: A1-A3 3415.43, C1 0, C2 0.958601, C4 70.7367, D -468.399
- Non-renewable primary energy resources used as raw materials (PENRM) [MJ]: A1-A3 0, C1 0, C2 0, C4 0, D 0
- Total use of non-renewable primary energy resources (PENRT) [MJ]: A1-A3 3415.43, C1 0, C2 0.958601, C4 70.7367, D -468.399
- Input of secondary material (SM) [kg]: A1-A3 0, C1 0, C2 0, C4 0, D 0
- Use of renewable secondary fuels (RSF) [MJ]: A1-A3 0, C1 0, C2 0, C4 0, D 0
- Use of non renewable secondary fuels (NRSF) [MJ]: A1-A3 0, C1 0, C2 0, C4 0, D 0
- Use of net fresh water (FW) [m3]: A1-A3 2.00981, C1 0, C2 4.99789e-5, C4 0.0119951, D -0.332332

## Outputs
- Hazardous waste disposed (HWD) [kg]: A1-A3 2.26563e-5, C1 0, C2 3.58219e-8, C4 1.56029e-7, D -2.04793e-7
- Non-hazardous waste disposed (NHWD) [kg]: A1-A3 59.4483, C1 0, C2 0.000168251, C4 16.6456, D -8.1552
- Radioactive waste disposed (RWD) [kg]: A1-A3 0.130857, C1 0, C2 1.00921e-6, C4 0.00158263, D -0.036448
- Components for re-use (CRU) [kg]: A1-A3 0, C1 0, C2 0, C4 0, D 0
- Materials for Recycling (MFR) [kg]: A1-A3 0, C1 5.17, C2 0, C4 0, D 0
- Material for Energy Recovery (MER) [kg]: A1-A3 0, C1 0, C2 0, C4 0, D 0
- Exported electrical energy (EEE) [MJ]: A1-A3 0, C1 0, C2 0, C4 0, D 0
- Exported thermal energy (EET) [MJ]: A1-A3 0, C1 0, C2 0, C4 0, D 0

## Impact indicators
- Global warming potential (GWP) [kg CO2 eq.]: A1-A3 241.48, C1 0, C2 0.0714308, C4 22.5933, D -35.2863
- Ozone Depletion Potential (ODP) [kg R11 eq.]: A1-A3 1.5142e-6, C1 0, C2 2.36076e-17, C4 6.0717e-14, D 1.49758e-11
- Acidification potential (AP) [kg SO2 eq.]: A1-A3 1.05906, C1 0, C2 0.000156486, C4 0.0242143, D -0.114558
- Eutrophication potential (EP) [kg Phosphate eq.]: A1-A3 0.0677247, C1 0, C2 3.75137e-5, C4 0.00497343, D -0.00736362
- Photochemical Ozone Creation Potential (POCP) [kg Ethene eq.]: A1-A3 0.100422, C1 0, C2 -5.29346e-5, C4 0.00162135, D -0.00679383
- Abiotic depletion potential for non fossil resources (ADPE) [kg Sb eq.]: A1-A3 0.0184858, C1 0, C2 6.00173e-9, C4 7.51578e-7, D -2.12263e-5
- Abiotic depletion potential for fossil resources (ADPF) [MJ]: A1-A3 3084.39, C1 0, C2 0.956022, C4 66.7422, D -376.002

## Use advice
The data set represents a cradle to gate inventory. It can be used to characterise the supply chain situation of the respective commodity in a representative manner. Combination with individual unit processes using this commodity enables the generation of user-specific (product) LCAs.

## Data sources
- Photovoltaik Web: Autarkiegradberechnung
- Tesla powerwall and powerpack: PV production and electricity demand
- GaBi Database Edition 2020, SP40
- GaBi database (all versions)
