# BauderTHERMOFIN

Dataset: ILCD process, EPD, average dataset
Geography: DE
Reference year: 2016
Valid until: 2021
Classification: OEKOBAU.DAT: Kunststoffe / Dachbahnen / Elastomer-Dachbahnen
Classification: IBUCategories: 02 Bauprodukte / Abdichtungen / Dach- und Dichtungsbahnsysteme aus Kunststoffen und Elastomeren
Method details: Dach- und Dichtungsbahnsysteme aus Kunststoffen und Elastomeren.pdf
Owner: Paul Bauder GmbH & Co. KG
Compliance: DIN EN 15804; ISO 14025
Review: Accredited third party review by IBU
Amounts: rows without a unit in brackets have none in this file; such an amount is in the reference unit of its flow, which a separate flow dataset defines
copyright: true

## General comment
BauderTHERMOFIN are FPO-based synthetic roofing and waterproofing sheets reinforced with glass fleece. The product range comprises the following variants:

- BauderTHERMOFIN F (12/15/16/18/20)

central glass fleece reinforcement

- BauderTHERMOFIN F (15/18/20) V

central glass fleece reinforcement, special non-woven fleece on the underside.

The results represent an average of all THERMOFIN products. Averaging is based on the corresponding production volumes (by area produced) for the 2012 calendar year.

## Technology and included processes
FPO roofing and waterproofing sheets are manufactured in a single-stage process. The raw materials for the upper and lower layers are blended and plasticised separately on the extruders. The glass fleece reinforcement is coated with the lower foil layer first, then the upper foil layer. Some FPO roofing and waterproofing sheets feature special fleece lamination on the underside. After cooling and final edge trimming, the products are packed. All production waste incurred is recycled and redirected to the manufacturing process. Permanent measurements of product quality and continuous improvement of the internal processes is ensured by the application of a Quality Management system in accordance with /DIN EN ISO 9001/.
Declared unit:
The declared unit is 1 m² average THERMOFIN FPO roofing and waterproofing sheet F (12/15/16/18/20) and F (15/18/20) V variants, mechanically fastened or fastened under load, sealed using hot air, including packaging materials.

## Technical purpose
FPO roofing and waterproofing sheets are applied in single layers and hot air-welded at the seams. They are safeguarded against wind suction by mechanical fastening, ballasting or adhesion.

Roof waterproofing: single-layer waterproofing of flat and inclined used and unused roofs

Building waterproofing: single-layer waterproofing of non-waterproof buildings and components against ground damp and non-pressurised water Depending on the respective requirements, BauderTHERMOFIN roofing and waterproofing sheets are:

· fastened mechanically,

· laid under load or

· adhered.

Application rules

Directive (EU) No. 305/2011 applies for placing the product on the market in the EU/EFTA (with the exception of Switzerland). The products require a Declaration of Performance taking consideration of the harmonised /EN 13956/ and /EN 13967/ specifications and CE marking.

Use in Germany is governed by the respective national regulations.

For roofing sheets

Application standard /DIN V 20000-201/:

· BauderTHERMOFIN F 12/15/16/18/20

DE/E1 FPO-BV-E-GV-1.2 (1.5/1.6/1.8/2.0)

· BauderTHERMOFIN F 15/18/20 V

DE/E1 FPO-BV-E-GV-K-KV- 1.5 (1.8/2.0)

For waterproofing sheets

Application standard /DIN V 20000-202/:

· BauderTHERMOFIN F 12/15/16/18/20

BA FPO-BV-E-GV-1.2 (1.5/1.6/1.8/2.0)

· BauderTHERMOFIN F 15/18/20 V

BA FPO-BV-E-GV-K-KV- 1.5 (1.8/2.0)

## Scenarios
- S1: Recycling
- S2: Incineration

## Reference product
- 1 m² BauderTHERMOFIN F (12/15/16/18/20) und F (15/18/20) V: 1

## Inputs
- Erneuerbare Primärenergie als Energieträger (PERE) [MJ]: A1-A3 5.21, A4 0.0452, A5 0.0915, C2 (S1) 0.0185, C2 (S2) 0.00663, C3 (S1) 0.0604, C3 (S2) 1.36, D (S1) -2.07, D (S2) -0.0903
- Erneuerbare Primärenergie zur stofflichen Nutzung (PERM) [MJ]: A1-A3 1.3, A4 0, A5 0, C2 (S1) 0, C2 (S2) 0, C3 (S1) 0, C3 (S2) 0, D (S1) 0, D (S2) 0
- Total erneuerbare Primärenergie (PERT) [MJ]: A1-A3 6.51, A4 0.0452, A5 0.0915, C2 (S1) 0.0185, C2 (S2) 0.00663, C3 (S1) 0.0604, C3 (S2) 1.36, D (S1) -2.07, D (S2) -0.0903
- Nicht-erneuerbare Primärenergie als Energieträger (PENRE) [MJ]: A1-A3 40.6, A4 0.797, A5 0.35, C2 (S1) 0.326, C2 (S2) 0.107, C3 (S1) 0.216, C3 (S2) 65.6, D (S1) -75.6, D (S2) -33.5
- Nicht-erneuerbare Primärenergie zur stofflichen Nutzung (PENRM) [MJ]: A1-A3 64.4, A4 0, A5 0, C2 (S1) 0, C2 (S2) 0, C3 (S1) 0, C3 (S2) 0, D (S1) 0, D (S2) 0
- Total nicht erneuerbare Primärenergie (PENRT) [MJ]: A1-A3 105, A4 0.797, A5 0.35, C2 (S1) 0.326, C2 (S2) 0.107, C3 (S1) 0.216, C3 (S2) 65.6, D (S1) -75.6, D (S2) -33.5
- Einsatz von Sekundärstoffen (SM) [kg]: A1-A3 0.178, A4 0, A5 0, C2 (S1) 0, C2 (S2) 0, C3 (S1) 0, C3 (S2) 0, D (S1) 0, D (S2) 0
- Erneuerbare Sekundärbrennstoffe (RSF) [MJ]: A1-A3 0, A4 0, A5 0, C2 (S1) 0, C2 (S2) 0, C3 (S1) 0, C3 (S2) 0, D (S1) 0, D (S2) 0
- Nicht erneuerbare Sekundärbrennstoffe (NRSF) [MJ]: A1-A3 0, A4 0, A5 0, C2 (S1) 0, C2 (S2) 0, C3 (S1) 0, C3 (S2) 0, D (S1) 0, D (S2) 0
- Einsatz von Süßwasserressourcen (FW) [m^3]: A1-A3 0.105, A4 0.000113, A5 0.000454, C2 (S1) 4.63e-5, C2 (S2) 1.32e-5, C3 (S1) 9.31e-5, C3 (S2) 0.00904, D (S1) -0.008, D (S2) -0.00112

## Outputs
- Gefährlicher Abfall zur Deponie (HWD) [kg]: A1-A3 0, A4 0, A5 0, C2 (S1) 0, C2 (S2) 0, C3 (S1) 0, C3 (S2) 0, D (S1) 0, D (S2) 0
- Entsorgter nicht gefährlicher Abfall (NHWD) [kg]: A1-A3 0.0781, A4 6.7e-5, A5 0.00159, C2 (S1) 2.74e-5, C2 (S2) 1.1e-5, C3 (S1) 0.00013, C3 (S2) 0.00444, D (S1) -0.00815, D (S2) -0.00362
- Entsorgter radioaktiver Abfall (RWD) [kg]: A1-A3 0.0017, A4 1.14e-6, A5 4.94e-5, C2 (S1) 4.67e-7, C2 (S2) 1.49e-7, C3 (S1) 3.25e-5, C3 (S2) 4.2e-5, D (S1) -0.0005, D (S2) -2.08e-5
- Komponenten für die Wiederverwendung (CRU) [kg]: A1-A3 0, A4 0, A5 0, C2 (S1) 0, C2 (S2) 0, C3 (S1) 0, C3 (S2) 0, D (S1) 0, D (S2) 0
- Stoffe zum Recycling (MFR) [kg]: A1-A3 0, A4 0, A5 0, C2 (S1) 0, C2 (S2) 0, C3 (S1) 1.59, C3 (S2) 0, D (S1) 0, D (S2) 0
- Stoffe für die Energierückgewinnung (MER) [kg]: A1-A3 0, A4 0, A5 0.0696, C2 (S1) 0, C2 (S2) 0, C3 (S1) 0, C3 (S2) 1.77, D (S1) 0, D (S2) 0
- Exportierte elektrische Energie (EEE) [MJ]: A1-A3 0, A4 0, A5 0.197, C2 (S1) 0, C2 (S2) 0, C3 (S1) 0, C3 (S2) 10.2, D (S1) 0, D (S2) 0
- Exportierte thermische Energie (EET) [MJ]: A1-A3 0, A4 0, A5 0.519, C2 (S1) 0, C2 (S2) 0, C3 (S1) 0, C3 (S2) 27.8, D (S1) 0, D (S2) 0

## Impact indicators
- Globales Erwärmungspotenzial (GWP) [kg CO_(2)-Äq.]: A1-A3 3.25, A4 0.0577, A5 0.14, C2 (S1) 0.0236, C2 (S2) 0.00777, C3 (S1) 0.0124, C3 (S2) 3.75, D (S1) -1.95, D (S2) -2.06
- Abbau Potential der stratosphärischen Ozonschicht (ODP) [kg CFC11-Äq.]: A1-A3 5.86e-9, A4 2.65e-13, A5 2.91e-11, C2 (S1) 1.09e-13, C2 (S2) 2.63e-14, C3 (S1) 8.78e-12, C3 (S2) 1.42e-9, D (S1) -2.49e-11, D (S2) -1.06e-12
- Versauerungspotenzial von Boden und Wasser (AP) [kg SO_(2)-Äq.]: A1-A3 0.00635, A4 0.000251, A5 6.72e-5, C2 (S1) 0.000148, C2 (S2) 4.83e-5, C3 (S1) 3.44e-5, C3 (S2) 0.000321, D (S1) -0.00313, D (S2) -0.0014
- Eutrophierungspotenzial (EP) [kg PO_(4)^(3)-Äq.]: A1-A3 0.000833, A4 6.15e-5, A5 7.8e-6, C2 (S1) 3.7e-5, C2 (S2) 1.23e-5, C3 (S1) 3.08e-6, C3 (S2) 6.98e-5, D (S1) -0.000322, D (S2) -0.000209
- Bildungspotential für troposphärisches Ozon (POCP) [kg Ethen-Äq.]: A1-A3 0.0011, A4 -8.59e-5, A5 4.96e-6, C2 (S1) -6.19e-5, C2 (S2) -2.06e-5, C3 (S1) 2.37e-6, C3 (S2) 3.9e-5, D (S1) -0.000714, D (S2) -0.000262
- Potenzial für den abiotischen Abbau nicht fossiler Ressourcen (ADPE) [kg Sb-Äq.]: A1-A3 1.89e-6, A4 3.84e-9, A5 5.71e-9, C2 (S1) 1.57e-9, C2 (S2) 5.52e-10, C3 (S1) 4.04e-9, C3 (S2) -1.21e-7, D (S1) -6.39e-7, D (S2) -9.68e-8
- Potenzial für den abiotischen Abbau fossiler Brennstoffe (ADPF) [MJ]: A1-A3 101, A4 0.794, A5 0.226, C2 (S1) 0.325, C2 (S2) 0.107, C3 (S1) 0.134, C3 (S2) 1.1, D (S1) -74.3, D (S2) -33.4

## Use advice
Scope:
This document is valid for the following FPO synthetic roofing and waterproofing sheet systems:
BauderTHERMOFIN F (12/15/16/18/20)
BauderTHERMOFIN F (15/18/20) V

manufactured in the German BAUDER production plant in Schwepnitz.
This document is translated from the German Environmental Product Declaration into English. It is based on the German original version EPD-BAU-20160221-IBC1-DE. The verifier has no influence on the quality of the translation.
System boundary:
Type of EPD: cradle to plant gate (with options)

The following modules are applied:

Module A1-3

All upstream chains associated with the raw materials used and procurement transport thereof Production processes including energy and waste flows (cradle to plant gate) Waste incurred is considered until it reaches End of Waste status.

Module A4-5

Transport to the construction site and average installation effort (hot air-welding and cuttings incurred)

Utilisation of packaging material

Fastening material is not a component of the product system under review. Reference should be made to the respective EPD in line with the product or material used (metal/plastic).

Module C2-1

Transport within the framework of the recycling route

Module C2-2

Transport within the framework of the incineration route

Module C3-1

Material utilisation (recycling) of the product including processing effort

Module C3-2

Thermal utilisation (incineration in an incineration plant) to reduce the volume of waste for landfilling

Modules D-1 and D-2

Credits arising from waste treatment in Modules A5, C3-1 and C3-2

## Data sources
- BauderTHERMOFIN.pdf
- GaBi Database (all versions)
- GaBi database SP28 2015
