# Application top coat on metals (solvent based); 1 sqm

Dataset: ILCD process, EPD, generic dataset
Geography: DE
Reference year: 2018
Valid until: 2022
Classification: oekobau.dat: Metalle / Oberflächenbehandlung und Beschichtung von Metallen / (Nass-) Lackieren von Metallen
Owner: thinkstep
Compliance: DIN EN 15804
Review: Dependent internal review by thinkstep, IABP-GaBi, IBP-GaBi; Independent external review by GaBi user forum, GaBi bug forum, GaBi user community
Amounts: rows without a unit in brackets have none in this file; such an amount is in the reference unit of its flow, which a separate flow dataset defines
copyright: true

## General comment
This data set has been modeled according to the European Standard EN 15804 for Sustainable Building. Results are depicted in modules that allow the structured expression of results over the entire life cycle.

## Geography
The data set represents the country specific situation in Germany, focusing on the main technologies, the region specific characteristics and / or import statistics.

## Time period
Annual average

## Technology and included processes
The dataset includes the industrial metal coating of an 1 square meter surface, with a coating thickness of 100 microns. Not included is the production of the metal substrate, which shall be calculated separately.
Top coat application:
The dataset describes the use of a solvent-based white industrial coating with 35% of organic solvents and 65% solids. The top coat is applicated in a climated spraybooth. The climatisation uses thermal enrgy from natural gas and desalinated water in order to keep the temperature and humidity of the process air in a narrow application window and possibly unaffected from outside weather changes for quality reasons. The amount of energy and water needed for this are strongly dependent on local climate conditions, the data used here is representative for northern Germany inland. The process air contains coating particles (the transfer losses) and therefore needs to be cleaned, which is usually done in a waterwash type filter. For this, coagulation chemicals are needed and evaporated water needs to be replaced by tap water. Waste (coagulated coating sludge) is incinerated in a waste incineration plant because of its energy content. Credits are given for the electricity and steam that are produced there. Rinsing agents are used to clean the coating application system when colours are changed. No waste water is generated, the process is usually run in an effluent free operation mode. The crosslinking of the coating takes place in a drier (an oven), which is usually powered by natural gas. For solvent based coatings, usually a thermal waste air aftertreatment is used for VOC emission control.
Background system:
Electricity: Electricity is modelled according to the individual country-specific situations. The country-specific modelling is achieved on multiple levels. Firstly, individual energy carrier specific power plants and plants for renewable energy sources are modelled according to the current national electricity grid mix. Modelling the electricity consumption mix includes transmission / distribution losses and the own use by energy producers (own consumption of power plants and "other" own consumption e.g. due to pumped storage hydro power etc.), as well as imported electricity. Secondly, the national emission and efficiency standards of the power plants are modelled as well as the share of electricity plants and combined heat and power plants (CHP). Thirdly, the country-specific energy carrier supply (share of imports and / or domestic supply) including the country-specific energy carrier properties (e.g. element and energy content) are accounted for. Fourthly, the exploration, mining/production, processing and transport processes of the energy carrier supply chains are modelled according to the specific situation of each electricity producing country. The different production and processing techniques (emissions and efficiencies) in the different energy producing countries are considered, e.g. different crude oil production technologies or different flaring rates at the oil platforms.
Thermal energy, process steam: The thermal energy and process steam supply is modelled according to the individual country-specific situation with regard to emission standards and considered energy carriers. The thermal energy and process steam are produced at heat plants. Efficiencies for thermal energy production are by definition 100% in relation to the corresponding energy carrier input. For process steam the efficiency ranges from 85%, 90% to 95%. The energy carriers used for the generation of thermal energy and process steam are modelled according to the specific import situation (see electricity above).
Transports: All relevant and known transport processes are included. Ocean-going and inland ship transport as well as rail, truck and pipeline transport of bulk commodities are considered.
Energy carriers: The energy carriers are modelled according to the specific supply situation (see electricity above).
Refinery products: Diesel fuel, gasoline, technical gases, fuel oils, lubricants and residues such as bitumen are modelled with a parameterised country-specific refinery model. The refinery model represents the current national standard in refining techniques (e.g. emission level, internal energy consumption, etc.) as well as the individual country-specific product output spectrum, which can be quite different from country to country. The supply of crude oil is modelled, again, according to the country-specific situation with the respective properties of the resources.

## Technical purpose
This product can be used in construction.

## Safety margin
20 %. Product system depicted except for a few missing processes / flows. Technological, temporal and geographic representativeness partly given.

## Reference product
- Surface (metals coating solvent-based) (m2): 1

## Inputs
- Use of renewable primary energy (PERE) [MJ]: A1-A3 4.89114, C1 0, C2 0.000457632, C3 0.0308447, D -0.158462
- Primary energy resources used as raw materials (PERM) [MJ]: A1-A3 0, C1 0, C2 0, C3 0, D 0
- Total use of renewable primary energy resources (PERT) [MJ]: A1-A3 4.89114, C1 0, C2 0.000457632, C3 0.0308447, D -0.158462
- Use of non-renewable primary energy (PENRE) [MJ]: A1-A3 33.7048, C1 0, C2 0.00786093, C3 7.31487, D -0.597486
- Non-renewable primary energy resources used as raw materials (PENRM) [MJ]: A1-A3 7.2, C1 0, C2 0, C3 -7.2, D 0
- Total use of non-renewable primary energy resources (PENRT) [MJ]: A1-A3 40.9048, C1 0, C2 0.00786093, C3 0.114871, D -0.597486
- Input of secondary material (SM) [kg]: A1-A3 0, C1 0, C2 0, C3 0, D 0
- Use of renewable secondary fuels (RSF) [MJ]: A1-A3 0, C1 0, C2 0, C3 0, D 0
- Use of non renewable secondary fuels (NRSF) [MJ]: A1-A3 0, C1 0, C2 0, C3 0, D 0
- Use of net fresh water (FW) [m3]: A1-A3 0.00570259, C1 0, C2 4.09848e-7, C3 0.000649379, D -7.40071e-5

## Outputs
- Hazardous waste disposed (HWD) [kg]: A1-A3 1.94409e-8, C1 0, C2 2.93755e-10, C3 6.86565e-10, D -3.10816e-10
- Non-hazardous waste disposed (NHWD) [kg]: A1-A3 0.0197351, C1 0, C2 1.37973e-6, C3 0.017856, D -0.000271204
- Radioactive waste disposed (RWD) [kg]: A1-A3 0.000631494, C1 0, C2 8.27594e-9, C3 4.35986e-6, D -1.91409e-5
- Components for re-use (CRU) [kg]: A1-A3 0, C1 0, C2 0, C3 0, D 0
- Materials for Recycling (MFR) [kg]: A1-A3 0, C1 0, C2 0, C3 0, D 0
- Material for Energy Recovery (MER) [kg]: A1-A3 0, C1 0.252, C2 0, C3 0, D 0
- Exported electrical energy (EEE) [MJ]: A1-A3 0, C1 0, C2 0, C3 0.151871, D 0
- Exported thermal energy (EET) [MJ]: A1-A3 0, C1 0, C2 0, C3 0.397816, D 0

## Impact indicators
- Global warming potential (GWP) [kg CO2 eq.]: A1-A3 2.28622, C1 0, C2 0.000584863, C3 0.143886, D -0.0404745
- Ozone Depletion Potential (ODP) [kg R11 eq.]: A1-A3 2.66766e-14, C1 0, C2 1.93592e-19, C3 1.70331e-16, D -8.75919e-16
- Acidification potential (AP) [kg SO2 eq.]: A1-A3 0.00213076, C1 0, C2 1.18136e-6, C3 2.72134e-5, D -3.33075e-5
- Eutrophication potential (EP) [kg Phosphate eq.]: A1-A3 0.000348003, C1 0, C2 2.80842e-7, C3 6.38098e-6, D -6.28413e-6
- Photochemical Ozone Creation Potential (POCP) [kg Ethene eq.]: A1-A3 0.00316305, C1 0, C2 -3.53935e-7, C3 2.34796e-6, D -3.45021e-6
- Abiotic depletion potential for non fossil resources (ADPE) [kg Sb eq.]: A1-A3 3.58702e-7, C1 0, C2 4.92167e-11, C3 1.82491e-9, D -9.55689e-9
- Abiotic depletion potential for fossil resources (ADPF) [MJ]: A1-A3 39.3109, C1 0, C2 0.00783978, C3 0.103866, D -0.549165

## Use advice
The data set represents a cradle to gate inventory. It can be used to characterise the supply chain situation of the respective commodity in a representative manner. Combination with individual unit processes using this commodity enables the generation of user-specific (product) LCAs.

## Data sources
- Roempp Lexikon - Lacke und Druckfarben, 1997
- Praktische Oberflächentechnik
- Paints, Coatings and Solvents, 1998
- Ökologische Bilanzierung von Baustoffen und Gebäuden, 2000
- Lackformulierung und Lackrezeptur
- Lackrohstoffkunde
- Ganzheitliche Bilanzierung der Pulverlackiertechnik im Vergleich zu anderen Lackiertechnologien, 199
- Farben und Lacke
- BASF Handbuch Lackiertechnik
- GaBi Database Edition 2020, SP40
- GaBi database (all versions)
