# Kooltherm K5

Dataset: ILCD process, EPD, average dataset
Geography: NL
Reference year: 2019
Valid until: 2024
Classification: OEKOBAU.DAT: Dämmstoffe / Phenolharz-Hartschaum (PF) / PF-Platten
Classification: IBUCategories: 02 Bauprodukte / Wärmedämmungsprodukte / Dämmstoffe aus Schaumkunststoffen
Method details: Dämmstoffe aus Schaumkunststoffen.pdf
Generated by: Sphera Solutions GmbH
Registration number: EPD-KSI-20190072-IBC1-DE
Owner: Kingspan Insulation
Compliance: DIN EN 15804; ISO 14025
Review: Accredited third party review by Institut Bauen und Umwelt e. V.
Amounts: rows without a unit in brackets have none in this file; such an amount is in the reference unit of its flow, which a separate flow dataset defines
copyright: true
licenseType: Free of charge for all users and uses
accessRestrictions: None

## General comment
Kingspan Kooltherm ® K5 is a rigid thermoset cellular insulation material faced on both sides with a glass tissue based facing. The product is available in variable thicknesses from 20mm up to 200mm. This EPD covers one of the most commonly sold thickness of 100mm with an R-value of 5,0 m²·K/W.

## Technology and included processes
Phenolic foam is produced by the use of phenolic resin, a catalyst, additives and blowing agent. The cell structure is formed in the resin under the influence of heat released during the chemical reaction. Hereby, the blowing agent is incorporated into the material which forms a solid and very fine cell structure, which is nearly 100% closed. The foam is applied on the glass fiber facings. After this, the thickness and strength is determined by the conveyor belt where upper and lower rollers compress the material into the desired thickness. The board is sawed into the correct size and packed according to the product specification.
Declared unit:
The declared unit (1m²) and conversion factors are listed in the table below.

## Technical purpose
Due to its high insulating value the Kooltherm K5 is suitable for use as external thermal insulation underneath applicable render systems.

## Reference product
- 1 m², 100mm Dicke: 1

## Inputs
- Renewable primary energy as energy carrier (PERE) [MJ]: A1-A3 6.50969, C3 0.281574, D -11.0331
- Renewable primary energy resources as material utilization (PERM) [MJ]: A1-A3 0, C3 0, D 0
- Total use of renewable primary energy resources (PERT) [MJ]: A1-A3 6.50969, C3 0.281574, D -11.0331
- Non renewable primary energy as energy carrier (PENRE) [MJ]: A1-A3 143.458, C3 91, D -54.4532
- Non renewable primary energy as material utilization (PENRM) [MJ]: A1-A3 88.9, C3 -88.9, D 0
- Total use of non renewable primary energy resources (PENRT) [MJ]: A1-A3 232.358, C3 2.09026, D -54.4532
- Use of secondary material (SM) [kg]: A1-A3 0, C3 0, D 0
- Use of renewable secondary fuels (RSF) [MJ]: A1-A3 0, C3 0, D 0
- Use of non renewable secondary fuels (NRSF) [MJ]: A1-A3 0, C3 0, D 0
- Use of net fresh water (FW) [m^3]: A1-A3 0.0329515, C3 0.0177292, D -0.013007

## Outputs
- Hazardous waste disposed (HWD) [kg]: A1-A3 9.88e-5, C3 2.07e-9, D -2.24e-8
- Non hazardous waste disposed (NHWD) [kg]: A1-A3 0.691, C3 0.0823, D -0.0235
- Radioactive waste disposed (RWD) [kg]: A1-A3 0.000971, C3 9.44e-5, D -0.0044
- Components for re-use (CRU) [kg]: A1-A3 0, C3 0, D 0
- Materials for recycling (MFR) [kg]: A1-A3 0, C3 0, D 0
- Materials for energy recovery (MER) [kg]: A1-A3 0, C3 3.5, D 0
- Exported electrical energy (EEE) [MJ]: A1-A3 0, C3 13.1, D 0
- Exported thermal energy (EET) [MJ]: A1-A3 0, C3 23.4, D 0

## Impact indicators
- Global warming potential (GWP) [kg CO_(2)-Äq.]: A1-A3 7.70552, C3 7.56205, D -3.07105
- Depletion potential of the stratospheric ozone layer (ODP) [kg CFC11-Äq.]: A1-A3 1.94948e-8, C3 1.23766e-15, D -4.2387e-14
- Acidification potential of land and water (AP) [kg SO_(2)-Äq.]: A1-A3 0.0143574, C3 0.00300548, D -0.0051936
- Eutrophication potential (EP) [kg PO_(4)^(3)-Äq.]: A1-A3 0.00173515, C3 0.00076443, D -0.000561912
- Formation potential of tropospheric ozone photochemical oxidants (POCP) [kg Ethen-Äq.]: A1-A3 0.004569, C3 0.000190641, D -0.000411418
- Abiotic depletion potential for non fossil resources (ADPE) [kg Sb-Äq.]: A1-A3 1.01273e-5, C3 6.88824e-8, D -5.54524e-7
- Abiotic depletion potential for fossil resources (ADPF) [MJ]: A1-A3 229.888, C3 1.85219, D -43.3606

## Use advice
Scope:
The insulation material Kooltherm, is produced by Kingspan Insulation B.V. at the manufacturing facility in Tiel, the Netherlands. A glass tissue based facing is autohesively bonded to the insulation core during manufacture.
System boundary:
Type of EPD: Cradle to gate with options, modules A1-A3, C3, D

The following processes are included in the A1-A3 production stage of Kooltherm: Manufacture of preliminary products (Resin, additives, blowing agent):

- Transportation of raw materials and preliminary products to the plant

- Manufacturing process in the plant including energy, water consumption, disposal of residual materials and consideration of any direct VOC emissions to air

- Manufacture and transport of packaging materials.

The following processes are included in the C3 and D stage of Kooltherm:

- End of life scenario (incineration in a waste incineration plant with energy recuperation)

## Data sources
- GaBi Database (all versions)
- GaBi database SP35 2018
