# Tubular particle board (German average)

Dataset: ILCD process, EPD, representative dataset
Geography: DE
Reference year: 2021
Valid until: 2026
Classification: OEKOBAU.DAT: Holz / Holzwerkstoffe / Spanplatten
Method details: EN 15804; ILCD format
Generated by: Thünen-Institut für Holzforschung
Owner: Thünen-Institut für Holzforschung
Compliance: EN 15804+A2; EN 16485
Review: Independent external review by Dr. Frank Werner - Umwelt & Entwicklung
Amounts: rows without a unit in brackets have none in this file; such an amount is in the reference unit of its flow, which a separate flow dataset defines
copyright: true

## General comment
Further information on the declared unit and the inventory analysis based on manufacturer information (input and output of material and energy flows) are available for download as an Excel file within the section “background info”.
The data set was created in 2021 as an update with identical foreground system. All background data sets are taken from the GaBi Professional Database with content version 2021.1. The modeling and calculation of the life cycle assessment is based on the European standards EN 15804:2012+A2:2019 and EN 16485:2014. For questions, please contact holzundklima@thuenen.de.

## Geography
Primärdaten wurden mittels Fragebögen von 2009 bis 2011 erhoben und anhand einzelner Werksbegehungen und durch den Vergleich verschiedener Kenndaten sowie den Vergleich zwischen den Produktionsstätten auf Plausibilität überprüft. Die Produktion der an der Ökobilanzstudie beteiligten Projektpartner lag bei 250.000 m³/a.

## Time period
The data set is based on production data from the years 2009 to 2011 (foreground system).
The background system was updated in 2021.

## Technology and included processes
Röhrenspanplatten bestehen hauptsächlich aus kleinteiligen Holzpartikeln wie Spänen und Mehl und werden mit duroplastischen Bindemitteln verpresst. Als Bindemittel werden Harnstoff-Formaldehyd-Harze (UF) verwendet. Als weitere Inhaltstoffe werden Paraffine zur Hydrophobierung der Späne genutzt. Zur Herstellung dieser spanbasierten Holzwerkstoffe werden Holzrohstoffe aus Waldholz (Industrieholz oder Waldhackschnitzel) und Industrierestholz (Industrierestholz, Hackschnitzel, Holzmehl) zunächst aufbereitet und getrocknet. Die sortierten Fraktionen werden mit Bindemitteln vermischt und durch einen Einfallkanal zwischen zwei Heizplatten gestreut. Die Späne werden über einen Kolben mit Rundstäben für die Hohlräume nach und nach komprimiert. Der verpresste Plattenstrang wird aufgetrennt und formatiert. Nachdem die Klebstoffe vollständig ausgehärtet sind, werden die Platten verpackt.
Die Holzfeuchte des Produktes liegt bei 7%

## Technical purpose
Tubular particle boards are light particle boards with tubular cavities in the middle layer. Particle boards can be used in decorative interior design, furniture construction and building construction. The tubular particle board has a wide range of applications, particularly for interior doors.

## Scenarios
- energetisch (Modul D): therm. Verwertung
- stofflich (Modul D): stoffl. Verwertung
- Entsorgung Verpackung (Modul A5): Das Modul A5 enthält ausschließlich die Entsorgung der Verpackungsmaterialien

## Reference product
- Röhrenspanplatte: 1

## Inputs
- Use of renewable primary energy (PERE) [MJ]: A1 59.2793, A2 4.71062, A3 1121.27, A1-A3 1185.26, A5 (Entsorgung Verpackung) 0.881851, C2 0.266209, C3 100.439, D (energetisch) 3149.78, D (stofflich) -39.1752
- Use of renewable primary energy resources used as raw materials (PERM) [MJ]: A1 4532.54, A2 0, A3 44.8522, A1-A3 4577.39, A5 (Entsorgung Verpackung) -44.8522, C2 0, C3 -4532.54, D (energetisch) 0, D (stofflich) 0
- Total use of renewable primary energy resources (PERT) [MJ]: A1 4591.82, A2 4.71062, A3 1166.12, A1-A3 5762.65, A5 (Entsorgung Verpackung) -43.9703, C2 0.266209, C3 -4432.1, D (energetisch) 3149.78, D (stofflich) -39.1752
- Use of non renewable primary energy (PENRE) [MJ]: A1 650.873, A2 56.3879, A3 1065.13, A1-A3 1772.39, A5 (Entsorgung Verpackung) 3.93026, C2 4.77652, C3 153.986, D (energetisch) -2559.9, D (stofflich) -158.677
- Use of non renewable primary energy resources used as raw materials (PENRM) [MJ]: A1 204.675, A2 0, A3 47.916, A1-A3 252.591, A5 (Entsorgung Verpackung) -47.916, C2 0, C3 -204.675, D (energetisch) 0, D (stofflich) 0
- Total use of non renewable primary energy resource (PENRT) [MJ]: A1 855.548, A2 56.3879, A3 1113.05, A1-A3 2024.99, A5 (Entsorgung Verpackung) -43.9857, C2 4.77652, C3 -50.6893, D (energetisch) -2559.9, D (stofflich) -158.677
- Use of secondary material (SM) [kg]: A1 0, A2 0, A3 0, A1-A3 0, A5 (Entsorgung Verpackung) 0, C2 0, C3 0, D (energetisch) 0, D (stofflich) 271.813
- Use of renewable secondary fuels (RSF) [MJ]: A1 0, A2 0, A3 0, A1-A3 0, A5 (Entsorgung Verpackung) 0, C2 0, C3 0, D (energetisch) 0, D (stofflich) 0
- Use of non renewable secondary fuels (NRSF) [MJ]: A1 0, A2 0, A3 0, A1-A3 0, A5 (Entsorgung Verpackung) 0, C2 0, C3 0, D (energetisch) 0, D (stofflich) 0
- Use of net fresh water (FW) [m3]: A1 0.158174, A2 0.0050871, A3 0.143287, A1-A3 0.306547, A5 (Entsorgung Verpackung) 0.0331235, C2 0.000304718, C3 0.0472656, D (energetisch) 0.770801, D (stofflich) -0.0199282

## Outputs
- Hazardous waste disposed (HWD) [kg]: A1 2.04953e-6, A2 3.66965e-9, A3 8.46245e-7, A1-A3 2.89944e-6, A5 (Entsorgung Verpackung) 7.47632e-10, C2 2.40686e-10, C3 5.59893e-8, D (energetisch) -9.43618e-7, D (stofflich) -1.23814e-7
- Non hazardous waste dispose (NHWD) [kg]: A1 0.228097, A2 0.0105465, A3 1.16233, A1-A3 1.40097, A5 (Entsorgung Verpackung) 0.45211, C2 0.00070956, C3 0.11997, D (energetisch) 21.9366, D (stofflich) -0.0208828
- Radioactive waste disposed (RWD) [kg]: A1 0.00799107, A2 0.000639974, A3 0.0283956, A1-A3 0.0370266, A5 (Entsorgung Verpackung) 0.000177061, C2 5.7778e-6, C3 0.0123357, D (energetisch) -0.16984, D (stofflich) -0.00447683
- Components for re-use (CRU) [kg]: A1 0, A2 0, A3 0, A1-A3 0, A5 (Entsorgung Verpackung) 0, C2 0, C3 0, D (energetisch) 0, D (stofflich) 0
- Materials for recycling (MFR) [kg]: A1 0, A2 0, A3 0, A1-A3 0, A5 (Entsorgung Verpackung) 0, C2 0, C3 271.813, D (energetisch) 0, D (stofflich) 0
- Materials for energy recovery (MER) [kg]: A1 0, A2 0, A3 0, A1-A3 0, A5 (Entsorgung Verpackung) 2.32744, C2 0, C3 271.813, D (energetisch) 0, D (stofflich) 0
- Exported electrical energy (EEE) [MJ]: A1 0, A2 0, A3 0.0174638, A1-A3 0.0174638, A5 (Entsorgung Verpackung) 21.0328, C2 0, C3 0, D (energetisch) 0, D (stofflich) 0
- Exported thermal energy (EET) [MJ]: A1 0, A2 0, A3 0.0405705, A1-A3 0.0405705, A5 (Entsorgung Verpackung) 40.9199, C2 0, C3 0, D (energetisch) 0, D (stofflich) 0

## Impact indicators
- Global Warming Potential - total (GWP-total) [kg CO2-Äqv.]: A1 -393.016, A2 4.06719, A3 72.4011, A1-A3 -316.548, A5 (Entsorgung Verpackung) 7.78676, C2 0.344635, C3 443.338, D (energetisch) -6.65477, D (stofflich) -11.4464
- Global Warming Potential - fossil fuels (GWP-fossil) [kg CO2-Äqv.]: A1 38.1841, A2 4.06719, A3 76.6681, A1-A3 118.919, A5 (Entsorgung Verpackung) 3.51978, C2 0.344635, C3 12.138, D (energetisch) -6.65477, D (stofflich) -11.4464
- Global Warming Potential - biogenic (GWP-biogenic) [kg CO2-Äqv.]: A1 -431.2, A2 0, A3 -4.26698, A1-A3 -435.467, A5 (Entsorgung Verpackung) 4.26698, C2 0, C3 431.2, D (energetisch) 0, D (stofflich) 0
- Depletion potential of the stratospheric ozone layer (ODP) [kg CFC 11-Äquiv.]: A1 2.26791e-13, A2 5.71194e-15, A3 1.07438e-12, A1-A3 1.30688e-12, A5 (Entsorgung Verpackung) 3.13907e-15, C2 4.57828e-17, C3 4.15483e-13, D (energetisch) -5.71908e-12, D (stofflich) -1.49874e-13
- Acidification potential, Accumulated Exceedance (AP) [mol H+ eqv.]: A1 0.108114, A2 0.0233288, A3 0.199825, A1-A3 0.331267, A5 (Entsorgung Verpackung) 0.00209469, C2 0.00208063, C3 0.0174679, D (energetisch) -0.169114, D (stofflich) -0.0404248
- Eutrophication potential - freshwater (EP-freshwater) [kg P eqv.]: A1 6.95646e-5, A2 1.22794e-5, A3 0.000161753, A1-A3 0.000243597, A5 (Entsorgung Verpackung) 4.72363e-7, C2 1.06376e-6, C3 5.08852e-5, D (energetisch) -0.000700531, D (stofflich) -2.69649e-5
- Eutrophication potential - marine (EP-marine) [kg N eqv.]: A1 0.0791407, A2 0.0113164, A3 0.0797224, A1-A3 0.17018, A5 (Entsorgung Verpackung) 0.000635684, C2 0.00101947, C3 0.00558653, D (energetisch) -0.0639916, D (stofflich) -0.0185714
- Eutrophication potential - terrestrial (EP-terrestrial) [mol N eqv.]: A1 0.522286, A2 0.125192, A3 0.834063, A1-A3 1.48154, A5 (Entsorgung Verpackung) 0.00992092, C2 0.0112838, C3 0.0583261, D (energetisch) -0.462183, D (stofflich) -0.203759
- Versauerungspotenzial, kumulierte Überschreitung (AP) [kg NMVOC eqv.]: A1 0.126876, A2 0.0214312, A3 0.298681, A1-A3 0.446988, A5 (Entsorgung Verpackung) 0.00171552, C2 0.00192267, C3 0.0138795, D (energetisch) -0.158414, D (stofflich) -0.0481139
- Abiotic depletion potential - non-fossil resources (ADPE) [kg Sb-Äqv.]: A1 6.09332e-6, A2 3.63959e-7, A3 6.19519e-5, A1-A3 6.84091e-5, A5 (Entsorgung Verpackung) 4.56655e-8, C2 2.7281e-8, C3 4.98206e-6, D (energetisch) -7.15676e-5, D (stofflich) -2.35668e-6
- Abiotic depletion potential - fossil resources (ADPF) [MJ]: A1 855.494, A2 56.317, A3 1064.95, A1-A3 1976.76, A5 (Entsorgung Verpackung) 3.92868, C2 4.77015, C3 153.938, D (energetisch) -2763.93, D (stofflich) -158.653
- Water (user) deprivation potential (WDP) [m3 world eqv.]: A1 0.158174, A2 0.0050871, A3 0.143287, A1-A3 0.306547, A5 (Entsorgung Verpackung) 0.0331235, C2 0.000304718, C3 0.0472656, D (energetisch) 0.770801, D (stofflich) -0.0199282
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
## Use advice
Der Datensatz bildet die durchschnittlichen Produktionsverhältnisse und die damit verbundenen Umweltwirkungen repräsentativ für Deutschland ab. Liegen keine herstellerspezifischen Ökobilanzergebnisse des verwendeten Produkts vor, empfiehlt sich die Verwendung dieses Durchschnittsdatensatzes.

## Data sources
- Rüter S, Diederichs S (2012) Ökobilanz Basisdaten für Bauprodukte aus Holz, Hamburg, Johann Heinrich von Thünen Institut, Institut für Holztechnologie und Holzbiologie, Abschlussbericht
- GaBi database (general)
