# Tür - HT Labor+Hospitaltechnik GmbH - Schiebetür

Dataset: ILCD process, EPD, specific dataset
Geography: DE
Reference year: 2020
Valid until: 2025
Classification: Komponenten von Fenstern und Vorhangfassaden / Türen und Tore / Stahl
Classification: OEKOBAU.DAT: Komponenten von Fenstern und Vorhangfassaden / Türen und Tore / Stahl
Synonyms: Edelstahltür; Edelstahltür inkl. Umfassungszarge; Automatisiertes Türsystem; Türsystem
Method details: EPD Edelstahltüren inkl. Umfassungszarge; Produktkategorieregeln Teil A; Produktkategorieregeln Teil B – für Türen und Tore
Owner: HT Labor + Hospitaltechnik GmbH
Compliance: EN 15804
Review: Independent external review by Patrick Wortner
Amounts: rows without a unit in brackets have none in this file; such an amount is in the reference unit of its flow, which a separate flow dataset defines
copyright: true

## General comment
A1-A3 sowie Module A4, A5, B2, B3, B4, B6, B7, C1, C2, C3, C4, D. Das Umweltprofil beinhaltet die Aufwendungen für die Lebenszyklus-Stadien cradle to gate mit Optionen (Modul A1-A3). Die Herstellung der Verpackung wurde innerhalb der Module A1-A3 berücksichtigt.

## Geography
Dieser Datensatz repräsentiert die Situation des Unternehmens HT Labor + Hospitaltechnik GmbH in 91180 Heideck, im Hinblick auf die wichtigsten Technologien und die gesetzlichen Rahmenbedingungen.

## Time period
jährlicher Durchschnitt

## Technology and included processes
Die Ökobilanzergebnisse umfassen die Lebenszyklusstadien der Herstellung der Vorprodukte bis hin zur Rohstoffgewinnung und Verarbeitungsprozesse von als Input dienenden Sekundärstoffen (z.B. Recyclingprozesse), deren Transporte zum Werk sowie die Produktion selbst, einschließlich der Bereitstellung von allen Hilfs- und Betriebsstoffen, Energie, sowie die vollständige Abfallbehandlung oder die Deponierung der Restabfälle während des Stadiums der Produktion. Die Module A1, A2 und A3 sind hier als ein aggregiertes Modul A1-A3 ausgewiesen. Falls für diesen Datensatz weitere Module berechnet wurden, sind diese separat zu finden und können für eine Betrachtung des gesamten Lebenszyklus zusammengeführt werden.

## Technical purpose
Automatisierte Türsysteme für kritische Bereiche in Gesundheitseinrichtungen, sterilen Produktionen, Laboren und Forschungseinrichtungen.

## Reference product
- Tür - HT Labor+Hospitaltechnik GmbH - Schiebetür: 1

## Inputs
- Use of net fresh water (FW) [m3]: A1-A3 0.65, A4 0.00109, A5 0.0185, B2 0.0568, B3 136.51, B4 1.42, B6 29.78, B7 0, C1 0.00357, C2 0.000117, C3 0.0342, C4 0.000621, D -1.92
- Use of non renewable primary energy (PENRE) [MJ]: A1-A3 2792.8, A4 11.14, A5 3.13, B2 173.88, B3 8390.34, B4 5672.9, B6 62759.9, B7 0, C1 7.53, C2 1.2, C3 17.56, C4 3.09, D -2128.52
- Use of non renewable primary energy resources used as raw materials (PENRM) [MJ]: A1-A3 13.95, A4 0, A5 -1.28, B2 0, B3 0.0654, B4 1.55e-15, B6 0, B7 0, C1 0, C2 0, C3 -12.04, C4 -0.63, D 0
- Use of non renewable secondary fuels (NRSF) [MJ]: A1-A3 0.2, A4 0, A5 0, B2 0, B3 0.6, B4 0.4, B6 0, B7 0, C1 0, C2 0, C3 0, C4 0, D 0
- Use of renewable primary energy (PERE) [MJ]: A1-A3 674.97, A4 0.65, A5 66.52, B2 31.75, B3 1541.63, B4 1743.71, B6 25271.8, B7 0, C1 3.03, C2 0.07, C3 120.05, C4 6.57, D -727.74
- Use of renewable primary energy resources used as raw materials (PERM) [MJ]: A1-A3 191.31, A4 0, A5 -66.14, B2 0, B3 5.25, B4 1.07e-14, B6 0, B7 0, C1 0, C2 0, C3 -118.91, C4 -6.26, D 0
- Use of renewable secondary fuels (RSF) [MJ]: A1-A3 0.023, A4 0, A5 0, B2 0, B3 0.0798, B4 0.0459, B6 0, B7 0, C1 0, C2 0, C3 0, C4 0, D 0
- Use of secondary material (SM) [kg]: A1-A3 1.5, A4 0, A5 0, B2 0, B3 4.5, B4 3, B6 0, B7 0, C1 0, C2 0, C3 0, C4 0, D 0
- Total use of non renewable primary energy resource (PENRT) [MJ]: A1-A3 2806.75, A4 11.14, A5 1.85, B2 173.88, B3 6917.41, B4 5672.9, B6 62759.9, B7 0, C1 7.53, C2 1.2, C3 5.52, C4 2.46, D -2128.52
- Total use of renewable primary energy resources (PERT) [MJ]: A1-A3 866.28, A4 0.65, A5 0.38, B2 31.75, B3 1436.78, B4 1743.71, B6 25271.8, B7 0, C1 3.03, C2 0.07, C3 1.14, C4 0.31, D -727.74

## Outputs
- Components for re-use (CRU) [kg]: A1-A3 0, A4 0, A5 0, B2 0, B3 0, B4 0, B6 0, B7 0, C1 0, C2 0, C3 0, C4 0, D 0
- Exported electrical energy (EEE) [MJ]: A1-A3 0.25, A4 0, A5 9.48, B2 0, B3 14.32, B4 24.39, B6 0, B7 0, C1 0, C2 0, C3 2.46, C4 0, D 0
- Exported thermal energy (EET) [MJ]: A1-A3 0.58, A4 0, A5 21.84, B2 0, B3 35.4, B4 56.14, B6 0, B7 0, C1 0, C2 0, C3 5.65, C4 0, D 0
- Hazardous waste disposed (HWD) [kg]: A1-A3 6.38e-6, A4 6.23e-7, A5 2.1e-9, B2 0.00106, B3 0.1, B4 1.42e-5, B6 3e-5, B7 0, C1 3.6e-9, C2 6.68e-8, C3 6.68e-9, C4 4.2e-8, D -2.74e-6
- Materials for energy recovery (MER) [kg]: A1-A3 0, A4 0, A5 0, B2 0, B3 4.44, B4 14.86, B6 0, B7 0, C1 0, C2 0, C3 7.43, C4 0, D 0
- Materials for recycling (MFR) [kg]: A1-A3 2.08, A4 0, A5 0, B2 0, B3 44.04, B4 51.94, B6 0, B7 0, C1 0, C2 0, C3 23.89, C4 0, D 0
- Non hazardous waste dispose (NHWD) [kg]: A1-A3 7.19, A4 0.000906, A5 0.072, B2 0.11, B3 732.33, B4 37.9, B6 45.7, B7 0, C1 0.00548, C2 9.72e-5, C3 0.23, C4 11.45, D -35.05
- Radioactive waste disposed (RWD) [kg]: A1-A3 0.0481, A4 1.51e-5, A5 6.87e-5, B2 0.00387, B3 0.0391, B4 0.1, B6 10.11, B7 0, C1 0.00121, C2 1.62e-6, C3 0.00039, C4 3.31e-5, D -0.12

## Impact indicators
- Abiotic depletion potential for non fossil resources (ADPE) [kg Sb-Äqv.]: A1-A3 0.00644, A4 6.31e-8, A5 1.02e-7, B2 1.82e-6, B3 0.028, B4 0.0129, B6 0.0011, B7 0, C1 1.32e-7, C2 6.78e-9, C3 3.45e-7, C4 6.26e-8, D -0.00237
- Abiotic depletion potential for fossil resources (ADPF) [MJ]: A1-A3 1608.54, A4 11.11, A5 1.68, B2 164.15, B3 3548.15, B4 3267.81, B6 37289.1, B7 0, C1 4.47, C2 1.19, C3 4.54, C4 2.38, D -1828.56
- Acidification potential of soil and water (AP) [kg SO2-Äqv.]: A1-A3 0.75, A4 0.00125, A5 0.000944, B2 0.0241, B3 2.92, B4 1.52, B6 9.85, B7 0, C1 0.00118, C2 0.000122, C3 0.00491, C4 0.00102, D -0.74
- Eutrophication potential (EP) [kg Phosphat-Äqv.]: A1-A3 0.056, A4 0.000304, A5 0.000201, B2 0.00602, B3 0.15, B4 0.12, B6 0.92, B7 0, C1 0.000111, C2 2.94e-5, C3 0.00114, C4 0.000116, D -0.0459
- Global warming potential (GWP) [kg CO2-Äqv.]: A1-A3 116.74, A4 0.82, A5 7.62, B2 5.55, B3 329.24, B4 281.18, B6 3470.55, B7 0, C1 0.42, C2 0.088, C3 14.74, C4 0.17, D -162.61
- Depletion potential of the stratospheric ozone layer (ODP) [kg CFC 11 eq.]: A1-A3 9.12e-7, A4 1.35e-16, A5 2.24e-15, B2 4.1e-9, B3 3.25e-6, B4 1.82e-6, B6 9.73e-11, B7 0, C1 1.17e-14, C2 1.45e-17, C3 4.97e-15, C4 9.89e-16, D -6.37e-13
- Formation potential of tropospheric ozone (POCP) [kg Ethen-Äqv.]: A1-A3 0.0486, A4 -0.000288, A5 6.27e-5, B2 0.00237, B3 0.16, B4 0.1, B6 0.63, B7 0, C1 7.5e-5, C2 -2.52e-5, C3 0.000307, C4 7.82e-5, D -0.0432

## Use advice
Dieser Datensatz beinhaltet die Ergebnisse für die Module A1-A3 sowie die Module A4, A5, B2, B3, B4, B6, B7, C1, C2, C3, C4, D gemäß EN 15804. Ein Vergleich mit anderen Produkten ist nur mit einer vergleichbaren Anwendung im Gebäude zulässig. Grundsätzlich ist eine Gegenüberstellung oder die Bewertung von EPD Daten nur möglich, wenn alle zu vergleichenden Datensätze nach EN 15804 erstellt wurden und der Gebäudekontext, bzw. die produktspezifischen Leistungsmerkmale berücksichtigt werden.

## Review details
Die angewendete LCI Methode ist in Übereinstimmung mit ISO 14040 und 14044. Die Dokumentation enthält alle relevanten Informationen im Hinblick auf die Datenqualität und den Umfang der Anwendung der jeweiligen LCI Ergebnisse bzw. der Datensätze. Der Datensatz repräsentiert den Stand der Technik bezogen auf die funktionelle Einheit.

## Data sources
- GaBi database (all versions)
