# Raised Floor System, Type LIGNA

Dataset: ILCD process, EPD, specific dataset
Geography: DE
Reference year: 2016
Valid until: 2022
Classification: OEKOBAU.DAT: Komposite / Systembauteile / Böden
Classification: IBUCategories: 02 Bauprodukte / Systemböden / Systemböden
Method details: Systemböden.pdf
Generated by: Lindner Group
Registration number: EPD-LIN-20160235-IAA1-DE
Owner: Lindner Group
Compliance: DIN EN 15804; ISO 14025
Review: Accredited third party review by Institut Bauen und Umwelt e. V.
Amounts: rows without a unit in brackets have none in this file; such an amount is in the reference unit of its flow, which a separate flow dataset defines
copyright: false
licenseType: Free of charge for all users and uses
accessRestrictions: None

## General comment
LIGNA raised floor systems are industrially factory-prefabricated in the factory as modular components that provide installation space to accommodate all kinds of installation, supply and disposal lines and allow free access into this cavity at any time and at any point.

The raised floor system is mainly formed by using raised floor panels and a substructure. Additional parts or products are required for assembly (support plates, bare floor sealant, support adhesive, thread sealant, edge sealant and wall connection strip).

LIGNA raised floor panels are manufactured from high-density wood-based sheet material (gross density range approx.. 600 – 720 kg/m³ with panel thicknesses of 28 – 38 mm). Raised floor panels are by default delivered in dimensions 600 x 600 mm and produced with edge bands adhered to the sides. The upper and/or lower surfaces of the panels are coated with sheet steel or moisture protection.

Steel supports are used for the substructure and these cater for different construction heights (28 – 2,000 mm). Assembly of the individual components into a composite surface (installation in the premises) creates the raised floor form of construction. The panel types (density and panel thickness) and dimensioning of the substructure are to be determined according to the specific requirements.

Use of this product is subject to the respective national provisions at the place of use, in Germany for example the building regulations of the federal states and the technical provisions based on this legislation.
A surface covering is not considered in the life cycle assessment, since there is a great variety of surface coverings such as parquet, linoleum, carpet, etc. Therefore, consideration of surface coverings would not be meaningful for the LIGNA raised floor panel.

## Technology and included processes
LIGNA raised floor panels are manufactured from wood-based sheet material (gross density range circa 600 – 720 kg/m³ with panel thicknesses of 28 – 38 mm). Raised floor panels are by default delivered in dimensions 600 x 600 mm and produced with edge bands adhered to the sides. The upper and/or lower surfaces of the panels are coated with sheet steel or moisture protection. Steel supports are used for the substructure and these cater for different construction heights (28 – 2,000 mm). Assembly of the individual components into a composite surface (installation in the premises) creates the raised floor form of construction. The panel types (density and panel thickness) and dimensioning of the substructure are to be determined according to the specific requirements.
Declared unit:
The declared unit relates in each case to 1 m² of LIGNA raised floor without floor covering and with an average floor panel thickness of 37.52 mm and an average density of 644.31 kg/m³.

The declared unit has an overall weight for the panel of 24.17 kg/m² plus 1.3488 kg for the associated supports (4 pieces per m² of raised floor) with a weight of 0.3372 kg per support. Any surface covering is not considered in the life cycle assessment, since there is a great variety of surface coverings such as parquet, linoleum, carpet, etc.

## Technical purpose
The raised floor system named in 2.1 and made from high-density wood-based sheet material, raised floor supports and supplementary components is mainly intended for creating cavities / installation spaces in public, commercial and private buildings. Raised floor systems can be covered with all the usual floor coverings, but must be aligned to the system variants.

## Reference product
- 1 m² Doppelbodensystem LIGNA: 1

## Inputs
- Renewable primary energy as energy carrier (PERE) [MJ]: A1-A3 5.89, A4 0.589, A5 4.04892, B1 0, B2 0, B3 0, B4 0, B5 0, C1 0, C2 0.11568, C3 182.67, C4 0, D -35.59
- Renewable primary energy resources as material utilization (PERM) [MJ]: A1-A3 188.144, A4 0, A5 -5.47154, B1 0, B2 0, B3 0, B4 0, B5 0, C1 0, C2 0, C3 -182.672, C4 0, D 0
- Total use of renewable primary energy resources (PERT) [MJ]: A1-A3 194.037, A4 0.588997, A5 -1.42, B1 0, B2 0, B3 0, B4 0, B5 0, C1 0, C2 0.1156, C3 1.31687, C4 0, D -35.59
- Non renewable primary energy as energy carrier (PENRE) [MJ]: A1-A3 206.97, A4 8.67, A5 0.014, B1 0, B2 0, B3 0, B4 0, B5 0, C1 0, C2 1.7034, C3 12.3552, C4 0, D -217.247
- Non renewable primary energy as material utilization (PENRM) [MJ]: A1-A3 0, A4 0, A5 0, B1 0, B2 0, B3 0, B4 0, B5 0, C1 0, C2 0, C3 0, C4 0, D 0
- Total use of non renewable primary energy resources (PENRT) [MJ]: A1-A3 206.97, A4 8.67, A5 0.0144844, B1 0, B2 0, B3 0, B4 0, B5 0, C1 0, C2 1.70343, C3 12.36, C4 0, D -217.247
- Use of secondary material (SM) [kg]: A1-A3 7.4174, A4 0, A5 0, B1 0, B2 0, B3 0, B4 0, B5 0, C1 0, C2 0, C3 0, C4 0, D 1.03
- Use of renewable secondary fuels (RSF) [MJ]: A1-A3 0, A4 0, A5 0, B1 0, B2 0, B3 0, B4 0, B5 0, C1 0, C2 0, C3 0, C4 0, D 0
- Use of non renewable secondary fuels (NRSF) [MJ]: A1-A3 0, A4 0, A5 0, B1 0, B2 0, B3 0, B4 0, B5 0, C1 0, C2 0, C3 0, C4 0, D 0
- Use of net fresh water (FW) [m^3]: A1-A3 0.09354, A4 0.00089, A5 0.000121, B1 0, B2 0, B3 0, B4 0, B5 0, C1 0, C2 0.000174, C3 0.0990593, C4 0, D -0.020461

## Outputs
- Hazardous waste disposed (HWD) [kg]: A1-A3 1.47e-6, A4 1.16e-6, A5 8.88e-11, B1 0, B2 0, B3 0, B4 0, B5 0, C1 0, C2 2.191, C3 8.629e-9, C4 0, D -1.1526
- Non hazardous waste disposed (NHWD) [kg]: A1-A3 0.369, A4 0.001, A5 0.00168592, B1 0, B2 0, B3 0, B4 0, B5 0, C1 0, C2 0.0002, C3 0.09185, C4 0, D -0.122
- Radioactive waste disposed (RWD) [kg]: A1-A3 0.0066, A4 1.17e-5, A5 8.05e-7, B1 0, B2 0, B3 0, B4 0, B5 0, C1 0, C2 2.3063, C3 0.0006, C4 0, D -0.0084
- Components for re-use (CRU) [kg]: A1-A3 0, A4 0, A5 0, B1 0, B2 0, B3 0, B4 0, B5 0, C1 0, C2 0, C3 0, C4 0, D 0
- Materials for recycling (MFR) [kg]: A1-A3 0.1335, A4 0, A5 0.0858, B1 0, B2 0, B3 0, B4 0, B5 0, C1 0, C2 1.2881, C3 0, C4 0, D 0
- Materials for energy recovery (MER) [kg]: A1-A3 0, A4 0, A5 0, B1 0, B2 0, B3 0, B4 0, B5 0, C1 0, C2 0, C3 0, C4 0, D 0
- Exported electrical energy (EEE) [MJ]: A1-A3 0, A4 0, A5 0.0727476, B1 0, B2 0, B3 0, B4 0, B5 0, C1 0, C2 0, C3 42.653, C4 0, D 0
- Exported thermal energy (EET) [MJ]: A1-A3 0, A4 0, A5 0.17286, B1 0, B2 0, B3 0, B4 0, B5 0, C1 0, C2 0, C3 99.281, C4 0, D 0

## Impact indicators
- Global warming potential (GWP) [kg CO_(2)-Äq.]: A1-A3 -28.3729, A4 0.63, A5 0.0499894, B1 0, B2 0, B3 0, B4 0, B5 0, C1 0, C2 0.124262, C3 43.47, C4 0, D -15.681
- Depletion potential of the stratospheric ozone layer (ODP) [kg CFC11-Äq.]: A1-A3 7.1025e-9, A4 1.31543e-12, A5 1.37e-13, B1 0, B2 0, B3 0, B4 0, B5 0, C1 0, C2 2.58355, C3 1.57604e-10, C4 0, D -4.25e-10
- Acidification potential of land and water (AP) [kg SO_(2)-Äq.]: A1-A3 0.045, A4 0.001, A5 7.12951, B1 0, B2 0, B3 0, B4 0, B5 0, C1 0, C2 0.000283768, C3 0.014, C4 0, D -0.022
- Eutrophication potential (EP) [kg PO_(4)^(3)-Äq.]: A1-A3 0.0056, A4 0.00036, A5 1.009e-6, B1 0, B2 0, B3 0, B4 0, B5 0, C1 0, C2 7.07249e-5, C3 0.00355815, C4 0, D -0.00288
- Formation potential of tropospheric ozone photochemical oxidants (POCP) [kg Ethen-Äq.]: A1-A3 0.007, A4 -0.0004, A5 5.18e-7, B1 0, B2 0, B3 0, B4 0, B5 0, C1 0, C2 -8.81216, C3 0.000987581, C4 0, D -0.00266
- Abiotic depletion potential for non fossil resources (ADPE) [kg Sb-Äq.]: A1-A3 3.81e-5, A4 4.81e-8, A5 2.67e-9, B1 0, B2 0, B3 0, B4 0, B5 0, C1 0, C2 9.4443e-9, C3 4.17e-7, C4 0, D -3.375e-6
- Abiotic depletion potential for fossil resources (ADPF) [MJ]: A1-A3 190.157, A4 8.643, A5 0.0124605, B1 0, B2 0, B3 0, B4 0, B5 0, C1 0, C2 1.69745, C3 10.766, C4 0, D -195.9

## Use advice
Scope:
This EPD relates to the LIGNA raised floor system. The collected production data refer to the year 2015. The life cycle assessment (LCA), which is based on plausible, transparent and comprehensible base data, represents the above-named system product on a full scale (100%). This document is translated from the German Environmental Product Declaration into English. It is based on the German original version EPD-LIN-20160235-IAA1-DE. The verifier has no influence on the quality of the translation.
System boundary:
The life cycle analysis for the LIGNA raised floor system includes the stages "cradle to gate with options".

It sets out with the production and processing of the raw materials and / or cutting of the chipboard. Also included is the production of the other auxiliary materials and consumables, such as fuels for transport and packaging for the system floors and steel supports ready for delivery. Consideration is given to Modules A1–A3 as a combined module for the production phase, A4–A5 (deployment phase), B1–B5 (use phase), C1–C4 (disposal phase), D (credits and debits beyond the system boundaries).

In particular, the following processes were included in the information module A1–A3 for the production of the LIGNA raised floor system:
- Raw material provision processes (wood-based sheet material, steel) (A1)
- Transport of raw and auxiliary materials and consumables to the plant (A2)
- Production processes for the system product in the plant, including energy costs (power, thermal energy and disposal of residual substances (A3)
- Production of packaging materials (A3)
- Transport from the factory gate to the construction site (A4). No further materials are considered for installation within the building; module A5 includes the environmental impact caused by the disposal of the packaging.
The modules are declared with 0 for the use phase (B1–B5). During the use phase the product causes no environmental impacts. The product itself does not require any maintenance; floor cleaning will always depend on the type of surface covering and usage. The EPD refers purely to the raised floor construction. With normal use, repair or replacement is not to be expected during use of the building. Modules B6 and B7 are not considered. The disposal stage considers the dismantling and removal of the product from the building, including initial manual sorting on the construction site (C1) and transportation to a local recycling centre (C2). The chipboard never reaches the end of waste status. This is to be burned as waste in C3 and the exported energy declared; the averted environmental impacts to produce this energy are duly reflected in D. It is assumed that the steel supports reach end of waste status after transport to the recycling yard. A specialist disposal company will receive credit for the sorted steel. The steel therefore becomes a reusable material. The steel supports are recycled in Module D. No environmental impacts arise in Module C4. This is therefore declared with 0.

## Data sources
- GaBi Database (all versions)
- GaBi database SP29 2016
