# Concrete pipe, reinforced; reinforced

Dataset: ILCD process, EPD, generic dataset
Geography: DE
Reference year: 2021
Valid until: 2022
Classification: oekobau.dat: Mineralische Baustoffe / Steine und Elemente / Betonfertigteile und Betonwaren
Owner: Sphera Solutions GmbH
Compliance: EN 15804+A2
Review: Dependent internal review by Sphera Solutions GmbH; Independent external review by GaBi user forum
Amounts: rows without a unit in brackets have none in this file; such an amount is in the reference unit of its flow, which a separate flow dataset defines
copyright: true
licenseType: Free of charge for all users and uses
accessRestrictions: The license conditions as stated on https://www.oekobaudat.de/ apply.
accessRestrictions: Es gelten die Lizenzbedingungen wie sie auf https://www.oekobaudat.de/ genannt sind.

## General comment
This data set has been modeled according to the European Standard EN 15804+A2 for Sustainable Building. Results are depicted in modules that allow the structured expression of results over the entire life cycle.

## Geography
The data set represents the country specific situation in Germany, focusing on the main technologies, the region specific characteristics and / or import statistics.

## Time period
Annual average

## Technology and included processes
The LCA of prefabricated concrete pipes covers the production of concrete (C20/25) and reinforced steel as well as the electricity needed for production. The reinforcement content is 0.6%. The system boundaries are represented by the finished product at the factory gate, with different measurements and weights per running metre. Transports from the factory to the building site are not considered and must be included according to the system boundaries.

In the disposal phase, a mechanical dismantling (excavator) is assumed in module C1. The transport in module C2 to the treatment plant takes place with a truck (50km). In module C3, the material is processed, any reinforcement is fed to a sink (no loads, no credits). A treatment loss of 25% was assumed. This loss is fed to an inert material landfill within Module C3 (average landfill emissions). In Module D, a credit for the net amount of material (excluding reinforcement and treatment losses) for the substitution of natural gravel as backfill material is given.

## Technical purpose
This product can be used in construction.

## Safety margin
20 %. Product system depicted except for a few missing processes / flows. Technological, temporal and geographic representativeness partly given.

## Reference product
- Concrete pipe, reinforced: 1

## Inputs
- Use of renewable primary energy as energy carrier (PERE) [MJ]: A1-A3 0.254251, C1 0.000250036, C2 0.00218616, C3 0.0130142, D -0.00509565
- Use of renewable primary energy resources used as raw materials (PERM) [MJ]: A1-A3 0, C1 0, C2 0, C3 0, D 0
- Total use of renewable primary energy (PERT) [MJ]: A1-A3 0.254251, C1 0.000250036, C2 0.00218616, C3 0.0130142, D -0.00509565
- Use of non renewable primary energy as energy carrier (PENRE) [MJ]: A1-A3 0.745354, C1 0.00430813, C2 0.0376677, C3 0.116917, D -0.0187136
- Use of non renewable primary energy resources used as raw materials (PENRM) [MJ]: A1-A3 0, C1 0, C2 0, C3 0, D 0
- Total use of non renewable primary energy resource (PENRT) [MJ]: A1-A3 0.745354, C1 0.00430813, C2 0.0376677, C3 0.116917, D -0.0187136
- Use of secondary material (SM) [kg]: A1-A3 0.0169609, C1 0, C2 0, C3 0, D 0
- Use of renewable secondary fuels (SF) [MJ]: A1-A3 0, C1 0, C2 0, C3 0, D 0
- Use of non renewable secondary fuels (NRSF) [MJ]: A1-A3 0, C1 0, C2 0, C3 0, D 0
- Net use of fresh water (FW) [m3]: A1-A3 0.000284185, C1 2.2222e-7, C2 1.94295e-6, C3 2.95714e-5, D -3.08899e-6

## Outputs
- Hazardous waste disposed (HWD) [kg]: A1-A3 1.535e-10, C1 1.80066e-13, C2 1.57439e-12, C3 9.56711e-12, D -3.01505e-12
- Non harzardous waste disposed (NHWD) [kg]: A1-A3 0.0396661, C1 6.9543e-7, C2 6.08042e-6, C3 0.286614, D -0.012427
- Radioactive waste disposed (RWD) [kg]: A1-A3 2.8928e-5, C1 4.13421e-9, C2 3.61471e-8, C3 1.03093e-6, D -5.51902e-7
- Components for re-use (CRU) [kg]: A1-A3 0, C1 0, C2 0, C3 0, D 0
- Materials for recycling (MFR) [kg]: A1-A3 0, C1 0, C2 0, C3 0.715787, D 0
- Materials for energy recovery (MER) [kg]: A1-A3 0, C1 0, C2 0, C3 0, D 0
- Exported electrical energy (EEE) [MJ]: A1-A3 0, C1 0, C2 0, C3 0, D 0
- Exported thermal energy (EET) [MJ]: A1-A3 0, C1 0, C2 0, C3 0, D 0

## Impact indicators
- Global Warming Potential - total (GWP-total) [kg CO2 eq.]: A1-A3 0.145714, C1 0.000322305, C2 0.00286116, C3 0.00741579, D -0.00142586
- Global Warming Potential - fossil fuels (GWP-fossil) [kg CO2 eq.]: A1-A3 0.145226, C1 0.000320149, C2 0.00284173, C3 0.00748383, D -0.00141812
- Global Warming Potential - biogenic (GWP-biogenic) [kg CO2 eq.]: A1-A3 0.000322005, C1 6.93722e-8, C2 1.17716e-6, C3 -9.80432e-5, D -1.2647e-6
- Global Warming Potential - land use and land use change (GWP-luluc) [kg CO2 eq.]: A1-A3 0.000165122, C1 2.08733e-6, C2 1.82504e-5, C3 2.99979e-5, D -6.47838e-6
- Depletion potenzial of the stratospheric ozone layer (ODP) [kg CFC-11 eq.]: A1-A3 1.02383e-15, C1 8.31628e-20, C2 7.27125e-19, C3 3.10522e-17, D -1.83106e-17
- Acidifcation potential, Accumulated Exceedance (AP) [Mole of H+ eq.]: A1-A3 0.000178126, C1 4.31043e-6, C2 8.05696e-6, C3 6.02071e-5, D -4.6968e-6
- Eutrophication potential - freshwater (EP-freshwater) [kg P eq.]: A1-A3 1.57558e-7, C1 6.6843e-10, C2 5.84435e-9, C3 1.44682e-8, D -3.94598e-9
- Eutrophication potential - marine (EP-marine) [kg N eq.]: A1-A3 6.20908e-5, C1 1.96097e-6, C2 3.71167e-6, C3 2.25337e-5, D -1.82669e-6
- Eutrophication potential - terrestrial (EP-terrestrial) [Mole of N eq.]: A1-A3 0.000677672, C1 2.15611e-5, C2 4.15269e-5, C3 0.000247615, D -2.01096e-5
- Photochemical Ozone Creation Potential (POCP) [kg NMVOC eq.]: A1-A3 0.000180472, C1 5.87288e-6, C2 7.23785e-6, C3 6.64864e-5, D -4.32054e-6
- Abiotic depletion potential - non-fossil resources (ADPE) [kg Sb eq.]: A1-A3 1.42452e-8, C1 2.82717e-11, C2 2.47191e-10, C3 3.88336e-9, D -2.89626e-10
- Abiotic depletion potential - fossil resources (ADPF) [MJ]: A1-A3 0.74517, C1 0.00430795, C2 0.0376661, C3 0.116883, D -0.0187099
- Water (user) deprivation potential (WDP) [m³ world equiv.]: A1-A3 0.00606167, C1 1.26344e-6, C2 1.10468e-5, C3 0.000992909, D -3.45683e-5

## Use advice
The data set represents a cradle to gate inventory. It can be used to characterise the supply chain situation of the respective commodity in a representative manner. Combination with individual unit processes using this commodity enables the generation of user-specific (product) LCAs.

## Data sources
- Beton Atlas - Entwerfen mit Stahlbeton im Hochbau, 2002
- Ökologischer Vergleich von Rohren aus verschiedenen Werkstoffen, TU-Wien, 1996
- Schneider Bautabellen für Ingenieure, 2006
- Stahlbetonrohr nach V1201-Typ 2 und DIN EN 1916, 2008
- Documentation of data quality management
- GaBi Database Edition 2021, CUP2021.01
- GaBi database (all versions)
