# Bioguard Acoustic (17mm)

Dataset: ILCD process, EPD, specific dataset
Geography: DE
Reference year: 2020
Valid until: 2025
Classification: OEKOBAU.DAT: Mineralische Baustoffe / Steine und Elemente / Deckenplatten
Classification: IBUCategories: 02 Building products / Internal and external wall and ceiling finishes / Mineral panels
Method details: Mineral panels.pdf
Generated by: SGS Search
Registration number: EPD-AWI-20200044-ICA1-EN
Owner: Armstrong World Industries Limited
Compliance: DIN EN 15804; ISO 14025
Review: Accredited third party review by Institut Bauen und Umwelt e. V.
Amounts: rows without a unit in brackets have none in this file; such an amount is in the reference unit of its flow, which a separate flow dataset defines
copyright: true
licenseType: Free of charge for all users and uses
accessRestrictions: None

## General comment
Mineral ceiling tiles and planks are factory produced using the wet felt process. They meet the requirements of /DIN 18177/ and are placed on the market in accordance with /EN 13964/ as well as German legislation on hazardous substances. Mineral tiles and planks consist of mineral wool(s), fillers and binders.

The Bioguard Acoustic (17mm) combines a cleanable surface and resistance to disinfectants as well as an antimicrobial performance and is available in a range of different edge details; Board, Tegular, and MicroLook.

## Technology and included processes
The described mineral products are produced using the wet-felt process. The initial materials are mixed with water to a homogenous suspension that is then pumped onto a belt conveyor (Fourdrinier). The water is removed both mechanically (gravity and vacuum) and by evaporation in a drying oven. The process water is reused as much as possible. It is treated and re-fed into the process water circuit. Production waste and dust are reused in the production process. Armstrong World Industries is ISO 9001 certified. Raw material Proportion (M - %) Binding agent (mainly starch) 0-10 % Mineral fibre 20 - 70 % Cellulose fibre 0 - 10 % Fillers (clay, talcum, limestone) 20 - 50 % Perlite 10 - 50 % Other < 1 % Dispersion paint and mineral coatings are additionally used for the surface finish as well as water during the production process. Flame retardants are not used. Isothiazolinone based products are used as biocides.
Declared unit:
The declared unit for this EPD is 1m2 of Sierra OP (15mm) ceiling panel for use over 50 years

## Technical purpose
Wet felt mineral suspended ceiling products are used as aesthetic internal ceiling linings and offer concealment of building services as well as providing sound absorption, sound insulation, fire resistance and very low Volatile Organic Compound (VOC) emissions. Typical applications are in offices, schools, healthcare premises, retail, leisure and transport sectors.

## Reference product
- Bioguard Acoustic (17mm) (): 1

## Inputs
- Renewable primary energy as energy carrier (PERE) [MJ]: A1-A3 12.1601, A4 0.149727, A5 0.854407, B1 0, B2 0, B3 0, B4 0, B5 0, B6 0, B7 0, C1 0, C2 0.0138497, C3 0, C4 0.0276084, D -5.33205
- Renewable primary energy resources as material utilization (PERM) [MJ]: A1-A3 6.1323, A4 0, A5 0.4293, B1 0, B2 0, B3 0, B4 0, B5 0, B6 0, B7 0, C1 0, C2 0, C3 0, C4 0, D 0
- Total use of renewable primary energy resources (PERT) [MJ]: A1-A3 18.2924, A4 0.149727, A5 1.28371, B1 0, B2 0, B3 0, B4 0, B5 0, B6 0, B7 0, C1 0, C2 0.0138497, C3 0, C4 0.0276084, D -5.33205
- Non renewable primary energy as energy carrier (PENRE) [MJ]: A1-A3 82.8662, A4 11.6055, A5 5.96198, B1 0, B2 0, B3 0, B4 0, B5 0, B6 0, B7 0, C1 0, C2 1.07351, C3 0, C4 1.0809, D 2.09753
- Non renewable primary energy as material utilization (PENRM) [MJ]: A1-A3 0.0791, A4 0, A5 0.0055, B1 0, B2 0, B3 0, B4 0, B5 0, B6 0, B7 0, C1 0, C2 0, C3 0, C4 0, D 0
- Total use of non renewable primary energy resources (PENRT) [MJ]: A1-A3 82.9453, A4 11.6055, A5 5.96748, B1 0, B2 0, B3 0, B4 0, B5 0, B6 0, B7 0, C1 0, C2 1.07351, C3 0, C4 1.0809, D 2.09753
- Use of secondary material (SM) [kg]: A1-A3 0.5789, A4 0, A5 0.0405, B1 0, B2 0, B3 0, B4 0, B5 0, B6 0, B7 0, C1 0, C2 0, C3 0, C4 0, D 0
- Use of renewable secondary fuels (RSF) [MJ]
- Use of non renewable secondary fuels (NRSF) [MJ]
- Use of net fresh water (FW) [m^3]: A1-A3 0.0341281, A4 0.00211694, A5 0.00246739, B1 0, B2 0, B3 0, B4 0, B5 0, B6 0, B7 0, C1 0, C2 0.000195817, C3 0, C4 0.000430845, D 0.00127867

## Outputs
- Hazardous waste disposed (HWD) [kg]: A1-A3 0.000105958, A4 6.5151e-6, A5 7.58664e-6, B1 0, B2 0, B3 0, B4 0, B5 0, B6 0, B7 0, C1 0, C2 6.02647e-7, C3 0, C4 9.8885e-7, D -6.39767e-6
- Non hazardous waste disposed (NHWD) [kg]: A1-A3 0.917536, A4 0.662806, A5 0.235377, B1 0, B2 0, B3 0, B4 0, B5 0, B6 0, B7 0, C1 0, C2 0.0613096, C3 0, C4 2.37303, D -0.00254986
- Radioactive waste disposed (RWD) [kg]: A1-A3 0.000209928, A4 7.48366e-5, A5 1.56385e-5, B1 0, B2 0, B3 0, B4 0, B5 0, B6 0, B7 0, C1 0, C2 6.92238e-6, C3 0, C4 6.12321e-6, D 1.0767e-5
- Components for re-use (CRU) [kg]: A1-A3 0, A4 0, A5 0.0659, B1 0, B2 0, B3 0, B4 0, B5 0, B6 0, B7 0, C1 0, C2 0, C3 0, C4 0, D 0
- Materials for recycling (MFR) [kg]: A1-A3 0, A4 0, A5 0.0043, B1 0, B2 0, B3 0, B4 0, B5 0, B6 0, B7 0, C1 0, C2 0, C3 0, C4 0, D 0.0614
- Materials for energy recovery (MER) [kg]: A1-A3 0, A4 0, A5 0.0711, B1 0, B2 0, B3 0, B4 0, B5 0, B6 0, B7 0, C1 0, C2 0, C3 0, C4 0, D 0
- Exported electrical energy (EEE) [MJ]: A1-A3 0, A4 0, A5 0.2401, B1 0, B2 0, B3 0, B4 0, B5 0, B6 0, B7 0, C1 0, C2 0, C3 0, C4 15.3389, D 0
- Exported thermal energy (EET) [MJ]: A1-A3 0, A4 0, A5 0.3708, B1 0, B2 0, B3 0, B4 0, B5 0, B6 0, B7 0, C1 0, C2 0, C3 0, C4 26.417, D 0

## Impact indicators
- Global warming potential (GWP) [kg CO_(2)-Äq.]: A1-A3 5.15717, A4 0.706268, A5 0.41646, B1 0, B2 0, B3 0, B4 0, B5 0, B6 0, B7 0, C1 0, C2 0.0653298, C3 0, C4 0.114221, D 0.246176
- Depletion potential of the stratospheric ozone layer (ODP) [kg CFC11-Äq.]: A1-A3 6.00692e-7, A4 1.31542e-7, A5 4.37782e-8, B1 0, B2 0, B3 0, B4 0, B5 0, B6 0, B7 0, C1 0, C2 1.21676e-8, C3 0, C4 1.10178e-8, D -9.0159e-9
- Acidification potential of land and water (AP) [kg SO_(2)-Äq.]: A1-A3 0.0143402, A4 0.00310882, A5 0.00106419, B1 0, B2 0, B3 0, B4 0, B5 0, B6 0, B7 0, C1 0, C2 0.000287566, C3 0, C4 0.000317509, D 0.00225414
- Eutrophication potential (EP) [kg PO_(4)^(3)-Äq.]: A1-A3 0.00405244, A4 0.000562484, A5 0.000296597, B1 0, B2 0, B3 0, B4 0, B5 0, B6 0, B7 0, C1 0, C2 5.20298e-5, C3 0, C4 6.30517e-5, D 1.09412e-5
- Formation potential of tropospheric ozone photochemical oxidants (POCP) [kg Ethen-Äq.]: A1-A3 0.000794874, A4 0.000125819, A5 5.8771e-5, B1 0, B2 0, B3 0, B4 0, B5 0, B6 0, B7 0, C1 0, C2 1.16383e-5, C3 0, C4 2.37479e-5, D 0.000114053
- Abiotic depletion potential for non fossil resources (ADPE) [kg Sb-Äq.]: A1-A3 5.51192e-6, A4 1.99435e-6, A5 4.06581e-7, B1 0, B2 0, B3 0, B4 0, B5 0, B6 0, B7 0, C1 0, C2 1.84477e-7, C3 0, C4 8.71541e-8, D 5.22882e-7
- Abiotic depletion potential for fossil resources (ADPF) [MJ]: A1-A3 68.265, A4 10.7238, A5 4.92676, B1 0, B2 0, B3 0, B4 0, B5 0, B6 0, B7 0, C1 0, C2 0.991954, C3 0, C4 0.993349, D 1.26438

## Use advice
Scope:
This declaration and its LCA study are based on 2016 production data for ceiling products manufactured at the Armstrong Munster plant in Germany.
System boundary:
The system boundaries studied as part of this cradle to grave LCA include the following information modules as per /EN15804/.

The Cradle to Grave Assessment Includes:

A1: Raw materials production including substrate, coating, and packaging materials for ceiling panels
A2: Transportation of raw materials to Armstrong manufacturing facility
A3: Manufacturing of the ceiling panels at an Armstrong facility
A3: Packaging of finished product including energy to operate packaging equipment
A4: Transportation from manufacturing facility to distribution centres, retailers, job site (assumed to be 1200 km)
A5: Installation into the building including 7% construction waste.
B1-7: Use and maintenance (0 emissions as the ceiling tiles do not require maintenance during life)
C1: Deconstruction (0 emissions as is done by manual labour)
C2: Transportation to landfill (assumed to be 100 km)
C3: Waste processing (0 emissions)
C4: End of life includes disposal of ceiling panel (54.5% landfill, 44.5% incineration and 1% recycled)
D: Benefits and loads beyond the system boundary

The Assessment Excludes:

Steel suspension systems that are used for most installations
Overhead energy usage (heating, the lighting of manufacturing facility)

## Data sources
- ecoinvent database (all versions)
- ecoinvent 3.3 database
