# Particleboard, uncoated

Dataset: ILCD process, EPD, average dataset
Geography: PT
Reference year: 2016
Valid until: 2022
Classification: OEKOBAU.DAT: Holz / Holzwerkstoffe / Spanplatten
Classification: IBUCategories: 02 Building products / Wood based panels / Wood based panels
Method details: Wood based panels.pdf
Generated by: Dr. Frank Werner - Umwelt & Entwicklung
Registration number: EPD-SON-20160209-IBA1-EN
Owner: Sonae Indústria, S.G.P.S., S.A.
Compliance: DIN EN 15804; ISO 14025
Review: Accredited third party review by Institut Bauen und Umwelt e. V.
Amounts: rows without a unit in brackets have none in this file; such an amount is in the reference unit of its flow, which a separate flow dataset defines
copyright: true
licenseType: Free of charge for all users and uses
accessRestrictions: None

## General comment
Particleboard is a panel-shaped wood-based material in accordance with /EN 312/ and /EN 14322/, as well as with /ANSI A208.1-2016/, for the North American market, which is manufactured in a flat-pressing process by means of compression under heat of small wood particles with adhesive.

Uncoated particleboards can be raw, sanded and/or profiled. Due to their various densities and adhesive systems, they can display a variety of material properties and qualities like moisture resistance, load-bearing or others.

## Technology and included processes
The wood is chipped, screened and dried. Surface layer and core layer materials are then glued and scattered on a forming belt as a particles’ mat. This is pressed into panels under high pressure in a hot press. The panels are trimmed, picked and sanded on both sides after cooling. All leftovers incurred during board manufacture are redirected into the process or used as fuel to supply the energy needs of the manufacturing process on site. A process diagram is presented below. The production sites are certified according to the following standards: /ISO 9001:2008/; /ISO 14001:2009/; /OHSAS 18001:2007/; /EN ISO 50001:2011/ (German and Portuguese sites).
Declared unit:
The declared unit for the LCA is 1 m3 of uncoated average Sonae Arauco particleboard.
The weighted average was calculated based on production volumes from representative plants in all countries where Sonae Arauco was operating in 2012.

## Technical purpose
The area of application for uncoated particleboard primarily involves decorative interior furnishings and furniture manufacturing.

Particleboard can be classified into the following use classes according to the requirements established in /EN 312/:
P1 General purpose boards for use in dry conditions
P2 Boards for interior fitments (including furniture) for use in dry conditions
P3 Non load-bearing boards for use in humid conditions
P4 Load-bearing boards for use in dry conditions
P5 Load-bearing boards for use in humid conditions
P6 Heavy duty load-bearing boards for use in dry conditions
P7 Heavy duty load-bearing boards for use in humid conditions

Additionally, the classification according to /ANSI A208.1-2016/ defines the following classes:

M1, MS Medium density commercial grade

M2, M3i Medium density industrial grade

## Reference product
- Particleboard, uncoated, per m³: 1

## Inputs
- Renewable primary energy as energy carrier (PERE) [MJ]: A1-A3 3410.75, A5 0.160317, C3 14.542, D -241.832
- Renewable primary energy resources as material utilization (PERM) [MJ]: A1-A3 10896, A5 0, C3 0, D 0
- Total use of renewable primary energy resources (PERT) [MJ]: A1-A3 14306.8, A5 0.160317, C3 14.542, D -241.832
- Non renewable primary energy as energy carrier (PENRE) [MJ]: A1-A3 4939.44, A5 11.4991, C3 138.511, D -10260.1
- Non renewable primary energy as material utilization (PENRM) [MJ]: A1-A3 1163.74, A5 0, C3 0, D 0
- Total use of non renewable primary energy resources (PENRT) [MJ]: A1-A3 6103.18, A5 11.4991, C3 138.511, D -10260.1
- Use of secondary material (SM) [kg]: A1-A3 177.696, A5 0, C3 0, D 0
- Use of renewable secondary fuels (RSF) [MJ]: A1-A3 2580.2, A5 0, C3 0, D 8073.48
- Use of non renewable secondary fuels (NRSF) [MJ]: A1-A3 0, A5 0, C3 0, D 883.513
- Use of net fresh water (FW) [m^3]: A1-A3 5.01271, A5 0.0224576, C3 0.247375, D -3.22642

## Outputs
- Hazardous waste disposed (HWD) [kg]: A1-A3 0.00500038, A5 8.83429e-6, C3 0.000160779, D -0.00361926
- Non hazardous waste disposed (NHWD) [kg]: A1-A3 27.0619, A5 0.237084, C3 0.760303, D 4.43924
- Radioactive waste disposed (RWD) [kg]: A1-A3 0.0114981, A5 1.23529e-5, C3 0.00120201, D -0.0191611
- Components for re-use (CRU) [kg]: A1-A3 0, A5 0, C3 0, D 0
- Materials for recycling (MFR) [kg]: A1-A3 19.4, A5 0.3935, C3 0, D 0
- Materials for energy recovery (MER) [kg]: A1-A3 0, A5 0, C3 723, D 0
- Exported electrical energy (EEE) [MJ]: A1-A3 0.016812, A5 10.368, C3 0, D 0
- Exported thermal energy (EET) [MJ]: A1-A3 0.193, A5 119, C3 0, D 0

## Impact indicators
- Global warming potential (GWP) [kg CO_(2)-Äq.]: A1-A3 -707.338, A5 24.7375, C3 1027.25, D -472.586
- Depletion potential of the stratospheric ozone layer (ODP) [kg CFC11-Äq.]: A1-A3 1.84472e-5, A5 3.35236e-8, C3 2.92635e-7, D -5.89073e-5
- Acidification potential of land and water (AP) [kg SO_(2)-Äq.]: A1-A3 1.46988, A5 0.00613518, C3 0.0272294, D -0.525828
- Eutrophication potential (EP) [kg PO_(4)^(3)-Äq.]: A1-A3 0.258134, A5 0.0014294, C3 0.00356618, D -0.0534107
- Formation potential of tropospheric ozone photochemical oxidants (POCP) [kg Ethen-Äq.]: A1-A3 0.113919, A5 0.000243678, C3 0.0012293, D -0.0497722
- Abiotic depletion potential for non fossil resources (ADPE) [kg Sb-Äq.]: A1-A3 0.00138879, A5 1.04219e-6, C3 4.18976e-6, D -6.45148e-5
- Abiotic depletion potential for fossil resources (ADPF) [MJ]: A1-A3 5884.6, A5 10.9813, C3 119.335, D -10526

## Use advice
Scope:
This document refers to a representative sample of particle board manufactured in the following plants of the Sonae Arauco Group:

- Sonae Arauco Beeskow Holzwerkstoffe GmbH, Radinkendorfer Strasse 71, 15848 Beeskow, Germany

- Sonae Arauco Deutschland GmbH - Nettgau Plant, Strohmweg 1, 38489 Nettgau, Germany

- Sonae Arauco Portugal, SA, Quinta da Poça - S.Paio de Gramaços, 3404-954 Oliveira do Hospital, Portugal

- Sonae Arauco South Africa (Pty) Ltd, White River, South Africa

- Sonae Arauco España-Soluciones de Madera, S.L., Carretera Córdoba-Valencia Km 126, Estación Linares-Baeza, 23490 Linares (Jaén), Spain

The production volume of these plants covers close to 100 % of the total production of particleboard by Sonae Arauco group.
System boundary:
Type of the EPD: cradle-to-gate - with options.

Modules A1 – A3 of the production stage cover the manufacturing of the products, including raw material extraction and processing, energy generation, the production of ancillary products and packaging materials, transport, as well as all waste treatment processes. Eventual benefits of recycling or energy recovery are neglected.

The resource aspects of wood were inventoried via material inherent properties as resource extraction of CO2 from the atmosphere and the lower heating value as the use of renewable energy. Material inherent properties are subject to co-product allocation as ruled in /EN 15804/.

For the input of post-consumer wood, the carbon stored in wood is inventoried as material inherent property as negative input of stored carbon, expressed in CO2-equivalent, whereas the energy content of wood is inventoried as input of renewable secondary material/fuel (as applicable).

The use of secondary wood as a material or fuel input to the product system is inventoried from the end-of-waste state of the recycled wood onward.

Module A5 covers the transport of the packaging material from the construction site and its disposal. Default end-of-waste states for the packaging materials from the packed products at the construction site are defined in analogy for wastes occurring in modules A1-A3. Eventual further inputs for the installation of the products are not considered due to the broad applicability of the assessed products.

The substituted primary material from the net amount of recycled material and from recovered energy exported from the product system in Module A5 are declared in Module D.

Module C3 covers the preparation of the post-consumer board to become a secondary fuel: the end-of-waste status for recycled wood-based boards is defined as the point where they have been sorted and chipped, ready to be used as secondary fuels.

In line with /EN 16485/, the export of the biogenic carbon stored in the board, expressed in CO2-equivalent is also reported in module C3.

Module D compiles all the benefits and burdens associated with the secondary fuels, secondary materials and exported energy leaving the production system in the modules A5 and C3.

Therefore, module D covers the avoided burdens from recycling and from energy recovered from the waste treatment in module A5 as well as the transport of the obsolete boards to a biomass combustion plant, the combustion process itself and the loads and benefits of the substitution of fossil fuels and/or electricity. Substitution effects in module D are always calculated for the net amount of secondary material or secondary fuel of the product system in line with /EN 16485/.

## Data sources
- ecoinvent database (all versions)
- ecoinvent 2.2 database
