# Glasarmierungsgitter

Dataset: ILCD process, EPD, average dataset
Geography: DE
Reference year: 2016
Valid until: 2022
Classification: OEKOBAU.DAT: Dämmstoffe / Wärmedämmverbundsystem / Wärmedämmverbundsystem
Classification: IBUCategories: 02 Bauprodukte / Innen-, Außenwand und Deckenbekleidungen / Glasarmierungsgitter
Method details: Glasarmierungsgitter.pdf
Generated by: Sphera Solutions GmbH
Registration number: EPD-VIT-20160008-IAC1-DE
Owner: Vitrulan Technical Textiles GmbH
Compliance: DIN EN 15804; ISO 14025
Review: Accredited third party review by Institut Bauen und Umwelt e. V.
Amounts: rows without a unit in brackets have none in this file; such an amount is in the reference unit of its flow, which a separate flow dataset defines
copyright: true
licenseType: Free of charge for all users and uses
accessRestrictions: None

## General comment
Glasarmierungsgitter sind flächige Gitterstrukturen aus in Längs- und Querrichtung angeordneten Glasfäden, die mit einer Schiebefestausrüstung auf Kunststoffbasis versehen werden. Die bei Vitrulan Technical Textiles GmbH produzierten Glasarmierungsgitter weisen je nach Artikel ein Flächengewicht von 50 bis 480 g/m2 auf.

## Technology and included processes
Glasarmierungsgitter sind flächige Gitterstrukturen aus in Längs- und Querrichtung angeordneten Glasfäden, die mit einer Schiebefestausrüstung auf Kunststoffbasis versehen werden. Die bei Vitrulan Technical Textiles GmbH produzierten Glasarmierungsgitter weisen je nach Artikel ein Flächengewicht von 50 bis 480 g/m2 auf. Dieser Datensatz bezieht sich auf ein typisches WDVS-Glasarmierungsgitter mit einem Flächengewicht von 160 g/m2. Glasarmierungsgitter finden Anwendung sowohl im Außenbereich für Wärmedämmverbundsysteme als auch im Innenbereich. Die Herstellung eines Glasarmierungsgitters erfolgt üblicherweise auf einer Webmaschine. Dabei werden die Fäden des sog. Kettbaumes in einer festgelegten Reihenfolge in Längsrichtung der Webmaschine zugeführt. Im Bereich des sog. Schusseintrags wird diese Fadenschar rechtwinklig mit mindestens einem weiteren Fadensystem (Querfäden) verkreuzt. Die so erzeugte Fläche (= Rohgewebe) wird in einem nachfolgenden Verarbeitungsschritt an einer Beschichtungsanlage mit Kunststoffdispersionen gecoated, anschließend getrocknet und chemisch vernetzt. Konfektionierung und Verpackung schließen den Herstellprozess ab.
Technische Daten:
Folgende Angaben beziehen sich auf ein typisches WDVS-Glasarmierungsgitter mit 160 g/m2 Flächengewicht.
Deklarierte Einheit:
Diese Ökobilanz bezieht sich auf 1 m² Glasarmierungsgitter mit einem Flächengewicht von 160 g/m². Es handelt sich hierbei um ein repräsentatives Produkt.

## Technical purpose
Glasarmierungsgitter finden Anwendung im:

Außenbereich (Wärmedämmverbundsysteme (WDVS), Außenputzgewebe, Panzergewebe, Eckwinkel, Anstricharmierung).

Innenbereich (Innenputzgewebe, Armierungsstreifen, Fugendeckstreifen, Anstricharmierung, Verstärkung von Trockenbauplatten, Stabilisierung von Deckensystemen, Armierung von Bodenbeschichtungen).

## Reference product
- 1 m² Glasarmierungsgitter (Flächengewicht 160 g/m²): 1

## Inputs
- Erneuerbare Primärenergie als Energieträger (PERE) [MJ]: A1-A3 1.29
- Erneuerbare Primärenergie zur stofflichen Nutzung (PERM) [MJ]: A1-A3 0.32
- Total erneuerbare Primärenergie (PERT) [MJ]: A1-A3 1.29
- Nicht-erneuerbare Primärenergie als Energieträger (PENRE) [MJ]: A1-A3 8.55
- Nicht-erneuerbare Primärenergie zur stofflichen Nutzung (PENRM) [MJ]: A1-A3 1.35
- Total nicht erneuerbare Primärenergie (PENRT) [MJ]: A1-A3 9.89
- Einsatz von Sekundärstoffen (SM) [kg]: A1-A3 0
- Erneuerbare Sekundärbrennstoffe (RSF) [MJ]: A1-A3 0
- Nicht erneuerbare Sekundärbrennstoffe (NRSF) [MJ]: A1-A3 0
- Einsatz von Süßwasserressourcen (FW) [m^3]: A1-A3 0.00206

## Outputs
- Gefährlicher Abfall zur Deponie (HWD) [kg]: A1-A3 2.89e-6
- Entsorgter nicht gefährlicher Abfall (NHWD) [kg]: A1-A3 0.0221
- Entsorgter radioaktiver Abfall (RWD) [kg]: A1-A3 0.000206
- Komponenten für die Wiederverwendung (CRU) [kg]: A1-A3 0
- Stoffe zum Recycling (MFR) [kg]: A1-A3 0
- Stoffe für die Energierückgewinnung (MER) [kg]: A1-A3 0
- Exportierte elektrische Energie (EEE) [MJ]: A1-A3 0
- Exportierte thermische Energie (EET) [MJ]: A1-A3 0

## Impact indicators
- Globales Erwärmungspotenzial (GWP) [kg CO_(2)-Äq.]: A1-A3 0.549
- Abbau Potential der stratosphärischen Ozonschicht (ODP) [kg CFC11-Äq.]: A1-A3 1.64e-11
- Versauerungspotenzial von Boden und Wasser (AP) [kg SO_(2)-Äq.]: A1-A3 0.00131
- Eutrophierungspotenzial (EP) [kg PO_(4)^(3)-Äq.]: A1-A3 0.000148
- Bildungspotential für troposphärisches Ozon (POCP) [kg Ethen-Äq.]: A1-A3 0.000112
- Potenzial für den abiotischen Abbau nicht fossiler Ressourcen (ADPE) [kg Sb-Äq.]: A1-A3 1.56e-5
- Potenzial für den abiotischen Abbau fossiler Brennstoffe (ADPF) [MJ]: A1-A3 9.37

## Use advice
Gültigkeitsbereich:
Die vorliegende EPD bezieht sich auf 1 m2. Glasarmierungsgitter produziert von Vitrulan Technical Textiles GmbH, Deutschland.
Systemgrenze:
Typ der EPD: Wiege bis Werkstor (cradle-to-gate)

Folgende Lebenszyklusabschnitte der Glasarmierungsgitter werden in die Berechnung der Ökobilanz aufgenommen:

Modul A1: Herstellung der Glasspinnfäden für Kettbaum und Schussmaterial, Herstellung der Vorprodukte der Beschichtung
Modul A2: Transport aller Vorprodukte zum Werk in Haselbach
Modul A3: Bereitstellung von Energie, Hilfsstoffen und Verpackungsmaterialien, Entsorgung von Produktionsabfällen, Emissionen

## Data sources
- GaBi Database (all versions)
- GaBi database SP28 2015
