# Aerazed concrete P4 05 non-reinforced; average density 500 kg/m3, reinforced

Dataset: ILCD process, EPD, generic dataset
Geography: DE
Reference year: 2018
Valid until: 2022
Classification: oekobau.dat: Mineralische Baustoffe / Steine und Elemente / Porenbeton
Owner: thinkstep
Compliance: DIN EN 15804
Review: Dependent internal review by thinkstep, IABP-GaBi, IBP-GaBi; Independent external review by GaBi user forum, GaBi bug forum, GaBi user community
Amounts: rows without a unit in brackets have none in this file; such an amount is in the reference unit of its flow, which a separate flow dataset defines
copyright: true

## General comment
This data set has been modeled according to the European Standard EN 15804 for Sustainable Building. Results are depicted in modules that allow the structured expression of results over the entire life cycle.

## Geography
The data set represents the country specific situation in Germany, focusing on the main technologies, the region specific characteristics and / or import statistics.

## Time period
Annual average

## Technology and included processes
Components from aerated concrete are produced in fixed industrial processes. The most important process steps are: (see also diagram for aerated concrete production) 1. Preparation, doying and mixing of primary materials 2. Production and installation of the corrosion protective reinforcement (for reinforced components) 3. Casting, driving, rubbing and cutting of the block 4. Hardening using steam 5. When necessary, further processing of the hardened aerated concrete parts. The data set of the aerated concrete precision block conform to the products on the market
Background system:
Electricity: Electricity is modelled according to the individual country-specific situations. The country-specific modelling is achieved on multiple levels. Firstly, individual energy carrier specific power plants and plants for renewable energy sources are modelled according to the current national electricity grid mix. Modelling the electricity consumption mix includes transmission / distribution losses and the own use by energy producers (own consumption of power plants and "other" own consumption e.g. due to pumped storage hydro power etc.), as well as imported electricity. Secondly, the national emission and efficiency standards of the power plants are modelled as well as the share of electricity plants and combined heat and power plants (CHP). Thirdly, the country-specific energy carrier supply (share of imports and / or domestic supply) including the country-specific energy carrier properties (e.g. element and energy content) are accounted for. Fourthly, the exploration, mining/production, processing and transport processes of the energy carrier supply chains are modelled according to the specific situation of each electricity producing country. The different production and processing techniques (emissions and efficiencies) in the different energy producing countries are considered, e.g. different crude oil production technologies or different flaring rates at the oil platforms.
Thermal energy, process steam: The thermal energy and process steam supply is modelled according to the individual country-specific situation with regard to emission standards and considered energy carriers. The thermal energy and process steam are produced at heat plants. Efficiencies for thermal energy production are by definition 100% in relation to the corresponding energy carrier input. For process steam the efficiency ranges from 85%, 90% to 95%. The energy carriers used for the generation of thermal energy and process steam are modelled according to the specific import situation (see electricity above).
Transports: All relevant and known transport processes are included. Ocean-going and inland ship transport as well as rail, truck and pipeline transport of bulk commodities are considered.
Energy carriers: The energy carriers are modelled according to the specific supply situation (see electricity above).
Refinery products: Diesel fuel, gasoline, technical gases, fuel oils, lubricants and residues such as bitumen are modelled with a parameterised country-specific refinery model. The refinery model represents the current national standard in refining techniques (e.g. emission level, internal energy consumption, etc.) as well as the individual country-specific product output spectrum, which can be quite different from country to country. The supply of crude oil is modelled, again, according to the country-specific situation with the respective properties of the resources.

## Technical purpose
This product can be used in construction.

## Safety margin
10 %. Product system almost completely covered. Good technological, temporal and geographic representativeness.

## Reference product
- Aerated concrete P4 05 not reinforced (m3): 1

## Inputs
- Use of renewable primary energy (PERE) [MJ]: A1-A3 308.61, C1 0.245085, C2 0.942867, C3 5.6899, D -3.68992
- Primary energy resources used as raw materials (PERM) [MJ]: A1-A3 0, C1 0, C2 0, C3 0, D 0
- Total use of renewable primary energy resources (PERT) [MJ]: A1-A3 308.61, C1 0.245085, C2 0.942867, C3 5.6899, D -3.68992
- Use of non-renewable primary energy (PENRE) [MJ]: A1-A3 1337.61, C1 4.20993, C2 16.196, C3 52.7133, D -12.9372
- Non-renewable primary energy resources used as raw materials (PENRM) [MJ]: A1-A3 0, C1 0, C2 0, C3 0, D 0
- Total use of non-renewable primary energy resources (PENRT) [MJ]: A1-A3 1337.61, C1 4.20993, C2 16.196, C3 52.7133, D -12.9372
- Input of secondary material (SM) [kg]: A1-A3 0.157114, C1 0, C2 0, C3 0, D 0
- Use of renewable secondary fuels (RSF) [MJ]: A1-A3 0, C1 0, C2 0, C3 0, D 0
- Use of non renewable secondary fuels (NRSF) [MJ]: A1-A3 0, C1 0, C2 0, C3 0, D 0
- Use of net fresh water (FW) [m3]: A1-A3 0.644031, C1 0.000219495, C2 0.000844417, C3 0.0135248, D -0.00239292

## Outputs
- Hazardous waste disposed (HWD) [kg]: A1-A3 4.06945e-6, C1 1.57321e-7, C2 6.05228e-7, C3 9.54834e-7, D -2.43846e-7
- Non-hazardous waste disposed (NHWD) [kg]: A1-A3 36.9277, C1 0.000738917, C2 0.00284268, C3 133.954, D -7.60444
- Radioactive waste disposed (RWD) [kg]: A1-A3 0.0309184, C1 4.43219e-6, C2 1.70511e-5, C3 0.000508023, D -0.000481701
- Components for re-use (CRU) [kg]: A1-A3 0, C1 0, C2 0, C3 0, D 0
- Materials for Recycling (MFR) [kg]: A1-A3 0, C1 0, C2 0, C3 401.443, D 0
- Material for Energy Recovery (MER) [kg]: A1-A3 0, C1 0, C2 0, C3 0, D 0
- Exported electrical energy (EEE) [MJ]: A1-A3 0, C1 0, C2 0, C3 0, D 0
- Exported thermal energy (EET) [MJ]: A1-A3 0, C1 0, C2 0, C3 0, D 0

## Impact indicators
- Global warming potential (GWP) [kg CO2 eq.]: A1-A3 222.605, C1 0.311031, C2 1.205, C3 3.17457, D -0.969479
- Ozone Depletion Potential (ODP) [kg R11 eq.]: A1-A3 1.27881e-12, C1 1.03678e-16, C2 3.98861e-16, C3 1.7983e-14, D -1.87109e-14
- Acidification potential (AP) [kg SO2 eq.]: A1-A3 0.16655, C1 0.00108486, C2 0.00243398, C3 0.0205301, D -0.0022894
- Eutrophication potential (EP) [kg Phosphate eq.]: A1-A3 0.0284547, C1 0.000255968, C2 0.000578624, C3 0.00349327, D -0.00044548
- Photochemical Ozone Creation Potential (POCP) [kg Ethene eq.]: A1-A3 0.0069048, C1 0.000107195, C2 -0.000795511, C3 0.00186313, D 0.000210452
- Abiotic depletion potential for non fossil resources (ADPE) [kg Sb eq.]: A1-A3 0.000174183, C1 2.63581e-8, C2 1.01402e-7, C3 1.70583e-6, D -2.15467e-7
- Abiotic depletion potential for fossil resources (ADPF) [MJ]: A1-A3 1259.51, C1 4.1986, C2 16.1524, C3 51.43, D -11.7212

## Use advice
The data set represents a cradle to gate inventory. It can be used to characterise the supply chain situation of the respective commodity in a representative manner. Combination with individual unit processes using this commodity enables the generation of user-specific (product) LCAs.

## Data sources
- Ökologische Bilanzierung von Baustoffen und Gebäuden, 2000
- Ökobilanz für den Baustoff Porenbeton und Porenbeton-Wandkonstruktionen, 1997
- AUB-Zertifkat FELS-WERKE GmbH/Xella: Porenbeton (Zertifikat-Nr.:Z.HEB101), 2001
- GaBi Database Edition 2020, SP40
- GaBi database (all versions)
