# Konstruktionsvollholz (Durchschnitt DE)

Dataset: ILCD process, EPD, representative dataset
Geography: DE
Reference year: 2020
Valid until: 2025
Classification: OEKOBAU.DAT: Holz / Vollholz / Konstruktionsvollholz
Method details: EN 15804; ILCD format
Owner: Thünen-Institut für Holzforschung
Compliance: EN 15804
Review: Independent external review by Dr. Frank Werner - Umwelt & Entwicklung
Amounts: rows without a unit in brackets have none in this file; such an amount is in the reference unit of its flow, which a separate flow dataset defines
copyright: true

## General comment
Weitere Informationen zur deklarierten Einheit (Zusammensetzung) und die auf Herstellerangaben beruhende Sachbilanz (In- und Output der Stoff- und Energieströme) stehen als Excel-Datei unter dem Unterpunkt Hintergrund-Bericht zum Download bereit.
Der Datensatz wurde 2020 als Aktualisierung mit gleichbleibendem Vordergrundsystem erstellt. Alle Hintergrunddaten entstammen der GaBi Professional Datenbank 2020 im Service Pack 40. Die Modellierung und Berechnung der Ökobilanz basiert auf den europäischen Normen EN 15804:2012+A1:2013 und EN 16485:2014. Bei Rückfragen wenden Sie sich bitte an holzundklima@thuenen.de.

## Geography
Für die Ökobilanzierung von KVH wurden Daten von 27 Werken berücksichtigt (Rüter & Diederichs 2012). Für alle in Rüter & Diederichs (2012) angeführten Vollholzprodukte wurden von 2009 bis 2011 insgesamt 178 Prozesslinien erfasst. Im Verhältnis zu den vom Statistischen Bundesamt gemeldeten Produktionsmengen im selben Zeitraum entspricht die erreichte Abdeckung von Vollholzprodukten aus Nadelschnittholz 38 %.

## Time period
Der Datensatz basiert auf Produktionsdaten aus den Jahren 2009 bis 2011 (Vordergrundsystem).
Eine Aktualisierung des Hintergrundsystems erfolgte 2020.

## Technology and included processes
Konstruktionsvollholz ist ein industriell gefertigtes Produkt für tragende Konstruktionen. Es besteht aus in der Länge kraftschlüssig mittels Keilzinkenverbindungen gestoßenen, kammergetrockneten Kanthölzern aus Nadelholz. Die im Produkt enthaltenen Bindemittel sind vorwiegend auf Basis von Melamin-Harnstoff-Formaldehyd und Polyurethan. Vereinzelt kommen Phenol-Resorzin-Harze zum Einsatz. Das Produkt wird nicht mit Holzschutzmitteln oder ähnlichen Mitteln behandelt. Das auf weniger als 18 % getrocknete konventionelle Schnittholz (kammergetrocknetes Schnittholz) wird zunächst vorgehobelt und visuell bzw.
maschinell nach der Festigkeit sortiert (Hobelware). Identifizierte Kantholzabschnitte mit
festigkeitsvermindernden Stellen werden abhängig von der erwünschten Festigkeitsklasse ausgekappt und die entstandenen Kanthölzer werden je nach gewünschter Länge ggf. durch Keilzinkenverbindung zu endlos langen Lamellen gestoßen. Nach Aushärtung, bei nicht keilgezinktem Konstruktionsvollholz unmittelbar nach der Festigkeitssortierung, wird der Rohling gehobelt, gefast, abgebunden und verpackt.
Die Holzfeuchte des Produktes liegt bei 12%

## Technical purpose
KVH® findet Anwendung als tragende Bauteile in Konstruktionen des Hoch- und Brückenbaus.

## Scenarios
- energetisch: therm. Verwertung
- stofflich: stoffl. Verwertung

## Reference product
- KVH (Durchschnitt DE): 1

## Inputs
- Use of renewable primary energy (PERE) [MJ]: A1 978.432, A2 6.06985, A3 1235.68, A1-A3 2220.18, A5 0.268356, C2 0.39742, C3 30.8332, D (energetisch) 6166.14, D (stofflich) -35.4119
- Use of renewable primary energy resources used as raw materials (PERM) [MJ]: A1 8472.5, A2 0, A3 37.9333, A1-A3 8510.43, A5 -37.9333, C2 0, C3 -8472.5, D (energetisch) 0, D (stofflich) 0
- Total use of renewable primary energy resources (PERT) [MJ]: A1 9450.93, A2 6.06985, A3 1273.62, A1-A3 10730.6, A5 -37.6649, C2 0.39742, C3 -8441.66, D (energetisch) 6166.14, D (stofflich) -35.4119
- Use of non renewable primary energy (PENRE) [MJ]: A1 480.737, A2 102.241, A3 539.05, A1-A3 1122.03, A5 1.45345, C2 7.07712, C3 53.6094, D (energetisch) -4702.8, D (stofflich) -175.3
- Use of non renewable primary energy resources used as raw materials (PENRM) [MJ]: A1 5.17577, A2 0, A3 20.232, A1-A3 25.4078, A5 -20.232, C2 0, C3 -5.17577, D (energetisch) 0, D (stofflich) 0
- Total use of non renewable primary energy resource (PENRT) [MJ]: A1 485.913, A2 102.241, A3 559.282, A1-A3 1147.44, A5 -18.7785, C2 7.07712, C3 48.4336, D (energetisch) -4702.8, D (stofflich) -175.3
- Use of secondary material (SM) [kg]: A1 0, A2 0, A3 0, A1-A3 0, A5 0, C2 0, C3 0, D (energetisch) 0, D (stofflich) 492.931
- Use of renewable secondary fuels (RSF) [MJ]: A1 67.3262, A2 0, A3 106.379, A1-A3 173.705, A5 0, C2 0, C3 0, D (energetisch) 0, D (stofflich) 0
- Use of non renewable secondary fuels (NRSF) [MJ]: A1 0, A2 0, A3 0, A1-A3 0, A5 0, C2 0, C3 0, D (energetisch) 0, D (stofflich) 0
- Use of net fresh water (FW) [m3]: A1 0.101626, A2 0.00642289, A3 0.166739, A1-A3 0.274788, A5 0.0161963, C2 0.000460185, C3 0.0166923, D (energetisch) 0.715864, D (stofflich) -0.0213536

## Outputs
- Hazardous waste disposed (HWD) [kg]: A1 1.50256e-5, A2 4.37536e-6, A3 5.11143e-6, A1-A3 2.45124e-5, A5 3.67571e-9, C2 3.29347e-7, C3 3.60527e-8, D (energetisch) -2.81646e-6, D (stofflich) -5.5755e-6
- Non hazardous waste dispose (NHWD) [kg]: A1 0.808172, A2 0.016866, A3 1.06468, A1-A3 1.88972, A5 0.0553124, C2 0.00108307, C3 0.0412596, D (energetisch) 2.49765, D (stofflich) -0.0410504
- Radioactive waste disposed (RWD) [kg]: A1 0.0156984, A2 0.000210849, A3 0.0352692, A1-A3 0.0511784, A5 7.1037e-5, C2 8.75961e-6, C3 0.00448112, D (energetisch) -0.30981, D (stofflich) -0.00440288
- Components for re-use (CRU) [kg]: A1 0, A2 0, A3 0, A1-A3 0, A5 0, C2 0, C3 0, D (energetisch) 0, D (stofflich) 0
- Materials for recycling (MFR) [kg]: A1 0, A2 0, A3 0, A1-A3 0, A5 0, C2 0, C3 492.931, D (energetisch) 0, D (stofflich) 0
- Materials for energy recovery (MER) [kg]: A1 0, A2 0, A3 0, A1-A3 0, A5 0, C2 0, C3 492.931, D (energetisch) 0, D (stofflich) 0
- Exported electrical energy (EEE) [MJ]: A1 0, A2 0, A3 0.121649, A1-A3 0.121649, A5 10.6018, C2 0, C3 0, D (energetisch) 0, D (stofflich) 0
- Exported thermal energy (EET) [MJ]: A1 0, A2 0, A3 0.282604, A1-A3 0.282604, A5 20.7597, C2 0, C3 0, D (energetisch) 0, D (stofflich) 0

## Impact indicators
- Global warming potential (GWP) [kg CO2-Äqv.]: A1 -767.467, A2 7.4556, A3 38.2733, A1-A3 -721.738, A5 5.54577, C2 0.511084, C3 809.713, D (energetisch) -351.382, D (stofflich) -13.2813
- Depletion potential of the stratospheric ozone layer (ODP) [kg R11 eq.]: A1 6.06699e-13, A2 2.82812e-15, A3 1.38489e-12, A1-A3 1.99442e-12, A5 1.1803e-15, C2 8.50761e-17, C3 1.7597e-13, D (energetisch) -1.2165e-11, D (stofflich) -1.71122e-13
- Acidification potential of soil and water (AP) [kg SO2-Äqv.]: A1 0.221343, A2 0.0307179, A3 0.19707, A1-A3 0.449131, A5 0.000684613, C2 0.00214141, C3 0.00587833, D (energetisch) -0.355588, D (stofflich) -0.0481434
- Eutrophication potential (EP) [kg Phosphat-Äqv.]: A1 0.0502588, A2 0.00774173, A3 0.0422351, A1-A3 0.100236, A5 0.000145583, C2 0.000538709, C3 0.00104827, D (energetisch) -0.059341, D (stofflich) -0.011417
- Formation potential of tropospheric ozone (POCP) [kg Ethen-Äqv.]: A1 0.0340255, A2 -0.0130522, A3 0.0430196, A1-A3 0.0639929, A5 4.52409e-5, C2 -0.000900541, C3 0.000414745, D (energetisch) -0.0278972, D (stofflich) -0.000263369
- Abiotic depletion potential for non fossil resources (ADPE) [kg Sb-Äqv.]: A1 1.9418e-5, A2 6.60486e-7, A3 1.84794e-5, A1-A3 3.85579e-5, A5 7.53008e-8, C2 4.30356e-8, C3 1.75259e-6, D (energetisch) -0.000117641, D (stofflich) -2.45175e-6
- Abiotic depletion potential for fossil resources (ADPF) [MJ]: A1 447.787, A2 101.706, A3 451.836, A1-A3 1001.33, A5 1.27454, C2 7.05476, C3 42.2985, D (energetisch) -3915.61, D (stofflich) -164.183

## Use advice
Aufgrund der hohen Abdeckung bildet der Datensatz die durchschnittlichen Produktionsverhältnisse und die damit verbundenen Umweltwirkungen repräsentativ für Deutschland ab. Liegen keine herstellerspezifischen Ökobilanzergebnisse des verwendeten Produkts vor, empfiehlt sich die Verwendung dieses Durchschnittsdatensatzes.

## Data sources
- Rüter S, Diederichs S (2012) Ökobilanz Basisdaten für Bauprodukte aus Holz, Hamburg, Johann Heinrich von Thünen Institut, Institut für Holztechnologie und Holzbiologie, Abschlussbericht
- GaBi database SP40 2020
- GaBi database (general)
