# Betonpflasterstein mit Edelsplittvorsatzbeton

Dataset: ILCD process, EPD, specific dataset
Geography: DE
Reference year: 2017
Valid until: 2022
Classification: OEKOBAU.DAT: Mineralische Baustoffe / Steine und Elemente / Betonfertigteile und Betonwaren
Classification: IBUCategories: 02 Bauprodukte / Tiefbauprodukte / Oberbaumaterialien für Verkehrswege im Aussenbereich
Method details: Oberbaumaterialien für Verkehrswege im Aussenbereich.pdf
Owner: Kronimus AG - Betonsteinwerke
Compliance: DIN EN 15804; ISO 14025
Review: Accredited third party review by IBU
Amounts: rows without a unit in brackets have none in this file; such an amount is in the reference unit of its flow, which a separate flow dataset defines
copyright: true

## General comment
Die deklarierten Produkte sind Pflastersteine unterschiedlicher Formate in der Steinstärke 12 cm. Das Flächengewicht beträgt 270 kg/m² mit einer Edelsplitt-Oberfläche, bestehend aus Grau- und Weißzement mit Sand- und Edelsplittbestandteilen. Die Steine werden nach dem Aushärten durch eine Schleifanlage bzw. danach angeschlossener Sandstrahlanlage in einem oder zwei Schritten bearbeitet. In den Umweltergebnissen enthalten ist die Bearbeitung in zwei Schritten mit Schleifen und Sandstrahlen. Ein EPD-Anhang ermöglicht zusätzlich die getrennte Berechnung der Oberflächenbehandlungen sowie Variationsmöglichkeiten hinsichtlich Dicke des Hinterbetons in 1 cm Stärke-Abständen.
Der Beton wird aus Zuschlägen (Gesteinkörnungen) Zement, Wasser, Zusatzmitteln und Zusatzstoffen hergestellt. Maßgeblich für die Fertigung und Qualitätsbeurteilung ist die /EN 1338/ mit Ausnahme Frost- und Tausalzbeständigkeit und Abrieb.

## Technology and included processes
Die deklarierten Produkte sind Pflastersteine unterschiedlicher Formate in der Steinstärke 12 cm. Das Flächengewicht beträgt 270 kg/m² mit einer Edelsplitt-Oberfläche, bestehend aus Grau- und Weißzement mit Sand- und Edelsplittbestandteilen. Die Steine werden nach dem Aushärten durch eine Schleifanlage bzw. danach angeschlossener Sandstrahlanlage in einem oder zwei Schritten bearbeitet. In den Umweltergebnissen enthalten ist die Bearbeitung in zwei Schritten mit Schleifen und Sandstrahlen. Ein EPD-Anhang ermöglicht zusätzlich die getrennte Berechnung der Oberflächenbehandlungen sowie Variationsmöglichkeiten hinsichtlich Dicke des Hinterbetons in 1 cm Stärke-Abständen. Der Beton wird aus Zuschlägen (Gesteinkörnungen) Zement, Wasser, Zusatzmitteln und Zusatzstoffen hergestellt. Die Ökobilanz beinhaltet die Herstellung des Betonpflastersteins inclusive Rohstoffgewinnung, Energiebereitstellung, Rohstofftransport zum Werk sowie Aufwände für die eigentliche Herstellung.
Technische Daten:
Folgende technische Eigenschaften sind gemäß Leistungserklärung für Pflastersteine aus Beton nach /EN 1338/ im Lieferzustand gegeben:
Deklarierte Einheit:
Die Deklaration bezieht sich auf die Herstellung von 1 m² Betonpflasterstein mit Edelsplittvorsatz und geschliffener und glanzgestrahlter Oberfläche. Die Steindicke beträgt 12 cm mit einem Flächengewicht von 270 kg/m².
In einem EPD-Anhang erfolgt die Ausweisung der Umweltergebnisse pro 1 cm Dicke, so dass eine Variation der Steindicke möglich ist. Darüber hinaus sind die Umweltergebnisse für die getrennten Oberflächenbehandlungen Sandstrahlen und Schleifen sowie die Kombination beider pro 1 m² ausgewiesen.

## Technical purpose
Diese Betonpflastersteine sind einsetzbar im Außenbereich, z. B. Fußgängerzonen, Anliegerstraßen, öffentlichen Plätze, Logistikflächen, Gehwegen, auf Dächern und in überdeckten Bereichen bis max. Klasse BK 3.2.

## Reference product
- Betonpflasterstein 1 m² mit 12 cm Dicke: 1

## Inputs
- Erneuerbare Primärenergie als Energieträger (PERE) [MJ]: A1-A3 40
- Erneuerbare Primärenergie zur stofflichen Nutzung (PERM) [MJ]: A1-A3 21
- Total erneuerbare Primärenergie (PERT) [MJ]: A1-A3 61
- Nicht-erneuerbare Primärenergie als Energieträger (PENRE) [MJ]: A1-A3 285
- Nicht-erneuerbare Primärenergie zur stofflichen Nutzung (PENRM) [MJ]: A1-A3 11
- Total nicht erneuerbare Primärenergie (PENRT) [MJ]: A1-A3 296
- Einsatz von Sekundärstoffen (SM) [kg]: A1-A3 6.26
- Erneuerbare Sekundärbrennstoffe (RSF) [MJ]: A1-A3 0
- Nicht erneuerbare Sekundärbrennstoffe (NRSF) [MJ]: A1-A3 0
- Einsatz von Süßwasserressourcen (FW) [m^3]: A1-A3 0.13

## Outputs
- Gefährlicher Abfall zur Deponie (HWD) [kg]: A1-A3 0.0256
- Entsorgter nicht gefährlicher Abfall (NHWD) [kg]: A1-A3 4.74
- Entsorgter radioaktiver Abfall (RWD) [kg]: A1-A3 0.0142
- Komponenten für die Wiederverwendung (CRU) [kg]: A1-A3 0
- Stoffe zum Recycling (MFR) [kg]: A1-A3 0
- Stoffe für die Energierückgewinnung (MER) [kg]: A1-A3 0
- Exportierte elektrische Energie (EEE) [MJ]: A1-A3 0
- Exportierte thermische Energie (EET) [MJ]: A1-A3 0

## Impact indicators
- Globales Erwärmungspotenzial (GWP) [kg CO_(2)-Äq.]: A1-A3 49.8
- Abbau Potential der stratosphärischen Ozonschicht (ODP) [kg CFC11-Äq.]: A1-A3 1.21e-9
- Versauerungspotenzial von Boden und Wasser (AP) [kg SO_(2)-Äq.]: A1-A3 0.076
- Eutrophierungspotenzial (EP) [kg PO_(4)^(3)-Äq.]: A1-A3 0.0104
- Bildungspotential für troposphärisches Ozon (POCP) [kg Ethen-Äq.]: A1-A3 0.00729
- Potenzial für den abiotischen Abbau nicht fossiler Ressourcen (ADPE) [kg Sb-Äq.]: A1-A3 7.45e-5
- Potenzial für den abiotischen Abbau fossiler Brennstoffe (ADPF) [MJ]: A1-A3 260

## Use advice
Gültigkeitsbereich:
Die vorliegende Umweltproduktdeklaration bildet 1 m² Betonpflasterstein in geschliffener/geschliffen und glanzgestrahlter Oberflächenausführung, hergestellt im Werk Iffezheim der Kronimus AG, ab. Sie beruht auf den Produktionsdaten des Werkes in Iffezheim. Die Werte basieren auf dem Durchschnitt des Jahres 2014.
Systemgrenze:
Typ der EPD: Wiege bis Werkstor.
Die Ökobilanz beinhaltet die Herstellung des Betonpflastersteins inclusive Rohstoffgewinnung, Energiebereitstellung, Rohstofftransport zum Werk sowie Aufwände für die eigentliche Herstellung.

Einflüsse von Abfällen werden in den Modulen berücksichtigt, in denen diese anfallen. Pflastersteine, die den Qualitätsanforderungen nicht entsprechen, werden jeweils in örtlichen Recycling-Betrieben zu Straßenunterbaumaterial gebrochen und einer weiteren Verwendung zugeführt.
In der Herstellung benötigte Maschinen, Anlagen und Infrastruktur werden vernachlässigt.

## Data sources
- Betonpflasterstein mit Edelsplittvorsatzbeton.pdf
- GaBi Database (all versions)
- GaBi database SP29 2016
