# Plastic profile SBR; SBR

Dataset: ILCD process, EPD, generic dataset
Geography: DE
Reference year: 2018
Valid until: 2022
Classification: oekobau.dat: Kunststoffe / Profile / Kunststoffprofile elastisch
Owner: thinkstep
Compliance: DIN EN 15804
Review: Dependent internal review by thinkstep, IABP-GaBi, IBP-GaBi; Independent external review by GaBi user forum, GaBi bug forum, GaBi user community
Amounts: rows without a unit in brackets have none in this file; such an amount is in the reference unit of its flow, which a separate flow dataset defines
copyright: true

## General comment
This data set has been modeled according to the European Standard EN 15804 for Sustainable Building. Results are depicted in modules that allow the structured expression of results over the entire life cycle.

## Geography
The data set represents the country specific situation in Germany, focusing on the main technologies, the region specific characteristics and / or import statistics.

## Time period
Annual average

## Technology and included processes
The LCA of SBR plastic profiles (Styrene- butadiene- rubber) covers the cradle-to-gate phase. The system boundaries are represented by the ready-for-sales product. Transports from the factory to the point of installation are not considered and must be included according to the system boundaries. Production of SBR: Essential raw material for Styrene-butadiene-rubber (SBR) production are styrene and butadiene. It must be distinguished between emulsion polymerisation and solution polymerisation, which will be balanced. In this case the less complicating emulsion polymerisation was considered, which referring to the energy consumption must be judged lower than the solution polymerisation. Styrene, butadiene, water and other materials (like sulphuric acid, rock salt) are mixed in a reactor, in which the polymerisation starts. After a definite turnover the reaction is stopped, the residual monomers are removed by vacuum stripping and steam stripping. The present emulsion is coagulating, will be washed and is afterwards drying.
Background system:
Electricity: Electricity is modelled according to the individual country-specific situations. The country-specific modelling is achieved on multiple levels. Firstly, individual energy carrier specific power plants and plants for renewable energy sources are modelled according to the current national electricity grid mix. Modelling the electricity consumption mix includes transmission / distribution losses and the own use by energy producers (own consumption of power plants and "other" own consumption e.g. due to pumped storage hydro power etc.), as well as imported electricity. Secondly, the national emission and efficiency standards of the power plants are modelled as well as the share of electricity plants and combined heat and power plants (CHP). Thirdly, the country-specific energy carrier supply (share of imports and / or domestic supply) including the country-specific energy carrier properties (e.g. element and energy content) are accounted for. Fourthly, the exploration, mining/production, processing and transport processes of the energy carrier supply chains are modelled according to the specific situation of each electricity producing country. The different production and processing techniques (emissions and efficiencies) in the different energy producing countries are considered, e.g. different crude oil production technologies or different flaring rates at the oil platforms.
Thermal energy, process steam: The thermal energy and process steam supply is modelled according to the individual country-specific situation with regard to emission standards and considered energy carriers. The thermal energy and process steam are produced at heat plants. Efficiencies for thermal energy production are by definition 100% in relation to the corresponding energy carrier input. For process steam the efficiency ranges from 85%, 90% to 95%. The energy carriers used for the generation of thermal energy and process steam are modelled according to the specific import situation (see electricity above).
Transports: All relevant and known transport processes are included. Ocean-going and inland ship transport as well as rail, truck and pipeline transport of bulk commodities are considered.
Energy carriers: The energy carriers are modelled according to the specific supply situation (see electricity above).
Refinery products: Diesel fuel, gasoline, technical gases, fuel oils, lubricants and residues such as bitumen are modelled with a parameterised country-specific refinery model. The refinery model represents the current national standard in refining techniques (e.g. emission level, internal energy consumption, etc.) as well as the individual country-specific product output spectrum, which can be quite different from country to country. The supply of crude oil is modelled, again, according to the country-specific situation with the respective properties of the resources.

## Technical purpose
This product can be used in construction.

## Safety margin
20 %. Product system depicted except for a few missing processes / flows. Technological, temporal and geographic representativeness partly given.

## Reference product
- Plastic profile (SBR/EPDM): 1

## Inputs
- Use of renewable primary energy (PERE) [MJ]: A1-A3 7.30173, C1 0, C2 0.0021792, C3 0.142149, D -7.13478
- Primary energy resources used as raw materials (PERM) [MJ]: A1-A3 0, C1 0, C2 0, C3 0, D 0
- Total use of renewable primary energy resources (PERT) [MJ]: A1-A3 7.30173, C1 0, C2 0.0021792, C3 0.142149, D -7.13478
- Use of non-renewable primary energy (PENRE) [MJ]: A1-A3 62.9338, C1 0, C2 0.037433, C3 52.2113, D -24.7944
- Non-renewable primary energy resources used as raw materials (PENRM) [MJ]: A1-A3 51.6, C1 0, C2 0, C3 -51.6, D 0
- Total use of non-renewable primary energy resources (PENRT) [MJ]: A1-A3 114.534, C1 0, C2 0.037433, C3 0.611347, D -24.7944
- Input of secondary material (SM) [kg]: A1-A3 0, C1 0, C2 0, C3 0, D 0
- Use of renewable secondary fuels (RSF) [MJ]: A1-A3 0, C1 0, C2 0, C3 0, D 0
- Use of non renewable secondary fuels (NRSF) [MJ]: A1-A3 0, C1 0, C2 0, C3 0, D 0
- Use of net fresh water (FW) [m3]: A1-A3 0.0155231, C1 0, C2 1.95166e-6, C3 0.00805848, D -0.00332787

## Outputs
- Hazardous waste disposed (HWD) [kg]: A1-A3 5.27752e-8, C1 0, C2 1.39883e-9, C3 1.31481e-9, D -1.31271e-8
- Non-hazardous waste disposed (NHWD) [kg]: A1-A3 0.0485323, C1 0, C2 6.57015e-6, C3 0.0407884, D -0.011703
- Radioactive waste disposed (RWD) [kg]: A1-A3 0.00123863, C1 0, C2 3.94093e-8, C3 2.0461e-5, D -0.000862006
- Components for re-use (CRU) [kg]: A1-A3 0, C1 0, C2 0, C3 0, D 0
- Materials for Recycling (MFR) [kg]: A1-A3 0, C1 0, C2 0, C3 0, D 0
- Material for Energy Recovery (MER) [kg]: A1-A3 0, C1 1.2, C2 0, C3 0, D 0
- Exported electrical energy (EEE) [MJ]: A1-A3 0, C1 0, C2 0, C3 6.84184, D 0
- Exported thermal energy (EET) [MJ]: A1-A3 0, C1 0, C2 0, C3 15.5884, D 0

## Impact indicators
- Global warming potential (GWP) [kg CO2 eq.]: A1-A3 4.20151, C1 0, C2 0.00278506, C3 3.1383, D -1.6957
- Ozone Depletion Potential (ODP) [kg R11 eq.]: A1-A3 3.67559e-14, C1 0, C2 9.21867e-19, C3 7.99298e-16, D -3.94532e-14
- Acidification potential (AP) [kg SO2 eq.]: A1-A3 0.00488403, C1 0, C2 5.62553e-6, C3 0.000261772, D -0.00143459
- Eutrophication potential (EP) [kg Phosphate eq.]: A1-A3 0.000732831, C1 0, C2 1.33734e-6, C3 5.96077e-5, D -0.000271955
- Photochemical Ozone Creation Potential (POCP) [kg Ethene eq.]: A1-A3 0.000915988, C1 0, C2 -1.6854e-6, C3 1.97357e-5, D -0.000145925
- Abiotic depletion potential for non fossil resources (ADPE) [kg Sb eq.]: A1-A3 6.50939e-7, C1 0, C2 2.34365e-10, C3 8.53519e-9, D -4.23029e-7
- Abiotic depletion potential for fossil resources (ADPF) [MJ]: A1-A3 111.405, C1 0, C2 0.0373323, C3 0.559698, D -22.6183

## Use advice
The data set represents a cradle to gate inventory. It can be used to characterise the supply chain situation of the respective commodity in a representative manner. Combination with individual unit processes using this commodity enables the generation of user-specific (product) LCAs.

## Data sources
- ULLMANN'S Encyclopedia of Industrial Chemistry
- GaBi Database Edition 2020, SP40
- GaBi database (all versions)
