# SWISSKRONO OSB

Dataset: ILCD process, EPD, average dataset
Geography: RER
Reference year: 2021
Valid until: 2026
Classification: OEKOBAU.DAT: Holz / Holzwerkstoffe / OSB-Platte
Classification: IBUCategories: 02 Bauprodukte / Holzwerkstoffe / Holzwerkstoffe
Method details: Holzwerkstoffe.pdf
Generated by: Sphera Solutions GmbH
Registration number: EPD-KRO-20200203-IBD1-DE
Owner: SWISS KRONO TEX GmbH & Co. KG
Compliance: DIN EN 15804; ISO 14025
Review: Accredited third party review by Institut Bauen und Umwelt e. V.
Amounts: rows without a unit in brackets have none in this file; such an amount is in the reference unit of its flow, which a separate flow dataset defines
copyright: true
licenseType: Free of charge for all users and uses
accessRestrictions: None

## General comment
OSB-Platten (Oriented Strand Board – SWISS KRONO OSB) sind klebstoffgebundene, dreischichtig aufgebaute Holzwerkstoffplatten (Flachpressplatten) aus orientiert gestreuten, länglichen Holzspänen (120 - 160 mm lange Furnierstreifen), sog. Strands gemäß EN13986 bzw. EN 300 „OSB“.
„Strands“ aus einer definierten Dicke und Form, vornehmlich aus Rundhölzern, werden in mehreren Schichten verleimt. Die Orientierung der Mittelschicht erfolgt dabei im 90° Winkel zu den Deckschichten. Die OSB-Platten werden mit einem Harz auf Basis von polymerem Diphenylmethandiisocyanat (PMDI-Leim) verleimt und in Dicken von 6 bis 40 mm hergestellt. Das deklarierte Produkt stellt einen massengewichteten Durchschnitt der hergestellten Sortimente dar. Bei der Berechnung des Durchschnittes wird berücksichtigt, dass in den 4 Werken unterschiedliche Mengen mit unterschiedlichen Dichten produziert werden.

## Technology and included processes
1) Entry of the wood 2) Chipping the logs into strands (small veneer-like strips) 3) Drying of the wet beaches from 100% wood moisture to 3% wood moisture 4) Sieving of the strands in top layer, middle layer and fine fraction 5) Gluing the top layer and middle layer strands with resin 6) Alignment of the top layer strands in the direction of production, the middle layer strands are oriented at an angle of 90 ° to the top layer 7) Compression of the beach cake in a continuously operating press 8) Trimming the OSB along the long edges and dividing it into the length of the board 9) Surface grinding and milling of tongue and groove (optional). 10) Stacking the OSB and packing with a cardboard box and packing tape. All manufacturing plants have a quality management system in accordance with ISO 9001.

## Technical purpose
Die SWISS KRONO OSB entsprechen der Nutzungsklasse 1 und 2 nach EN 1995-1-1 und dürfen daher im Feuchtbereich bzw. nicht bewitterten Außenbereich verwendet werden. OSB-Platten können in tragenden und aussteifenden Bauteilen eingesetzt werden.

## Reference product
- 1 m³ OSB Platte (615 kg) (): 1

## Inputs
- Renewable primary energy as energy carrier (PERE) [MJ]: A1-A3 2520, A5 328, C3 10700, D -2610
- Renewable primary energy resources as material utilization (PERM) [MJ]: A1-A3 11000, A5 -327, C3 -10700, D 0
- Total use of renewable primary energy resources (PERT) [MJ]: A1-A3 13500, A5 1.14, C3 11.5, D -2610
- Non renewable primary energy as energy carrier (PENRE) [MJ]: A1-A3 3440, A5 13.3, C3 643, D -10700
- Non renewable primary energy as material utilization (PENRM) [MJ]: A1-A3 507, A5 -4.04, C3 -503, D 0
- Total use of non renewable primary energy resources (PENRT) [MJ]: A1-A3 3950, A5 9.29, C3 140, D -10700
- Use of secondary material (SM) [kg]: A1-A3 2.32, A5 0, C3 0, D 0
- Use of renewable secondary fuels (RSF) [MJ]: A1-A3 38, A5 0, C3 0, D 0
- Use of non renewable secondary fuels (NRSF) [MJ]: A1-A3 0, A5 0, C3 0, D 0
- Use of net fresh water (FW) [m^3]: A1-A3 0.798, A5 0.0778, C3 1.01, D -3.02

## Outputs
- Hazardous waste disposed (HWD) [kg]: A1-A3 9.58e-5, A5 1.23e-8, C3 1.12e-7, D -4.3e-6
- Non hazardous waste disposed (NHWD) [kg]: A1-A3 2.75, A5 0.48, C3 5.92, D -5.26
- Radioactive waste disposed (RWD) [kg]: A1-A3 0.164, A5 0.000737, C3 0.00214, D -0.904
- Components for re-use (CRU) [kg]: A1-A3 0, A5 0, C3 0, D 0
- Materials for recycling (MFR) [kg]: A1-A3 0, A5 0, C3 0, D 0
- Materials for energy recovery (MER) [kg]: A1-A3 0, A5 0, C3 0, D 0
- Exported electrical energy (EEE) [MJ]: A1-A3 0, A5 0, C3 2964, D 38.19
- Exported thermal energy (EET) [MJ]: A1-A3 0, A5 0, C3 4216, D 50.54

## Impact indicators
- Global warming potential (GWP) [kg CO_(2)-Äq.]: A1-A3 -890, A5 29.5, C3 1130, D -616
- Depletion potential of the stratospheric ozone layer (ODP) [kg CFC11-Äq.]: A1-A3 6.75e-5, A5 4.51e-15, C3 5.99e-14, D -9.79e-12
- Acidification potential of land and water (AP) [kg SO_(2)-Äq.]: A1-A3 0.634, A5 0.00461, C3 1.37, D -0.759
- Eutrophication potential (EP) [kg PO_(4)^(3)-Äq.]: A1-A3 0.128, A5 0.000835, C3 0.21, D -0.0991
- Formation potential of tropospheric ozone photochemical oxidants (POCP) [kg Ethen-Äq.]: A1-A3 0.132, A5 0.000304, C3 0.204, D -0.0739
- Abiotic depletion potential for non fossil resources (ADPE) [kg Sb-Äq.]: A1-A3 3e-5, A5 7.73e-8, C3 9.94e-7, D -0.000118
- Abiotic depletion potential for fossil resources (ADPF) [MJ]: A1-A3 3530, A5 7.39, C3 134, D -8430

## Use advice
Gültigkeitsbereich:
Dieses Dokument bezieht sich auf alle OSB-Platten, welche in folgenden Werken der SWISS KRONO Group hergestellt werden:
SWISS KRONO TEX GmbH & Co. KG, Heiligengrabe, Deutschland

SWISS KRONO Kft., Vasarosnameny, Ungarn

SWISS KRONO SAS, Sully Sur Loire, Frankreich

SWISS KRONO Sp. z o.o., Zary, Polen
Systemgrenze:
Es handelt sich um eine EPD „von der Wiege bis zum
Werkstor, mit Optionen“. Die
Lebenszyklusanalyse für die betrachteten Produkte
umfasst die Lebenswegabschnitte „Produktionsstadium“
sowie "Gutschriften und Lasten jenseits der Grenzen
des Produktsystems". Die Systeme beinhalten somit
folgende Stadien gemäß EN 15804: Produktstadium
(Module A1–A3):
- A1 Rohstoffbereitstellung und -verarbeitung
und Verarbeitungsprozesse von als Input
dienenden Sekundärstoffen
- A2 Transport zum Hersteller,
- A3 Herstellung

- A5 Montage (nur die Entsorgung von Verpackungsmaterialen des Produktes).

Gemäß EN 15804 wird die Grenze zwischen der Abfallentsorgung im ersten betrachteten System und dem nachfolgenden System (Modul D) an dem Punkt festgelegt, an dem das Sekundärmaterial seinen End-of-Waste-Status erreicht. Das End-of-Waste-Status wird an dem Punkt definiert, an dem Energie erzeugt wird.

## Data sources
- GaBi Database (all versions)
- GaBi database SP40 2020
