# eLCA Luftschicht (gemäß EN 15804+A2)

Dataset: ILCD process, EPD, generic dataset
Classification: oekobau.dat: Sonstige / eLCA Intern / eLCA Intern
Generated by: Marc-William Siegert
Owner: The Federal Institute for Research on Building, Urban Affairs and Spatial Development (BBSR) within the Federal Office for Building and Regional Planning (BBR)
Compliance: EN 15804+A2
Amounts: rows without a unit in brackets have none in this file; such an amount is in the reference unit of its flow, which a separate flow dataset defines
licenseType: Free of charge for all users and uses

## General comment
Dieser Datensatz dient der Modellierung von Bauteilen und geht lastenfrei in die Bilanzierung ein.

## Reference product
- eLCA Luftschicht: 1

## Inputs
- Use of net fresh water (FW) [m3]: C3 0, A1-A3 0, C4 0
- Use of non renewable primary energy (PENRE) [MJ]: C3 0, A1-A3 0, C4 0
- Use of non renewable primary energy resources used as raw materials (PENRM) [MJ]: C3 0, A1-A3 0, C4 0
- Use of non renewable secondary fuels (NRSF) [MJ]: C3 0, A1-A3 0, C4 0
- Use of renewable primary energy (PERE) [MJ]: C3 0, A1-A3 0, C4 0
- Use of renewable primary energy resources used as raw materials (PERM) [MJ]: C3 0, A1-A3 0, C4 0
- Use of renewable secondary fuels (RSF) [MJ]: C3 0, A1-A3 0, C4 0
- Use of secondary material (SM) [kg]: C3 0, A1-A3 0, C4 0
- Total use of non renewable primary energy resource (PENRT) [MJ]: C3 0, A1-A3 0, C4 0
- Total use of renewable primary energy resources (PERT) [MJ]: C3 0, A1-A3 0, C4 0

## Outputs
- Components for re-use (CRU) [kg]: C3 0, A1-A3 0, C4 0
- Exported electrical energy (EEE) [MJ]: C3 0, A1-A3 0, C4 0
- Exported thermal energy (EET) [MJ]: C3 0, A1-A3 0, C4 0
- Hazardous waste disposed (HWD) [kg]: C3 0, A1-A3 0, C4 0
- Materials for energy recovery (MER) [kg]: C3 0, A1-A3 0, C4 0
- Materials for recycling (MFR) [kg]: C3 0, A1-A3 0, C4 0
- Non hazardous waste dispose (NHWD) [kg]: C3 0, A1-A3 0, C4 0
- Radioactive waste disposed (RWD) [kg]: C3 0, A1-A3 0, C4 0

## Impact indicators
- Abiotic depletion potential - non-fossil resources (ADPE) [kg Sb-Äqv.]: A1-A3 0, C3 0, C4 0
- Abiotic depletion potential - fossil resources (ADPF) [MJ]: A1-A3 0, C3 0, C4 0
- Acidification potential, Accumulated Exceedance (AP) [mol H+ eqv.]: A1-A3 0, C3 0, C4 0
- Eutrophication potential - freshwater (EP-freshwater) [kg P eqv.]: A1-A3 0, C3 0, C4 0
- Eutrophication potential - marine (EP-marine) [kg N eqv.]: A1-A3 0, C3 0, C4 0
- Eutrophication potential - terrestrial (EP-terrestrial) [mol N eqv.]: A1-A3 0, C3 0, C4 0
- Global Warming Potential - total (GWP-total) [kg CO2-Äqv.]: A1-A3 0, C3 0, C4 0
- Global Warming Potential - fossil fuels (GWP-fossil) [kg CO2-Äqv.]: A1-A3 0, C3 0, C4 0
- Global Warming Potential - biogenic (GWP-biogenic) [kg CO2-Äqv.]: A1-A3 0, C3 0, C4 0
- Global Warming Potential - land use and land use change (GWP-luluc) [kg CO2-Äqv.]: A1-A3 0, C3 0, C4 0
- Depletion potential of the stratospheric ozone layer (ODP) [kg CFC 11-Äquiv.]: A1-A3 0, C3 0, C4 0
- Versauerungspotenzial, kumulierte Überschreitung (AP) [kg NMVOC eqv.]: A1-A3 0, C3 0, C4 0
- Water (user) deprivation potential (WDP) [m3 world eqv.]: A1-A3 0, C3 0, C4 0
- Potential incidence of disease due to PM emissions (PM) [disease incidence]: A1-A3 0, C3 0, C4 0
- Potential Human exposure efficiency relative to U235 (IRP) [kBq U235 eqv.]: A1-A3 0, C3 0, C4 0
- Potential Comparative Toxic Unit for ecosystems (ETP-fw) [CTUe]: A1-A3 0, C3 0, C4 0
- Potential Comparative Toxic Unit for humans - cancer effects (HTP-c) [CTUh]: A1-A3 0, C3 0, C4 0
- Potential Comparative Toxic Unit for humans - non-cancer effects (HTP-nc) [CTUh]: A1-A3 0, C3 0, C4 0
- Potential Soil quality index (SQP) [dimensionless]: A1-A3 0, C3 0, C4 0
