# Thermally treated wood (1 m³, 409 kg/m³)

Dataset: ILCD process, EPD, generic dataset
Geography: DE
Reference year: 2021
Valid until: 2022
Classification: oekobau.dat: Holz / Modifiziertes Holz / Thermisch behandeltes Holz
Owner: Sphera Solutions GmbH
Compliance: EN 15804+A2
Review: Dependent internal review by Sphera Solutions GmbH; Independent external review by GaBi user forum
Amounts: rows without a unit in brackets have none in this file; such an amount is in the reference unit of its flow, which a separate flow dataset defines
copyright: true
licenseType: Free of charge for all users and uses
accessRestrictions: The license conditions as stated on https://www.oekobaudat.de/ apply.
accessRestrictions: Es gelten die Lizenzbedingungen wie sie auf https://www.oekobaudat.de/ genannt sind.

## General comment
This data set has been modeled according to the European Standard EN 15804+A2 for Sustainable Building. Results are depicted in modules that allow the structured expression of results over the entire life cycle.

## Geography
The data set represents the country specific situation in Germany, focusing on the main technologies, the region specific characteristics and / or import statistics.

## Time period
Annual average

## Technology and included processes
For the production of thermally modified wood, dried timber from softwood is used for this data set.

The wood is treated in several process steps, with temperatures between 170 and 250 °C. A thermal energy consumption of almost 32 MJ/kg was assumed per kilogram of dry wood mass. As a result of the temperatures, various reactions and processes take place that change the chemical structure of the wood and contribute to increased durability and dimensional stability.

For the provision of the required thermal energy, a conservative approach was assumed that half of the required thermal energy is obtained from fossil sources (natural gas) and the other half from renewable sources (biomass). The thermal energy together with the wood upstream chain dominate the LCA of the product system.

In module C1, a manual dismantling (no loads) is assumed, collecting losses are neglected.
The transport in module C2 to the recycling plant takes place with a truck (50km).
Module C3 takes into account the grinding and thermal treatment (combustion) of the material. The CO2 absorbed and stored in the material by photosynthesis (from module A1) is written off in C3 (CO2 neutrality within the product system according to EN 16485: Round and sawn timber - Environmental Product Declarations - Product category rules for wood and wood-based products for use in construction, 2014). Furthermore module C3 contains the loads for running the treatment facility.
Module D contains the credits for the substitution of electricity (German electricity mix) and thermal energy (from natural gas). The calculation of combustion emissions and credits takes into account the specific calorific value of the material and the material composition.

## Technical purpose
Thermally modified wood can be used forstructural and non-structural applications. Thanks to its improved durability, thermally modified wood is mainly used outdoors. Color coatings are possible.

## Safety margin
20 %. Product system depicted except for a few missing processes / flows. Technological, temporal and geographic representativeness partly given.

## Reference product
- Thermally treated wood (1 m³, 409 kg/m³): 1

## Inputs
- Use of renewable primary energy as energy carrier (PERE) [MJ]: A1-A3 8712.7, C2 0.894141, C3 8271.4, D -967.827
- Use of renewable primary energy resources used as raw materials (PERM) [MJ]: A1-A3 6840, C2 0, C3 -6840, D 0
- Total use of renewable primary energy (PERT) [MJ]: A1-A3 15552.7, C2 0.894141, C3 1431.4, D -967.827
- Use of non renewable primary energy as energy carrier (PENRE) [MJ]: A1-A3 9209.22, C2 15.4061, C3 314.243, D -2817.44
- Use of non renewable primary energy resources used as raw materials (PENRM) [MJ]: A1-A3 0, C2 0, C3 0, D 0
- Total use of non renewable primary energy resource (PENRT) [MJ]: A1-A3 9209.22, C2 15.4061, C3 314.243, D -2817.44
- Use of secondary material (SM) [kg]: A1-A3 0, C2 0, C3 0, D 0
- Use of renewable secondary fuels (SF) [MJ]: A1-A3 0, C2 0, C3 0, D 0
- Use of non renewable secondary fuels (NRSF) [MJ]: A1-A3 0, C2 0, C3 0, D 0
- Net use of fresh water (FW) [m3]: A1-A3 1.538, C2 0.000794668, C3 2.20015, D -0.359923

## Outputs
- Hazardous waste disposed (HWD) [kg]: A1-A3 3.03463e-5, C2 6.43924e-10, C3 7.60678e-8, D -9.80978e-7
- Non harzardous waste disposed (NHWD) [kg]: A1-A3 9.95515, C2 0.00248689, C3 6.5519, D -1.49563
- Radioactive waste disposed (RWD) [kg]: A1-A3 0.0171485, C2 1.47841e-5, C3 0.0077839, D -0.104091
- Components for re-use (CRU) [kg]: A1-A3 0, C2 0, C3 0, D 0
- Materials for recycling (MFR) [kg]: A1-A3 0, C2 0, C3 0, D 0
- Materials for energy recovery (MER) [kg]: A1-A3 0, C2 0, C3 0, D 0
- Exported electrical energy (EEE) [MJ]: A1-A3 0, C2 0, C3 775.403, D 0
- Exported thermal energy (EET) [MJ]: A1-A3 0, C2 0, C3 1734.73, D 0

## Impact indicators
- Global Warming Potential - total (GWP-total) [kg CO2 eq.]: A1-A3 -202.159, C2 1.17021, C3 812.268, D -181.634
- Global Warming Potential - fossil fuels (GWP-fossil) [kg CO2 eq.]: A1-A3 542.889, C2 1.16227, C3 22.0174, D -179.416
- Global Warming Potential - biogenic (GWP-biogenic) [kg CO2 eq.]: A1-A3 -746.068, C2 0.000481457, C3 790.23, D -1.9501
- Global Warming Potential - land use and land use change (GWP-luluc) [kg CO2 eq.]: A1-A3 1.02035, C2 0.00746441, C3 0.0210075, D -0.267266
- Depletion potenzial of the stratospheric ozone layer (ODP) [kg CFC-11 eq.]: A1-A3 4.72562e-13, C2 2.97394e-16, C3 2.60451e-13, D -4.22538e-12
- Acidifcation potential, Accumulated Exceedance (AP) [Mole of H+ eq.]: A1-A3 1.44717, C2 0.0032953, C3 0.528931, D -0.185128
- Eutrophication potential - freshwater (EP-freshwater) [kg P eq.]: A1-A3 0.00763816, C2 2.39034e-6, C3 3.74189e-5, D -0.000444602
- Eutrophication potential - marine (EP-marine) [kg N eq.]: A1-A3 0.578961, C2 0.00151807, C3 0.237162, D -0.0679451
- Eutrophication potential - terrestrial (EP-terrestrial) [Mole of N eq.]: A1-A3 5.427, C2 0.0169845, C3 2.88281, D -0.723566
- Photochemical Ozone Creation Potential (POCP) [kg NMVOC eq.]: A1-A3 29.7514, C2 0.00296028, C3 0.606665, D -0.177776
- Abiotic depletion potential - non-fossil resources (ADPE) [kg Sb eq.]: A1-A3 8.4851e-5, C2 1.01101e-7, C3 3.92825e-6, D -5.68837e-5
- Abiotic depletion potential - fossil resources (ADPF) [MJ]: A1-A3 9207.53, C2 15.4054, C3 314.177, D -2817.03
- Water (user) deprivation potential (WDP) [m³ world equiv.]: A1-A3 44.8416, C2 0.00451814, C3 93.1867, D -2.18444

## Use advice
This data set relates to 1 m³ of thermally modified wood with a gross density of 409 kg/m³. The thermal treatment increases the durability of the wood against insect and fungal attack and increases the dimensional stability. The data set can be used to estimate other wood densities of 350 - 450 kg/m³.

## Data sources
- ULLMANN'S Encyclopedia of Industrial Chemistry
- Documentation of data quality management
- GaBi Database Edition 2021, CUP2021.01
- GaBi database (all versions)
