# Holzfaserdämmstoffe im Trockenverfahren 110-200 kg/m³

Dataset: ILCD process, EPD, specific dataset
Geography: FR
Reference year: 2020
Valid until: 2025
Classification: OEKOBAU.DAT: Dämmstoffe / Holzfasern / Holzfaserdämmplatte
Classification: IBUCategories: 02 Bauprodukte / Holzwerkstoffe / Holzwerkstoffe
Method details: Holzwerkstoffe.pdf
Generated by: Dr. Frank Werner - Umwelt & Entwicklung
Registration number: EPD-PAV-20190182-IBA1-DE
Owner: Pavafrance SAS
Compliance: DIN EN 15804; ISO 14025
Review: Accredited third party review by Institut Bauen und Umwelt e. V.
Amounts: rows without a unit in brackets have none in this file; such an amount is in the reference unit of its flow, which a separate flow dataset defines
copyright: true
licenseType: Free of charge for all users and uses
accessRestrictions: None

## General comment
PAVATEX Holzfaserdämmstoffe sind diffusionsoffene, plattenförmige Wärmedämmstoffe für Gebäude gemäß EN 13171. Die Platten werden im so genannten Trockenverfahren hergestellt. Dabei werden die aus Waldhackschnitzeln gewonnenen Holzfasern mit einem Harzkleber beleimt und zu Platten verpresst.

## Technology and included processes
The dry process for the production of PAVATEX soft wood fiber boards is divided into the following process steps: 1. Heating the wood chips under steam pressure 2. Defibration in the defibrillation process 3. Drying the fiber in a flash tube dryer 4. Spraying the fiber with resin glue 5. Scatter the fibers into an even fiber mat 6. The fiber mat goes through a continuous pre-press 7. The fiber mat goes through the calibration and curing unit 8. Cutting and profiling depending on the make 9. Destacking and packaging All residues that arise during production (trimmings and milling residues) are used for energy recovery. A quality management system according to ISO 9001 has been implemented for quality assurance.

## Technical purpose
Die im Gültigkeitsbereich genannten Produkte sind druckfeste Holzfaserdämmplatten. PAVAWALL, PAVAWALL-BLOC sowie PAVAWALL SMART und PAVAWALL GF 80-160 sind putzfähige Dämm-elemente für Wärmedämmverbundsysteme für Außenwände aus Mauerwerk und Holzkonstruk-tionen. PAVATHERM, PAVATHERM-COMBI und PAVATHERM-FORTE sind vielseitig einsetzbare Holzfaser­dämmplatten im Bereich Dach, Wand und Boden. ISOLAIR und ISOROOF Unterdeckplatten sind drei Monate frei bewitterbar und „wasserundurchlässig” gemäß der europäischen Norm für Unterdeckplatten EN 14964. ISOLAIR Unterdeckplatten sind gleichzeitig auch Dämmplatten und dürfen deshalb bei der Berechnung des Wärmedurchgangs mit einbezogen werden. PAVABOARD und PAVATHERM PROFIL sind vielseitig einsetzbare Platten für Fußboden-systeme. Die „Laibungsplatte“ ist eine verputzbare Platte für Innen- und Außenfensterlai-bungen. PAVAWALL GF 40-60 ist ein optimiertes, putzfähiges Dämmelement, das besonders im Elementbau zur Beplankung der vorgefertigten Holzelemente geeignet ist. PAVADENTRO LIGHT ist eine bauphysikalisch gutmütige Lösung für erhaltungswerte, denkmalgeschütze Fassaden.

## Reference product
- Weichfaserplatte 200 kg/m³, pro m³: 1

## Inputs
- Renewable primary energy as energy carrier (PERE) [MJ]: A1-A3 476.776, A4 1.79209, A5 217.189, C1 0, C2 0.128185, C3 0, C4 0, D -71.4617
- Renewable primary energy resources as material utilization (PERM) [MJ]: A1-A3 3514.3, A4 0, A5 -137.3, C1 0, C2 -3377, C3 0, C4 0, D 0
- Total use of renewable primary energy resources (PERT) [MJ]: A1-A3 3991.08, A4 1.79209, A5 79.8892, C1 0, C2 -3376.87, C3 0, C4 0, D -71.4617
- Non renewable primary energy as energy carrier (PENRE) [MJ]: A1-A3 1868.18, A4 115.433, A5 341.973, C1 0, C2 8.25676, C3 0, C4 0, D -3975.13
- Non renewable primary energy as material utilization (PENRM) [MJ]: A1-A3 294.6, A4 0, A5 -294.6, C1 0, C2 0, C3 0, C4 0, D 0
- Total use of non renewable primary energy resources (PENRT) [MJ]: A1-A3 2162.78, A4 115.433, A5 47.3726, C1 0, C2 8.25676, C3 0, C4 0, D -3975.13
- Use of secondary material (SM) [kg]: A1-A3 0, A4 0, A5 0, C1 0, C2 0, C3 0, C4 0, D 0
- Use of renewable secondary fuels (RSF) [MJ]: A1-A3 0, A4 0, A5 0, C1 0, C2 0, C3 0, C4 0, D 3514
- Use of non renewable secondary fuels (NRSF) [MJ]: A1-A3 0, A4 0, A5 0, C1 0, C2 0, C3 0, C4 0, D 294.5
- Use of net fresh water (FW) [m^3]

## Outputs
- Hazardous waste disposed (HWD) [kg]: A1-A3 0.000743472, A4 0.000137245, A5 2.08308e-5, C1 0, C2 9.81693e-6, C3 0, C4 0, D -0.003027
- Non hazardous waste disposed (NHWD) [kg]: A1-A3 5.16672, A4 0.893462, A5 0.269329, C1 0, C2 0.0639079, C3 0, C4 0, D 2.64288
- Radioactive waste disposed (RWD) [kg]: A1-A3 0.0223929, A4 0.000136356, A5 0.000452703, C1 0, C2 9.75332e-6, C3 0, C4 0, D -0.00622146
- Components for re-use (CRU) [kg]: A1-A3 0, A4 0, A5 0, C1 0, C2 0, C3 0, C4 0, D 0
- Materials for recycling (MFR) [kg]: A1-A3 0.193, A4 0, A5 1.83, C1 0, C2 0, C3 0, C4 0, D 0
- Materials for energy recovery (MER) [kg]: A1-A3 0, A4 0, A5 0, C1 0, C2 0, C3 0, C4 0, D 0
- Exported electrical energy (EEE) [MJ]: A1-A3 0, A4 0, A5 5.6, C1 0, C2 0, C3 0, C4 0, D 0
- Exported thermal energy (EET) [MJ]: A1-A3 0, A4 0, A5 64.3, C1 0, C2 0, C3 0, C4 0, D 0

## Impact indicators
- Global warming potential (GWP) [kg CO_(2)-Äq.]: A1-A3 -253.449, A4 7.25123, A5 10.4201, C1 0, C2 0.518669, C3 322.4, C4 0, D -235.955
- Depletion potential of the stratospheric ozone layer (ODP) [kg CFC11-Äq.]: A1-A3 1.75802e-6, A4 1.61748e-7, A5 4.78733e-8, C1 0, C2 1.15696e-8, C3 0, C4 0, D -2.78815e-5
- Acidification potential of land and water (AP) [kg SO_(2)-Äq.]: A1-A3 0.412297, A4 0.0416965, A5 0.0101482, C1 0, C2 0.00298248, C3 0, C4 0, D -0.144161
- Eutrophication potential (EP) [kg PO_(4)^(3)-Äq.]: A1-A3 0.0720615, A4 0.0088842, A5 0.00199618, C1 0, C2 0.000635473, C3 0, C4 0, D -0.0292165
- Formation potential of tropospheric ozone photochemical oxidants (POCP) [kg Ethen-Äq.]: A1-A3 0.0162585, A4 0.00124196, A5 0.000381894, C1 0, C2 8.88357e-5, C3 0, C4 0, D -0.0179243
- Abiotic depletion potential for non fossil resources (ADPE) [kg Sb-Äq.]: A1-A3 6.8429e-5, A4 1.82292e-5, A5 1.86115e-6, C1 0, C2 1.3039e-6, C3 0, C4 0, D -2.24048e-5
- Abiotic depletion potential for fossil resources (ADPF) [MJ]: A1-A3 1098.53, A4 108.95, A5 25.8603, C1 0, C2 7.79302, C3 0, C4 0, D -3686.96

## Use advice
Gültigkeitsbereich:
Die EPD bezieht sich auf Holzfaserdämmplatten (Trockenverfahren), welche im Werk der PAVATEX in Golbey (Frankreich) hergestellt werden. Die Berechnung der Ökobilanz bezieht sich auf ein Produkt der Dichte 200 kg/m3.

Die Ökobilanzergebnisse lassen sich linear auf unten aufgeführte Produkte umrechnen:

Produktgruppe 110-180 kg/m3

PAVATHERM 110 kg/m3

PAVAWALL SMART 115 kg/m3

PAVAWALL 130 kg/m3

PAVAWALL GF 130 kg/m3

PAVAWALL-BLOC 130 kg/m3

ISOLAIR (100-200 mm) 145 kg/m3

ISOLAIR-ECO 150 kg/m3

ISOROOF 145 kg/m³

PAVATHERM-COMBI 145 kg/m3

LAIBUNGSPLATTE 155 kg/m3

PAVADENTRO LIGHT 155 kg/m3

PAVATHERM-PROFIL 155 kg/m3

Produktgruppe 180-200 kg/m3

PAVAWALL GF 190 kg/m3

PAVABOARD 190 kg/m3

ISOLAIR (30-80 mm) 200 kg/m3

ISOROOF 200 kg/m3
Systemgrenze:
Typ der EPD: Wiege bis Werkstor - mit Optionen

Die Module A1–A3 des Produktionsstadiums umfassen die Herstellung der Produkte, also die Rohstoffgewinnung und -verarbeitung, die Energieerzeugung, die Herstellung der Hilfs- und Einsatzstoffe, Transporte, sowie die eigentliche Herstellung der Weichfaserplatten und deren Verpackung bei der Fa. PAVATEX. Dabei werden die Forstprozesse nach Werner et al. (2015) bilanziert, wie sie in der nachgeführten Version von ecoinvent 2.2 (KBOB 2016) implementiert sind.
Als Brennstoffe eingesetzte Abfälle, Nebenprodukte bzw. Sekundärbrennstoffe werden gemäß EN 15804 klassiert und entsprechend bilanziert.

Für rezyklierte Materialien oder energetisch genutzte Abfälle (ohne Holz) aus der Produktion werden aufgrund der kleinen Mengen konservativ die Entsorgungsprozesse bilanziert, die resultierenden Gutschriften aber vernachlässigt. Anfallendes Altholz wird gemäß PCR als "loop" innerhalb der Module A1–A3 verrechnet (wobei kein Altholz für Energiezwecke eingesetzt wird), die generierte Energie innerhalb der Module A1–A3 geloopt.

Der Ressourcenaspekt von Holz ist über die materialinhärenten Eigenschaften als Ressourcenentnahme von CO2 aus der Atmosphäre und dem unteren Heizwert als Verbrauch erneuerbarer Energieträger bilanziert.

Modul A4 umfasst die Distribution der Weichfaserplatte in Deutschland.

In Modul A5 wird von einem manuellen Einbau ausgegangen, wobei gemäß EN 16783 ein Verschnitt von 2% angesetzt wird. Für den Verschnitt wird die Herstellung, der Transport auf die Baustelle sowie die Entsorgung in den C-Modulen berücksichtigt. Zusätzlich werden der Transport und die Entsorgung der Verpackungsmaterialien in einer Kehrichtverbrennungsanlage (KVA) verrechnet, wobei der Karton rezykliert wird. Die Gutschriften aus der rückgewonnenen Energie aus der Verpackung und dem Verschnitt werden in Modul D deklariert.

Für den Rückbau in Modul C1 wird angenommen, dass der Rückbau analog zum Einbau ebenfalls manuell ohne Umweltlasten erfolgt.

Modul C2 beinhaltet den Transport der rückgebauten Platten zu einer Sortieranlage bzw. einem Altstoffhändler. Dabei wird als Szenarioannahme eine Transportdistanz von 20 km verrechnet

Modul C3 beinhaltet das manuelle Sortieren der Weichfaserplatten, da eine mechanische Bearbeitung zu starken Staubemissionen führen würde. Hier erreicht das Produkt das Ende der Abfalleigenschaften. Für das manuelle Sortieren werden keine Umweltlasten verrechnet.

Das Produkt wird vollständig als Sekundärbrennstoff genutzt. Modul C4 als Abfallentsorgung ist somit nicht relevant.

Der Antransport zu einem Biomassekraftwerk, der eigentliche Verbrennungsprozess sowie die Gutschriften aus der Substitution von fossilen Energieträgern und Strom ab Netz werden entsprechend in Modul D deklariert.

## Data sources
- ecoinvent database (all versions)
- ecoinvent 2.2 database
