# Gypsum Fibreboard

Dataset: ILCD process, EPD, average dataset
Geography: DE
Reference year: 2016
Valid until: 2021
Classification: OEKOBAU.DAT: Mineralische Baustoffe / Steine und Elemente / Gipsplatten
Classification: IBUCategories: 02 Bauprodukte / Gipsprodukte / Gipsplatten
Method details: Gipsplatten.pdf
Registration number: 9268
Owner: Fermacell GmbH
Compliance: DIN EN 15804; ISO 14025
Review: Accredited third party review by Institut Bauen und Umwelt e. V.
Amounts: rows without a unit in brackets have none in this file; such an amount is in the reference unit of its flow, which a separate flow dataset defines
copyright: true

## General comment
FERMACELL gypsum fibreboards (coated) are special structural panels made of plaster and cellulose fibres.

Directive (EU) No. 305/2011 (CPR) applies for placing the product on the market in the EU/EFTA (with the exception of Switzerland). The product requires a Declaration of Performance taking consideration of the European Technical Approval /ETA-03/0050/ and CE marking.

## Technology and included processes
Plaster Production: The main raw material of the plasterboard is gypsum. Gypsum contains about 21% of water. In the processing plant, this substance is first loosened in a grinding-drying plant, comminuted and heated to about 170 ° C. along the calcining path. A part of the crystal water escapes and a multi-phase gypsum is formed, In a subsequent cyclone the air is separated from the material stream and cleaned in a filter. The material flow is passed over an aging route and cooled to below 80 ° C. Gypsum fiber boards: The two natural raw materials gypsum and paper fibers are mixed and, after the addition of water, without further binders, are pressed under high pressure to form stable plates, dried, both sides, calibrated and surface hydrophobicized and subsequently cut to the required formats.
Technical data:
The product’s performance values correspond with the Declaration of Performance in terms of its essential properties in accordance with /ETA 03/0050/, including:
Declared unit:
This core EPD refers to the manufacture of 1 m² FERMACELL gypsum fibreboard.

## Technical purpose
FERMACELL gypsum fibreboards are used for cladding and lining components. Use is governed by the respective national regulations.

## Reference product
- Fermacell Gipsfaserplatte: 1

## Inputs
- Renewable primary energy as energy carrier (PERE) [MJ]: A1-A3 3.57
- Renewable primary energy resources as material utilization (PERM) [MJ]: A1-A3 0.00862
- Total use of renewable primary energy resources (PERT) [MJ]: A1-A3 3.58
- Non renewable primary energy as energy carrier (PENRE) [MJ]: A1-A3 17.4
- Non renewable primary energy as material utilization (PENRM) [MJ]: A1-A3 0.00129
- Total use of non renewable primary energy resources (PENRT) [MJ]: A1-A3 17.4
- Use of secondary material (SM) [kg]: A1-A3 3.64
- Use of renewable secondary fuels (RSF) [MJ]: A1-A3 0
- Use of non renewable secondary fuels (NRSF) [MJ]: A1-A3 0
- Use of net fresh water (FW) [m^3]: A1-A3 0.00697

## Outputs
- Hazardous waste disposed (HWD) [kg]: A1-A3 1.47e-7
- Non hazardous waste disposed (NHWD) [kg]: A1-A3 0.0235
- Radioactive waste disposed (RWD) [kg]: A1-A3 0.000418
- Components for re-use (CRU) [kg]: A1-A3 0
- Materials for recycling (MFR) [kg]: A1-A3 0
- Materials for energy recovery (MER) [kg]: A1-A3 0
- Exported electrical energy (EEE) [MJ]: A1-A3 0
- Exported thermal energy (EET) [MJ]: A1-A3 0

## Impact indicators
- Global warming potential (GWP) [kg CO_(2)-Äq.]: A1-A3 1.14
- Depletion potential of the stratospheric ozone layer (ODP) [kg CFC11-Äq.]: A1-A3 2.95e-11
- Acidification potential of land and water (AP) [kg SO_(2)-Äq.]: A1-A3 0.00174
- Eutrophication potential (EP) [kg PO_(4)^(3)-Äq.]: A1-A3 0.000299
- Formation potential of tropospheric ozone photochemical oxidants (POCP) [kg Ethen-Äq.]: A1-A3 6.75e-5
- Abiotic depletion potential for non fossil resources (ADPE) [kg Sb-Äq.]: A1-A3 0.000111
- Abiotic depletion potential for fossil resources (ADPF) [MJ]: A1-A3 16.4

## Use advice
Scope:
This Environmental Product Declaration refers to coated gypsum fibreboard manufactured by Fermacell GmbH.

Specific data from 4 Fermacell plants (Germany: Münchehof, Sieglingen, Wijchen and Orejo/Spain) was averaged as a data basis. The LCA comprises the recovery of raw materials and energy, raw material transport and the actual manufacturing phase for coated gypsum fibreboard. Product reviewed: 1 m² of an average gypsum fibreboard (coated) with an average density of 1.18 t/m³.
System boundary:
The selected system boundaries comprise manufacture of the product, including the extraction of raw materials through to the ready-packaged product at the plant gate (cradle-to-gate).

The review framework comprises the following details:

· Raw material supply

· Energy supply

· Transporting and packaging the raw materials and primary products

· Manufacture (energy, waste, emissions)

Use is not included in the calculation on account of the multiple application and construction possibilities. Disposal of the product under review is not sufficiently quantifiable on account of its long service life and is therefore not included in the analysis.

On the input side, all material flows integrated in the system and greater than 1% of its entire mass or contributing more than 1% to the primary energy consumption are taken into consideration. On the output side, all material flows are recorded which leave the system and whose environmental effects are greater than 1% of all effects in a category taken into consideration.

## Data sources
- Gipsfaserplatten.pdf
- GaBi Database (all versions)
- GaBi database SP27 2015
