# XCarb™ Recycled and renewably produced Structural steel sections and merchant bars

Dataset: ILCD process, EPD, specific dataset
Geography: RER
Reference year: 2021
Valid until: 2026
Classification: OEKOBAU.DAT: Metalle / Stahl und Eisen / Stahlprofile
Classification: IBUCategories: 02 Building products / Metallic products and ancillaries / Structural steels
Method details: Structural steels.pdf
Generated by: ArcelorMittal Europe-Long Products
Registration number: EPD-ARC-20210132-CBB1-EN
Owner: ArcelorMittal Europe-Long Products
Compliance: DIN EN 15804; ISO 14025
Review: Accredited third party review by Institut Bauen und Umwelt e. V.
Amounts: rows without a unit in brackets have none in this file; such an amount is in the reference unit of its flow, which a separate flow dataset defines
copyright: true
licenseType: Free of charge for all users and uses
accessRestrictions: None

## General comment
This EPD applies to 1 metric tonne of XCarb™ Recycled and renewably produced structural steel sections and merchant bars in usual structural steel grades for building industry based on a steel production in Electric Arc Furnace with renewable electricity supply with Guarantee of Origins.

For the placing on the market of the product in the EU/EFTA (with the exception of Switzerland) Regulation (EU) No. 305/2011 (CPR) applies. The product needs a Declaration of Performance taking into consideration EN 10025-1:2004, Hot rolled products of structural steels – Part 1: General technical delivery conditions/ and the CE-marking.

For the application and use the respective national provisions apply.

## Technology and included processes
The Life Cycle Assessment is based on data collected from the EAF plants involved in the production: Differdange & Esch-Belval (sites of Belval, Differdange and Rodange) in Luxembourg; Bergara & Olaberria in Spain. The data used represent >95% of annual production with 2019 data for deliveries based on Guarantee of Origins renewable electriciy supply
Technical data:
This EPD is valid for XCarb™ Recycled and renewably produced structural sections and merchant bars of various steel grades and different forms of delivery produced with a certified supply of renewable electricity.

Performance data of the product in accordance with the Declaration of Performance.
Declared unit:
The declaration refers to the functional unit of 1 metric tonne of XCarb™ Recycled and renewably produced structural steel sections and merchant bars as specified in Part B requirements on the EPD for structural steels.

The final results reflect the weighted average per production volume of plants: Differdange & Esch-Belval (sites of Belval, Differdange and Rodange) in Luxembourg; Bergara & Olaberria in Spain.

The background data are taken from GaBi ts Documentation.

## Technical purpose
Structural steel sections and merchant bars are intended for bolted, welded or otherwise connected constructions of buildings, bridges and other structures, as well as in composite steel and concrete structures. For example:

Single-storey buildings (industrial and storage halls, etc.)
Multi-storey buildings (offices, residential, shops, car parks, high rise, etc.)
Bridges (railway, road, pedestrian, etc.)

Other structures (pylons, power plants, stadiums, convention centers, airports, stations, etc.)

## Reference product
- 1 metric tonne of XCarb™ Recycled and renewably produced structural steel sections and merchant bars (): 1000

## Inputs
- Renewable primary energy as energy carrier (PERE) [MJ]: A1-A3 7525.5, C3 12.162, C4 0.27013, D -1038.41
- Renewable primary energy resources as material utilization (PERM) [MJ]: A1-A3 0, C3 0, C4 0, D 0
- Total use of renewable primary energy resources (PERT) [MJ]: A1-A3 7525.5, C3 12.162, C4 0.27013, D -1038.41
- Non renewable primary energy as energy carrier (PENRE) [MJ]: A1-A3 3998.9, C3 28.203, C4 2.0071, D 1850.72
- Non renewable primary energy as material utilization (PENRM) [MJ]: A1-A3 0, C3 0, C4 0, D 0
- Total use of non renewable primary energy resources (PENRT) [MJ]: A1-A3 3998.9, C3 28.203, C4 2.0071, D 1850.72
- Use of secondary material (SM) [kg]: A1-A3 1163.1, C3 0, C4 0, D 0
- Use of renewable secondary fuels (RSF) [MJ]: A1-A3 0, C3 0, C4 0, D 0
- Use of non renewable secondary fuels (NRSF) [MJ]: A1-A3 0, C3 0, C4 0, D 0
- Use of net fresh water (FW) [m^3]: A1-A3 0.61015, C3 0.011831, C4 0.00049503, D 1.09228

## Outputs
- Hazardous waste disposed (HWD) [kg]: A1-A3 1.5223e-6, C3 6.995e-9, C4 2.1305e-10, D -8.0619e-7
- Non hazardous waste disposed (NHWD) [kg]: A1-A3 2.017, C3 0.018865, C4 10.01, D -27.7569
- Radioactive waste disposed (RWD) [kg]: A1-A3 0.054627, C3 0.0038934, C4 2.1028e-5, D -0.00609191
- Components for re-use (CRU) [kg]: A1-A3 0, C3 110, C4 0, D 0
- Materials for recycling (MFR) [kg]: A1-A3 0, C3 880, C4 0, D 0
- Materials for energy recovery (MER) [kg]: A1-A3 0, C3 0, C4 0, D 0
- Exported electrical energy (EEE) [MJ]: A1-A3 0, C3 0, C4 0, D 0
- Exported thermal energy (EET) [MJ]: A1-A3 0, C3 0, C4 0, D 0

## Impact indicators
- Global warming potential (GWP) [kg CO_(2)-Äq.]: A1-A3 333.1, C3 1.6017, C4 0.14341, D 213.719
- Depletion potential of the stratospheric ozone layer (ODP) [kg CFC11-Äq.]: A1-A3 4.8366e-11, C3 4.6935e-14, C4 7.8306e-16, D -4.7353e-12
- Acidification potential of land and water (AP) [kg SO_(2)-Äq.]: A1-A3 0.74601, C3 0.0029878, C4 0.00085678, D 0.321589
- Eutrophication potential (EP) [kg PO_(4)^(3)-Äq.]: A1-A3 0.075062, C3 0.00044849, C4 9.7176e-5, D 0.0125192
- Formation potential of tropospheric ozone photochemical oxidants (POCP) [kg Ethen-Äq.]: A1-A3 0.082696, C3 0.00025994, C4 6.5784e-5, D 0.116283
- Abiotic depletion potential for non fossil resources (ADPE) [kg Sb-Äq.]: A1-A3 0.00040394, C3 4.6987e-7, C4 1.4396e-8, D 0.000512857
- Abiotic depletion potential for fossil resources (ADPF) [MJ]: A1-A3 3806, C3 18.22, C4 1.9473, D 1941.94

## Use advice
Scope:
The declared unit is 1 metric tonne of XCarb™ Recycled and renewably produced structural steel sections and merchant bars produced by ArcelorMittal.

The Life Cycle Assessment is based on data collected from the EAF plants involved in the production: Differdange & Esch-Belval (sites of Belval, Differdange and Rodange) in Luxembourg; Bergara & Olaberria in Spain. The data used represent >95% of annual production with 2019 data for deliveries based on Guarantee of Origins renewable electricity supply.
System boundary:
Type of the EPD: cradle-to-gate - with options. Module A1-A3, Module C3, Module C4 and Module D were considered.

Modules A1-A3 of the structural steel production include the following:

The provision of resources, additives, and energy
Transport of resources and additives to the production site
Production processes on-site including energy, production of additives, disposal of production residues, and consideration of related emissions
Recycling of production/manufacturing scrap. Steel scrap is assumed to reach the end-of-waste status once is shredded and sorted, thus becomes input to the product system in the inventory.

Module C3 takes into account the sorting and shredding of after-use steel to allow its orientation towards the recycling solutions. This process will also produce losses due to efficiency that will be oriented towards landfill sites. A conservative value of 1% landfill is then considered in C4.

Module C4 takes into account the waste disposal including physical pre-treatment and management of the disposal site. Steel is an inert material which does not require any specific treatment on disposal site.

Module D refers to the end of life of the structural steel sections and merchant bars, including reuse and recycling.

## Data sources
- GaBi Database (all versions)
- GaBi Database Edition 2021, CUP 2021.01
