# Duripanel A2

Dataset: ILCD process, EPD, specific dataset
Geography: GLO
Reference year: 2021
Valid until: 2026
Classification: OEKOBAU.DAT: Komposite / Systembauteile / Aussenwände
Classification: IBUCategories: 02 Building products / Wood based panels / Wood cement - Mineral-bonded wooden composites
Method details: Wood cement - Mineral-bonded wooden composites.pdf
Generated by: Peggy Van De Velde
Registration number: EPD-ETE-20200284-IBC1-EN
Owner: Etex Building Performance International
Compliance: DIN EN 15804+A2; ISO 14025
Review: Accredited third party review by Institut Bauen und Umwelt e. V.
Amounts: rows without a unit in brackets have none in this file; such an amount is in the reference unit of its flow, which a separate flow dataset defines
copyright: true
licenseType: Free of charge for all users and uses
accessRestrictions: None

## General comment
Duripanel A2 is a three-layer cement-bonded particleboard according to EN 634-1 and -2 for internal and external construction applications. It mainly consists of the natural raw material wood particles and cement.

It is being produced in different thicknesses between 10 and 32 mm. It is available in an unsanded smooth or sanded surface, with smooth trimmed edges or with tongue and groove. The surface colour is mainly being characterized by the fine wood particles in the outside layers.

## Technology and included processes
The production of large-format panels from wood cement takes place according to a largely automated, semi-dry spreading process in which no excess water is produced. In a mechanical mixer, the litter mixture of wood chips, cement, recycled material from trimming waste, auxiliary materials and water is processed. The material is evenly distributed on carrier plates via a mechanical throw sifting system. Excess material at the edges is returned directly to the spreader. The scattered material is pressed, stored in a climatic chamber for setting (heat exchanger, steam generation via natural gas), the hardened sheets restacked, trimmed and temporarily stored for 28 days. The panels are then dried in a circulating air oven to the moisture content required for delivery. The quality management system of the company and the production facility are certified according to ISO 9001:2015.
Technical data:
The constructional data shown in the table are valid for all thicknesses and surfaces (sanded/unsanded), unless where indicated otherwise.
Declared unit:
The functional unit declared in this EPD is 1m² of Duripanel A2 with a thickness of 19mm (abbreviated as 1m²19mm).
In an annexe to this EPD, the LCA results for the other existing thicknesses are declared.

## Technical purpose
The Duripanel A2 base panel with straight edges can be used for high-quality interior finishing, roof formwork, timber construction and container construction with increased fire protection requirements for non-combustible building materials.

The Duripanel A2 installation panel with tongue and groove can be used for load-bearing formwork and dry subfloors with high compressive strength and chair castor suitability (screw-fixing) with increased fire protection requirements for non-flammable building materials.

## Scenarios
- S1: 100% recycling
- S2: 100% landfilling

## Reference product
- Duripanel A2 / 1m² with thickness 19mm: 1

## Inputs
- Renewable primary energy as energy carrier (PERE) [MJ]: A1-A3 26.7412, A4 0.469, A5 17.6, B1 0, B2 0, B6 0, B7 0, C1 0.235, C2 0.0766, C3 (S1) 57.1, C3 (S2) 0, C4 (S1) 0, C4 (S2) 46.6, D (S1) -1.96, D (S2) -3.81
- Renewable primary energy resources as material utilization (PERM) [MJ]: A1-A3 54.215, A4 0, A5 -8.49, B1 0, B2 0, B6 0, B7 0, C1 0, C2 0, C3 (S1) -45.7, C3 (S2) 0, C4 (S1) 0, C4 (S2) -45.7, D (S1) 0, D (S2) 0
- Total use of renewable primary energy resources (PERT) [MJ]: A1-A3 80.8612, A4 0.469, A5 9.11, B1 0, B2 0, B6 0, B7 0, C1 0.235, C2 0.0766, C3 (S1) 11.4, C3 (S2) 0, C4 (S1) 0, C4 (S2) 0.954, D (S1) -1.96, D (S2) -3.81
- Non renewable primary energy as energy carrier (PENRE) [MJ]: A1-A3 145.86, A4 8.14, A5 20.4, B1 0, B2 0, B6 0, B7 0, C1 0.531, C2 1.33, C3 (S1) 25.6, C3 (S2) 0, C4 (S1) 0, C4 (S2) 10.7, D (S1) -63.7, D (S2) -16
- Non renewable primary energy as material utilization (PENRM) [MJ]: A1-A3 0.562, A4 0, A5 -0.562, B1 0, B2 0, B6 0, B7 0, C1 0, C2 0, C3 (S1) 0, C3 (S2) 0, C4 (S1) 0, C4 (S2) 0, D (S1) 0, D (S2) 0
- Total use of non renewable primary energy resources (PENRT) [MJ]: A1-A3 146.46, A4 8.14, A5 19.8, B1 0, B2 0, B6 0, B7 0, C1 0.531, C2 1.33, C3 (S1) 25.6, C3 (S2) 0, C4 (S1) 0, C4 (S2) 10.7, D (S1) -63.7, D (S2) -16
- Use of secondary material (SM) [kg]: A1-A3 0, A4 0, A5 0.149364, B1 0, B2 0, B6 0, B7 0, C1 0, C2 0, C3 (S1) 0, C3 (S2) 0, C4 (S1) 0, C4 (S2) 0, D (S1) 0, D (S2) 0
- Use of renewable secondary fuels (RSF) [MJ]: A1-A3 0, A4 0, A5 0, B1 0, B2 0, B6 0, B7 0, C1 0, C2 0, C3 (S1) 0, C3 (S2) 0, C4 (S1) 0, C4 (S2) 0, D (S1) 0, D (S2) 0
- Use of non renewable secondary fuels (NRSF) [MJ]: A1-A3 0, A4 0, A5 0, B1 0, B2 0, B6 0, B7 0, C1 0, C2 0, C3 (S1) 0, C3 (S2) 0, C4 (S1) 0, C4 (S2) 0, D (S1) 0, D (S2) 0
- Use of net fresh water (FW) [m^3]: A1-A3 0.0179923, A4 0.000546, A5 0.00552, B1 0, B2 0, B6 0, B7 0, C1 0.000272, C2 8.93e-5, C3 (S1) 0.0131, C3 (S2) 0, C4 (S1) 0, C4 (S2) 0.00185, D (S1) -0.00235, D (S2) -0.00468

## Outputs
- Hazardous waste disposed (HWD) [kg]: A1-A3 3.453e-7, A4 3.76e-7, A5 4.56e-8, B1 0, B2 0, B6 0, B7 0, C1 2.2e-10, C2 6.15e-8, C3 (S1) 1.06e-8, C3 (S2) 0, C4 (S1) 0, C4 (S2) 8.22e-8, D (S1) -5.26e-8, D (S2) -8.5e-9
- Non hazardous waste disposed (NHWD) [kg]: A1-A3 3.78617, A4 0.00129, A5 2.82, B1 0, B2 0, B6 0, B7 0, C1 0.000377, C2 0.000211, C3 (S1) 0.0182, C3 (S2) 0, C4 (S1) 0, C4 (S2) 24.3, D (S1) -0.0186, D (S2) -0.0101
- Radioactive waste disposed (RWD) [kg]: A1-A3 0.00179296, A4 1.5e-5, A5 0.000392, B1 0, B2 0, B6 0, B7 0, C1 8.06e-5, C2 2.45e-6, C3 (S1) 0.00389, C3 (S2) 0, C4 (S1) 0, C4 (S2) 0.000126, D (S1) -0.000575, D (S2) -0.00132
- Components for re-use (CRU) [kg]: A1-A3 0, A4 0, A5 0, B1 0, B2 0, B6 0, B7 0, C1 0, C2 0, C3 (S1) 0, C3 (S2) 0, C4 (S1) 0, C4 (S2) 0, D (S1) 0, D (S2) 0
- Materials for recycling (MFR) [kg]: A1-A3 1.19, A4 0, A5 0.126, B1 0, B2 0, B6 0, B7 0, C1 0, C2 0, C3 (S1) 21.9, C3 (S2) 0.0998, C4 (S1) 0, C4 (S2) 0, D (S1) 0, D (S2) 0
- Materials for energy recovery (MER) [kg]: A1-A3 0.236, A4 0, A5 0.0236, B1 0, B2 0, B6 0, B7 0, C1 0, C2 0, C3 (S1) 4.3, C3 (S2) 0, C4 (S1) 0, C4 (S2) 2.71, D (S1) 0, D (S2) 0
- Exported electrical energy (EEE) [MJ]: A1-A3 0.00281, A4 0, A5 1.79, B1 0, B2 0, B6 0, B7 0, C1 0, C2 0, C3 (S1) 0, C3 (S2) 0, C4 (S1) 0, C4 (S2) 0, D (S1) 0, D (S2) 0
- Exported thermal energy (EET) [MJ]: A1-A3 0.00648, A4 0, A5 2.76, B1 0, B2 0, B6 0, B7 0, C1 0, C2 0, C3 (S1) 0, C3 (S2) 0, C4 (S1) 0, C4 (S2) 0, D (S1) 0, D (S2) 0

## Impact indicators
- Global Warming Potential total (GWP-total) [kg CO_(2)-Äq.]: A1-A3 17.3346, A4 0.611749, A5 4.17296, B1 0, B2 0, B6 0, B7 0, C1 0.0303361, C2 0.0999707, C3 (S1) 1.46551, C3 (S2) 0, C4 (S1) 0, C4 (S2) 10.2081, D (S1) -3.99075, D (S2) -1.0395
- Global Warming Potential fossil fuels (GWP-fossil) [kg CO_(2)-Äq.]: A1-A3 22.5242, A4 0.60785, A5 2.8188, B1 0, B2 0, B6 0, B7 0, C1 0.0301917, C2 0.0993335, C3 (S1) 1.45854, C3 (S2) 0, C4 (S1) 0, C4 (S2) 1.32399, D (S1) -3.98751, D (S2) -1.03676
- Global Warming Potential biogenic (GWP-biogenic) [kg CO_(2)-Äq.]: A1-A3 -5.1966, A4 -0.00102028, A5 1.35302, B1 0, B2 0, B6 0, B7 0, C1 0.000100643, C2 -0.000166732, C3 (S1) 0.00486198, C3 (S2) 0, C4 (S1) 0, C4 (S2) 8.88294, D (S1) -0.00226374, D (S2) -0.0019618
- Global Warming Potential luluc (GWP-luluc) [kg CO_(2)-Äq.]: A1-A3 0.00696508, A4 0.00491948, A5 0.0011398, B1 0, B2 0, B6 0, B7 0, C1 4.37534e-5, C2 0.000803931, C3 (S1) 0.0021137, C3 (S2) 0, C4 (S1) 0, C4 (S2) 0.00120654, D (S1) -0.000973604, D (S2) -0.000770486
- Depletion potential of the stratospheric ozone layer (ODP) [kg CFC11-Äq.]: A1-A3 8.16861e-14, A4 1.11545e-16, A5 1.15048e-14, B1 0, B2 0, B6 0, B7 0, C1 6.64129e-16, C2 1.82284e-17, C3 (S1) 3.20836e-14, C3 (S2) 0, C4 (S1) 0, C4 (S2) 2.09461e-15, D (S1) -5.21845e-15, D (S2) -1.03929e-14
- Acidification potential of land and water (AP) [mol H^(+)-Äq.]: A1-A3 0.026561, A4 0.00070219, A5 0.00418166, B1 0, B2 0, B6 0, B7 0, C1 6.66492e-5, C2 0.00011475, C3 (S1) 0.00321977, C3 (S2) 0, C4 (S1) 0, C4 (S2) 0.00442429, D (S1) -0.00409349, D (S2) -0.00186267
- Eutrophication potential aquatic freshwater (EP-freshwater) [kg PO_(4)-Äq.]: A1-A3 3.7501e-5, A4 1.85e-6, A5 2.37e-5, B1 0, B2 0, B6 0, B7 0, C1 8.06e-8, C2 3.03e-7, C3 (S1) 3.9e-6, C3 (S2) 0, C4 (S1) 0, C4 (S2) 0.000191718, D (S1) -1.59e-6, D (S2) -1.43386e-6
- Eutrophication potential aquatic marine (EP-marine) [kg N-Äq.]: A1-A3 0.0088582, A4 0.000216, A5 0.00141, B1 0, B2 0, B6 0, B7 0, C1 1.48e-5, C2 3.53e-5, C3 (S1) 0.000715, C3 (S2) 0, C4 (S1) 0, C4 (S2) 0.00265449, D (S1) -0.00146, D (S2) -0.000453923
- Eutrophication potential terrestrial (EP-terrestrial) [mol N-Äq.]: A1-A3 0.096434, A4 0.00256, A5 0.014, B1 0, B2 0, B6 0, B7 0, C1 0.000156, C2 0.000419, C3 (S1) 0.00751, C3 (S2) 0, C4 (S1) 0, C4 (S2) 0.0144485, D (S1) -0.0161, D (S2) -0.00486236
- Formation potential of tropospheric ozone photochemical oxidants (POCP) [kg NMVOC-Äq.]: A1-A3 0.0269559, A4 0.000582, A5 0.00416, B1 0, B2 0, B6 0, B7 0, C1 4.06e-5, C2 9.51e-5, C3 (S1) 0.00196, C3 (S2) 0, C4 (S1) 0, C4 (S2) 0.00666855, D (S1) -0.00438, D (S2) -0.00133133
- Abiotic depletion potential for non fossil resources (ADPE) [kg Sb-Äq.]: A1-A3 9.8841e-7, A4 4.91e-8, A5 2.19e-5, B1 0, B2 0, B6 0, B7 0, C1 8.74e-9, C2 8.03e-9, C3 (S1) 4.22e-7, C3 (S2) 0, C4 (S1) 0, C4 (S2) 5.75851e-8, D (S1) -2.63e-7, D (S2) -1.62742e-7
- Abiotic depletion potential for fossil resources (ADPF) [MJ]: A1-A3 146.46, A4 8.11, A5 19.8, B1 0, B2 0, B6 0, B7 0, C1 0.531, C2 1.33, C3 (S1) 25.6, C3 (S2) 0, C4 (S1) 0, C4 (S2) 10.6858, D (S1) -63.6, D (S2) -16.0184
- Water use (WDP) [m^(3) world-Äq. deprived]: A1-A3 0.382773, A4 0.00593, A5 0.165, B1 0, B2 0, B6 0, B7 0, C1 0.00658, C2 0.000968, C3 (S1) 0.318, C3 (S2) 0, C4 (S1) 0, C4 (S2) 0.0602063, D (S1) -0.0455, D (S2) -0.106822
- Incidence of disease due to PM emissions (PM) [Disease incidence]: A1-A3 5.27608e-7, A4 4.66e-9, A5 6.85e-8, B1 0, B2 0, B6 0, B7 0, C1 5.59e-10, C2 7.61e-10, C3 (S1) 2.7e-8, C3 (S2) 0, C4 (S1) 0, C4 (S2) 4.88e-8, D (S1) -2.21e-7, D (S2) -2.72e-8
- Human exposure efficiency relative to U235 (IR) [kBq U235-Äq.]: A1-A3 0.178815, A4 0.00221368, A5 0.0444744, B1 0, B2 0, B6 0, B7 0, C1 0.0132157, C2 0.000361754, C3 (S1) 0.63844, C3 (S2) 0, C4 (S1) 0, C4 (S2) 0.0163, D (S1) -0.0919872, D (S2) -0.219
- Comparative toxic unit for ecosystems (ETP-fw) [CTUe]: A1-A3 68.3589, A4 6.06703, A5 9.39666, B1 0, B2 0, B6 0, B7 0, C1 0.227044, C2 0.991462, C3 (S1) 10.9683, C3 (S2) 0, C4 (S1) 0, C4 (S2) 12.5, D (S1) -3.28398, D (S2) -4.14
- Comparative toxic unit for humans (carcinogenic) (HTP-c) [CTUh]: A1-A3 2.18952e-9, A4 1.25404e-10, A5 6.62937e-10, B1 0, B2 0, B6 0, B7 0, C1 6.2717e-12, C2 2.04932e-11, C3 (S1) 3.02981e-10, C3 (S2) 0, C4 (S1) 0, C4 (S2) 6.66e-10, D (S1) -7.45701e-10, D (S2) -4.18e-10
- Comparative toxic unit for humans (noncarcinogenic) (HTP-nc) [CTUh]: A1-A3 1.69684e-7, A4 6.39699e-9, A5 2.86576e-8, B1 0, B2 0, B6 0, B7 0, C1 2.3104e-10, C2 1.04538e-9, C3 (S1) 1.11614e-8, C3 (S2) 0, C4 (S1) 0, C4 (S2) 6.82e-8, D (S1) -2.07217e-8, D (S2) -6.69e-9
- Soil quality index (SQP) [SQP]: A1-A3 587.873, A4 2.84633, A5 59.7501, B1 0, B2 0, B6 0, B7 0, C1 0.169041, C2 0.465141, C3 (S1) 8.16627, C3 (S2) 0, C4 (S1) 0, C4 (S2) 1.26, D (S1) -2.08176, D (S2) -2.77

## Use advice
Scope:
The life cycle assessment is based on production data of Duripanel A2 of the year 2018 at the production site of Etex Germany Exteriors GmbH in Beckum, Germany. The results of the life cycle assessment provided in this EPD are based on a thickness of 19mm and are globally valid.

The LCA results for additional thicknesses are declared in an annexe to this EPD.
System boundary:
Type of the EPD: cradle to grave.

The following life cycle stages and modules are included:

Production stage (A1-A3):

manufacturing of pre products and transportation to the manufacturing site
energy consumption during production
recycling and disposal of production wastes
production of packaging

Construction stage (A4-A5):

transportation of product to the construction site
energy consumption during the installation of products
production of fixing material
disposal of installation wastes including emissions of biogenic CO2 from the wood content
incineration/recycling of packaging materials (potential benefits from energy substitution within the incineration process are declared in module D) including emissions of biogenic CO2 from renewable packaging materials

Use stage (B1-B7):

efforts for the use of the product, maintenance and operational efforts
modules B3, B4, B5 are declared as MNR (module not relevant) according to the IBU requirement. These modules are defined on building level in general.

End-of-life stage (C1-C4):

Two end-of-life scenarios were considered:

1) Scenario 1: 100% recycling in cement plant.

Due to the wood content of Duripanel B1, the shredded product can reduce the use of energy in the cement plant during cement clinker production. Simultaneously, the other raw material components in the wood cement boards help to reduce the use of virgin raw materials in the cement plant. Energy and material credits were assigned using the substitution approach. The resulting credits from energy recovery and material recycling are assigned to module D.

2) Scenario 2: 100% landfilling.

For both scenarios, the following processes were included:
energy consumption for deconstruction and demolition
transportation to disposal
waste processing and recycling or landfilling of product

Loads and benefits beyond system boundary (D):

loads and benefits from recycling/landfilling of production waste, packaging, installation losses and product waste.

## Data sources
- GaBi Database (all versions)
- GaBi database SP40 2020
