# Polytetrafluoroethylene foil (PTFE)

Dataset: ILCD process, EPD, generic dataset
Geography: DE
Reference year: 2021
Valid until: 2022
Classification: oekobau.dat: Kunststoffe / Folien und Vliese / Technische Textilien
Owner: Sphera Solutions GmbH
Compliance: EN 15804+A2
Review: Dependent internal review by Sphera Solutions GmbH; Independent external review by GaBi user forum
Amounts: rows without a unit in brackets have none in this file; such an amount is in the reference unit of its flow, which a separate flow dataset defines
copyright: true
licenseType: Free of charge for all users and uses
accessRestrictions: The license conditions as stated on https://www.oekobaudat.de/ apply.
accessRestrictions: Es gelten die Lizenzbedingungen wie sie auf https://www.oekobaudat.de/ genannt sind.

## General comment
This data set has been modeled according to the European Standard EN 15804+A2 for Sustainable Building. Results are depicted in modules that allow the structured expression of results over the entire life cycle.

## Geography
The data set represents the country specific situation in Germany, focusing on the main technologies, the region specific characteristics and / or import statistics.

## Time period
Annual average

## Technology and included processes
PTFE is processed using solvents, thermal energy and pressure in an extrusion process. After further processing steps (i.a. washing, drying, stretching, thermal treatment) the finished product is formed. The upstream chain of the PTFE granulate production dominates the LCA.

In module C1, a manual dismantling (no loads) is assumed, collecting losses are neglected.
The transport in module C2 to the recycling plant takes place with a truck (50km).
Module C3 takes into account the grinding and thermal treatment (combustion) of the material. When calculating combustion emissions and credits, the specific calorific value of each material and the material composition are taken into account.
In module D credits for the substitution of electricity (German electricity mix) and thermal energy (from natural gas) are given.

## Technical purpose
PTFE foils are mainly used as a roof- or facade membrane in the construction industry. They are usually welded to obtain large-scale formats. PTFE is very resistant to all natural environmental influences.

## Safety margin
20 %. Product system depicted except for a few missing processes / flows. Technological, temporal and geographic representativeness partly given.

## Reference product
- Polytetrafluoroethylene foil (PTFE): 1

## Inputs
- Use of renewable primary energy as energy carrier (PERE) [MJ]: A1-A3 60.1695, C2 0.00218616, C3 0.0619503, D -0.701874
- Use of renewable primary energy resources used as raw materials (PERM) [MJ]: A1-A3 0, C2 0, C3 0, D 0
- Total use of renewable primary energy (PERT) [MJ]: A1-A3 60.1695, C2 0.00218616, C3 0.0619503, D -0.701874
- Use of non renewable primary energy as energy carrier (PENRE) [MJ]: A1-A3 262.435, C2 0.0376677, C3 5.59092, D -2.07589
- Use of non renewable primary energy resources used as raw materials (PENRM) [MJ]: A1-A3 4.5, C2 0, C3 -4.5, D 0
- Total use of non renewable primary energy resource (PENRT) [MJ]: A1-A3 266.935, C2 0.0376677, C3 1.09092, D -2.07589
- Use of secondary material (SM) [kg]: A1-A3 0, C2 0, C3 0, D 0
- Use of renewable secondary fuels (SF) [MJ]: A1-A3 0, C2 0, C3 0, D 0
- Use of non renewable secondary fuels (NRSF) [MJ]: A1-A3 0, C2 0, C3 0, D 0
- Net use of fresh water (FW) [m3]: A1-A3 0.112628, C2 1.94295e-6, C3 0.000896706, D -0.000261097

## Outputs
- Hazardous waste disposed (HWD) [kg]: A1-A3 7.06464e-8, C2 1.57439e-12, C3 4.42283e-11, D -7.2068e-10
- Non harzardous waste disposed (NHWD) [kg]: A1-A3 0.217086, C2 6.08042e-6, C3 0.037856, D -0.00109488
- Radioactive waste disposed (RWD) [kg]: A1-A3 0.00620814, C2 3.61471e-8, C3 7.51902e-6, D -7.54873e-5
- Components for re-use (CRU) [kg]: A1-A3 0, C2 0, C3 0, D 0
- Materials for recycling (MFR) [kg]: A1-A3 0, C2 0, C3 0, D 0
- Materials for energy recovery (MER) [kg]: A1-A3 0, C2 0, C3 1, D 0
- Exported electrical energy (EEE) [MJ]: A1-A3 0, C2 0, C3 0.562265, D 0
- Exported thermal energy (EET) [MJ]: A1-A3 0, C2 0, C3 1.29092, D 0

## Impact indicators
- Global Warming Potential - total (GWP-total) [kg CO2 eq.]: A1-A3 20.5721, C2 0.00286116, C3 0.36587, D -0.133588
- Global Warming Potential - fossil fuels (GWP-fossil) [kg CO2 eq.]: A1-A3 20.4702, C2 0.00284173, C3 0.36579, D -0.131972
- Global Warming Potential - biogenic (GWP-biogenic) [kg CO2 eq.]: A1-A3 0.084517, C2 1.17716e-6, C3 5.30191e-5, D -0.00142191
- Global Warming Potential - land use and land use change (GWP-luluc) [kg CO2 eq.]: A1-A3 0.0173266, C2 1.82504e-5, C3 2.66034e-5, D -0.000193889
- Depletion potenzial of the stratospheric ozone layer (ODP) [kg CFC-11 eq.]: A1-A3 2.44051e-13, C2 7.27125e-19, C3 2.52135e-16, D -3.06409e-15
- Acidifcation potential, Accumulated Exceedance (AP) [Mole of H+ eq.]: A1-A3 0.0738046, C2 8.05696e-6, C3 6.53633e-5, D -0.000135417
- Eutrophication potential - freshwater (EP-freshwater) [kg P eq.]: A1-A3 4.14981e-5, C2 5.84435e-9, C3 3.53583e-8, D -3.22581e-7
- Eutrophication potential - marine (EP-marine) [kg N eq.]: A1-A3 0.00797577, C2 3.71167e-6, C3 1.4952e-5, D -4.98064e-5
- Eutrophication potential - terrestrial (EP-terrestrial) [Mole of N eq.]: A1-A3 0.08765, C2 4.15269e-5, C3 0.000298563, D -0.000530615
- Photochemical Ozone Creation Potential (POCP) [kg NMVOC eq.]: A1-A3 0.0275435, C2 7.23785e-6, C3 4.14243e-5, D -0.000130445
- Abiotic depletion potential - non-fossil resources (ADPE) [kg Sb eq.]: A1-A3 0.00176654, C2 2.47191e-10, C3 3.34129e-9, D -4.13954e-8
- Abiotic depletion potential - fossil resources (ADPF) [MJ]: A1-A3 267.792, C2 0.0376661, C3 0.190875, D -2.07559
- Water (user) deprivation potential (WDP) [m³ world equiv.]: A1-A3 -0.0554086, C2 1.10468e-5, C3 0.0372858, D -0.00158509

## Use advice
This data set refers to the production of 1 kg of polytetrafluoroethylene foil. Fiber reinforcement was not considered. The bulk density is 2200 kg/m³. The data set can be used approximately for the estimation of a PTFE foil with a density of 2100 - 2300 kg/m³, as well as for the estimation of glass fiber reinforced PTFE foils (worst-case estimation).

The data set represents a cradle to gate inventory. It can be used to characterise the supply chain situation of the respective commodity in a representative manner. Combination with individual unit processes using this commodity enables the generation of user-specific (product) LCAs.

## Data sources
- GaBi databases
- Documentation of data quality management
- GaBi Database Edition 2021, CUP2021.01
- GaBi database (all versions)
