# Door - Theo Schröders Entwicklung & Beratung GmbH - Shutters without fire/smoke protection properties (turning sash)

Dataset: ILCD process, EPD, template dataset
Geography: RER
Reference year: 2020
Valid until: 2026
Classification: OEKOBAU.DAT: Komponenten von Fenstern und Vorhangfassaden / Türen und Tore / Stahl
Synonyms: External door; Internal door; Burglar protection door; Sound-proof door; ASN-1; ASN-2; ISN-1; ISN-2; ESN-1; ESN-2; SN-1; SN-2
Method details: Produktkategorieregeln Teil A; Produktkategorieregeln Teil B – für Türen und Tore
Generated by: ift Rosenheim
Registration number: M-EPD-TTS-100
Owner: Theo Schröders Entwicklung & Beratung GmbH
Compliance: EN 15804
Review: Independent external review by Patrick Wortner
Amounts: rows without a unit in brackets have none in this file; such an amount is in the reference unit of its flow, which a separate flow dataset defines
copyright: true
licenseType: Free of charge for all users and uses
accessRestrictions: None

## General comment
This data set contains the results for modules A1-A3 as well as modules B2, B3, B4, B5, B6, B7, C1, C2, C3, C4, and D according to EN 15804. A comparison with other products is only permissible with a comparable application in the building. In principle, a comparison or the evaluation of EPD data is only possible if all data sets to be compared were created according to EN 15804 and the building context or the product-specific performance characteristics are taken into account.

## Geography
This dataset represents the situation of companies producing products according to System Schröders' systems with regard to the most important technologies and the legal framework.

## Time period
anual average

## Technology and included processes
The LCA results cover the life cycle stages of the manufacture of intermediate products up to raw material extraction and processing operations of secondary materials serving as input (e.g. recycling processes), their transports to the plant as well as the production itself, including the provision of all auxiliary and operating materials, energy, and the complete waste treatment or landfilling of residual waste during the stage of production. Modules A1, A2, and A3 are shown here as one aggregated module A1-A3. If further modules were calculated for this data set, they can be found separately and can be combined for a consideration of the entire life cycle.

## Technical purpose
Indoor and outdoor.

## Reference product
- Tür - Theo Schröders Entwicklung & Beratung GmbH - Abschlüsse ohne Feuer- / Rauchschutzeigenschaften (Drehflügel): 1

## Inputs
- Use of net fresh water (FW) [m3]: A1-A3 0.59, A4 0.00894, A5 0.00955, B2 0.00025, B3 0.0151, B4 -0.3, B5 0, B6 0, B7 0, C1 0, C2 0.000122, C3 0.00855, C4 0.000473, D -0.94
- Nicht-erneuerbare Primärenergie als Energieträger (PENRE) [MJ]: A1-A3 1670, A4 140, A5 1.45, B2 15.5, B3 70.7, B4 1060, B5 0, B6 0, B7 0, C1 0, C2 1.91, C3 27.2, C4 2.5, D -807
- Nicht-erneuerbare Primärenergie zur stofflichen Nutzung (PENRM) [MJ]: A1-A3 10.1, A4 0, A5 -0.42, B2 0, B3 0, B4 0, B5 0, B6 0, B7 0, C1 0, C2 0, C3 -9.15, C4 -0.48, D 0
- Use of non renewable secondary fuels (NRSF) [MJ]: A1-A3 0, A4 0, A5 0, B2 0, B3 0, B4 0, B5 0, B6 0, B7 0, C1 0, C2 0, C3 0, C4 0, D 0
- Erneuerbare Primärenergie als Energieträger (PERE) [MJ]: A1-A3 100, A4 7.81, A5 34.5, B2 0.19, B3 2.85, B4 123, B5 0, B6 0, B7 0, C1 0, C2 0.107, C3 10.5, C4 0.26, D -33.7
- Erneuerbare Primärenergie zur stofflichen Nutzung (PERM) [MJ]: A1-A3 28.6, A4 0, A5 -28.6, B2 0, B3 0, B4 0, B5 0, B6 0, B7 0, C1 0, C2 0, C3 0, C4 0, D 0
- Use of renewable secondary fuels (RSF) [MJ]: A1-A3 0, A4 0, A5 0, B2 0, B3 0, B4 0, B5 0, B6 0, B7 0, C1 0, C2 0, C3 0, C4 0, D 0
- Input of secondary material (SM) [kg]: A1-A3 0, A4 0, A5 0, B2 0, B3 0, B4 0, B5 0, B6 0, B7 0, C1 0, C2 0, C3 0, C4 0, D 0
- Total use of non-renewable primary energy resources (PENRT) [MJ]: A1-A3 1680, A4 140, A5 1.03, B2 15.5, B3 70.73, B4 1060, B5 0, B6 0, B7 0, C1 0, C2 1.91, C3 18.1, C4 2.01, D -807
- Total use of renewable primary energy resources (PERT) [MJ]: A1-A3 129, A4 7.81, A5 5.93, B2 0.19, B3 2.85, B4 123, B5 0, B6 0, B7 0, C1 0, C2 0.107, C3 10.5, C4 0.26, D -33.7

## Outputs
- Components for re-use (CRU) [kg]: A1-A3 0, A4 0, A5 0, B2 0, B3 0, B4 0, B5 0, B6 0, B7 0, C1 0, C2 0, C3 0, C4 0, D 0
- Exported electrical energy (EEE) [MJ]: A1-A3 1.5, A4 0, A5 4.08, B2 0, B3 3.14, B4 8.57, B5 0, B6 0, B7 0, C1 0, C2 0, C3 2.99, C4 0, D 0
- Exported thermal energy (EET) [MJ]: A1-A3 3.12, A4 0, A5 9.47, B2 0, B3 5.58, B4 17.9, B5 0, B6 0, B7 0, C1 0, C2 0, C3 5.31, C4 0, D 0
- Hazardous waste disposed (HWD) [kg]: A1-A3 6.58e-6, A4 7.06e-9, A5 2.11e-10, B2 3.3e-10, B3 1.57e-9, B4 6.09e-6, B5 0, B6 0, B7 0, C1 0, C2 9.63e-11, C3 5.87e-9, C4 2.04e-10, D -5.17e-7
- Material for Energy Recovery (MER) [kg]: A1-A3 0, A4 0, A5 0, B2 0, B3 0, B4 0, B5 0, B6 0, B7 0, C1 0, C2 0, C3 0, C4 0, D 0
- Materials for Recycling (MFR) [kg]: A1-A3 3.73, A4 0, A5 0, B2 0, B3 0.73, B4 44.5, B5 0, B6 0, B7 0, C1 0, C2 0, C3 40.8, C4 0, D 0
- Non-hazardous waste disposed (NHWD) [kg]: A1-A3 2.69, A4 0.0208, A5 0.0278, B2 0.00176, B3 0.0332, B4 9.66, B5 0, B6 0, B7 0, C1 0, C2 0.000284, C3 0.0192, C4 9.56, D -2.71
- Radioactive waste disposed (RWD) [kg]: A1-A3 0.0288, A4 0.00017, A5 2.73e-5, B2 6.24e-5, B3 0.0021, B4 0.0281, B5 0, B6 0, B7 0, C1 0, C2 2.31e-6, C3 0.0013, C4 2.01e-5, D -0.00329

## Impact indicators
- Abiotic depletion potential for non fossil resources (ADPE) [kg Sb-Äqv.]: A1-A3 0.000721, A4 8.96e-7, A5 4.81e-8, B2 4.53e-8, B3 0.000448, B4 0.000335, B5 0, B6 0, B7 0, C1 0, C2 1.22e-8, C3 5.71e-7, C4 5.04e-8, D -0.000395
- Abiotic depletion potential for fossil resources (ADPF) [MJ]: A1-A3 1590, A4 140, A5 0.88, B2 15.4, B3 64.5, B4 990, B5 0, B6 0, B7 0, C1 0, C2 1.91, C3 13, C4 1.87, D -783
- Acidification potential of soil and water (AP) [kg SO2-Äqv.]: A1-A3 0.33, A4 0.0169, A5 0.000459, B2 0.000879, B3 0.0095, B4 0.19, B5 0, B6 0, B7 0, C1 0, C2 0.000555, C3 0.00174, C4 0.000825, D -0.16
- Eutrophication potential (EP) [kg Phosphat-Äqv.]: A1-A3 0.0327, A4 0.00411, A5 0.000103, B2 7.34e-5, B3 0.000863, B4 0.0222, B5 0, B6 0, B7 0, C1 0, C2 0.000141, C3 0.000327, C4 9.38e-5, D -0.0157
- Global warming potential (GWP) [kg CO2-Äqv.]: A1-A3 147, A4 10.3, A5 3.97, B2 0.31, B3 6.44, B4 90.9, B5 0, B6 0, B7 0, C1 0, C2 0.14, C3 2.94, C4 0.14, D -75.9
- Depletion potential of the stratospheric ozone layer (ODP) [kg R11 eq.]: A1-A3 1.13e-6, A4 1.79e-15, A5 1.18e-15, B2 7.22e-16, B3 1.52e-7, B4 1.13e-6, B5 0, B6 0, B7 0, C1 0, C2 2.44e-17, C3 5.79e-14, C4 7.49e-16, D -9.91e-13
- Formation potential of tropospheric ozone (POCP) [kg Ethen-Äqv.]: A1-A3 0.0473, A4 -0.00488, A5 3.18e-5, B2 0.00014, B3 0.00111, B4 0.0168, B5 0, B6 0, B7 0, C1 0, C2 -0.000213, C3 0.000127, C4 6.29e-5, D -0.0261

## Use advice
This data set includes the results for modules A1-A3 as well as modules A4, A5, B2, B3, B4, B5, B6, B7, C1, C2, C3, C4, D according to EN 15804.
A comparison with other products is only permissible with a comparable application in the building. In principle, a comparison or the evaluation of EPD data is only possible if all data sets to be compared were created according to EN 15804 and the building context, or the product-specific performance characteristics are taken into account.

The sample EPD becomes valid when it is transferred to the manufacturer by ift. Currently valid EPDs can be found in the following list and are published on www.ift-service.de/epd.
EPD number and declaration holder:
-
- - M-EPD-TTS-102
HODAPP GmbH & Co. KG
Großweierer Str.77
77855 Achern
- M-EPD-TTS-103
MTS Brandschutzsysteme GmbH
Bruchweg 3
14550 Groß Kreutz
- M-EPD-TTS-104
Wiedemann GmbH
Siemensstr.16-18
25813 Husum
- M-EPD-TTS-105, Metall- u. Anlagenbau Erfurt GmbH, 99091 Erfurt
- M-EPD-TTS-106, Körner Stahltore GmbH & Co. KG, 21335 Lüneburg-Oedeme
- M-EPD-TTS-107, Georg Brüggemann GmbH, 59757 Arnsberg
- M-EPD-TTS-108, Metallbau Ebeling GmbH, 31699 Reckedorf

## Review details
The applied LCI method is in accordance with ISO 14040 and 14044. The documentation contains all relevant information with regard to the data quality and the scope of application of the respective LCI results or data sets. The data set represents the state of the art related to the functional unit.

## Data sources
- GaBi database (general)
