# Microporous calcium silicate thermal agents

Dataset: ILCD process, EPD, average dataset
Geography: DE
Reference year: 2018
Valid until: 2023
Classification: OEKOBAU.DAT: Dämmstoffe / Calciumsilikat / Calcium-Silikathydrat / Calciumsilikat
Classification: IBUCategories: 02 Bauprodukte / Wärmedämmungsprodukte / Calciumsilikat-Dämmstoffe
Method details: Calciumsilikat-Dämmstoffe.pdf
Generated by: Sphera Solutions GmbH
Registration number: EPD-CSP-20180010-IBC1-DE
Owner: Silca Service- und Vertriebsgesellschaft für Dämmstoffe mbH
Compliance: DIN EN 15804; ISO 14025
Review: Accredited third party review by Institut Bauen und Umwelt e. V.
Amounts: rows without a unit in brackets have none in this file; such an amount is in the reference unit of its flow, which a separate flow dataset defines
copyright: true
licenseType: Free of charge for all users and uses
accessRestrictions: None

## General comment
Silca, Silcal, Microcal-Calcium silicate panels and Calsitherm thermal panels, Redboard (referred to as CSP hereafter) are white to light grey in colour and are insulation panels resistant to up to 1100 °C continuous temperature, made of calcium silicate hydrates with low embedded proportion (<0.6 vol -%) of cellulose.

The products distinguish themselves with respect to their bulk density and the proportions of the same raw materials used.

## Technology and included processes
Declared unit:
The declared unit is 1 t CSP with an average weighted bulk density of 259 kg/m³. The bulk densities of both the main products SILCAL (including MICROCAL). KLIMAPLATTE and REDBOARD (joint sales share 95%) were used for the averaging. The bulk densities of SILCA and MICROCAL are also indicated below:

SILCAL 250-260 kg/m³

KLIMAPLATTE 170-250 kg/m³

REDBOARD 170-250 kg/m³

MICROCAL 240 kg/m³

SILCA 180-550 kg/m³

## Technical purpose
Panels for high temperature insulation for thermo-technical systems.

Heat and fire protection panels for the entire building construction, especially fireplace and tiled stoves.

Panels for interior construction, restoration of old buildings, timbered houses and humidors. Here, especially for insulation and moisture control with mould-inhibiting effect.

Improvement of the moisture and heat balance in spaces used for a short time e.g. in schools, churches, conference rooms.

In the preservation of monuments for conservation of facade design, since it is internal insulation.

## Reference product
- Mikroporöse Calciumsilikat-Wärmedämmstoffe: 1000

## Inputs
- Renewable primary energy as energy carrier (PERE) [MJ]: A1-A3 8199, A5 47.519, C4 399.2, D -28.4
- Renewable primary energy resources as material utilization (PERM) [MJ]: A1-A3 421, A5 -47, C4 -374, D 0
- Total use of renewable primary energy resources (PERT) [MJ]: A1-A3 8620, A5 0.519, C4 25.2, D -28.4
- Non renewable primary energy as energy carrier (PENRE) [MJ]: A1-A3 23328, A5 75.18, C4 216, D -144
- Non renewable primary energy as material utilization (PENRM) [MJ]: A1-A3 72, A5 -72, C4 0, D 0
- Total use of non renewable primary energy resources (PENRT) [MJ]: A1-A3 23400, A5 3.18, C4 216, D -139
- Use of secondary material (SM) [kg]: A1-A3 315, A5 0, C4 0, D 0
- Use of renewable secondary fuels (RSF) [MJ]: A1-A3 0, A5 0, C4 0, D 0
- Use of non renewable secondary fuels (NRSF) [MJ]: A1-A3 0, A5 0, C4 0, D 0
- Use of net fresh water (FW) [m^3]: A1-A3 6.05, A5 0.0414, C4 0.041, D -0.0193

## Outputs
- Hazardous waste disposed (HWD) [kg]: A1-A3 6.7e-5, A5 1.84e-8, C4 3.42e-6, D -5.28e-8
- Non hazardous waste disposed (NHWD) [kg]: A1-A3 102, A5 0.122, C4 1000, D -0.0725
- Radioactive waste disposed (RWD) [kg]: A1-A3 0.637, A5 0.000144, C4 0.00292, D -0.00606
- Components for re-use (CRU) [kg]: A1-A3 0, A5 0, C4 0, D 0
- Materials for recycling (MFR) [kg]: A1-A3 0, A5 0, C4 0, D 0
- Materials for energy recovery (MER) [kg]: A1-A3 0, A5 0, C4 0, D 0
- Exported electrical energy (EEE) [MJ]: A1-A3 0, A5 30.4, C4 0, D 0
- Exported thermal energy (EET) [MJ]: A1-A3 0, A5 68.6, C4 0, D 0

## Impact indicators
- Global warming potential (GWP) [kg CO_(2)-Äq.]: A1-A3 2010, A5 17.8, C4 16.1, D -9.74
- Depletion potential of the stratospheric ozone layer (ODP) [kg CFC11-Äq.]: A1-A3 2.45e-9, A5 1.43e-12, C4 1.52e-11, D -1.96e-11
- Acidification potential of land and water (AP) [kg SO_(2)-Äq.]: A1-A3 2.4, A5 0.00176, C4 0.0954, D -0.0107
- Eutrophication potential (EP) [kg PO_(4)^(3)-Äq.]: A1-A3 0.49, A5 0.000365, C4 0.013, D -0.00169
- Formation potential of tropospheric ozone photochemical oxidants (POCP) [kg Ethen-Äq.]: A1-A3 0.205, A5 0.000118, C4 0.00751, D -0.00108
- Abiotic depletion potential for non fossil resources (ADPE) [kg Sb-Äq.]: A1-A3 0.000441, A5 1.82e-7, C4 5.79e-6, D -2.84e-6
- Abiotic depletion potential for fossil resources (ADPF) [MJ]: A1-A3 21800, A5 2.81, C4 209, D -124

## Use advice
Scope:
This environmental product declaration relates to the following Calsitherm products from the Paderborn factory:

Calsitherm Klimaplatte-F,-WF

Redboard pro; Redboard basic

Silcal-900; -1000; -1100;
Silca 170 SB; -200; -250; -250 KM; -250 SB; -T300.

It involves an average EPD for a Calsitherm product with an average bulk thickness; the product specific bulk thicknesses are given under “2.3 Technical Data”.
The owner of the declaration takes responsibility for the underlying information and proofs; a liability of the IBU in relation to the manufacturer information, LCA data and proofs is excluded.
System boundary:
EPD type: Inception to factory gate with options. The LCA considers the raw material and energy production, raw material transports and the actual product manufacturing (Modules A1-A3), and the installation in the building (Module A5), only the packaging recycling comes up here) and the end of life or disposal stage (Modules C and D). The disposal of calcium silicate panels is declared in module C4, and the utilisation potentials resulting from A5 beyond the system limit are declared in module D.

## Data sources
- GaBi Database (all versions)
- GaBi database SP34 2017
