# GUTEX Thermoflex

Dataset: ILCD process, EPD, specific dataset
Geography: RER
Reference year: 2018
Valid until: 2023
Classification: OEKOBAU.DAT: Dämmstoffe / Holzfasern / Holzfaserdämmplatte
Classification: IBUCategories: 02 Bauprodukte / Holzwerkstoffe / Holzwerkstoffe
Method details: Holzwerkstoffe.pdf
Generated by: Thünen-Institut für Holzforschung
Registration number: EPD-GTX-20180071-IBA1-DE
Owner: GUTEX Holzfaserplattenwerk H. Henselmann GmbH + Co KG
Compliance: DIN EN 15804; ISO 14025
Review: Accredited third party review by Institut Bauen und Umwelt e. V.
Amounts: rows without a unit in brackets have none in this file; such an amount is in the reference unit of its flow, which a separate flow dataset defines
copyright: true
licenseType: Free of charge for all users and uses
accessRestrictions: None

## General comment
GUTEX Thermoflex are flexible, single-layer wood fibre insulation boards which are manufactured in a dry process in accordance with /DIN EN 13171/ with the addition of bi-component fibres. The thickness range of these insulating products is 30-240 mm; the material gross density is approx. 50 kg/m³.

## Technology and included processes
Fig.1: Schematic layout of the GUTEX Thermoflex manufacturing process Schematic repesentation of the Gutex Thermoflex manufactuing process. · Raw timber is crushed as wood chips. · The wood chips are softened by adding moisture and heat and then defibred. · The fibres are dried during further transport, dust particles are segregated and bi-component fibres added. · The fibre mixture is spread as a mat for the requisite material strength. · The binding fibres are activated in a thermal process giving rise to a flexible, cohesive mat structure. · The mat thus produced is then cut to size, packed and transported to the warehouse. Both internal and external quality monitoring are performed for the production of GUTEX Thermoflex insulating boards (/DIN EN ISO 9001/ and CE marking in accordance with /DIN EN 13171/ with voluntary KEYMARK certification).
Technical data:
The technical construction data outlined below applies for GUTEX Thermoflex insulating boards as delivered from the factory. More extensive data can be taken from the technical data sheet at www.gutex.de (download section).
Declared unit:
The declared unit in the LCA is the provision of 1 m³ Gutex Thermoflex with a density of 50 kg/m³, 7.83% wood moisture, 6.5% water content and 10.5% additives. All details on additives used were calculated on the basis of specific data.

## Technical purpose
Flexible GUTEX Thermoflex wood fibre insulation boards are used as cavity insulation between rafters, ceiling beams, wall struts or similar timber frame constructions, whereby the areas of application in accordance with /DIN 4108-10/ must be taken into consideration.

## Reference product
- Thermoflex (): 1

## Inputs
- Renewable primary energy as energy carrier (PERE) [MJ]: A1 10.24, A2 0.20806, A3 54.7222, A5 79.3577, C2 0.0303837, C3 25.3577, D 631.959
- Renewable primary energy resources as material utilization (PERM) [MJ]: A1 799.746, A2 0, A3 78.905, A5 -78.905, C2 0, C3 -799.746, D 0
- Total use of renewable primary energy resources (PERT) [MJ]: A1 809.986, A2 0.20806, A3 133.627, A5 0.452758, C2 0.0303837, C3 -774.389, D 631.959
- Non renewable primary energy as energy carrier (PENRE) [MJ]: A1 181.273, A2 4.40435, A3 627.87, A5 37.216, C2 0.643183, C3 58.8385, D -733.973
- Non renewable primary energy as material utilization (PENRM) [MJ]: A1 52.5, A2 0, A3 34.632, A5 -34.632, C2 0, C3 -52.5, D 0
- Total use of non renewable primary energy resources (PENRT) [MJ]: A1 233.773, A2 4.40435, A3 662.502, A5 2.58399, C2 0.643183, C3 6.33847, D -733.973
- Use of secondary material (SM) [kg]: A1 0, A2 0, A3 0, A5 0, C2 0, C3 0, D 0
- Use of renewable secondary fuels (RSF) [MJ]: A1 0, A2 0, A3 0, A5 0, C2 0, C3 0, D 799.746
- Use of non renewable secondary fuels (NRSF) [MJ]: A1 0, A2 0, A3 0, A5 0, C2 0, C3 0, D 52.5
- Use of net fresh water (FW) [m^3]: A1 0.0736356, A2 0.000409112, A3 0.210318, A5 0.0238933, C2 5.97441e-5, C3 0.0172206, D 0.0974862

## Outputs
- Hazardous waste disposed (HWD) [kg]: A1 0, A2 0, A3 0, A5 0, C2 0, C3 0, D 0
- Non hazardous waste disposed (NHWD) [kg]: A1 0, A2 0, A3 0.01924, A5 0, C2 0, C3 0, D 0
- Radioactive waste disposed (RWD) [kg]: A1 0.00295093, A2 6.01633e-6, A3 0.00213694, A5 0.000107077, C2 8.78584e-7, C3 0.00541091, D -0.0357334
- Components for re-use (CRU) [kg]: A1 0, A2 0, A3 0, A5 0, C2 0, C3 0, D 0
- Materials for recycling (MFR) [kg]: A1 0, A2 0, A3 0, A5 0, C2 0, C3 0, D 0
- Materials for energy recovery (MER) [kg]: A1 0, A2 0, A3 0, A5 0, C2 0, C3 50, D 0
- Exported electrical energy (EEE) [MJ]: A1 0, A2 0, A3 0, A5 13.8536, C2 0, C3 0, D 0
- Exported thermal energy (EET) [MJ]: A1 0, A2 0, A3 0, A5 33.5353, C2 0, C3 0, D 0

## Impact indicators
- Global warming potential (GWP) [kg CO_(2)-Äq.]: A1 -67.4829, A2 0.313609, A3 29.2885, A5 10.0155, C2 0.0457974, C3 80.6627, D -42.5756
- Depletion potential of the stratospheric ozone layer (ODP) [kg CFC11-Äq.]: A1 2.88738e-11, A2 1.61767e-13, A3 1.4667e-11, A5 7.14576e-13, C2 2.36234e-14, C3 1.74868e-11, D -1.13475e-10
- Acidification potential of land and water (AP) [kg SO_(2)-Äq.]: A1 0.0213442, A2 0.00132451, A3 0.027859, A5 0.00129394, C2 0.000193423, C3 0.00690091, D -0.0531466
- Eutrophication potential (EP) [kg PO_(4)^(3)-Äq.]: A1 0.0037269, A2 0.000330032, A3 0.00410925, A5 0.000203946, C2 4.81957e-5, C3 0.00110326, D -0.00822269
- Formation potential of tropospheric ozone photochemical oxidants (POCP) [kg Ethen-Äq.]: A1 0.00179554, A2 -0.000538839, A3 0.00484481, A5 7.098e-5, C2 -7.86884e-5, C3 0.000478307, D -0.00557397
- Abiotic depletion potential for non fossil resources (ADPE) [kg Sb-Äq.]: A1 2.63311e-6, A2 1.94249e-8, A3 7.12855e-6, A5 2.57694e-7, C2 2.83668e-9, C3 2.33554e-6, D -1.51462e-5
- Abiotic depletion potential for fossil resources (ADPF) [MJ]: A1 226.331, A2 4.38895, A3 622.481, A5 2.31411, C2 0.640934, C3 45.1963, D -696.378

## Use advice
Scope:
This Environmental Product Declaration is valid for GUTEX Thermoflex wood fibre insulation boards produced in the Gutenburg plant (see manufacturer's address).
System boundary:
The Declaration complies with an EPD "from cradle to gate, with options". It includes the production stage, i.e. from provision of the raw materials through to production (cradle-to-gate, Modules A1 to A3), disposal of product packaging in Module A5, and parts of the end-of-life stage (Modules C2 to C4). It also contains an analysis of the potential benefits and loads over and beyond the product's entire life cycle (Module D).
The provision of wood as a raw material in the form of wood chips from forestry and the provision of additives are analysed in Module A1. Transport of these substances is considered in Module A2. Module A3 comprises the provision of fuels, resources and electricity as well as the production processes on site. These are essentially defibring, fibre drying, compressing and cutting to size as well as packing the products.
Module A5 exclusively concerns the disposal of packaging materials.
Module C2 considers transport to the disposal company and Module C3 is concerned with preparing and sorting waste wood.
In accordance with /EN 16485/, Module C3 also includes as outflows the CO2 equivalents of the carbon inherent in the product and packaging as well as the renewable and non-renewable primary energy (PERM and PENRM) contained in the product and its packaging. The loads and potentials arising from thermal recycling of the product at its end of life and the potential benefits by substituting fossil fuels in the course of generating energy during thermal recycling of the product packaging are analysed in Module D.

## Data sources
- GaBi Database (all versions)
- GaBi database SP33 2017
