# Laminated wood beam softwood (generic); 515 kg/m3 density at 12% moisture

Dataset: ILCD process, EPD, generic dataset
Geography: DE
Reference year: 2021
Valid until: 2022
Classification: oekobau.dat: Holz / Vollholz / Balkenschichtholz (Duo-Triobalken)
Owner: Sphera Solutions GmbH
Compliance: EN 15804+A2
Review: Dependent internal review by Sphera Solutions GmbH; Independent external review by GaBi user forum
Amounts: rows without a unit in brackets have none in this file; such an amount is in the reference unit of its flow, which a separate flow dataset defines
copyright: true
licenseType: Free of charge for all users and uses
accessRestrictions: The license conditions as stated on https://www.oekobaudat.de/ apply.
accessRestrictions: Es gelten die Lizenzbedingungen wie sie auf https://www.oekobaudat.de/ genannt sind.

## General comment
This data set has been modeled according to the European Standard EN 15804+A2 for Sustainable Building. Results are depicted in modules that allow the structured expression of results over the entire life cycle.

## Geography
The data set represents the country specific situation in Germany, focusing on the main technologies, the region specific characteristics and / or import statistics.

## Time period
Annual average

## Technology and included processes
Laminated woodboard (other name: Duo-/Trio boards) consists of bonded layers, which are also called lamellae. Laminated woodboards in comparison to laminated timber are thicker (45mm) and therefore require less glue per m3 (PU or phenolic resin-based adhesive systems). The layers are glued together so that the fibers run parallel, to enlarge the cariing capacity. The process production steps:
1. Transport and storage of spruce wood
2. Drying
3. Pre-cutting
4. Finger-jointing
5. Cutting lamellae
6. Bonding with adhesives
7. Finishing

In module C1, a manual dismantling (no loads) is assumed, collecting losses are neglected.
The transport in module C2 to the recycling plant takes place with a truck (50km).
Module C3 takes into account the grinding and thermal treatment (combustion) of the material. It is assumed that the material reaches the end of the waste status immediately after dismantling. The CO2 absorbed and stored in the material by photosynthesis (from module A1) is written off in C3 (CO2 neutrality within the product system according to EN 16485: Round and sawn timber - Environmental Product Declarations - Product category rules for wood and wood-based products for use in construction, 2014).
Module D contains the loads through the operation of the recovery facility (excluding biogenic CO2, see above) and credits for the substitution of electricity (German electricity mix) and thermal energy (from natural gas). The calculation of combustion emissions and credits takes into account the specific calorific value of the material and the material composition.

## Technical purpose
This product can be used in construction.

## Safety margin
10 %. Product system almost completely covered. Good technological, temporal and geographic representativeness.

## Reference product
- Laminated wood beam softwood (generic): 1

## Inputs
- Use of renewable primary energy as energy carrier (PERE) [MJ]: A1-A3 1813.33, C2 1.03205, C3 10944.7, D -1552.04
- Use of renewable primary energy resources used as raw materials (PERM) [MJ]: A1-A3 9891.84, C2 0, C3 -9891.84, D 0
- Total use of renewable primary energy (PERT) [MJ]: A1-A3 11705.2, C2 1.03205, C3 1052.9, D -1552.04
- Use of non renewable primary energy as energy carrier (PENRE) [MJ]: A1-A3 3226.99, C2 17.7823, C3 258.182, D -4650.04
- Use of non renewable primary energy resources used as raw materials (PENRM) [MJ]: A1-A3 0, C2 0, C3 0, D 0
- Total use of non renewable primary energy resource (PENRT) [MJ]: A1-A3 3226.99, C2 17.7823, C3 258.182, D -4650.04
- Use of secondary material (SM) [kg]: A1-A3 0, C2 0, C3 0, D 0
- Use of renewable secondary fuels (SF) [MJ]: A1-A3 0, C2 0, C3 0, D 0
- Use of non renewable secondary fuels (NRSF) [MJ]: A1-A3 0, C2 0, C3 0, D 0
- Net use of fresh water (FW) [m3]: A1-A3 0.687259, C2 0.000917236, C3 2.48689, D -0.577503

## Outputs
- Hazardous waste disposed (HWD) [kg]: A1-A3 1.20847e-6, C2 7.43242e-10, C3 5.91072e-8, D -1.61055e-6
- Non harzardous waste disposed (NHWD) [kg]: A1-A3 2.00461, C2 0.00287047, C3 7.05173, D -2.4398
- Radioactive waste disposed (RWD) [kg]: A1-A3 0.16445, C2 1.70644e-5, C3 0.00782504, D -0.166922
- Components for re-use (CRU) [kg]: A1-A3 0, C2 0, C3 0, D 0
- Materials for recycling (MFR) [kg]: A1-A3 0, C2 0, C3 0, D 0
- Materials for energy recovery (MER) [kg]: A1-A3 0, C2 0, C3 0, D 0
- Exported electrical energy (EEE) [MJ]: A1-A3 0, C2 0, C3 1139.61, D 0
- Exported thermal energy (EET) [MJ]: A1-A3 0, C2 0, C3 2671.75, D 0

## Impact indicators
- Global Warming Potential - total (GWP-total) [kg CO2 eq.]: A1-A3 -588.177, C2 1.35076, C3 941.69, D -298.544
- Global Warming Potential - fossil fuels (GWP-fossil) [kg CO2 eq.]: A1-A3 228.938, C2 1.34153, C3 18.5856, D -295.22
- Global Warming Potential - biogenic (GWP-biogenic) [kg CO2 eq.]: A1-A3 -817.954, C2 0.000606236, C3 923.083, D -2.89508
- Global Warming Potential - land use and land use change (GWP-luluc) [kg CO2 eq.]: A1-A3 0.837938, C2 0.0086157, C3 0.021091, D -0.428863
- Depletion potenzial of the stratospheric ozone layer (ODP) [kg CFC-11 eq.]: A1-A3 6.634e-12, C2 3.43264e-16, C3 2.61971e-13, D -6.77521e-12
- Acidifcation potential, Accumulated Exceedance (AP) [Mole of H+ eq.]: A1-A3 0.797108, C2 0.00380356, C3 0.188816, D -0.301565
- Eutrophication potential - freshwater (EP-freshwater) [kg P eq.]: A1-A3 0.000958551, C2 2.75902e-6, C3 3.56178e-5, D -0.000713595
- Eutrophication potential - marine (EP-marine) [kg N eq.]: A1-A3 0.342742, C2 0.00175222, C3 0.0529335, D -0.111108
- Eutrophication potential - terrestrial (EP-terrestrial) [Mole of N eq.]: A1-A3 3.7276, C2 0.0196041, C3 0.903071, D -1.18408
- Photochemical Ozone Creation Potential (POCP) [kg NMVOC eq.]: A1-A3 1.22414, C2 0.00341687, C3 0.138849, D -0.291227
- Abiotic depletion potential - non-fossil resources (ADPE) [kg Sb eq.]: A1-A3 8.51775e-5, C2 1.16695e-7, C3 3.68691e-6, D -9.17979e-5
- Abiotic depletion potential - fossil resources (ADPF) [MJ]: A1-A3 3226.24, C2 17.7815, C3 258.115, D -4649.38
- Water (user) deprivation potential (WDP) [m³ world equiv.]: A1-A3 4.56611, C2 0.00521501, C3 105.553, D -3.50674

## Use advice
The data set represents a cradle to gate inventory. It can be used to characterise the supply chain situation of the respective commodity in a representative manner. Combination with individual unit processes using this commodity enables the generation of user-specific (product) LCAs.

## Data sources
- Informationsdienst Holz: Ökobilanzen Holz, 1997
- Informationsdienst Holz: Erstellung von Ökobilanzen, 1997
- Analyse und Bewertung der forstlichen Produktion
- ÖkoPot-Projektbericht, 2008
- NetLZ-Projektbericht "Grundsätze für Holz und Holzwerkstoffe", 2007
- Vergleichende Oekobilanzierung der Rundholzproduktion in verschiedenen Forstbetrieben BFH Report 204
- Ökologische Bilanzierung von Bauschnittholz und veredelten Vollholzprodukten, 2000
- Documentation of data quality management
- GaBi Database Edition 2021, CUP2021.01
- GaBi database (all versions)
