# Expanded clay concrete block outer wall; expanded clay, solid block, density 0,5, 500 kg/m3

Dataset: ILCD process, EPD, generic dataset
Geography: DE
Reference year: 2018
Valid until: 2022
Classification: oekobau.dat: Mineralische Baustoffe / Steine und Elemente / Leichtbeton
Owner: thinkstep
Compliance: DIN EN 15804
Review: Dependent internal review by thinkstep, IABP-GaBi, IBP-GaBi; Independent external review by GaBi user forum, GaBi bug forum, GaBi user community
Amounts: rows without a unit in brackets have none in this file; such an amount is in the reference unit of its flow, which a separate flow dataset defines
copyright: true

## General comment
This data set has been modeled according to the European Standard EN 15804 for Sustainable Building. Results are depicted in modules that allow the structured expression of results over the entire life cycle.

## Geography
The data set represents the country specific situation in Germany, focusing on the main technologies, the region specific characteristics and / or import statistics.

## Time period
Annual average

## Technology and included processes
The light concrete mix is produced in a mixer from washed pumice and exactly dosed quantities of water and bonding agents. The mixture arrives in the filling chest of the stone moulding machine which feeds the charging car. The charging car then goes over to the metallic mould (which is set on a board) and fills it up. The stone moulds contain enough cores (for the particular type of stone) for grooves or chambers. With extra loading and vibration the mixture is compacted and the stone is pushed out of the mould. The stones on the underlying boards are taken to a high bay racking where they set for 24 to 36 hours. They are stored for 6 weeks, longer than the required standard of 28 days, in the yard.
Background system:
Electricity: Electricity is modelled according to the individual country-specific situations. The country-specific modelling is achieved on multiple levels. Firstly, individual energy carrier specific power plants and plants for renewable energy sources are modelled according to the current national electricity grid mix. Modelling the electricity consumption mix includes transmission / distribution losses and the own use by energy producers (own consumption of power plants and "other" own consumption e.g. due to pumped storage hydro power etc.), as well as imported electricity. Secondly, the national emission and efficiency standards of the power plants are modelled as well as the share of electricity plants and combined heat and power plants (CHP). Thirdly, the country-specific energy carrier supply (share of imports and / or domestic supply) including the country-specific energy carrier properties (e.g. element and energy content) are accounted for. Fourthly, the exploration, mining/production, processing and transport processes of the energy carrier supply chains are modelled according to the specific situation of each electricity producing country. The different production and processing techniques (emissions and efficiencies) in the different energy producing countries are considered, e.g. different crude oil production technologies or different flaring rates at the oil platforms.
Thermal energy, process steam: The thermal energy and process steam supply is modelled according to the individual country-specific situation with regard to emission standards and considered energy carriers. The thermal energy and process steam are produced at heat plants. Efficiencies for thermal energy production are by definition 100% in relation to the corresponding energy carrier input. For process steam the efficiency ranges from 85%, 90% to 95%. The energy carriers used for the generation of thermal energy and process steam are modelled according to the specific import situation (see electricity above).
Transports: All relevant and known transport processes are included. Ocean-going and inland ship transport as well as rail, truck and pipeline transport of bulk commodities are considered.
Energy carriers: The energy carriers are modelled according to the specific supply situation (see electricity above).
Refinery products: Diesel fuel, gasoline, technical gases, fuel oils, lubricants and residues such as bitumen are modelled with a parameterised country-specific refinery model. The refinery model represents the current national standard in refining techniques (e.g. emission level, internal energy consumption, etc.) as well as the individual country-specific product output spectrum, which can be quite different from country to country. The supply of crude oil is modelled, again, according to the country-specific situation with the respective properties of the resources.

## Technical purpose
This product can be used in construction.

## Safety margin
10 %. Product system almost completely covered. Good technological, temporal and geographic representativeness.

## Reference product
- Expanded clay LB precision building block AW (m3): 1

## Inputs
- Erneuerbare Primärenergie als Energieträger (PERE) [MJ]: A1-A3 371.942, C1 0.259624, C2 0.9988, C3 6.02744, D -3.90881
- Erneuerbare Primärenergie zur stofflichen Nutzung (PERM) [MJ]: A1-A3 0, C1 0, C2 0, C3 0, D 0
- Total use of renewable primary energy resources (PERT) [MJ]: A1-A3 371.942, C1 0.259624, C2 0.9988, C3 6.02744, D -3.90881
- Nicht-erneuerbare Primärenergie als Energieträger (PENRE) [MJ]: A1-A3 1629.47, C1 4.45967, C2 17.1568, C3 55.8404, D -13.7047
- Nicht-erneuerbare Primärenergie zur stofflichen Nutzung (PENRM) [MJ]: A1-A3 0, C1 0, C2 0, C3 0, D 0
- Total use of non-renewable primary energy resources (PENRT) [MJ]: A1-A3 1629.47, C1 4.45967, C2 17.1568, C3 55.8404, D -13.7047
- Input of secondary material (SM) [kg]: A1-A3 38.9677, C1 0, C2 0, C3 0, D 0
- Use of renewable secondary fuels (RSF) [MJ]: A1-A3 0.867705, C1 0, C2 0, C3 0, D 0
- Use of non renewable secondary fuels (NRSF) [MJ]: A1-A3 9.12758, C1 0, C2 0, C3 0, D 0
- Use of net fresh water (FW) [m3]: A1-A3 0.384609, C1 0.000232515, C2 0.000894509, C3 0.0143271, D -0.00253487

## Outputs
- Hazardous waste disposed (HWD) [kg]: A1-A3 6.49535e-6, C1 1.66653e-7, C2 6.41131e-7, C3 1.01148e-6, D -2.58311e-7
- Non-hazardous waste disposed (NHWD) [kg]: A1-A3 3.15939, C1 0.000782751, C2 0.00301132, C3 141.901, D -8.05555
- Radioactive waste disposed (RWD) [kg]: A1-A3 0.030661, C1 4.69512e-6, C2 1.80626e-5, C3 0.00053816, D -0.000510276
- Components for re-use (CRU) [kg]: A1-A3 0, C1 0, C2 0, C3 0, D 0
- Materials for Recycling (MFR) [kg]: A1-A3 0, C1 0, C2 0, C3 425.258, D 0
- Material for Energy Recovery (MER) [kg]: A1-A3 0, C1 0, C2 0, C3 0, D 0
- Exported electrical energy (EEE) [MJ]: A1-A3 0, C1 0, C2 0, C3 0, D 0
- Exported thermal energy (EET) [MJ]: A1-A3 0, C1 0, C2 0, C3 0, D 0

## Impact indicators
- Global warming potential (GWP) [kg CO2 eq.]: A1-A3 172.05, C1 0.329482, C2 1.27649, C3 3.36289, D -1.02699
- Ozone Depletion Potential (ODP) [kg R11 eq.]: A1-A3 1.25995e-12, C1 1.09829e-16, C2 4.22522e-16, C3 1.90498e-14, D -1.98209e-14
- Acidification potential (AP) [kg SO2 eq.]: A1-A3 0.671603, C1 0.00114922, C2 0.00257837, C3 0.021748, D -0.00242521
- Eutrophication potential (EP) [kg Phosphate eq.]: A1-A3 0.0541851, C1 0.000271152, C2 0.000612949, C3 0.0037005, D -0.000471907
- Photochemical Ozone Creation Potential (POCP) [kg Ethene eq.]: A1-A3 0.0244514, C1 0.000113554, C2 -0.000842702, C3 0.00197365, D 0.000222936
- Abiotic depletion potential for non fossil resources (ADPE) [kg Sb eq.]: A1-A3 1.77227e-5, C1 2.79217e-8, C2 1.07417e-7, C3 1.80702e-6, D -2.28249e-7
- Abiotic depletion potential for fossil resources (ADPF) [MJ]: A1-A3 1552.05, C1 4.44767, C2 17.1106, C3 54.4809, D -12.4165

## Use advice
The data set represents a cradle to gate inventory. It can be used to characterise the supply chain situation of the respective commodity in a representative manner. Combination with individual unit processes using this commodity enables the generation of user-specific (product) LCAs.

## Data sources
- Ökologische Bilanzierung von Baustoffen und Gebäuden, 2000
- LEICHTBETON, 2008
- Leichtbeton Handbuch, 2006
- GaBi Database Edition 2020, SP40
- GaBi database (all versions)
