# Holcim Aqua 4 - Hochofenzement, CEM III/B 42,5 L-LH/SR (na)

Dataset: ILCD process, EPD, specific dataset
Geography: DE
Reference year: 2019
Valid until: 2024
Classification: OEKOBAU.DAT: Mineralische Baustoffe / Bindemittel / Zement
Classification: IBUCategories: 01 Grundstoffe und Vorprodukte / Zement, Baukalk und andere Bindemittel / Zement
Method details: Zement.pdf
Registration number: EPD-HOI-20190109-IAA1-DE
Owner: Holcim (Deutschland) GmbH
Compliance: DIN EN 15804; ISO 14025
Review: Accredited third party review by Institut Bauen und Umwelt e. V.
Amounts: rows without a unit in brackets have none in this file; such an amount is in the reference unit of its flow, which a separate flow dataset defines
copyright: true

## General comment
Holcim Aqua 4 ist ein Hochofenzement CEM III/B 42,5 L-LH/SR (na), der gemäß /EN 197-1/ bzw. /DIN 1164-10/ hergestellt und überwacht wird. Holcim Aqua 4 ist ein hydraulisch erhärtendes Bindemittel zur Herstellung von Beton und Mörtel. Er besteht aus einem Gemisch fein aufgemahlener, nichtmetallisch-anorganischer Bestandteile. Nach Zugabe von Wasser zu Holcim Aqua 4 entsteht eine Suspension (Zementleim), die aufgrund einsetzender Hydratationsreaktionen sowohl an der Luft als auch unter Wasser erstarrt und erhärtet sowie dauerhaft fest bleibt. Die Zusammensetzung des Produkts entspricht den Vorgaben der /EN 197-1/.

## Technology and included processes
Holcim Aqua 4 wird durch Mischen einer Portlandzementkomponente und Hüttensandmehl hergestellt. Kalkmergel ist für die Herstellung des Portlandzementklinkers im Werk Höver der wichtigste Rohstoff. Er wird im nahegelegenen Steinbruch mit Reißraupen abgebaut. Fahrzeuge befördern das grobstückige Rohmaterial zu Hammerbrechern, in denen es zu Schotter gebrochen wird. Der Kalkmergelschotter gelangt über eine Förderbandanlage in eine Lager- und Mischhalle, in der er vorhomogenisiert wird. Für die Feinabstimmung der chemischen Zusammensetzung können weitere Korrekturstoffe wie Sand zugegeben werden. In einer Walzenschüsselmühle und unter Nutzung von Heißluft aus der Ofenanlage wird das Rohstoffgemisch zu feinem, trockenem Rohmehl gemahlen. Im anschließenden Brennprozess entsteht aus dem Rohmehl der Zementklinker. Dafür wird das Rohmehl einem 4-stufigen Zyklonwärmetauscher aufgegeben, in dem es von den entgegenströmenden Heißgasen auf ca. 900 °C erhitzt und entsäuert wird. Vom Wärmetauscher gelangt das Material in den 3-4 ° geneigten Drehofen, in dem das Brenngut vom Ofeneinlauf in Richtung des am Ofenauslauf installierten Brenners bewegt wird. In der so genannten Sinterzone erreicht das Brenngut Temperaturen von etwa 1450 °C. Als Brennstoffe werden in Höver ca. 80 % nicht fossile alternative Brennstoffe eingesetzt. An den Ofenauslauf schließt sich ein Klinkerkühler an. Nach dem Brennen und Kühlen wird der Klinker in Silos gelagert, um Emissionen von Klinkerstaub möglichst zu vermeiden. Zur Herstellung des Portlandzements wird der Klinker in einer Kugelmühle fein aufgemahlen. Dabei wird dem Mahlgut zur Regelung des Erstarrens ein natürliches Gips/-Anhydrit Gemisch zugesetzt. Das Hüttensandmehl wird durch Mahltrocknung in einer Kugelmühle unter Ausnutzung heißer Ofenluft aus Hüttensand hergestellt. Der Hüttensand aus der Roheisenproduktion in Salzgitter gelangt über Schiffstransport in das Werk Höver. Die beiden Komponenten Portlandzement und Hüttensandmehl werden in einer Zementmischanlage zum fertigen Hochofenzement Holcim Aqua 4 gemischt. Er wird in Silos gelagert, aus denen er als Silo- oder als Sackware zum Versand kommt. Das Zementwerk Höver ist gemäß /ISO 9001/ zertifiziert.
Technische Daten:
Holcim Aqua 4 hat nach /EN 197-1/ eine Normdruckfestigkeit der Klasse 42,5 L und weist die besonderen Eigenschaften „Niedrige Hydratationswärme “ (LH) und „hoher Sulfatwiderstand“ (SR) auf. Zusätzlich erfüllt er die Anforderung an Zemente mit „niedrigem wirksamen Alkaligehalt“ (NA) gemäß /DIN 1164-10/.
Deklarierte Einheit:
Die deklarierte Einheit ist 1 Tonne.

## Technical purpose
Holcim Aqua 4 wird als Bindemittel zur Herstellung von Beton und Mörtel verwendet. Holcim Aqua 4 eignet sich besonders für die Herstellung massiger Bauteile und für Betone in aggressiver Umgebung.

## Reference product
- Holcim Aqua 4/1Tonne: 1000

## Inputs
- Erneuerbare Primärenergie als Energieträger (PERE) [MJ]: A1-A3 364
- Erneuerbare Primärenergie zur stofflichen Nutzung (PERM) [MJ]: A1-A3 0
- Total erneuerbare Primärenergie (PERT) [MJ]: A1-A3 364
- Nicht-erneuerbare Primärenergie als Energieträger (PENRE) [MJ]: A1-A3 1170
- Nicht-erneuerbare Primärenergie zur stofflichen Nutzung (PENRM) [MJ]: A1-A3 0
- Total nicht erneuerbare Primärenergie (PENRT) [MJ]: A1-A3 1170
- Einsatz von Sekundärstoffen (SM) [kg]: A1-A3 1.6
- Erneuerbare Sekundärbrennstoffe (RSF) [MJ]: A1-A3 254.5
- Nicht erneuerbare Sekundärbrennstoffe (NRSF) [MJ]: A1-A3 632.1
- Einsatz von Süßwasserressourcen (FW) [m^3]: A1-A3 2.6

## Outputs
- Gefährlicher Abfall zur Deponie (HWD) [kg]: A1-A3 0.35
- Entsorgter nicht gefährlicher Abfall (NHWD) [kg]: A1-A3 0.75
- Entsorgter radioaktiver Abfall (RWD) [kg]: A1-A3 0.08
- Komponenten für die Wiederverwendung (CRU) [kg]: A1-A3 0
- Stoffe zum Recycling (MFR) [kg]: A1-A3 0
- Stoffe für die Energierückgewinnung (MER) [kg]: A1-A3 0
- Exportierte elektrische Energie (EEE) [MJ]: A1-A3 0
- Exportierte thermische Energie (EET) [MJ]: A1-A3 0

## Impact indicators
- Globales Erwärmungspotenzial (GWP) [kg CO_(2)-Äq.]: A1-A3 281
- Abbau Potential der stratosphärischen Ozonschicht (ODP) [kg CFC11-Äq.]: A1-A3 7.39e-8
- Versauerungspotenzial von Boden und Wasser (AP) [kg SO_(2)-Äq.]: A1-A3 0.564
- Eutrophierungspotenzial (EP) [kg PO_(4)^(3)-Äq.]: A1-A3 0.0564
- Bildungspotential für troposphärisches Ozon (POCP) [kg Ethen-Äq.]: A1-A3 0.074
- Potenzial für den abiotischen Abbau nicht fossiler Ressourcen (ADPE) [kg Sb-Äq.]: A1-A3 0.00139
- Potenzial für den abiotischen Abbau fossiler Brennstoffe (ADPF) [MJ]: A1-A3 977

## Use advice
Gültigkeitsbereich:
Die vorliegende Umweltproduktdeklaration bildet die Ökobilanz der Herstellung des Hochofenzements Holcim-Aqua 4 (CEM III/B 42,5 L-LH/SR (na)) im Werk Höver der Holcim (Deutschland) GmbH ab.
Systemgrenze:
Typ der EPD: Wiege-bis-Werkstor.

Die gewählten Systemgrenzen umfassen die Herstellung des Zements einschließlich der Rohstoffgewinnung bis zum fertigen Produkt am Werkstor. Das Produktstadium umfasst:

Modul A1: Gewinnung und Aufbereitung von Rohstoffen.

Modul A2: Transport der Rohstoffe zum Werkstor und interne Transporte.

Modul A3: Zementherstellung.

Das Baustadium, das Nutzungsstadium und das Entsorgungsstadium werden in der Ökobilanz für Zement nicht berücksichtigt.

## Data sources
- Holcim Aqua 4 - Hochofenzement, CEM III/B 42,5 L-LH/SR (na).pdf
- GaBi Database (all versions)
- GaBi database SP27 2015
