# Ytong® Autoclaved Aerated Concrete

Dataset: ILCD process, EPD, average dataset
Geography: DE
Reference year: 2017
Valid until: 2022
Classification: OEKOBAU.DAT: Mineralische Baustoffe / Steine und Elemente / Porenbeton
Classification: IBUCategories: 02 Bauprodukte / Mauerwerk und Mörtel / Porenbeton
Method details: Porenbeton.pdf
Generated by: Sphera Solutions GmbH
Registration number: EPD-XEL-20170147-IAD1-DE
Owner: Xella Deutschland GmbH
Compliance: DIN EN 15804; ISO 14025
Review: Accredited third party review by Institut Bauen und Umwelt e. V.
Amounts: rows without a unit in brackets have none in this file; such an amount is in the reference unit of its flow, which a separate flow dataset defines
copyright: true
licenseType: Free of charge for all users and uses
accessRestrictions: None

## General comment
The products under review are unreinforced components of various formats made of Autoclaved Aerated Concrete (AAC). AAC is classified as a porous, steam-cured lightweight concrete.

Directive (EU) No. 305/2011 /CPR/ applies for placing the product on the market in the EU/EFTA (with the exception of Switzerland). The product requires a Declaration of Performance taking consideration of the /EN 771-4:2015-11/ and CE marking. Use is governed by the respective national regulations.

## Technology and included processes
Technical data:
The product’s performance values correspond with the Declaration of Performance in terms of its essential properties in accordance with /EN 771-4:2015-11/.
Declared unit:
This Environmental Product Declaration refers to the product stage (Modules A1-A3) for 1 m³ Ytong® unreinforced AAC with an average gross density of 438 kg/m³.
The AAC blocks produced have a gross density of 350 kg/m³ to 700 kg/m³.
The results represent the average production mix for Xella (Germany)

## Technical purpose
Unreinforced components for masonry, monolithic, supporting and non-supporting walls. Direct contact with water is avoided for technical structural reasons.

## Reference product
- 1m³ Ytong® Porenbeton: 1

## Inputs
- Renewable primary energy as energy carrier (PERE) [MJ]: A1-A3 198
- Renewable primary energy resources as material utilization (PERM) [MJ]: A1-A3 165
- Total use of renewable primary energy resources (PERT) [MJ]: A1-A3 363
- Non renewable primary energy as energy carrier (PENRE) [MJ]: A1-A3 1020
- Non renewable primary energy as material utilization (PENRM) [MJ]: A1-A3 68.7
- Total use of non renewable primary energy resources (PENRT) [MJ]: A1-A3 1090
- Use of secondary material (SM) [kg]: A1-A3 0
- Use of renewable secondary fuels (RSF) [MJ]: A1-A3 0
- Use of non renewable secondary fuels (NRSF) [MJ]: A1-A3 0
- Use of net fresh water (FW) [m^3]: A1-A3 0.247

## Outputs
- Hazardous waste disposed (HWD) [kg]: A1-A3 4.02e-6
- Non hazardous waste disposed (NHWD) [kg]: A1-A3 14.5
- Radioactive waste disposed (RWD) [kg]: A1-A3 0.0321
- Components for re-use (CRU) [kg]: A1-A3 0
- Materials for recycling (MFR) [kg]: A1-A3 0
- Materials for energy recovery (MER) [kg]: A1-A3 0
- Exported electrical energy (EEE) [MJ]: A1-A3 0
- Exported thermal energy (EET) [MJ]: A1-A3 0

## Impact indicators
- Global warming potential (GWP) [kg CO_(2)-Äq.]: A1-A3 167
- Depletion potential of the stratospheric ozone layer (ODP) [kg CFC11-Äq.]: A1-A3 1.62e-10
- Acidification potential of land and water (AP) [kg SO_(2)-Äq.]: A1-A3 0.183
- Eutrophication potential (EP) [kg PO_(4)^(3)-Äq.]: A1-A3 0.0233
- Formation potential of tropospheric ozone photochemical oxidants (POCP) [kg Ethen-Äq.]: A1-A3 0.0168
- Abiotic depletion potential for non fossil resources (ADPE) [kg Sb-Äq.]: A1-A3 0.000448
- Abiotic depletion potential for fossil resources (ADPF) [MJ]: A1-A3 1000

## Use advice
Scope:
This LCA is based on consideration of each of the 10 German Autoclaved Aerated Concrete plants operated by the Xella Group and the data from 2016.
System boundary:
Type of EPD: cradle to plant gate
The LCA for Ytong® AAC considers the life cycle phases of product manufacturing (A1-A3).
Product installation (Modules A4-A5) and the use stage (Module B) are not considered in this study. Nor is disposal (Module C) considered in this study.
Balancing the modules under review does not result in any credits or loads outside the system boundary

## Data sources
- GaBi Database (all versions)
- GaBi database SP29 2016
