# Asphalt surface layer; 2400 kg/m3

Dataset: ILCD process, EPD, generic dataset
Geography: DE
Reference year: 2021
Valid until: 2022
Classification: oekobau.dat: Mineralische Baustoffe / Asphalt / Tragschichten
Owner: Sphera Solutions GmbH
Compliance: EN 15804+A2
Review: Dependent internal review by Sphera Solutions GmbH; Independent external review by GaBi user forum
Amounts: rows without a unit in brackets have none in this file; such an amount is in the reference unit of its flow, which a separate flow dataset defines
copyright: true
licenseType: Free of charge for all users and uses
accessRestrictions: The license conditions as stated on https://www.oekobaudat.de/ apply.
accessRestrictions: Es gelten die Lizenzbedingungen wie sie auf https://www.oekobaudat.de/ genannt sind.

## General comment
This data set has been modeled according to the European Standard EN 15804+A2 for Sustainable Building. Results are depicted in modules that allow the structured expression of results over the entire life cycle.

## Geography
The data set represents the country specific situation in Germany, focusing on the main technologies, the region specific characteristics and / or import statistics.

## Time period
Annual average

## Technology and included processes
The life cycle analysis of the top asphalt layer encompasses the entire cradle to gate life cycle stages, i.e. the process of extracting the aggregates and the production of bitumen (bitumen is taken from the heavy fraction in petrochemistry). Consideration was already given to the transport of the individual material components to the asphalt mixing facility as well as the cost of production. Transportation from the production facility to the construction site have not been taken into account and must be included in the overall system evaluation.

In the disposal phase, a mechanical dismantling (asphalt cutter) is accounted for in module C1, taking into account both the consumption of chisle and diesel consumption. It is assumed that the dismantled asphalt will reach the end of waste status immediately after the dismantling. This means that loads for re-use (heating and mixing) are shown in module D.
The transport in module C2 to the asphalt mixing plant takes place with a truck (50km).
Module D assumes a material loss of 3%. The mixing and heating is also balanced in module D. There will be a credit for the net amount of material (amount recovered minus processing losses) for the substitution of an asphalt track bed.

## Technical purpose
This product can be used in construction.

## Safety margin
20 %. Product system depicted except for a few missing processes / flows. Technological, temporal and geographic representativeness partly given.

## Reference product
- Asphalt surface layer: 1

## Inputs
- Use of renewable primary energy as energy carrier (PERE) [MJ]: A1-A3 0.0716789, A5 0.000675097, C1 0.00242734, D -0.0247153
- Use of renewable primary energy resources used as raw materials (PERM) [MJ]: A1-A3 0, A5 0, C1 0, D 0
- Total use of renewable primary energy (PERT) [MJ]: A1-A3 0.0716789, A5 0.000675097, C1 0.00242734, D -0.0247153
- Use of non renewable primary energy as energy carrier (PENRE) [MJ]: A1-A3 1.06589, A5 0.0116319, C1 0.044172, D -1.54108
- Use of non renewable primary energy resources used as raw materials (PENRM) [MJ]: A1-A3 2.5, A5 0, C1 -2.5, D 2.5
- Total use of non renewable primary energy resource (PENRT) [MJ]: A1-A3 3.56589, A5 0.0116319, C1 -2.45583, D 0.95892
- Use of secondary material (SM) [kg]: A1-A3 0, A5 0, C1 0, D 0
- Use of renewable secondary fuels (SF) [MJ]: A1-A3 0, A5 0, C1 0, D 0
- Use of non renewable secondary fuels (NRSF) [MJ]: A1-A3 0, A5 0, C1 0, D 0
- Net use of fresh water (FW) [m3]: A1-A3 7.61961e-5, A5 5.99993e-7, C1 2.70515e-6, D -3.81236e-5

## Outputs
- Hazardous waste disposed (HWD) [kg]: A1-A3 6.89372e-11, A5 4.86178e-13, C1 1.98119e-12, D -2.56182e-11
- Non harzardous waste disposed (NHWD) [kg]: A1-A3 0.0132844, A5 1.87766e-6, C1 0.00138685, D 0.0228625
- Radioactive waste disposed (RWD) [kg]: A1-A3 8.55502e-6, A5 1.11624e-8, C1 5.48362e-8, D -3.13929e-6
- Components for re-use (CRU) [kg]: A1-A3 0, A5 0, C1 0, D 0
- Materials for recycling (MFR) [kg]: A1-A3 0, A5 0, C1 1, D 0
- Materials for energy recovery (MER) [kg]: A1-A3 0, A5 0, C1 0, D 0
- Exported electrical energy (EEE) [MJ]: A1-A3 0, A5 0, C1 0, D 0
- Exported thermal energy (EET) [MJ]: A1-A3 0, A5 0, C1 0, D 0

## Impact indicators
- Global Warming Potential - total (GWP-total) [kg CO2 eq.]: A1-A3 0.0827845, A5 0.000864155, C1 0.000589909, D -0.0174263
- Global Warming Potential - fossil fuels (GWP-fossil) [kg CO2 eq.]: A1-A3 0.0822051, A5 0.000858492, C1 0.00067857, D -0.0171079
- Global Warming Potential - biogenic (GWP-biogenic) [kg CO2 eq.]: A1-A3 0.000490057, A5 2.6505e-8, C1 -0.000107825, D -0.000297063
- Global Warming Potential - land use and land use change (GWP-luluc) [kg CO2 eq.]: A1-A3 8.928e-5, A5 5.6358e-6, C1 1.91641e-5, D -2.13622e-5
- Depletion potenzial of the stratospheric ozone layer (ODP) [kg CFC-11 eq.]: A1-A3 2.61314e-16, A5 2.24539e-19, C1 1.12018e-18, D -9.55735e-17
- Acidifcation potential, Accumulated Exceedance (AP) [Mole of H+ eq.]: A1-A3 0.000154729, A5 1.22498e-6, C1 4.02494e-6, D -7.15973e-5
- Eutrophication potential - freshwater (EP-freshwater) [kg P eq.]: A1-A3 8.61844e-8, A5 1.80476e-9, C1 6.66737e-9, D 4.33876e-7
- Eutrophication potential - marine (EP-marine) [kg N eq.]: A1-A3 4.04493e-5, A5 4.86653e-7, C1 5.26031e-7, D -2.42263e-5
- Eutrophication potential - terrestrial (EP-terrestrial) [Mole of N eq.]: A1-A3 0.000447841, A5 5.56218e-6, C1 1.38749e-5, D -0.000266444
- Photochemical Ozone Creation Potential (POCP) [kg NMVOC eq.]: A1-A3 0.000147575, A5 0.000433682, C1 1.68923e-6, D -0.000358846
- Abiotic depletion potential - non-fossil resources (ADPE) [kg Sb eq.]: A1-A3 1.38676e-8, A5 7.63337e-11, C1 4.92676e-10, D -5.14898e-9
- Abiotic depletion potential - fossil resources (ADPF) [MJ]: A1-A3 4.06581, A5 0.0116315, C1 0.0441389, D -1.54106
- Water (user) deprivation potential (WDP) [m³ world equiv.]: A1-A3 0.0016092, A5 3.4113e-6, C1 3.8474e-5, D -0.000961534

## Use advice
The data set represents a cradle to gate inventory. It can be used to characterise the supply chain situation of the respective commodity in a representative manner. Combination with individual unit processes using this commodity enables the generation of user-specific (product) LCAs.

## Data sources
- Ökoprofil für Asphalt- und Betonbauweisen von Fahrbahnen, Aktualisierung 2009
- Ökobilanzen im Brückenbau, 1999
- BAFU Information, 2004
- Schneider Bautabellen für Ingenieure, 2006
- Documentation of data quality management
- GaBi Database Edition 2021, CUP2021.01
- GaBi database (all versions)
