# Stainless Steel Long Product

Dataset: ILCD process, EPD, average dataset
Geography: GLO
Reference year: 2019
Valid until: 2024
Classification: OEKOBAU.DAT: Metalle / Edelstahl / Edelstahlprofile
Classification: IBUCategories: 02 Building products / Metallic products and ancillaries / Structural steels
Method details: Structural steels.pdf
Generated by: Sphera Solutions GmbH
Registration number: EPD-OTO-20190107-IBD1-EN
Owner: Outokumpu
Compliance: DIN EN 15804; ISO 14025
Review: Accredited third party review by Institut Bauen und Umwelt e. V.
Amounts: rows without a unit in brackets have none in this file; such an amount is in the reference unit of its flow, which a separate flow dataset defines
copyright: true
licenseType: Free of charge for all users and uses
accessRestrictions: None

## General comment
This EPD describes stainless steel long products produced by Outokumpu. Long products are supplied as black, peeled or cold drawn bar or as rod coil. The computerised process control of our rolling mills, heat treatment facilities, and finishing lines ensures consistency and superior control of the targeted properties. Stainless steel long products are available in a wide range of sizes in both standard and special grades. This EPD is applicable to homogeneous Outokumpu stainless steel long products which are used in the construction and building industry. The data have been provided by a representative mix of four manufacturing plants in the UK, USA and Sweden.

## Technology and included processes
The steel scrap is melted in an electric arc furnace to obtain a steel melt. The liquid steel is further refined (adjustment of sulfur, carbon and phosphorous) and alloyed to give the stainless steel the required characteristics. The steel is then cast into semi-finished stainless steel products, for example billets. The billets are hot rolled to the desired bar size or the billets are hot rolled to rod coil and then annealed and pickled. The bar can also be peeled and the rod coil cold drawn and cut to bar. Quality management are in accordance with /ISO 9001/.
Declared unit:
The declaration applies to one ton of stainless steel long product. The declared unit is the production and recycling of one ton of stainless steel long product.

## Technical purpose
Long products are used in a wide range of applications in building and construction. Typical applications are fixings, wall ties, couplings, and dowel bars.

## Reference product
- Stainless Steel Long Product (): 1

## Inputs
- Renewable primary energy as energy carrier (PERE) [MJ]: A1-A3 7330, C3 11.98, D -1828
- Renewable primary energy resources as material utilization (PERM) [MJ]: A1-A3 0, C3 0, D 0
- Total use of renewable primary energy resources (PERT) [MJ]: A1-A3 7330, C3 11.98, D -1828
- Non renewable primary energy as energy carrier (PENRE) [MJ]: A1-A3 37160, C3 40.73, D -11640
- Non renewable primary energy as material utilization (PENRM) [MJ]: A1-A3 0, C3 0, D 0
- Total use of non renewable primary energy resources (PENRT) [MJ]: A1-A3 37160, C3 40.73, D -11640
- Use of secondary material (SM) [kg]: A1-A3 760.4, C3 0, D 0
- Use of renewable secondary fuels (RSF) [MJ]: A1-A3 0, C3 0, D 0
- Use of non renewable secondary fuels (NRSF) [MJ]: A1-A3 0, C3 0, D 0
- Use of net fresh water (FW) [m^3]: A1-A3 32.32, C3 0.01654, D -13.39

## Outputs
- Hazardous waste disposed (HWD) [kg]: A1-A3 0.03298, C3 3.282e-7, D -0.12
- Non hazardous waste disposed (NHWD) [kg]: A1-A3 215.9, C3 50.11, D 12.67
- Radioactive waste disposed (RWD) [kg]: A1-A3 2.296, C3 0.004795, D -0.09821
- Components for re-use (CRU) [kg]: A1-A3 0, C3 0, D 0
- Materials for recycling (MFR) [kg]: A1-A3 0, C3 950, D 0
- Materials for energy recovery (MER) [kg]: A1-A3 0, C3 0, D 0
- Exported electrical energy (EEE) [MJ]: A1-A3 0, C3 0, D 0
- Exported thermal energy (EET) [MJ]: A1-A3 0, C3 0, D 0

## Impact indicators
- Global warming potential (GWP) [kg CO_(2)-Äq.]: A1-A3 2887, C3 2.481, D -953.1
- Depletion potential of the stratospheric ozone layer (ODP) [kg CFC11-Äq.]: A1-A3 4.159e-9, C3 6.998e-12, D -7.354e-13
- Acidification potential of land and water (AP) [kg SO_(2)-Äq.]: A1-A3 20.92, C3 0.009606, D -6.01
- Eutrophication potential (EP) [kg PO_(4)^(3)-Äq.]: A1-A3 1.085, C3 0.00119, D -0.3323
- Formation potential of tropospheric ozone photochemical oxidants (POCP) [kg Ethen-Äq.]: A1-A3 0.9496, C3 0.0006985, D -0.3591
- Abiotic depletion potential for non fossil resources (ADPE) [kg Sb-Äq.]: A1-A3 0.1966, C3 1.136e-6, D -0.05244
- Abiotic depletion potential for fossil resources (ADPF) [MJ]: A1-A3 31580, C3 28.65, D -11440

## Use advice
Scope:
The declaration applies to 1 ton of stainless steel long product produced by Outokumpu.

The Life Cycle Assessment is based on data from the following Outokumpu production plants:

- Outokumpu Stainless Ltd, Sheffield, UK

- Outokumpu Stainless USA LLC, Richburg, SC, USA

- Fagersta Stainless AB, Fagersta, Sweden

Production has been modeled using annual production data from 2017 and 2018. Where required averaging is based on production output from each site.
System boundary:
This EPD is cradle-to-gate with options, and includes the following process steps:
Upstream production of raw materials, fuels and energy and all relevant upstream transport and packaging processes.
Production/manufacturing of the stainless steel product.
Waste water and treatment of wastes generated on site including swarf, dusts, scrap, slag and waste water.
End-of-life (recycling, remelting or disposal of steel scrap).

## Data sources
- GaBi Database (all versions)
- GaBi database SP36 2018
