# Fastening systems for rear-ventilated curtain wall facades

Dataset: ILCD process, EPD, average dataset
Geography: RER
Reference year: 2021
Valid until: 2026
Classification: OEKOBAU.DAT: Komponenten von Fenstern und Vorhangfassaden / Beschläge / Befestigungen
Classification: IBUCategories: 02 Bauprodukte / Befestigungen / Dübel aus Kunststoff und Metall
Method details: Dübel aus Kunststoff und Metall.pdf
Generated by: brands and values GmbH
Registration number: EPD-EJO-20210061-IBD1-DE
Owner: EJOT BAUBEFESTIGUNGEN GmbH
Compliance: DIN EN 15804+A2; ISO 14025
Review: Accredited third party review by Institut Bauen und Umwelt e. V.
Amounts: rows without a unit in brackets have none in this file; such an amount is in the reference unit of its flow, which a separate flow dataset defines
copyright: true
licenseType: Free of charge for all users and uses
accessRestrictions: None

## General comment
Connecting, fastening and anchoring elements of EJOT Baubefestigungen GmbH are finished products consisting of

a plastic sleeve and an expansion element made of steel or stainless steel, only a plastic element or only one or more steel parts.

The declaration applies to all anchoring, connecting and fastening elements mentioned below, which preferably

can be used in the rear-ventilated facades system or in conjunction with the rear-ventilated facades system.

## Technology and included processes
Raw materials/ Ancillary materials: The main basic materials or primary products for the anchoring and fastening products from the ventilated curtain wall system are: - Steel (mass 75-80 %) - PE HD Polyethylene high density (mass 15-17 %) - PA polyamide (3-6 %) Dyes (< 1 %). The auxiliary materials and additives are contained in the plastic granulate. In the EJOT production companies, no auxiliary materials and additives are used in production. Production: The plastic anchor sleeves are manufactured using conventional injection moulding techniques. For this purpose, an injection moulding machine is used to plasticise the respective plastic in an injection unit and inject it into an injection mould.The cavity of the mould determines the shape and surface structure of the finished part (here plastic anchor). Screws: The vast majority of screws and fasteners are produced by non-cutting cold forming. The cold extrusion process: The starting material is delivered as "wire" wound on spools and uncoiled, straightened and, if necessary, reduced to the desired diameter in equipment upstream of the presses. Modern cold extrusion presses work in several stages, i.e. several operations are linked in succession per stroke, e.g. preforming the screw head, upsetting, deburring and reducing the threaded part. In the subsequent process, the threads are rolled onto the reduced threaded parts by thread rolling machines with flat dies or rolling and segment tools without cutting. Preferably cold extrusion presses with integrated thread rolling machines are used. Technical data: The technical data are given as examples and representative for each of the 3 average declared products. Declared unit: The declared unit is an average anchor system for use in 1 m²rear-ventilated facades with a specific length of 120 mm, consisting of four individual systems. "Average" describes all produced anchor types of the system on average according to production shares weighted on the basis of a parameter analysis. This means that a hypothetical anchor system is calculated, which represents the entire rear-ventilated facades system. To convert the declared unit to kg, the weight per system is given.
Technical data:
The technical data are given as examples and representative for each of the 3 average declared products.
Declared unit:
The declared unit is an average anchor system for use in 1 m² rear-ventilated facades with a specific length of 120 mm, consisting of four individual systems.

"Average" describes all produced anchor types of the system on average according to production shares weighted on the basis of a parameter analysis. This means that a hypothetical anchor system is calculated, which represents the entire rear-ventilated facades system. To convert the declared unit to kg, the weight per system is given.

## Technical purpose
1.) The following products are preferably used for anchoring, connecting and / or fastening facade cladding:

-Insulation holder: DH

-Insulation metal holder / stress plate: DMH, DMT

-Fasteners Screws: JT3 & JT4 (stainless steel A2) JT6 & JT9 (stainless steel A4)

-Facade anchors 8 mm, 10 mm and 14 mm: SDF, SDP 2.) The following products are preferably used for the renovation of exterior wall elements:

-cavity wall repair anchor: VSD

-Pre-cast panel anchor: WSS

-KERI anchor

3.) The following products are used for anchoring load-bearing components in concrete:

-EJOT Through Bolts BA and BA-Plus

## Reference product
- durchschnittliche Dübelsysteme für VHF von 120 mm Länge (): 1

## Inputs
- Renewable primary energy as energy carrier (PERE) [MJ]: A1-A3 1.81303, C1 0.00198, C2 0.000691, C3 0.000477, C4 0.00222, D 0.0974
- Renewable primary energy resources as material utilization (PERM) [MJ]: A1-A3 0.30697, C1 0, C2 0, C3 0, C4 0, D 0
- Total use of renewable primary energy resources (PERT) [MJ]: A1-A3 2.12, C1 0.00198, C2 0.000691, C3 0.000477, C4 0.00222, D 0.0974
- Non renewable primary energy as energy carrier (PENRE) [MJ]: A1-A3 8.16233, C1 0.0343, C2 0.012, C3 1.11429, C4 0.0316, D -1.26
- Non renewable primary energy as material utilization (PENRM) [MJ]: A1-A3 1.10767, C1 0, C2 0, C3 -1.10767, C4 0, D 0
- Total use of non renewable primary energy resources (PENRT) [MJ]: A1-A3 9.27, C1 0.0343, C2 0.012, C3 0.00662, C4 0.0316, D -1.26
- Use of secondary material (SM) [kg]: A1-A3 0.0544334, C1 0, C2 0, C3 0, C4 0, D 0.0864943
- Use of renewable secondary fuels (RSF) [MJ]: A1-A3 0, C1 0, C2 0, C3 0, C4 0, D 0
- Use of non renewable secondary fuels (NRSF) [MJ]: A1-A3 0, C1 0, C2 0, C3 0, C4 0, D 0
- Use of net fresh water (FW) [m^3]: A1-A3 0.0024, C1 2.3e-6, C2 8.05e-7, C3 1.86e-6, C4 3.88e-7, D -0.000258

## Outputs
- Hazardous waste disposed (HWD) [kg]: A1-A3 2.03e-8, C1 1.59e-9, C2 5.54e-10, C3 1.73e-10, C4 1.15e-10, D -1.61e-7
- Non hazardous waste disposed (NHWD) [kg]: A1-A3 0.04, C1 5.44e-6, C2 1.9e-6, C3 1.79e-6, C4 0.0304, D 0.015
- Radioactive waste disposed (RWD) [kg]: A1-A3 0.000235, C1 6.32e-8, C2 2.21e-8, C3 8.74e-8, C4 3.82e-7, D 4.46e-8
- Components for re-use (CRU) [kg]: A1-A3 0, C1 0, C2 0, C3 0, C4 0, D 0
- Materials for recycling (MFR) [kg]: A1-A3 0.00529892, C1 0, C2 0, C3 0.098884, C4 0, D 0
- Materials for energy recovery (MER) [kg]: A1-A3 0.0128173, C1 0, C2 0, C3 0, C4 0, D 0
- Exported electrical energy (EEE) [MJ]: A1-A3 0, C1 0, C2 0, C3 0, C4 0, D 0
- Exported thermal energy (EET) [MJ]: A1-A3 0, C1 0, C2 0, C3 0, C4 0, D 0

## Impact indicators
- Global Warming Potential total (GWP-total) [kg CO_(2)-Äq.]: A1-A3 0.671, C1 0.00256, C2 0.000895, C3 0.000341, C4 0.00221, D -0.146
- Global Warming Potential fossil fuels (GWP-fossil) [kg CO_(2)-Äq.]: A1-A3 0.67, C1 0.00254, C2 0.000888, C3 0.000338, C4 0.00221, D -0.146
- Global Warming Potential biogenic (GWP-biogenic) [kg CO_(2)-Äq.]: A1-A3 0, C1 0, C2 0, C3 0, C4 0, D 0
- Global Warming Potential luluc (GWP-luluc) [kg CO_(2)-Äq.]: A1-A3 0.000548, C1 2.07e-5, C2 7.25e-6, C3 2.31e-6, C4 1.79e-6, D 4.17e-6
- Depletion potential of the stratospheric ozone layer (ODP) [kg CFC11-Äq.]: A1-A3 3.87e-11, C1 4.7e-19, C2 1.64e-19, C3 8.21e-19, C4 5e-18, D 3.19e-16
- Acidification potential of land and water (AP) [mol H^(+)-Äq.]: A1-A3 0.00243, C1 1.29e-5, C2 5.46e-6, C3 3.32e-6, C4 6.68e-6, D -0.000325
- Eutrophication potential aquatic freshwater (EP-freshwater) [kg PO_(4)-Äq.]: A1-A3 1.76e-6, C1 7.8e-9, C2 2.73e-9, C3 9.87e-10, C4 4.03e-7, D -8.27e-8
- Eutrophication potential aquatic marine (EP-marine) [kg N-Äq.]: A1-A3 0.000464, C1 6.14e-6, C2 2.64e-6, C3 1.61e-6, C4 1.48e-6, D -5.93e-5
- Eutrophication potential terrestrial (EP-terrestrial) [mol N-Äq.]: A1-A3 0.00482, C1 6.82e-5, C2 2.93e-5, C3 1.77e-5, C4 1.62e-5, D -0.000601
- Formation potential of tropospheric ozone photochemical oxidants (POCP) [kg NMVOC-Äq.]: A1-A3 0.00136, C1 1.25e-5, C2 5.1e-6, C3 4.7e-6, C4 4.82e-6, D -0.000245
- Abiotic depletion potential for non fossil resources (ADPE) [kg Sb-Äq.]: A1-A3 9.11e-5, C1 2.07e-10, C2 7.24e-11, C3 3.71e-10, C4 1.49e-10, D -2.37e-6
- Abiotic depletion potential for fossil resources (ADPF) [MJ]: A1-A3 9.26, C1 0.0342, C2 0.0119, C3 0.00661, C4 0.0316, D -1.26
- Water use (WDP) [m^(3) Welt-Äq. entzogen]: A1-A3 0.0716, C1 2.5e-5, C2 8.73e-6, C3 6.52e-5, C4 -2.48e-5, D -0.011
- Incidence of disease due to PM emissions (PM) [Krankheitsfälle]
- Human exposure efficiency relative to U235 (IR) [kBq U235-Äq.]
- Comparative toxic unit for ecosystems (ETP-fw) [CTUe]
- Comparative toxic unit for humans (carcinogenic) (HTP-c) [CTUh]
- Comparative toxic unit for humans (noncarcinogenic) (HTP-nc) [CTUh]
- Soil quality index (SQP) [SQP]

## Use advice
Scope:
The EPD refers to all products in the EJOT portfolio that are used in rear-ventilated facade systems. The declared product is manufactured in the plants Ciasna in Poland, Tambach in Germany and Dozwil in Switzerland. The data basis is the year 2012. The declared results apply to a length of 120 mm, for all other lengths the results can be extrapolated using the formula given.
System boundary:
Type of EPD: Cradle to factory gate - with options. The environmental product declaration refers to the production stage (module A1-A3), the disposal stage (modules C1-C4) as well as

Credits and loads outside the system boundary (module D).

In the production stage, the procurement of raw materials including the corresponding upstream chains, the necessary procurement transports to the plants as well as the energies required for the production of the anchor systems are considered.

The country-specific electricity mix was modelled for each of the plants. The material composition and the energy demand of the declared anchor systems were calculated according to their production shares in each plant.

In the disposal phase, the dismantling of the anchor systems (Module C1), the transport to waste treatment (Module C2), the waste treatment (Module C3) and the landfilling of the plastics (Module C4) are considered. Avoided burdens from the recycling of metals are reported in Module D. For this purpose, only the net scrap quantities are considered.

## Data sources
- GaBi Database (all versions)
- GaBi database SP40 2020
