# Particle board, melamine faced

Dataset: ILCD process, EPD, average dataset
Geography: GLO
Reference year: 2021
Valid until: 2025
Classification: OEKOBAU.DAT: Holz / Holzwerkstoffe / Spanplatten
Classification: IBUCategories: 01 Grundstoffe und Vorprodukte / Produkte für Beton, Mörtel und Einpressmörtel / Betonzusatzmittel
Method details: Betonzusatzmittel.pdf
Generated by: Thünen-Institut für Holzforschung
Registration number: EPD-VHI-20200163-IBH2-DE
Owner: Verband der Deutschen Holzwerkstoffindustrie e.V. (VHI)
Compliance: DIN EN 15804; ISO 14025
Review: Accredited third party review by Institut Bauen und Umwelt e. V.
Amounts: rows without a unit in brackets have none in this file; such an amount is in the reference unit of its flow, which a separate flow dataset defines
copyright: true
licenseType: Free of charge for all users and uses
accessRestrictions: None

## General comment
Melaminbeschichtete Spanplatten sind plattenförmige

Holzwerkstoffe. Sie bestehen hauptsächlich aus

kleinteiligen Holzpartikeln wie Spänen und Mehl und

werden mit duroplastischen Bindemitteln verpresst. Die

Oberflächen werden mit melamingetränkten

Beschichtungspapieren belegt.

## Technology and included processes
For the production of melamine-coated particleboard, wood raw materials are made of forest wood (industrial wood or wood chips), Industrial waste wood (industrial waste wood, wood chips, wood flour) and recycled wood (waste wood, rejects from our own production) first processed and dried.The fractions are sorted (sometimes even before drying) and mixed with binders before they are evenly scattered in horizontal layers and then pressed.The pressed plates or the pressed plate strand are separated and formatted. For the production of coated particleboard, the raw particleboard is covered with melamine resin-impregnated papers after the adhesives have been completely cured or bonded. The prepolymerized papers are then pressed with the partcicleboard in a hot press. The plates are trimmed and packed.

## Technical purpose
Melaminbeschichtete Spanplatten können im

dekorativen Innenausbau, Möbelbau sowie im Messe- und Ladenbau eingesetzt werden.

## Reference product
- beschichtete Spanplatte (): 1

## Inputs
- Renewable primary energy as energy carrier (PERE) [MJ]: A1 193.833, A2 11.2007, A3 1358.55, A5 31.6498, C2 0.597528, C3 29.6285, D -1970.6
- Renewable primary energy resources as material utilization (PERM) [MJ]: A1 7986.12, A2 0, A3 31.3812, A5 -31.3812, C2 0, C3 -7986.12, D 0
- Total use of renewable primary energy resources (PERT) [MJ]: A1 8179.96, A2 11.2007, A3 1389.93, A5 0.268595, C2 0.597528, C3 -7956.49, D -1970.6
- Non renewable primary energy as energy carrier (PENRE) [MJ]: A1 1640.21, A2 120.984, A3 1581.31, A5 6.37477, C2 10.3012, C3 54.8761, D -7520.3
- Non renewable primary energy as material utilization (PENRM) [MJ]: A1 677.452, A2 0, A3 5.07695, A5 -5.07695, C2 0, C3 -677.452, D 0
- Total use of non renewable primary energy resources (PENRT) [MJ]: A1 2317.66, A2 120.984, A3 1586.39, A5 1.29782, C2 10.3012, C3 -622.576, D -7520.3
- Use of secondary material (SM) [kg]: A1 119.054, A2 0, A3 0, A5 0, C2 0, C3 0, D 0
- Use of renewable secondary fuels (RSF) [MJ]: A1 0, A2 0, A3 591.609, A5 0, C2 0, C3 0, D 9688.79
- Use of non renewable secondary fuels (NRSF) [MJ]: A1 0, A2 0, A3 0, A5 0, C2 0, C3 0, D 677.452
- Use of net fresh water (FW) [m^3]: A1 1.04312, A2 0.0164321, A3 0.797617, A5 0.0118478, C2 0.00101021, C3 0.0159703, D 1.60363

## Outputs
- Hazardous waste disposed (HWD) [kg]: A1 0.000127169, A2 6.08609e-6, A3 6.14231e-6, A5 4.41831e-9, C2 5.75425e-7, C3 4.26415e-8, D -3.91365e-6
- Non hazardous waste disposed (NHWD) [kg]: A1 0.582944, A2 0.0176862, A3 2.31867, A5 0.0709251, C2 0.000837385, C3 0.0567517, D 18.3062
- Radioactive waste disposed (RWD) [kg]: A1 0.0222932, A2 0.00210212, A3 0.10749, A5 4.62216e-5, C2 1.39766e-5, C3 0.00516656, D -0.343244
- Components for re-use (CRU) [kg]: A1 0, A2 0, A3 0, A5 0, C2 0, C3 0, D 0
- Materials for recycling (MFR) [kg]: A1 0, A2 0, A3 0, A5 0, C2 0, C3 0, D 0
- Materials for energy recovery (MER) [kg]: A1 0, A2 0, A3 0, A5 0, C2 0, C3 638.976, D 0
- Exported electrical energy (EEE) [MJ]: A1 0, A2 0, A3 0, A5 6.16976, C2 0, C3 0, D 0
- Exported thermal energy (EET) [MJ]: A1 0, A2 0, A3 0, A5 14.4299, C2 0, C3 0, D 0

## Impact indicators
- Global warming potential (GWP) [kg CO_(2)-Äq.]: A1 -874.117, A2 8.56014, A3 108.568, A5 4.82859, C2 0.74653, C3 975.442, D -372.851
- Depletion potential of the stratospheric ozone layer (ODP) [kg CFC11-Äq.]: A1 6.48426e-11, A2 2.01291e-14, A3 4.68202e-12, A5 1.59816e-15, C2 1.25106e-16, C3 1.79649e-13, D -1.19312e-11
- Acidification potential of land and water (AP) [kg SO_(2)-Äq.]: A1 0.159442, A2 0.0352204, A3 0.203097, A5 0.000654867, C2 0.0031529, C3 0.00664178, D -0.441861
- Eutrophication potential (EP) [kg PO_(4)^(3)-Äq.]: A1 0.0790798, A2 0.00865777, A3 0.0404997, A5 0.000132707, C2 0.000802475, C3 0.00107963, D -0.0712567
- Formation potential of tropospheric ozone photochemical oxidants (POCP) [kg Ethen-Äq.]: A1 0.00973987, A2 -0.0136358, A3 0.211112, A5 3.53312e-5, C2 -0.00130191, C3 0.000438767, D -0.0405337
- Abiotic depletion potential for non fossil resources (ADPE) [kg Sb-Äq.]: A1 2.02412e-5, A2 8.30294e-7, A3 5.10759e-5, A5 1.11247e-7, C2 5.83641e-8, C3 1.79504e-6, D -0.00010201
- Abiotic depletion potential for fossil resources (ADPF) [MJ]: A1 2261.34, A2 115.68, A3 1309.83, A5 1.18107, C2 10.2653, C3 41.8279, D -6653.36

## Use advice
Gültigkeitsbereich:
Die Inhalte dieser Deklaration basieren auf den Angaben zur Herstellung beschichteter Spanplatten der folgenden im Verband der Deutschen Holzwerkstoffindustrie e.V. organisierten Hersteller:

- Pfleiderer Deutschland GmbH (Neumarkt, Leutkirch)

- Sonae Arauco Deutschland GmbH, Beeskow

- Rheinspan GmbH & Co. KG, Germersheim

Die Ökobilanz dieser Deklaration deckt 100 % der Produktion beschichteter Spanplatten der genannten Hersteller bzw. Werke im Jahr 2017 ab. Diese Deklaration kann für beschichtete Spanplatten der oben genannten Hersteller verwendet werden.
Systemgrenze:
Der Deklarationstyp entspricht einer EPD Wiege bis Werkstor – mit Optionen. Inhalte sind das Stadium der Produktion, also von der Bereitstellung der Rohstoffe bis zum Werkstor der Produktion (cradle-to-gate, Module A1 bis A3), sowie das Modul A5 und Teile des Endes des Lebensweges (Module C2 und C3). Darüber hinaus erfolgt eine Betrachtung der potenziellen Nutzen und Lasten über den Lebensweg des Produktes hinaus (Modul D).

Im Einzelnen werden in Modul A1 die Bereitstellung der Holzrohstoffe sowie die Bereitstellung der Kleb- und Zusatzstoffe inklusive des Beschichtungsmaterials bilanziert. Stofflich eingesetztes Altholz geht dabei ohne Lasten in das Produktsystem ein. Die Transporte der stofflich genutzten Rohstoffe, auch Altholz, zum Werk werden in Modul A2 berücksichtigt. Modul A3 umfasst die Bereitstellung der Brennstoffe, Betriebsmittel, der Produktverpackung und des Stroms sowie die Herstellungsprozesse vor Ort. Diese sind im Wesentlichen die Aufbereitung, Trocknung (inkl. Emissionen), Sortierung und Verpressung der Rohstoffe. In Modul A5 wird ausschließlich die Entsorgung der Produktverpackung abgebildet, welche den Ausgang des enthaltenen biogenen Kohlenstoffs sowie der enthaltenen Primärenergie (PERM und PENRM) einschließt.

Modul C2 berücksichtigt den Transport zum Entsorger und Modul C3 die Aufbereitung und Sortierung des Altholzes. Zudem werden in Modul C3 gemäß /EN 16485/ die CO2-Äquivalente des im Produkt befindlichen holzinhärenten Kohlenstoffs sowie die im Produkt enthaltene erneuerbare und nicht-erneuerbare Primärenergie (PERM und PENRM) als Abgänge verbucht.

Modul D bilanziert die thermische Verwertung des Produktes am Ende seines Lebenswegs sowie die daraus resultierenden potenziellen Nutzen und Lasten in Form einer Systemerweiterung.

## Data sources
- GaBi Database (all versions)
- GaBi database SP39 2019
