# Außen- und Innenwandbekleidungen - MN Metall GmbH - Fassadenbekleidungen; 1 m² Fläche, 1 mm Dicke

Dataset: ILCD process, EPD, specific dataset
Geography: DE
Reference year: 2019
Valid until: 2025
Classification: OEKOBAU.DAT: Komponenten von Fenstern und Vorhangfassaden / Fassaden / Sonstige Fassaden
Synonyms: Fassadenverkleidung; wellTEC®; colTEC®; planTEC®
Method details: EPD Fassadenbekleidungen; Produktkategorieregeln Teil A; Produktkategorieregeln Teil B – für Fassaden und Dächer aus Glas und Kunststoff
Owner: MN Metall GmbH
Compliance: EN 15804
Review: Independent external review by Patrick Wortner
Amounts: rows without a unit in brackets have none in this file; such an amount is in the reference unit of its flow, which a separate flow dataset defines
copyright: true

## General comment
A1-A3 sowie Module A4, A5, B1, B2, B3, B4, B5, B6, B7, C1, C2, C3, C4, D. Das Umweltprofil beinhaltet die Aufwendungen für die Lebenszyklus-Stadien cradle to grave. Die Herstellung der Verpackung wurde innerhalb der Module A1-A3 berücksichtigt.

## Geography
Dieser Datensatz repräsentiert die Situation des Unternehmens MN Metall GmbH in 23730 Neustadt, im Hinblick auf die wichtigsten Technologien und die gesetzlichen Rahmenbedingungen.

## Time period
jährlicher Durchschnitt

## Technology and included processes
Die Ökobilanzergebnisse umfassen die Lebenszyklusstadien der Herstellung der Vorprodukte bis hin zur Rohstoffgewinnung und Verarbeitungsprozesse von als Input dienenden Sekundärstoffen (z.B. Recyclingprozesse), deren Transporte zum Werk sowie die Produktion selbst, einschließlich der Bereitstellung von allen Hilfs- und Betriebsstoffen, Energie, sowie die vollständige Abfallbehandlung oder die Deponierung der Restabfälle während des Stadiums der Produktion. Die Module A1, A2 und A3 sind hier als ein aggregiertes Modul A1-A3 ausgewiesen. Falls für diesen Datensatz weitere Module berechnet wurden, sind diese separat zu finden und können für eine Betrachtung des gesamten Lebenszyklus zusammengeführt werden.

## Technical purpose
Fassadenbekleidung für Vorgehängte-Hinterlüftete Fassade (VHF).

## Reference product
- Außen- und Innenwandbekleidungen - MN Metall GmbH - Fassadenbekleidungen: 1

## Inputs
- Use of net fresh water (FW) [m3]: A1-A3 1.48, A4 4.56e-5, A5 0.0127, B1 0, B2 0, B3 0, B4 0, B5 0, B6 0, B7 0, C1 0, C2 2.91e-5, C3 0.000504, C4 1.09e-5, D -0.27
- Use of non renewable primary energy (PENRE) [MJ]: A1-A3 2681.68, A4 0.7, A5 2.22, B1 0, B2 0, B3 0, B4 0, B5 0, B6 0, B7 0, C1 0, C2 0.45, C3 0.98, C4 0.0432, D -291.47
- Use of non renewable primary energy resources used as raw materials (PENRM) [MJ]: A1-A3 1.11, A4 0, A5 -1.11, B1 0, B2 0, B3 0, B4 0, B5 0, B6 0, B7 0, C1 0, C2 0, C3 0, C4 0, D 0
- Use of non renewable secondary fuels (NRSF) [MJ]: A1-A3 0, A4 0, A5 0, B1 0, B2 0, B3 0, B4 0, B5 0, B6 0, B7 0, C1 0, C2 0, C3 0, C4 0, D 0
- Use of renewable primary energy (PERE) [MJ]: A1-A3 4048.51, A4 0.0393, A5 44.82, B1 0, B2 0, B3 0, B4 0, B5 0, B6 0, B7 0, C1 0, C2 0.0252, C3 0.44, C4 0.00566, D -110.69
- Use of renewable primary energy resources used as raw materials (PERM) [MJ]: A1-A3 44.61, A4 0, A5 -44.61, B1 0, B2 0, B3 0, B4 0, B5 0, B6 0, B7 0, C1 0, C2 0, C3 0, C4 0, D 0
- Use of renewable secondary fuels (RSF) [MJ]: A1-A3 0, A4 0, A5 0, B1 0, B2 0, B3 0, B4 0, B5 0, B6 0, B7 0, C1 0, C2 0, C3 0, C4 0, D 0
- Use of secondary material (SM) [kg]: A1-A3 1.6, A4 0, A5 0, B1 0, B2 0, B3 0, B4 0, B5 0, B6 0, B7 0, C1 0, C2 0, C3 0, C4 0, D 0
- Total use of non renewable primary energy resource (PENRT) [MJ]: A1-A3 2682.79, A4 0.7, A5 1.11, B1 0, B2 0, B3 0, B4 0, B5 0, B6 0, B7 0, C1 0, C2 0.45, C3 0.98, C4 0.0432, D -291.47
- Total use of renewable primary energy resources (PERT) [MJ]: A1-A3 4093.12, A4 0.0393, A5 0.21, B1 0, B2 0, B3 0, B4 0, B5 0, B6 0, B7 0, C1 0, C2 0.0252, C3 0.44, C4 0.00566, D -110.69

## Outputs
- Components for re-use (CRU) [kg]: A1-A3 0, A4 0, A5 0, B1 0, B2 0, B3 0, B4 0, B5 0, B6 0, B7 0, C1 0, C2 0, C3 0, C4 0, D 0
- Exported electrical energy (EEE) [MJ]: A1-A3 0, A4 0, A5 7.66, B1 0, B2 0, B3 0, B4 0, B5 0, B6 0, B7 0, C1 0, C2 0, C3 0, C4 0, D 0
- Exported thermal energy (EET) [MJ]: A1-A3 0, A4 0, A5 13.74, B1 0, B2 0, B3 0, B4 0, B5 0, B6 0, B7 0, C1 0, C2 0, C3 0, C4 0, D 0
- Hazardous waste disposed (HWD) [kg]: A1-A3 3.78e-6, A4 3.26e-8, A5 7.73e-10, B1 0, B2 0, B3 0, B4 0, B5 0, B6 0, B7 0, C1 0, C2 2.09e-8, C3 4.07e-10, C4 6.58e-10, D -2.25e-7
- Materials for energy recovery (MER) [kg]: A1-A3 0, A4 0, A5 0, B1 0, B2 0, B3 0, B4 0, B5 0, B6 0, B7 0, C1 0, C2 0, C3 0, C4 0, D 0
- Materials for recycling (MFR) [kg]: A1-A3 1.55, A4 0, A5 0, B1 0, B2 0, B3 0, B4 0, B5 0, B6 0, B7 0, C1 0, C2 0, C3 4.85, C4 0, D 0
- Non hazardous waste dispose (NHWD) [kg]: A1-A3 2.32, A4 0.000107, A5 0.0369, B1 0, B2 0, B3 0, B4 0, B5 0, B6 0, B7 0, C1 0, C2 6.86e-5, C3 0.000697, C4 0.217, D -5.22
- Radioactive waste disposed (RWD) [kg]: A1-A3 0.15, A4 8.67e-7, A5 6.35e-5, B1 0, B2 0, B3 0, B4 0, B5 0, B6 0, B7 0, C1 0, C2 5.55e-7, C3 0.000149, C4 4.92e-7, D -0.0168

## Impact indicators
- Abiotic depletion potential for non fossil resources (ADPE) [kg Sb eq.]: A1-A3 0.000656, A4 4.26e-9, A5 4.86e-8, B1 0, B2 0, B3 0, B4 0, B5 0, B6 0, B7 0, C1 0, C2 2.73e-9, C3 1.83e-8, C4 1.14e-9, D -0.000179
- Abiotic depletion potential for fossil resources (ADPF) [MJ]: A1-A3 2015.93, A4 0.7, A5 0.95, B1 0, B2 0, B3 0, B4 0, B5 0, B6 0, B7 0, C1 0, C2 0.45, C3 0.61, C4 0.042, D -248.88
- Acidification potential of soil and water (AP) [kg SO2 eq.]: A1-A3 0.47, A4 0.000204, A5 0.000498, B1 0, B2 0, B3 0, B4 0, B5 0, B6 0, B7 0, C1 0, C2 0.00013, C3 0.000115, C4 1.9e-5, D -0.0924
- Eutrophication potential (EP) [kg (PO4)3- eq.]: A1-A3 0.0707, A4 5.09e-5, A5 0.000106, B1 0, B2 0, B3 0, B4 0, B5 0, B6 0, B7 0, C1 0, C2 3.26e-5, C3 1.27e-5, C4 2.14e-6, D -0.00537
- Global warming potential (GWP) [kg CO2 eq.]: A1-A3 196.76, A4 0.0511, A5 5.24, B1 0, B2 0, B3 0, B4 0, B5 0, B6 0, B7 0, C1 0, C2 0.0327, C3 0.0548, C4 0.00296, D -21.88
- Depletion potential of the stratospheric ozone layer (ODP) [kg CFC 11 eq.]: A1-A3 3.5e-10, A4 8.42e-18, A5 8.39e-16, B1 0, B2 0, B3 0, B4 0, B5 0, B6 0, B7 0, C1 0, C2 5.39e-18, C3 1.64e-15, C4 1.63e-17, D -9.83e-14
- Formation potential of tropospheric ozone (POCP) [kg C2H2 eq.]: A1-A3 0.0313, A4 -7.64e-5, A5 4.1e-5, B1 0, B2 0, B3 0, B4 0, B5 0, B6 0, B7 0, C1 0, C2 -4.89e-5, C3 8.19e-6, C4 1.43e-6, D -0.00532

## Use advice
Dieser Datensatz beinhaltet die Ergebnisse für die Module A1-A3 sowie die Module A4, A5, B1, B2, B3, B4, B5, B6, B7, C1, C2, C3, C4, D gemäß EN 15804. Ein Vergleich mit anderen Produkten ist nur mit einer vergleichbaren Anwendung im Gebäude zulässig. Grundsätzlich ist eine Gegenüberstellung oder die Bewertung von EPD Daten nur möglich, wenn alle zu vergleichenden Datensätze nach EN 15804 erstellt wurden und der Gebäudekontext, bzw. die produktspezifischen Leistungsmerkmale berücksichtigt werden.

## Review details
Die angewendete LCI Methode ist in Übereinstimmung mit ISO 14040 und 14044. Die Dokumentation enthält alle relevanten Informationen im Hinblick auf die Datenqualität und den Umfang der Anwendung der jeweiligen LCI Ergebnisse bzw. der Datensätze. Der Datensatz repräsentiert den Stand der Technik bezogen auf die funktionelle Einheit.

## Data sources
- GaBi database (general)
