# NedZink NOVA, NedZink NEO, NedZink NOIR

Dataset: ILCD process, EPD, specific dataset
Geography: RER
Reference year: 2022
Valid until: 2027
Classification: OEKOBAU.DAT: Metalle / Zink / Zinkbleche
Classification: IBUCategories: 02 Building products / Metallic products and ancillaries / Building metals
Method details: Building metals.pdf
Generated by: Stichting Adviescentrum Metaal
Registration number: EPD-NED-20200257-IBA1-EN
Owner: NedZink B.V.
Compliance: DIN EN 15804+A2; ISO 14025
Review: Accredited third party review by Institut Bauen und Umwelt e. V.
Amounts: rows without a unit in brackets have none in this file; such an amount is in the reference unit of its flow, which a separate flow dataset defines
copyright: true
licenseType: Free of charge for all users and uses
accessRestrictions: None

## General comment
NedZink® NOVA/NedZink® NEO/NedZink® NOIR is pre-weathered titanium zinc produced by NedZink according to EN 988.

Small quantities, as specified in EN 988, of the alloy elements copper, titanium and aluminium are added to electrolytically refined zinc (with a purity of min. 99,995% Zn, Z1 according to EN 1179).

The chemical composition, mechanical and physical properties and measurement tolerances are determined in the KOMO product certificate and certified as NedZink NTZ® by Lloyd's Register

Product certificate (approval No QIS 122). The defined material properties are checked by an independent and neutral research institute.

This product certification and the ISO 9001 certificate for the quality management system at NedZink assure a constant and uniform high-quality standard.

NedZink® NOVA is pre-weathered titanium zinc in a matt natural medium grey colour. NedZink® NEO is pre-weathered titanium zinc in a matt natural mineral grey colour. NedZink® NOIR is pre-weathered titanium zinc in an anthracite black colour.

## Technology and included processes
The manufacturing process of pre-weathered rolled zinc includes the following steps: Pre-alloy: In order to improve the properties of zinc, and for energy saving purposes, a pre-alloy with titanium, copper and aluminium is prepared in an induction furnace. This pre-alloy is poured into ingots. Melting: In the melting furnace the Special High Grade (SHG) zinc and the ingots are mixed homogeneously. Zinc with the right composition is pumped to the casting furnace. Casting: Casting takes place from the casting furnace into a vertical casting installation. The zinc is cast into blocks, cooled down with a closed water system and stored for further processing. Rolling and coiling: Blocks coming from the casting installation are homogeneous pre-heated for the “hot rolling” process. This takes place in a gas-fired continuous oven. During the hot rolling on a reversible rolling machine the blocks are processed to a predefined thickness. At the end of the rolling installation the zinc is coiled and stored to cool off. On the reversible cold-rolling mill the coils are rolled to the desired final thickness. For cooling and lubrication of the process a special emulsion is used Stretching and cutting: Tension in the coils is released by a stretching-and straightening process. The zinc is uniquely marked and slitted and cut to the desired width and length. Pre-weathering: In a continuously operating production line the coils are degreased, brushed and phosphated to get a prepatinated medium gray appearance for NedZink® NOVA or a mineral grey appearance for NedZink® NEO. With an additional proces for NedZink® NOIR an anthracite black appearance is created. After rinsing and drying the material surface is provided with a thin transparent protection layer and stored in the warehouse. Quality control: During the entire process extensive quality checks are conducted by the manufacturer and Lloyd's Register. Quality Management according to ISO 9001. Product quality is checked by Lloyd's Register and approved with an Industrial Quality Scheme Approval Certificate QIS122 Additionally the quality control is audited by Kiwa and declared against: - BRL2034, KOMO K7054/04 zinc sheets - BRL2035, KOMO K7057/04 zinc gutters - BRL2044, KOMO K7063/04 zinc downpipes
Technical data:
The main constructional data are presented in the following table:
Declared unit:
The declared unit is 1 kg of NedZink® NOVA/ NedZink® NEO/NedZink® NOIR, pre-weathered titanium zinc.

## Technical purpose
NedZink® NOVA/NedZink® NEO/NedZink® NOIR titanium zinc coils, sheets, strips and profiles are used for:
- roof and façade cladding (CE-marked based on EN14782:2006, Self-supporting metal sheet for roofing, external cladding and internal lining or EN14783:2013, Fully supported metal sheet and strip for roofing, external cladding and internal lining)
- interior use
- roof drainage systems (gutters, downpipes and accessories according to EN612)
- ornaments

## Reference product
- 1 kg NEDZINK NOVA/NEO/NOIR (1 kg NEDZINK NOVA/NOIR): 1

## Inputs
- Renewable primary energy as energy carrier (PERE) [MJ]: A1-A3 8.72543, C1 1.29084e-5, C2 0.00152167, C3 0.00827405, C4 5.95153e-5, D -5.61588
- Renewable primary energy resources as material utilization (PERM) [MJ]: A1-A3 0.201, C1 0, C2 0, C3 0, C4 0, D 0
- Total use of renewable primary energy resources (PERT) [MJ]: A1-A3 8.92643, C1 1.29084e-5, C2 0.00152167, C3 0.00827405, C4 5.95153e-5, D -5.61588
- Non renewable primary energy as energy carrier (PENRE) [MJ]: A1-A3 71.3998, C1 0.00253438, C2 0.112606, C3 0.833817, C4 0.00781878, D -44.0275
- Non renewable primary energy as material utilization (PENRM) [MJ]: A1-A3 0, C1 0, C2 0, C3 0, C4 0, D 0
- Total use of non renewable primary energy resources (PENRT) [MJ]: A1-A3 71.3998, C1 0.00253438, C2 0.112606, C3 0.833817, C4 0.00781878, D -44.0275
- Use of secondary material (SM) [kg]: A1-A3 0, C1 0, C2 0, C3 0, C4 0, D 0.947398
- Use of renewable secondary fuels (RSF) [MJ]: A1-A3 0, C1 0, C2 0, C3 0, C4 0, D 0
- Use of non renewable secondary fuels (NRSF) [MJ]: A1-A3 0, C1 0, C2 0, C3 0, C4 0, D 0
- Use of net fresh water (FW) [m^3]: A1-A3 0.119533, C1 1.2283e-7, C2 1.20034e-5, C3 5.87127e-5, C4 7.86158e-6, D -0.0895387

## Outputs
- Hazardous waste disposed (HWD) [kg]: A1-A3 0.0118464, C1 6.50013e-9, C2 2.71248e-7, C3 2.06147e-6, C4 1.09995e-8, D -0.00946334
- Non hazardous waste disposed (NHWD) [kg]: A1-A3 0.639097, C1 2.82556e-6, C2 0.0065739, C3 0.00106431, C4 0.0499847, D -0.408019
- Radioactive waste disposed (RWD) [kg]: A1-A3 0.000306483, C1 1.65709e-8, C2 7.21309e-7, C3 5.31864e-6, C4 4.83403e-8, D -0.000214313
- Components for re-use (CRU) [kg]: A1-A3 0, C1 0, C2 0, C3 0, C4 0, D 0
- Materials for recycling (MFR) [kg]: A1-A3 0.188339, C1 1.18834, C2 2.18834, C3 3.18834, C4 0, D 0
- Materials for energy recovery (MER) [kg]: A1-A3 0, C1 0, C2 0, C3 0, C4 0, D 0
- Exported electrical energy (EEE) [MJ]: A1-A3 0, C1 0, C2 0, C3 0, C4 0, D 0
- Exported thermal energy (EET) [MJ]: A1-A3 0, C1 0, C2 0, C3 0, C4 0, D 0

## Impact indicators
- Global Warming Potential total (GWP-total) [kg CO_(2)-Äq.]: A1-A3 4.72671, C1 0.000173457, C2 0.00691558, C3 0.0572628, C4 0.000263872, D -2.9118
- Global Warming Potential fossil fuels (GWP-fossil) [kg CO_(2)-Äq.]: A1-A3 4.56266, C1 0.000173395, C2 0.00690894, C3 0.057222, C4 0.000263276, D -2.78155
- Global Warming Potential biogenic (GWP-biogenic) [kg CO_(2)-Äq.]: A1-A3 0.150426, C1 4.8226e-8, C2 4.1958e-6, C3 3.09366e-5, C4 5.22066e-7, D -0.120755
- Global Warming Potential luluc (GWP-luluc) [kg CO_(2)-Äq.]: A1-A3 0.0136265, C1 1.36658e-8, C2 2.44551e-6, C3 9.83028e-6, C4 7.33947e-8, D -0.00949344
- Depletion potential of the stratospheric ozone layer (ODP) [kg CFC11-Äq.]: A1-A3 3.72128e-7, C1 3.74463e-11, C2 1.59232e-9, C3 1.18886e-8, C4 1.08425e-10, D -2.07951e-7
- Acidification potential of land and water (AP) [mol H^(+)-Äq.]: A1-A3 0.0438933, C1 1.81359e-6, C2 3.93602e-5, C3 0.00058416, C4 2.49953e-6, D -0.0275185
- Eutrophication potential aquatic freshwater (EP-freshwater) [kg PO_(4)-Äq.]: A1-A3 0.000458329, C1 6.31246e-10, C2 5.68583e-8, C3 3.48239e-7, C4 2.95116e-9, D -0.000326436
- Eutrophication potential aquatic marine (EP-marine) [kg N-Äq.]: A1-A3 0.00853994, C1 8.00621e-7, C2 1.40833e-5, C3 0.000254056, C4 8.59627e-7, D -0.00594348
- Eutrophication potential terrestrial (EP-terrestrial) [mol N-Äq.]: A1-A3 0.0966325, C1 8.78467e-6, C2 0.000155197, C3 0.00278834, C4 9.47799e-6, D -0.0670687
- Formation potential of tropospheric ozone photochemical oxidants (POCP) [kg NMVOC-Äq.]: A1-A3 0.0248064, C1 2.41535e-6, C2 4.43669e-5, C3 0.000766529, C4 2.75307e-6, D -0.0167258
- Abiotic depletion potential for non fossil resources (ADPE) [kg Sb-Äq.]: A1-A3 0.0930138, C1 2.65925e-10, C2 1.78754e-7, C3 9.36668e-8, C4 2.40953e-9, D -0.0731759
- Abiotic depletion potential for fossil resources (ADPF) [MJ]: A1-A3 66.9198, C1 0.00238648, C2 0.106067, C3 0.78513, C4 0.00736086, D -41.4006
- Water use (WDP) [m^(3) world-Äq. deprived]: A1-A3 3.86611, C1 3.19646e-6, C2 0.000325503, C3 0.00143169, C4 0.000329956, D -3.00894
- Incidence of disease due to PM emissions (PM) [Disease incidence]: A1-A3 1.684e-7, C1 4.79826e-11, C2 6.23726e-10, C3 1.51888e-8, C4 4.84932e-11, D -9.6178e-8
- Human exposure efficiency relative to U235 (IR) [kBq U235-Äq.]: A1-A3 0.417001, C1 1.02266e-5, C2 0.000463601, C3 0.00336896, C4 3.0196e-5, D -0.3081
- Comparative toxic unit for ecosystems (ETP-fw) [CTUe]: A1-A3 860.536, C1 0.00143862, C2 0.0861286, C3 0.504436, C4 0.00477497, D -661.373
- Comparative toxic unit for humans (carcinogenic) (HTP-c) [CTUh]: A1-A3 2.11755e-8, C1 5.02738e-14, C2 3.06601e-12, C3 1.67598e-11, C4 1.10379e-13, D -1.62301e-8
- Comparative toxic unit for humans (noncarcinogenic) (HTP-nc) [CTUh]: A1-A3 6.28221e-7, C1 1.23941e-12, C2 1.02878e-10, C3 4.18737e-10, C4 3.41196e-12, D -4.80486e-7
- Soil quality index (SQP) [SQP]: A1-A3 32.6042, C1 0.000304571, C2 0.0907099, C3 0.115729, C4 0.0154372, D -21.2689

## Use advice
Scope:
The Life Cycle Assessment (LCA) was carried out according to ISO 14040, ISO 14044 and EN 15804. The LCA is performed for the pre-weathered products NedZink® NOVA/NedZink® NEO/NedZink® NOIR manufactured by NedZink B.V. in Budel-Dorplein, Netherlands.
The pre-weathered rolled zinc from NedZink covered by this EPD can be used in buildings as roof, façade or rainwater systems. The LCA was carried out for the manufacturing phase of the declared product, containing information on raw and secondary material production, transport and packaging (cradle to gate). Possible credits after the end of life phase (module D), demolition (C1), transport to waste processing and disposal (C2), waste processing (C3) and waste disposal (C4) are also included.
System boundary:
Type of the EPD: Cradle-to-Gate with options. Modules A1, A2 and A3 contain information on the raw- and secondary material extraction, transport to the manufacturer, manufacturing and packaging.
Module C1 - C4 (end of life) and module D (applicable to the aforementioned modules) are declared. Modules A4, A5 and B1-B7 are not declared.

## Data sources
- ecoinvent database (all versions)
- ecoinvent 3.6 database
