# Betonpflasterstein mit schwarz-weiß meliertem Vorsatz

Dataset: ILCD process, EPD, specific dataset
Geography: DE
Reference year: 2017
Valid until: 2022
Classification: OEKOBAU.DAT: Mineralische Baustoffe / Steine und Elemente / Betonfertigteile und Betonwaren
Classification: IBUCategories: 02 Bauprodukte / Tiefbauprodukte / Oberbaumaterialien für Verkehrswege im Aussenbereich
Method details: Oberbaumaterialien für Verkehrswege im Aussenbereich.pdf
Generated by: Sphera Solutions GmbH
Registration number: EPD-KRO-20160234-CCA1-DE
Owner: Kronimus AG - Betonsteinwerke
Compliance: DIN EN 15804; ISO 14025
Review: Accredited third party review by Institut Bauen und Umwelt e. V.
Amounts: rows without a unit in brackets have none in this file; such an amount is in the reference unit of its flow, which a separate flow dataset defines
copyright: true
licenseType: Free of charge for all users and uses
accessRestrictions: None

## General comment
Die deklarierten Produkte sind Pflastersteine unterschiedlicher Formate in der Steinstärke 6 cm. Das Flächengewicht beträgt 135 kg/m² mit einer mischfarbigen (melierten) Oberfläche, bestehend aus Weiß- und Grauzement mit Sandbestandteilen, ansonsten unbearbeitet. Der Beton wird aus Zuschlägen (Gesteinkörnungen) Zement, Wasser, Zusatzmitteln und Zusatzstoffen hergestellt.
Für den Kernbeton wird nur Grauzement verwendet. Im Gegensatz dazu enthält der Vorsatz aufgrund der Schwarz-Weiß-Melierung teilweise Weißzement und zusätzlich Grauzement unter Zugabe von Pigmenten.
Maßgeblich für die Fertigung und Qualitätsbeurteilung ist die /EN 1338/ mit Ausnahme Frost- und Tausalzbeständigkeit und Abrieb.

## Technology and included processes
The declared products are paving stones of various formats with a stone thickness of 6 cm. The surface weight is 135 kg / m² with a mixed-colored (mottled) surface, consisting of white and gray cement with sand components, but unprocessed. The concrete is made from aggregates (aggregates) cement, water, admixtures and additives. Only gray cement is used for the core concrete. In contrast, the intent contains due to the Black and white mottling partially white cement and additional gray cement with the addition of pigments. The life cycle assessment includes the production of the Concrete paving stone including raw material extraction, energy supply, raw material transport to the factory as well as expenses for the actual production.

## Technical purpose
Diese Betonpflastersteine sind einsetzbar im Außenbereich, z. B. Höfen, Gärten- und Gehwegen, auf Dächern und in überdeckten Bereichen.

## Reference product
- Betonpflasterstein mit schwarz-weiß meliertem Vorsatz: 1

## Inputs
- Renewable primary energy as energy carrier (PERE) [MJ]: A1-A3 11.9
- Renewable primary energy resources as material utilization (PERM) [MJ]: A1-A3 11.5
- Total use of renewable primary energy resources (PERT) [MJ]: A1-A3 23.4
- Non renewable primary energy as energy carrier (PENRE) [MJ]: A1-A3 110.3
- Non renewable primary energy as material utilization (PENRM) [MJ]: A1-A3 0.7
- Total use of non renewable primary energy resources (PENRT) [MJ]: A1-A3 111
- Use of secondary material (SM) [kg]: A1-A3 3.68
- Use of renewable secondary fuels (RSF) [MJ]: A1-A3 0
- Use of non renewable secondary fuels (NRSF) [MJ]: A1-A3 0
- Use of net fresh water (FW) [m^3]: A1-A3 0.07

## Outputs
- Hazardous waste disposed (HWD) [kg]: A1-A3 0.0003
- Non hazardous waste disposed (NHWD) [kg]: A1-A3 2.04
- Radioactive waste disposed (RWD) [kg]: A1-A3 0.00505
- Components for re-use (CRU) [kg]: A1-A3 0
- Materials for recycling (MFR) [kg]: A1-A3 0
- Materials for energy recovery (MER) [kg]: A1-A3 0
- Exported electrical energy (EEE) [MJ]: A1-A3 0
- Exported thermal energy (EET) [MJ]: A1-A3 0

## Impact indicators
- Global warming potential (GWP) [kg CO_(2)-Äq.]: A1-A3 18.1
- Depletion potential of the stratospheric ozone layer (ODP) [kg CFC11-Äq.]: A1-A3 9.12e-10
- Acidification potential of land and water (AP) [kg SO_(2)-Äq.]: A1-A3 0.0295
- Eutrophication potential (EP) [kg PO_(4)^(3)-Äq.]: A1-A3 0.00389
- Formation potential of tropospheric ozone photochemical oxidants (POCP) [kg Ethen-Äq.]: A1-A3 0.00271
- Abiotic depletion potential for non fossil resources (ADPE) [kg Sb-Äq.]: A1-A3 2.77e-5
- Abiotic depletion potential for fossil resources (ADPF) [MJ]: A1-A3 98.4

## Use advice
Gültigkeitsbereich:
Die vorliegende Umweltproduktdeklaration bildet 1 m² Betonpflasterstein in melierter Oberflächenausführung, hergestellt in den Werken der Kronimus-Gruppe ab. Sie beruht auf den Produktionsdaten der Werke 76473 Iffezheim, 79258 Hartheim a. Rhein, 74076 Heilbronn und F-57281 Maizières- Lès- Metz. Die Werte wurden gemäß Produktionsanteil des einzelnen Standortes gewichtet und basieren auf dem Durchschnitt des Jahres 2014.
Systemgrenze:
Typ der EPD: Wiege bis Werkstor.
Die Ökobilanz beinhaltet die Herstellung des Betonpflastersteins inclusive Rohstoffgewinnung, Energiebereitstellung, Rohstofftransport zum Werk sowie Aufwände für die eigentliche Herstellung.

Einflüsse von Abfällen werden in den Modulen berücksichtigt, in denen diese anfallen. Pflastersteine, die den Qualitätsanforderungen nicht entsprechen, werden jeweils in örtlichen Recycling-Betrieben zu Straßenunterbaumaterial gebrochen und einer weiteren Verwendung zugeführt.
In der Herstellung benötigte Maschinen, Anlagen und Infrastruktur werden vernachlässigt.

## Data sources
- GaBi Database (all versions)
- GaBi database SP29 2016
