# Tectofin RG

Dataset: ILCD process, EPD, average dataset
Geography: RER
Reference year: 2020
Valid until: 2025
Classification: OEKOBAU.DAT: Kunststoffe / Dachbahnen / PVC-Dachbahnen
Classification: IBUCategories: 02 Bauprodukte / Abdichtungen / Dach- und Dichtungsbahnsysteme aus Kunststoffen und Elastomeren
Method details: Dach- und Dichtungsbahnsysteme aus Kunststoffen und Elastomeren.pdf
Generated by: BMI Technical Services GmbH
Registration number: EPD-BMI-20200176-IBB1-DE
Owner: BMI Technical Services GmbH
Compliance: DIN EN 15804+A2; ISO 14025
Review: Accredited third party review by Institut Bauen und Umwelt e. V.
Amounts: rows without a unit in brackets have none in this file; such an amount is in the reference unit of its flow, which a separate flow dataset defines
copyright: true
licenseType: Free of charge for all users and uses
accessRestrictions: None

## General comment
Tectofin RG is a centrally-reinforced, bitumen-compatible synthetic roofing and sealing membrane based on a patented recipe combination of high-polymer plastic with rubber.

Designation acc. to DIN SPEC 20000-201:

DE/E1 PVC-P-BV-V-(GG)-1.5 (1.8), (2.0)

Designation acc. to DIN SPEC 20000-202: BA PVC-P-BV-V-(GG)-1.5 (1.8), (2.0)

## Technology and included processes
Declared unit:
The declared unit is 1 m² Tectofin RG of roof membrane produced. The Declaration applies for a thickness of 1.5 mm and a basis weight of 1.9 kg/m².

## Technical purpose
Tectofin RG is a single-layer high-polymer synthetic roofing and building waterproofing system. The sheets are laid loosely with ballast (gravel, paving, greenery, parking deck or similar) or fastened mechanically.

Tectofin RG is also used as a damp-proof sheet (type A) and as a tanking sheet (type T).

The manufacturer’s installation instructions must be observed during processing.

## Reference product
- Tectofin RG Dicke: 1,5mm; Flächengewicht: 1,9 kg/m²: 1

## Inputs
- Renewable primary energy as energy carrier (PERE) [MJ]: A1-A3 17.7831, C1 0, C2 0.00349, C3 1.89, C4 0, D -4.35
- Renewable primary energy resources as material utilization (PERM) [MJ]: A1-A3 0.632, C1 0, C2 0, C3 0, C4 0, D 0
- Total use of renewable primary energy resources (PERT) [MJ]: A1-A3 18.4151, C1 0, C2 0.00349, C3 1.89, C4 0, D -4.35
- Non renewable primary energy as energy carrier (PENRE) [MJ]: A1-A3 120.974, C1 0, C2 0.06, C3 45.2, C4 0, D -20
- Non renewable primary energy as material utilization (PENRM) [MJ]: A1-A3 40.258, C1 0, C2 0, C3 -36.1, C4 0, D 0
- Total use of non renewable primary energy resources (PENRT) [MJ]: A1-A3 161.232, C1 0, C2 0.06, C3 9.1, C4 0, D -20
- Use of secondary material (SM) [kg]: A1-A3 0, C1 0, C2 0, C3 0, C4 0, D 0
- Use of renewable secondary fuels (RSF) [MJ]: A1-A3 0, C1 0, C2 0, C3 0, C4 0, D 0
- Use of non renewable secondary fuels (NRSF) [MJ]: A1-A3 0, C1 0, C2 0, C3 0, C4 0, D 0
- Use of net fresh water (FW) [m^3]: A1-A3 0.0505125, C1 0, C2 3.13e-6, C3 0.01, C4 0, D -0.00503

## Outputs
- Hazardous waste disposed (HWD) [kg]: A1-A3 1.0802e-6, C1 0, C2 2.24e-9, C3 4.11e-8, C4 0, D -7.97e-9
- Non hazardous waste disposed (NHWD) [kg]: A1-A3 0.351236, C1 0, C2 1.05e-5, C3 3.02, C4 0, D -0.00922
- Radioactive waste disposed (RWD) [kg]: A1-A3 0.00206446, C1 0, C2 6.31e-8, C3 0.000288, C4 0, D -0.00148
- Components for re-use (CRU) [kg]: A1-A3 0, C1 0, C2 0, C3 0, C4 0, D 0
- Materials for recycling (MFR) [kg]: A1-A3 0, C1 0, C2 0, C3 0, C4 0, D 0
- Materials for energy recovery (MER) [kg]: A1-A3 0, C1 0, C2 0, C3 0, C4 0, D 0
- Exported electrical energy (EEE) [MJ]: A1-A3 0, C1 0, C2 0, C3 4.97, C4 0, D 0
- Exported thermal energy (EET) [MJ]: A1-A3 0, C1 0, C2 0, C3 9.05, C4 0, D 0

## Impact indicators
- Global Warming Potential total (GWP-total) [kg CO_(2)-Äq.]: A1-A3 8.2907, C1 0, C2 0.00453, C3 4.93, C4 0, D -1.18
- Global Warming Potential fossil fuels (GWP-fossil) [kg CO_(2)-Äq.]: A1-A3 8.5285, C1 0, C2 0.00451, C3 4.93, C4 0, D -1.18
- Global Warming Potential biogenic (GWP-biogenic) [kg CO_(2)-Äq.]: A1-A3 -0.252187, C1 0, C2 1.82e-6, C3 -0.00215, C4 0, D -0.00276
- Global Warming Potential luluc (GWP-luluc) [kg CO_(2)-Äq.]: A1-A3 0.014286, C1 0, C2 1.89e-5, C3 0.001, C4 0, D -0.000822
- Depletion potential of the stratospheric ozone layer (ODP) [kg CFC11-Äq.]: A1-A3 1.23535e-10, C1 0, C2 1.11e-18, C3 7.5e-15, C4 0, D -1.22e-14
- Acidification potential of land and water (AP) [mol H^(+)-Äq.]: A1-A3 0.0155073, C1 0, C2 3.79e-6, C3 0.00146, C4 0, D -0.00165
- Eutrophication potential aquatic freshwater (EP-freshwater) [kg PO_(4)-Äq.]: A1-A3 9.20708e-5, C1 0, C2 9.83e-9, C3 1.26e-6, C4 0, D -1.51e-6
- Eutrophication potential aquatic marine (EP-marine) [kg N-Äq.]: A1-A3 0.0045229, C1 0, C2 1.1e-6, C3 0.000484, C4 0, D -0.000426
- Eutrophication potential terrestrial (EP-terrestrial) [mol N-Äq.]: A1-A3 0.0466675, C1 0, C2 1.35e-5, C3 0.00592, C4 0, D -0.00457
- Formation potential of tropospheric ozone photochemical oxidants (POCP) [kg NMVOC-Äq.]: A1-A3 0.016719, C1 0, C2 3.05e-6, C3 0.00137, C4 0, D -0.00123
- Abiotic depletion potential for non fossil resources (ADPE) [kg Sb-Äq.]: A1-A3 161.232, C1 0, C2 0.06, C3 9.1, C4 0, D -20
- Abiotic depletion potential for fossil resources (ADPF) [MJ]: A1-A3 1.05467e-5, C1 0, C2 3.75e-10, C3 1.08e-7, C4 0, D -1.93e-7
- Water use (WDP) [m^(3) Welt-Äq. entzogen]: A1-A3 0.47474, C1 0, C2 1.94e-5, C3 0.381, C4 0, D -0.122
- Incidence of disease due to PM emissions (PM) [Krankheitsfälle]: A1-A3 1.35808e-7, C1 0, C2 4.28e-11, C3 3.52e-8, C4 0, D -1.4e-8
- Human exposure efficiency relative to U235 (IR) [kBq U235-Äq.]: A1-A3 0.192444, C1 0, C2 6.09e-6, C3 0.0293, C4 0, D -0.243
- Comparative toxic unit for ecosystems (ETP-fw) [CTUe]: A1-A3 86.369, C1 0, C2 0.0499, C3 7.54, C4 0, D -4.3
- Comparative toxic unit for humans (carcinogenic) (HTP-c) [CTUh]: A1-A3 7.07856e-9, C1 0, C2 1.19e-12, C3 2.98e-10, C4 0, D -1.87e-10
- Comparative toxic unit for humans (noncarcinogenic) (HTP-nc) [CTUh]: A1-A3 6.48031e-7, C1 0, C2 5.29e-11, C3 3.17e-8, C4 0, D -6.94e-9
- Soil quality index (SQP) [SQP]: A1-A3 56.035, C1 0, C2 0.0188, C3 2.06, C4 0, D -3.12

## Use advice
Scope:
This Declaration applies for Tectofin RG roofing and sealing membranes with a thickness of 1.5 mm, 1.8 mm and 2.0 mm manufactured at the Wächtersbach plant in Germany. The LCA results of Tectofin RG with a thickness of 1.5 mm and a surface weight of 1.9 kg/m² are declared. Section 5 indicates a factor with which the results for Tectofin RG can be calculated in thicknesses of 1.8 mm and 2.0 mm.

The LCA is based on average production data for fiscal 2019. This was supplied by BMI GmbH.
System boundary:
Type of EPD: cradle to gate, with options

The following modules are considered in the LCA:

Product stage (A1-A3):

The BMI roofing membranes product stage comprises:

A1 Raw material supply and processing and processing of secondary materials serving as input (e.g. recycling processes)
A2 Transporting raw materials by truck to the plant (Wächtersbach in Germany)
A3 Manufacturing sheets in the plant (incl. provisions of energy, provision of water, provisions of auxiliaries, disposal of production waste, manufacturing packaging materials)

End-of-life stage (C1-C4):

The BMI roofing membranes end-of-life stage comprises:

EoL scenario: 100% thermal utilisation of roofing membranes in a waste incineration plant with an R1 value > 0.6 with recovery potentials in D from energy substitution

C1 Manual selective removal (unencumbered)
C2 Transport by truck (50 km) to thermal utilisation (waste incineration plant)
C3 Waste treatment of roofing membranes: 100% thermal utilisation in a waste incineration plant
C4 No further expenses incurred by landfilling/disposal

Potentials and loads outside the system boundaries (D) of BMI roofing membranes:

Module D comprises recovery potentials from thermal utilisation of roofing membranes in a waste incineration plant by means of energy substitution.

## Data sources
- GaBi Database (all versions)
- GaBi database SP40 2020
