# Roll-bonded clad plates

Dataset: ILCD process, EPD, average dataset
Geography: AT
Reference year: 2017
Valid until: 2022
Classification: OEKOBAU.DAT: Metalle / Stahl und Eisen / Stahlbleche
Classification: IBUCategories: 02 Bauprodukte / Metallbauprodukte und Zubehör / Baustähle
Method details: Baustähle.pdf
Registration number: EPD-VOE-20170158-IBC1-DE
Owner: voestalpine AG
Compliance: DIN EN 15804; ISO 14025
Review: Accredited third party review by Institut Bauen und Umwelt e. V.
Amounts: rows without a unit in brackets have none in this file; such an amount is in the reference unit of its flow, which a separate flow dataset defines
copyright: true

## Technology and included processes
The starting material for the production of heavy plates at voestalpine is crude steel made in the primary route (blast furnace, LD steelmaking plant) at the Linz site. The molten crude steel is cast into slabs using a continuous casting method. After cooling, the slabs are reheated in pusher-type furnaces to 1100–1250 °C. As opposed to hot-rolled steel strip, a four-high rolling configuration, a type of reversing rolling, is used for heavy plates. The four-high mill stands always consist of two work rolls and two backup rolls, with a total of four rolls on each stand. The material is rolled back and forth until it reaches the desired width and length. Examples of the ways the product is further processed at the Linz site of voestalpine Grobblech GmbH are as follows: Boiler heads: The plates are hot-formed or mechanically (cold) formed in a press into heads with desired shapes and sizes. Clad plates: Clad plates consist of a base material (steel produced by voestalpine Stahl GmbH) and a high-quality cladding material. During the cladding process, the two working material layers are rolled together under high pressure to create a permanent bond. The primary purpose of the cladding layer is substantially improved corrosion protection. The final product exhibits the properties of the high-quality cladding layer.
Technical data:
This EPD refers to all products of voestalpine Grobblech GmbH (altrix®) in a variety of different steel grades, dimensions, shapes and as-delivered conditions. Specific information on tolerances in the different fields of application can be found in /EN 10029/ and /EN 10163/.

The data given in the DoP apply.
Declared unit:
This EPD refers to a declared unit of 1 ton of clad plates produced by voestalpine.

## Technical purpose
Roll-bonded clad plates and heads manufactured by voestalpine Grobblech GmbH are found in the following applications:

- Piping systems for large oil and gas pipelines
- Manufacture of oil platforms (offshore industries)
- Boiler and apparatus construction
- Steel construction and bridge building
- Vehicle and crane assembly (high-strength and wear-resistant steels)

## Reference product
- 1 t Grobblech: 1000

## Inputs
- Renewable primary energy as energy carrier (PERE) [MJ]: A1-A3 5230.38, C3 0, C4 1.22714, D 396.233
- Renewable primary energy resources as material utilization (PERM) [MJ]: A1-A3 0, C3 0, C4 0, D 0
- Total use of renewable primary energy resources (PERT) [MJ]: A1-A3 5230.38, C3 0, C4 1.22714, D 396.233
- Non renewable primary energy as energy carrier (PENRE) [MJ]: A1-A3 36163.8, C3 0, C4 10.8152, D -11738.8
- Non renewable primary energy as material utilization (PENRM) [MJ]: A1-A3 0, C3 0, C4 0, D 0
- Total use of non renewable primary energy resources (PENRT) [MJ]: A1-A3 36163.8, C3 0, C4 10.8152, D -11738.8
- Use of secondary material (SM) [kg]: A1-A3 169.844, C3 0, C4 0, D 950
- Use of renewable secondary fuels (RSF) [MJ]: A1-A3 0, C3 0, C4 0, D 0
- Use of non renewable secondary fuels (NRSF) [MJ]: A1-A3 0, C3 0, C4 0, D 0
- Use of net fresh water (FW) [m^3]: A1-A3 21.7272, C3 0, C4 0.00220586, D -0.851545

## Outputs
- Hazardous waste disposed (HWD) [kg]: A1-A3 0.000806388, C3 0, C4 2.46995e-7, D 0.00179423
- Non hazardous waste disposed (NHWD) [kg]: A1-A3 1205.62, C3 0, C4 50.0867, D -19.1751
- Radioactive waste disposed (RWD) [kg]: A1-A3 0.431752, C3 0, C4 0.000150816, D 0.261041
- Components for re-use (CRU) [kg]: A1-A3 0, C3 0, C4 0, D 0
- Materials for recycling (MFR) [kg]: A1-A3 0, C3 950, C4 0, D 0
- Materials for energy recovery (MER) [kg]: A1-A3 0, C3 0, C4 0, D 0
- Exported electrical energy (EEE) [MJ]: A1-A3 0, C3 0, C4 0, D 0
- Exported thermal energy (EET) [MJ]: A1-A3 0, C3 0, C4 0, D 0

## Impact indicators
- Global warming potential (GWP) [kg CO_(2)-Äq.]: A1-A3 3140.49, C3 0, C4 0.802816, D -1329.38
- Depletion potential of the stratospheric ozone layer (ODP) [kg CFC11-Äq.]: A1-A3 4.34585e-8, C3 0, C4 8.83753e-12, D 1.47723e-8
- Acidification potential of land and water (AP) [kg SO_(2)-Äq.]: A1-A3 151.11, C3 0, C4 0.00481341, D -5.17058
- Eutrophication potential (EP) [kg PO_(4)^(3)-Äq.]: A1-A3 1.1884, C3 0, C4 0.000654592, D -0.43354
- Formation potential of tropospheric ozone photochemical oxidants (POCP) [kg Ethen-Äq.]: A1-A3 6.55812, C3 0, C4 0.000382613, D -0.749674
- Abiotic depletion potential for non fossil resources (ADPE) [kg Sb-Äq.]: A1-A3 0.686166, C3 0, C4 2.77182e-7, D -1.34643e-5
- Abiotic depletion potential for fossil resources (ADPF) [MJ]: A1-A3 35061.4, C3 0, C4 10.4351, D -12397.5

## Use advice
Scope:
This EPD is based on a declared unit of 1 ton of roll-bonded clad plates (altrix®) produced at the Linz site.
System boundary:
The lifecycle assessment of roll-bonded clad plates produced by voestalpine refers to a cradle-to-gate analysis with options. The following lifecycle phases are taken into consideration in the analysis:

Module A1–A3 | Product stage

The product stage includes upstream burdens of raw materials (coal, iron ore, pellets, etc.) and the corresponding transports to the Linz production site. Material and energy flows required in the coking plant, sintering plant, blast furnaces, steelmaking plant, heavy plate rolling mill and for the roll-cladding process were recorded on site. Electricity is provided at the Linz site in a power station where furnace gases are used as fuel. Since more energy is used than is supplied by this company-owned power station, natural gas and electricity is additionally procured from Austrian networks.

Module C3 | Waste treatment

Product flows that reach Module D for recycling leave the product system in C3. Environmental impacts resulting from the grinding and sorting of steel scrap are not included.

Module C4 | Landfilling

Module C4 declares the environmental impacts incurred by landfilling (5 % of the product).

Module D | Credits and loads beyond system limits

The potential for substituting primary steel with a recycling scenario (95 % of the product) is set forth in Module D.

## Data sources
- Walzplattiertes Grobblech.pdf
- GaBi Database (all versions)
- GaBi database SP29 2016
