# Tor - BVT - Verband Tore - Rolltor und Rollgitter

Dataset: ILCD process, EPD, template dataset
Geography: DE
Reference year: 2018
Valid until: 2025
Classification: Komponenten von Fenstern und Vorhangfassaden / Türen und Tore / Stahl
Classification: OEKOBAU.DAT: Komponenten von Fenstern und Vorhangfassaden / Türen und Tore / Stahl
Synonyms: Rolltore; Rollgitter; Tor
Method details: EPD Rolltore und Rollgitter, Sektionaltore und Nebentüren; Produktkategorieregeln Teil A; Produktkategorieregeln Teil B – für Türen und Tore
Owner: BVT Verband Tore
Compliance: EN 15804
Review: Independent external review by Patrick Wortner
Amounts: rows without a unit in brackets have none in this file; such an amount is in the reference unit of its flow, which a separate flow dataset defines
copyright: true

## General comment
Dieser Datensatz beinhaltet die Ergebnisse für die Module A1-A3 sowie die Module A4, A5, B3, B6, B7, C1, C2, C3, C4, D gemäß EN 15804. Ein Vergleich mit anderen Produkten ist nur mit einer vergleichbaren Anwendung im Gebäude zulässig. Grundsätzlich ist eine Gegenüberstellung oder die Bewertung von EPD Daten nur möglich, wenn alle zu vergleichenden Datensätze nach EN 15804 erstellt wurden und der Gebäudekontext, bzw. die produktspezifischen Leistungsmerkmale berücksichtigt werden.

## Geography
Dieser Datensatz repräsentiert die Situation der Mitgliedsfirmen des BVT, im Hinblick auf die wichtigsten Technologien und die gesetzlichen Rahmenbedingungen.

## Time period
jährlicher Durchschnitt

## Technology and included processes
Die Ökobilanzergebnisse umfassen die Lebenszyklusstadien der Herstellung der Vorprodukte bis hin zur Rohstoffgewinnung und Verarbeitungsprozesse von als Input dienenden Sekundärstoffen (z.B. Recyclingprozesse), deren Transporte zum Werk sowie die Produktion selbst, einschließlich der Bereitstellung von allen Hilfs- und Betriebsstoffen, Energie, sowie die vollständige Abfallbehandlung oder die Deponierung der Restabfälle während des Stadiums der Produktion. Die Module A1, A2 und A3 sind hier als ein aggregiertes Modul A1-A3 ausgewiesen. Falls für diesen Datensatz weitere Module berechnet wurden, sind diese separat zu finden und können für eine Betrachtung des gesamten Lebenszyklus zusammengeführt werden.

## Technical purpose
Rolltore und Rollgitter für den Innen- und Außenbereich zum Abschluss von Gebäudeöffnungen im industriellen, gewerblichen und privaten Bereich.

## Reference product
- Tor - BVT - Verband Tore - Rolltor und Rollgitter: 1

## Inputs
- Use of net fresh water (FW) [m3]: A1-A3 0.638, A4 0.000241, A5 0.00512, B3 0.00513, B6 0, B7 0, C1 0, C2 3.95e-5, C3 2.65e-5, C4 0.00318, D -0.582
- Nicht-erneuerbare Primärenergie als Energieträger (PENRE) [MJ]: A1-A3 1290, A4 3.71, A5 0.407, B3 39.65, B6 0, B7 0, C1 0, C2 0.607, C3 12.4518, C4 0.799, D -671
- Nicht-erneuerbare Primärenergie zur stofflichen Nutzung (PENRM) [MJ]: A1-A3 13.11, A4 0, A5 0, B3 0, B6 0, B7 0, C1 0, C2 0, C3 -12.4, C4 -0.62, D 0
- Use of non renewable secondary fuels (NRSF) [MJ]: A1-A3 4.89e-29, A4 0, A5 0, B3 0, B6 0, B7 0, C1 0, C2 0, C3 0, C4 0, D 0
- Erneuerbare Primärenergie als Energieträger (PERE) [MJ]: A1-A3 335, A4 0.208, A5 20.9603, B3 1.22, B6 0, B7 0, C1 0, C2 0.0341, C3 0.0229, C4 0.0339, D -239
- Erneuerbare Primärenergie zur stofflichen Nutzung (PERM) [MJ]: A1-A3 21.03, A4 0, A5 -21.03, B3 0, B6 0, B7 0, C1 0, C2 0, C3 0, C4 0, D 0
- Use of renewable secondary fuels (RSF) [MJ]: A1-A3 3.22e-30, A4 0, A5 0, B3 0, B6 0, B7 0, C1 0, C2 0, C3 0, C4 0, D 0
- Input of secondary material (SM) [kg]: A1-A3 0, A4 0, A5 0, B3 0, B6 0, B7 0, C1 0, C2 0, C3 0, C4 0, D 0
- Total use of non-renewable primary energy resources (PENRT) [MJ]: A1-A3 1303.11, A4 3.71, A5 0.407, B3 39.65, B6 0, B7 0, C1 0, C2 0.607, C3 0.0518, C4 0.179, D -671
- Total use of renewable primary energy resources (PERT) [MJ]: A1-A3 356.03, A4 0.208, A5 -0.0697, B3 1.22, B6 0, B7 0, C1 0, C2 0.0341, C3 0.0229, C4 0.0339, D -239

## Outputs
- Components for re-use (CRU) [kg]: A1-A3 0, A4 0, A5 0, B3 0, B6 0, B7 0, C1 0, C2 0, C3 0, C4 0, D 0
- Exported electrical energy (EEE) [MJ]: A1-A3 0, A4 0, A5 5.45, B3 0, B6 0, B7 0, C1 0, C2 0, C3 0, C4 3.14, D 0
- Exported thermal energy (EET) [MJ]: A1-A3 0, A4 0, A5 1.92, B3 0, B6 0, B7 0, C1 0, C2 0, C3 0, C4 5.59, D 0
- Hazardous waste disposed (HWD) [kg]: A1-A3 1.76e-6, A4 1.73e-7, A5 4.42e-11, B3 0.0017, B6 0, B7 0, C1 0, C2 2.83e-8, C3 2.14e-11, C4 1.21e-10, D -3.9e-7
- Material for Energy Recovery (MER) [kg]: A1-A3 0, A4 0, A5 0, B3 0, B6 0, B7 0, C1 0, C2 0, C3 0, C4 0, D 0
- Materials for Recycling (MFR) [kg]: A1-A3 0.43, A4 0, A5 0, B3 0, B6 0, B7 0, C1 0, C2 0, C3 18.1, C4 0, D 0
- Non-hazardous waste disposed (NHWD) [kg]: A1-A3 16.2, A4 0.000567, A5 0.00148, B3 0.0148, B6 0, B7 0, C1 0, C2 9.29e-5, C3 3.67e-5, C4 0.00583, D -11.5
- Radioactive waste disposed (RWD) [kg]: A1-A3 0.0758, A4 4.59e-6, A5 1.38e-5, B3 0.000665, B6 0, B7 0, C1 0, C2 7.52e-7, C3 7.86e-6, C4 1.05e-5, D -0.0341

## Impact indicators
- Abiotic depletion potential for non fossil resources (ADPE) [kg Sb-Äqv.]: A1-A3 0.000191, A4 2.25e-8, A5 -3.68e-7, B3 0.00121, B6 0, B7 0, C1 0, C2 3.69e-9, C3 9.64e-10, C4 8.08e-9, D -1.51e-5
- Abiotic depletion potential for fossil resources (ADPF) [MJ]: A1-A3 1100, A4 3.7, A5 0.346, B3 37.97, B6 0, B7 0, C1 0, C2 0.605, C3 0.032, C4 0.153, D -584
- Acidification potential of soil and water (AP) [kg SO2-Äqv.]: A1-A3 0.281, A4 0.00131, A5 0.0002, B3 0.00264, B6 0, B7 0, C1 0, C2 0.000179, C3 6.06e-6, C4 9.09e-5, D -0.207
- Eutrophication potential (EP) [kg Phosphat-Äqv.]: A1-A3 0.0232, A4 0.00033, A5 6.3e-5, B3 0.000247, B6 0, B7 0, C1 0, C2 4.48e-5, C3 6.71e-7, C4 1.99e-5, D -0.0133
- Global warming potential (GWP) [kg CO2-Äqv.]: A1-A3 95.5, A4 0.27, A5 1.69, B3 1.484, B6 0, B7 0, C1 0, C2 0.0442, C3 0.00289, C4 1.47, D -55.3
- Depletion potential of the stratospheric ozone layer (ODP) [kg R11 eq.]: A1-A3 1.06e-7, A4 4.46e-17, A5 1e-9, B3 3.35e-11, B6 0, B7 0, C1 0, C2 7.3e-18, C3 8.64e-17, C4 1.37e-16, D -1.81e-13
- Formation potential of tropospheric ozone (POCP) [kg Ethen-Äqv.]: A1-A3 0.0211, A4 -0.000563, A5 9.5e-6, B3 0.000328, B6 0, B7 0, C1 0, C2 -6.74e-5, C3 4.32e-7, C4 9.51e-6, D -0.014

## Use advice
A1-A3 sowie Module A4, A5, B3, B6, B7, C1, C2, C3, C4, D. Das Umweltprofil beinhaltet die Aufwendungen für die Lebenszyklus-Stadien cradle to gate mit Optionen (Modul A1-A3).

Die Muster-EPD erlangt Gültigkeit durch die Übertragung an den Hersteller durch das ift. Aktuell gültige EPDs sind der nachfolgenden Liste zu entehmen und auf www.ift-service.de/epd veröffentlicht.
EPD-Nummer und Deklarationsinhaber:
- M-EPD-RRS-101, itb-Industrietorbau GmbH, 86850 Fischach
- M-EPD-RRS-102, Meißner GmbH Toranlagen, 77694 Kehl-Auenheim
- M-EPD-RRS-105, Effertz Tore, 41238 Mönchengladbach
- M-EPD-RRS-108, Niemetz Torsysteme GmbH, 96167 Königsfeld
- M-EPD-RRS-109, Keroll Kerger GmbH, 42369 Wuppertal
- M-EPD-RRS-110, Meyer-Tonndorf GmbH, 41515 Grevenbroich
- M-EPD-RRS-112, Ferdinand Braselmann GmbH & Co. KG, 58256 Ennepetal
- M-EPD-RRS-117, Promotec Mischler Torsysteme GmbH 77694 Kehl am Rhein

## Review details
Die angewendete LCI Methode ist in Übereinstimmung mit ISO 14040 und 14044. Die Dokumentation enthält alle relevanten Informationen im Hinblick auf die Datenqualität und den Umfang der Anwendung der jeweiligen LCI Ergebnisse bzw. der Datensätze. Der Datensatz repräsentiert den Stand der Technik bezogen auf die funktionelle Einheit.

## Data sources
- GaBi database (general)
