# Brandschutzklappe FK90K

Dataset: ILCD process, EPD, specific dataset
Geography: DE
Reference year: 2018
Valid until: 2023
Classification: OEKOBAU.DAT: Gebäudetechnik / Klimatisierung und Lüftung / Lüftungsanlagen
Classification: IBUCategories: 03 Gebäudetechnik / Brandschutzeinrichtungen / Brandschutzklappen und Brandschutzventile und Entrauchungsklappen
Method details: Brandschutzklappen und Brandschutzventile und Entrauchungsklappen.pdf
Registration number: EPD-WWB-20180150-ICC1-DE
Owner: Wildeboer Bauteile GmbH
Compliance: DIN EN 15804; ISO 14025
Review: Accredited third party review by Institut Bauen und Umwelt e. V.
Amounts: rows without a unit in brackets have none in this file; such an amount is in the reference unit of its flow, which a separate flow dataset defines
copyright: true

## General comment
Die Brandschutzklappe FK90K besteht aus einem Gehäuse und einem innen liegenden bruchsicheren Klappenblatt, beide gefertigt aus abriebfestem Kalziumsilikat. Die Betätigung der Antriebseinheiten erfolgt manuell oder motorisch. Ein vollständig gekapseltes, dauergeschmiertes, wartungsfreies Getriebe im Gehäusewandbereich mit einer gekapselten Antriebseinheit sorgt als selbst- verriegelnde Antriebsmechanik für bruchsichere Drehmomentübertragungen.

Die Brandschutzklappe FK90K kann mit wartungsfreier thermisch-mechanischer Auslöseeinrichtung oder mit elektrischem Federrücklaufantrieb ausgerüstet werden. Ein großer freier Querschnitt fördert den energetisch günstigen Betrieb der raumlufttechnischen Anlage.

Die Brandschutzklappe FK90K ist unabhängig von den verbauten Komponenten und Abmessungen wartungs- frei. Hygienische Reinigungen sind, wo erforderlich, durchzuführen. Näheres siehe auch Kap. 7 und die /Herstellerunterlagen/.

In dieser EPD wurden die Ergebnisse für eine repräsentative Brandschutzklappe FK90K (siehe Angaben unter 3.1) berechnet.

## Technology and included processes
Die Produktion erfolgt an einem Standort. Notwendige Roh- und Halbteile, Hilfs- und Betriebsstoffe werden von Lieferanten angeliefert und fließen in die Produktion mit ein. Die Fertigung der Halbteile erfolgt in einer Vorfertigung mit materialüblichen Fertigungs- verfahren. Metallteile werden gestanzt und in Form gekantet, Teile aus Kalziumsilikat gesägt und gefräst. Zur Vermeidung von Abfällen werden Zuschnitte entsprechend optimiert. Abfälle, die dann noch ent- stehen, werden gesammelt und möglichst von ent- sprechenden Firmen recycelt, oder als Hausmüll entsorgt und verbrannt. Schmierstoffe werden weitestgehend gesammelt, aufbereitet und in der Produktion wiederverwendet. Stäube und Dünste werden vor Ort abgesaugt und gesammelt. Die Teile der Vorfertigung werden zusammen mit eingekauften Teilen zu Brandschutzklappen end- montiert, im Rahmen der Qualitätssicherung nach /DIN EN ISO 9001/ geprüft, verpackt und ausgeliefert.
Technische Daten:
Die Anforderungen nach harmonisierter Produktnorm /DIN EN 15650/ sind erfüllt. Brandprüfungen erfolgten nach /DIN EN 1366-2/.
Deklarierte Einheit:
Die Deklaration bezieht sich auf ein Stück Referenz-Brandschutzklappe der Wildeboer Bauteile GmbH mit den Abmessungen 100 mm x 100 mm x 260 mm (B x H x L) einschließlich des elektrischen Federrücklauf- antriebs mit Motorkonsole und des optionalen Einbaurahmens (Gesamtgewicht 9,01 kg). Für die Auslöseeinheit wurde als worst case Betrachtung die elektrische Variante (es gibt auch eine mechanische Auslöseeinheit) berücksichtigt. Die optional lieferbaren Einbaurahmen für o.g. Baugröße der Brandschutz- klappe wurden zu einem Durchschnittsrahmen zusammengefasst und ebenfalls berücksichtigt. Ökobilanzergebnisse weiterer Brandschutzklappen FK90K mit abweichenden Abmessungen als die hier betrachtete können bei Wildeboer Bauteile GmbH angefragt werden.

## Technical purpose
Brandschutzklappe FK90K verhindert die Übertragung von Rauch und Feuer durch Lüftungsleitungen einer raumlufttechnischen Anlage in andere Brandabschnitte oder Geschosse. Einsatz der Brandschutzklappe FK90K ist möglich bei Feuerwiderstandsdauer 30/60/90 Minuten. Sie ist geeignet für den Einbau in und entfernt von massiven Wänden und Decken, in und entfernt von Metallständerwänden, in Brand- wänden und in Schachtwänden. Der Einbau ist mit liegender oder stehender Absperrklappenblattachse möglich und erfolgt nass, trocken oder mit teilweiser Ausmörtelung mit den kleinstmöglichen Abständen zwischen Brandschutzklappen zueinander oder zu Wänden und Decken. Durch die Verwendung von Einbaurahmen unterschiedlicher Art, die lose oder vormontiert geliefert werden, ist eine universelle und flexible Handhabung gegeben, z.B. auch bei Änderungen der Einbausituation vor Ort. FK90K ist geeignet für Ersteinbau und Sanierung. Steck- verbindungen ermöglichen einen schnellen Um- oder Austausch der Auslöseeinrichtung. Die Brand- schutzklappe FK90K ist wartungsfrei.

## Reference product
- 1 Stück Brandschutzklappe FK90K mit 9,05 kg/Stück: 1

## Inputs
- Erneuerbare Primärenergie als Energieträger (PERE) [MJ]: A1-A3 28.2258, A4 0.174194, A5 1.33784, B1 0, B2 0, B6 28.2, B7 0, C1 0, C2 0.10915, C3 0.08135, C4 0.134185, D 2.4358
- Erneuerbare Primärenergie zur stofflichen Nutzung (PERM) [MJ]: A1-A3 1.33421, A4 0, A5 -1.33421, B1 0, B2 0, B6 0, B7 0, C1 0, C2 0, C3 0, C4 0, D 0
- Total erneuerbare Primärenergie (PERT) [MJ]: A1-A3 29.56, A4 0.174194, A5 0.003624, B1 0, B2 0, B6 28.2, B7 0, C1 0, C2 0.10915, C3 0.08135, C4 0.134185, D 2.4358
- Nicht-erneuerbare Primärenergie als Energieträger (PENRE) [MJ]: A1-A3 277.932, A4 2.5925, A5 1.9243, B1 0, B2 0, B6 60.3, B7 0, C1 0, C2 1.6211, C3 4.11016, C4 1.06007, D -64.64
- Nicht-erneuerbare Primärenergie zur stofflichen Nutzung (PENRM) [MJ]: A1-A3 5.56838, A4 0, A5 -1.90602, B1 0, B2 0, B6 0, B7 0, C1 0, C2 0, C3 -3.66236, C4 0, D 0
- Total nicht erneuerbare Primärenergie (PENRT) [MJ]: A1-A3 283.5, A4 2.5925, A5 0.01828, B1 0, B2 0, B6 60.3, B7 0, C1 0, C2 1.6211, C3 0.4478, C4 1.06007, D -64.64
- Einsatz von Sekundärstoffen (SM) [kg]: A1-A3 1.0887, A4 0, A5 0, B1 0, B2 0, B6 0, B7 0, C1 0, C2 0, C3 0, C4 0, D 2.7323
- Erneuerbare Sekundärbrennstoffe (RSF) [MJ]: A1-A3 0, A4 0, A5 0, B1 0, B2 0, B6 0, B7 0, C1 0, C2 0, C3 0, C4 0, D 0
- Nicht erneuerbare Sekundärbrennstoffe (NRSF) [MJ]: A1-A3 0, A4 0, A5 0, B1 0, B2 0, B6 0, B7 0, C1 0, C2 0, C3 0, C4 0, D 0
- Einsatz von Süßwasserressourcen (FW) [m^3]: A1-A3 0.07354, A4 0.000201949, A5 0.00011234, B1 0, B2 0, B6 0.0179, B7 0, C1 0, C2 0.00012663, C3 0.002824, C4 0.00042536, D 0.000352

## Outputs
- Gefährlicher Abfall zur Deponie (HWD) [kg]: A1-A3 1.8515e-6, A4 1.65936e-7, A5 8.797e-11, B1 0, B2 0, B6 4.6e-8, B7 0, C1 0, C2 1.0395e-7, C3 2.15e-9, C4 1.7754e-8, D -4.577e-8
- Entsorgter nicht gefährlicher Abfall (NHWD) [kg]: A1-A3 1.1377, A4 0.000192996, A5 0.002005, B1 0, B2 0, B6 0.0619, B7 0, C1 0, C2 0.00012091, C3 0.10413, C4 4.8019, D -0.1422
- Entsorgter radioaktiver Abfall (RWD) [kg]: A1-A3 0.006886, A4 3.12574e-6, A5 7.526e-7, B1 0, B2 0, B6 0.00596, B7 0, C1 0, C2 1.9582e-6, C3 2.187e-5, C4 1.6143e-5, D 0.0006459
- Komponenten für die Wiederverwendung (CRU) [kg]: A1-A3 0, A4 0, A5 0, B1 0, B2 0, B6 0, B7 0, C1 0, C2 0, C3 0, C4 0, D 0
- Stoffe zum Recycling (MFR) [kg]: A1-A3 0, A4 0, A5 0, B1 0, B2 0, B6 0, B7 0, C1 0, C2 0, C3 0, C4 0, D 3.821
- Stoffe für die Energierückgewinnung (MER) [kg]: A1-A3 0, A4 0, A5 0, B1 0, B2 0, B6 0, B7 0, C1 0, C2 0, C3 0, C4 0, D 0
- Exportierte elektrische Energie (EEE) [MJ]: A1-A3 0, A4 0, A5 0.03515, B1 0, B2 0, B6 0, B7 0, C1 0, C2 0, C3 2.361, C4 0.0719, D 0
- Exportierte thermische Energie (EET) [MJ]: A1-A3 0, A4 0, A5 0.08172, B1 0, B2 0, B6 0, B7 0, C1 0, C2 0, C3 4.313, C4 0.167, D 0

## Impact indicators
- Globales Erwärmungspotenzial (GWP) [kg CO_(2)-Äq.]: A1-A3 23.164, A4 0.213775, A5 0.03833, B1 0, B2 0, B6 4.66, B7 0, C1 0, C2 0.11986, C3 1.0996, C4 0.1548, D -7.917
- Abbau Potential der stratosphärischen Ozonschicht (ODP) [kg CFC11-Äq.]: A1-A3 2.2776e-10, A4 4.04293e-15, A5 8.581e-16, B1 0, B2 0, B6 6.86e-12, B7 0, C1 0, C2 2.5337e-15, C3 2.829e-14, C4 1.8747e-14, D 6.5098e-13
- Versauerungspotenzial von Boden und Wasser (AP) [kg SO_(2)-Äq.]: A1-A3 0.09235, A4 0.000770587, A5 1.606e-5, B1 0, B2 0, B6 0.0071, B7 0, C1 0, C2 0.0004829, C3 0.0002772, C4 0.0004834, D -0.01839
- Eutrophierungspotenzial (EP) [kg PO_(4)^(3)-Äq.]: A1-A3 0.007108, A4 0.000195182, A5 3.116e-6, B1 0, B2 0, B6 0.00116, B7 0, C1 0, C2 0.00012247, C3 2.686e-5, C4 6.8714e-5, D -0.001633
- Bildungspotential für troposphärisches Ozon (POCP) [kg Ethen-Äq.]: A1-A3 0.006572, A4 -0.000293272, A5 9.341e-7, B1 0, B2 0, B6 0.000471, B7 0, C1 0, C2 -0.00018375, C3 1.1469e-5, C4 3.6965e-5, D -0.002297
- Potenzial für den abiotischen Abbau nicht fossiler Ressourcen (ADPE) [kg Sb-Äq.]: A1-A3 0.0017496, A4 2.00158e-8, A5 3.42e-9, B1 0, B2 0, B6 3.18e-6, B7 0, C1 0, C2 1.2538e-8, C3 8.606e-8, C4 3.6307e-8, D -3.7999e-5
- Potenzial für den abiotischen Abbau fossiler Brennstoffe (ADPF) [MJ]: A1-A3 266.2, A4 2.57855, A5 0.016465, B1 0, B2 0, B6 45.2, B7 0, C1 0, C2 1.6169, C3 0.3931, C4 1.01909, D -66.27

## Use advice
Gültigkeitsbereich:
Dieses Dokument bezieht sich auf die Herstellung, den Transport, den Einbau, den Betrieb und die Entsorgung von Brandschutzklappen mit optionalem Zubehör für raumlufttechnische Anlagen. Die Produkte werden ausschließlich in Deutschland im Werk Weener produziert, in dem die Produktionsdaten des Jahres 2017 erhoben wurden.
Systemgrenze:
Die Systemgrenze der EPD vom Typ "Wiege bis Bahre" folgt dem modularen Aufbau nach /EN 15804/. Die Ökobilanz der betrachteten Produkte berück- sichtigt den kompletten Lebensweg des Produktes und somit alle Module:

A1-A3 (Produktionsstadium): Rohstoffbereitstellung, Transport zum Hersteller, Herstellung (inkl. Energie- und Wasserbereitstellung, Bereitstellung von Hilfs- stoffen, Entsorgung von Abfällen).

A4-A5 (Einrichten des Bauwerks): Transport zur Baustelle, Einbau in das Gebäude mithilfe des Einbau- rahmens, Verwertung von Verpackungsabfällen auf der Baustelle.

B1-B5 (Nutzungsstadium): Während der Nutzung der Brandschutzklappe (B1) auf Produktebene werden keine Emissionen freigesetzt. Die für den Betrieb der Brandschutzklappe mit elektrischem Antriebsmotor erforderliche elektrische Energie sowie die elektrische Energie für die halbjährlichen bzw. jährlichen Funktionsprüfungen sind dem Modul (B6) zugeordnet, da diese im Zusammenhang mit dem Betrieb des Gebäudes zu sehen sind. Eine Reparatur (B3) bzw. ein Austausch einzelner Komponenten (B4) ist während der betrachteten Nutzungsdauer nicht relevant. Während der RLS (Referenz-Nutzungsdauer) ist laut Herstellerangaben keine Erneuerung der Brandschutzklappe notwendig (B5). Die Module B3 bis B5 werden als Modul nicht Relevant „MNR“ deklariert.

B6-B7 (Nutzungsstadium – Betrieb des Gebäudes): Einsatz von elektrischer Energie für den Betrieb des Produktes.

C1-C4 (Entsorgungsstadium): Rückbau des Produkts,Transport zur Abfallbehandlung, Abfall- behandlung, Entsorgung.

D (Gutschriften): Recyclingpotential.

## Data sources
- Brandschutzklappe FK90K.pdf
- GaBi Database (all versions)
- GaBi database SP36 2018
