# Cement (CEM III 52.5); CEM III 52.5

Dataset: ILCD process, EPD, generic dataset
Geography: DE
Reference year: 2018
Valid until: 2022
Classification: oekobau.dat: Mineralische Baustoffe / Bindemittel / Zement
Owner: thinkstep
Compliance: DIN EN 15804
Review: Dependent internal review by thinkstep, IABP-GaBi, IBP-GaBi; Independent external review by GaBi user forum, GaBi bug forum, GaBi user community
Amounts: rows without a unit in brackets have none in this file; such an amount is in the reference unit of its flow, which a separate flow dataset defines
copyright: true

## General comment
This data set has been modeled according to the European Standard EN 15804 for Sustainable Building. Results are depicted in modules that allow the structured expression of results over the entire life cycle.

## Geography
The data set represents the country specific situation in Germany, focusing on the main technologies, the region specific characteristics and / or import statistics.

## Time period
Annual average

## Technology and included processes
The main processes in cement production consist of raw material extraction, production of clinker, and cement grinding. The extraction of the main raw material from the quarry normally takes place in the immediate area of the cement works. Portland cement (CEM I) is primarily made up of finely ground clinker cement and a smaller amount of ground materials. Other cements may also include constituents such as slag sand (CEM III), natural puzzolan such as trass (CEM IV), fly ash, oil shale burn-out or limestone. The most important agent is the blast furnace cement (CEM III). Coagulation is controlled with the help of minor constituents, such as calcium sulphate to facilitate its optimal processing in the concrete production. Clinker cement is made up of a mixture of primary products of mainly calcium oxide, silica, aluminium oxide, and iron oxide. Limestone, chalk and clay (or their naturally occurring mixture of limestone marl) provide these chemical constituents. The raw material mixture is heated to approximately 1450°C in a rotary furnace until sintering. New bonds are created from the source material, these are known as the clinker phases. These are specific calcium silicates and calcium aluminates that give the cement its characteristic property of hardening in the presence of water.
Secondary fuels for cement production are modelled with a "cut-off approach", i.e. the materials have no environmental burden.

Background system:
Electricity: Electricity is modelled according to the individual country-specific situations. The country-specific modelling is achieved on multiple levels. Firstly, individual energy carrier specific power plants and plants for renewable energy sources are modelled according to the current national electricity grid mix. Modelling the electricity consumption mix includes transmission / distribution losses and the own use by energy producers (own consumption of power plants and "other" own consumption e.g. due to pumped storage hydro power etc.), as well as imported electricity. Secondly, the national emission and efficiency standards of the power plants are modelled as well as the share of electricity plants and combined heat and power plants (CHP). Thirdly, the country-specific energy carrier supply (share of imports and / or domestic supply) including the country-specific energy carrier properties (e.g. element and energy content) are accounted for. Fourthly, the exploration, mining/production, processing and transport processes of the energy carrier supply chains are modelled according to the specific situation of each electricity producing country. The different production and processing techniques (emissions and efficiencies) in the different energy producing countries are considered, e.g. different crude oil production technologies or different flaring rates at the oil platforms.
Thermal energy, process steam: The thermal energy and process steam supply is modelled according to the individual country-specific situation with regard to emission standards and considered energy carriers. The thermal energy and process steam are produced at heat plants. Efficiencies for thermal energy production are by definition 100% in relation to the corresponding energy carrier input. For process steam the efficiency ranges from 85%, 90% to 95%. The energy carriers used for the generation of thermal energy and process steam are modelled according to the specific import situation (see electricity above).
Transports: All relevant and known transport processes are included. Ocean-going and inland ship transport as well as rail, truck and pipeline transport of bulk commodities are considered.
Energy carriers: The energy carriers are modelled according to the specific supply situation (see electricity above).
Refinery products: Diesel fuel, gasoline, technical gases, fuel oils, lubricants and residues such as bitumen are modelled with a parameterised country-specific refinery model. The refinery model represents the current national standard in refining techniques (e.g. emission level, internal energy consumption, etc.) as well as the individual country-specific product output spectrum, which can be quite different from country to country. The supply of crude oil is modelled, again, according to the country-specific situation with the respective properties of the resources.

## Technical purpose
This product can be used in construction.

## Safety margin
20 %. Product system depicted except for a few missing processes / flows. Technological, temporal and geographic representativeness partly given.

## Reference product
- Cement (CEM III 52.5): 1

## Inputs
- Erneuerbare Primärenergie als Energieträger (PERE) [MJ]: A1-A3 0.656704
- Erneuerbare Primärenergie zur stofflichen Nutzung (PERM) [MJ]: A1-A3 0
- Total use of renewable primary energy resources (PERT) [MJ]: A1-A3 0.656704
- Nicht-erneuerbare Primärenergie als Energieträger (PENRE) [MJ]: A1-A3 1.49094
- Nicht-erneuerbare Primärenergie zur stofflichen Nutzung (PENRM) [MJ]: A1-A3 0
- Total use of non-renewable primary energy resources (PENRT) [MJ]: A1-A3 1.49094
- Input of secondary material (SM) [kg]: A1-A3 0
- Use of renewable secondary fuels (RSF) [MJ]: A1-A3 0.0039936
- Use of non renewable secondary fuels (NRSF) [MJ]: A1-A3 0.0420096
- Use of net fresh water (FW) [m3]: A1-A3 0.000394071

## Outputs
- Hazardous waste disposed (HWD) [kg]: A1-A3 4.64835e-9
- Non-hazardous waste disposed (NHWD) [kg]: A1-A3 0.00191656
- Radioactive waste disposed (RWD) [kg]: A1-A3 7.90616e-5
- Components for re-use (CRU) [kg]: A1-A3 0
- Materials for Recycling (MFR) [kg]: A1-A3 0
- Material for Energy Recovery (MER) [kg]: A1-A3 0
- Exported electrical energy (EEE) [MJ]: A1-A3 0
- Exported thermal energy (EET) [MJ]: A1-A3 0

## Impact indicators
- Global warming potential (GWP) [kg CO2 eq.]: A1-A3 0.393502
- Ozone Depletion Potential (ODP) [kg R11 eq.]: A1-A3 3.60697e-15
- Acidification potential (AP) [kg SO2 eq.]: A1-A3 0.000312196
- Eutrophication potential (EP) [kg Phosphate eq.]: A1-A3 5.44031e-5
- Photochemical Ozone Creation Potential (POCP) [kg Ethene eq.]: A1-A3 4.40881e-5
- Abiotic depletion potential for non fossil resources (ADPE) [kg Sb eq.]: A1-A3 3.56864e-8
- Abiotic depletion potential for fossil resources (ADPF) [MJ]: A1-A3 1.29135

## Use advice
The data set represents a cradle to gate inventory. It can be used to characterise the supply chain situation of the respective commodity in a representative manner. Combination with individual unit processes using this commodity enables the generation of user-specific (product) LCAs.

## Data sources
- Umweltdaten der deutschen Zementindustrie 2009
- Ökologische Bilanzierung von Baustoffen und Gebäuden, 2000
- AUB-Zertifkat Trasswerke Meurin: Zement (Zertifikat-Nr.: Z.MEU200), 2000
- Environmental statement 2001: Wietersdorfer & Peggauer Zementwerke GmbH, Peggau, 2001
- Ökobilanzen im Brückenbau, 1999
- GaBi Database Edition 2020, SP40
- GaBi database (all versions)
