# Zargen - rema AG / spa - Zargen für Drehtüren

Dataset: ILCD process, EPD, specific dataset
Geography: IT
Reference year: 2020
Valid until: 2026
Classification: OEKOBAU.DAT: Komponenten von Fenstern und Vorhangfassaden / Rahmen / Profile / Stahl
Synonyms: Stahlzargen; Edelstahlzargen; einteilige Zargen; zweiteilige Zargen; mehrteilige Zargen; Typ 1A; Typ 2A; Typ 1C/2C; Typ 1F/2F; Typ 1E/2E; Typ 12A; Typ 10A/11A
Method details: EPD Stahl- und Edelstahlzargen; Produktkategorieregeln Teil A; Produktkategorieregeln Teil B – für Türen und Tore
Owner: rema AG / spa
Compliance: EN 15804
Review: Independent external review by Patrick Wortner
Amounts: rows without a unit in brackets have none in this file; such an amount is in the reference unit of its flow, which a separate flow dataset defines
copyright: true

## General comment
Dieser Datensatz beinhaltet die Ergebnisse für die Module A1-A3 sowie die Module B1, B2, B3, B4, B5, B6, B7, C1, C2, C3, C4, und D gemäß EN 15804. Das Umweltprofil beinhaltet die Aufwendungen für die Lebenszyklus-Stadien cradle to grave. Die Herstellung der Verpackung wurde innerhalb der Module A1-A3 berücksichtigt.

## Geography
Dieser Datensatz repräsentiert die Situation des Unternehmens rema AG / spa in IT-39035 Welsberg im Hinblick auf die wichtigsten Technologien und die gesetzlichen Rahmenbedingungen.

## Time period
jährlicher Durchschnitt

## Technology and included processes
Die Ökobilanzergebnisse umfassen die Lebenszyklusstadien der Herstellung der Vorprodukte bis hin zur Rohstoffgewinnung und Verarbeitungsprozesse von als Input dienenden Sekundärstoffen (z.B. Recyclingprozesse), deren Transporte zum Werk sowie die Produktion selbst, einschließlich der Bereitstellung von allen Hilfs- und Betriebsstoffen, Energie, sowie die vollständige Abfallbehandlung oder die Deponierung der Restabfälle während des Stadiums der Produktion. Die Module A1, A2 und A3 sind hier als ein aggregiertes Modul A1-A3 ausgewiesen. Falls für diesen Datensatz weitere Module berechnet wurden, sind diese separat zu finden und können für eine Betrachtung des gesamten Lebenszyklus zusammengeführt werden.

## Technical purpose
Stahl- und Edelstahlzargen zur wandbegleitenden bzw. nachträgliche Montage aus 1,5mm oder 2mm starkem verzinktem Blech bzw. Edelstahl.

## Reference product
- Zargen - rema AG / spa - Zargen für Drehtüren: 1

## Inputs
- Use of net fresh water (FW) [m3]: A1-A3 0.26, A4 0.00164, A5 0.00509, B1 0, B2 0.0979, B3 0.00283, B4 0, B5 0, B6 0, B7 0, C1 0, C2 2.03e-5, C3 0.00156, C4 2.5e-5, D -0.16
- Nicht-erneuerbare Primärenergie als Energieträger (PENRE) [MJ]: A1-A3 498, A4 25.7, A5 2.5, B1 0, B2 529, B3 70.5, B4 0, B5 0, B6 0, B7 0, C1 0, C2 0.32, C3 4.91, C4 0.3, D -329
- Nicht-erneuerbare Primärenergie zur stofflichen Nutzung (PENRM) [MJ]: A1-A3 4.96, A4 0, A5 -1.01, B1 0, B2 0, B3 0, B4 0, B5 0, B6 0, B7 0, C1 0, C2 0, C3 -3.75, C4 -0.2, D 0
- Use of non renewable secondary fuels (NRSF) [MJ]: A1-A3 0, A4 0, A5 0, B1 0, B2 0, B3 0, B4 0, B5 0, B6 0, B7 0, C1 0, C2 0, C3 0, C4 0, D 0
- Erneuerbare Primärenergie als Energieträger (PERE) [MJ]: A1-A3 176, A4 1.43, A5 17.6, B1 0, B2 7.8, B3 8.89, B4 0, B5 0, B6 0, B7 0, C1 0, C2 0.0178, C3 0.49, C4 0.0137, D -63
- Erneuerbare Primärenergie zur stofflichen Nutzung (PERM) [MJ]: A1-A3 17.51, A4 0, A5 -17.51, B1 0, B2 0, B3 0, B4 0, B5 0, B6 0, B7 0, C1 0, C2 0, C3 0, C4 0, D 0
- Use of renewable secondary fuels (RSF) [MJ]: A1-A3 0, A4 0, A5 0, B1 0, B2 0, B3 0, B4 0, B5 0, B6 0, B7 0, C1 0, C2 0, C3 0, C4 0, D 0
- Input of secondary material (SM) [kg]: A1-A3 0.0566, A4 0, A5 0, B1 0, B2 0, B3 0.0566, B4 0, B5 0, B6 0, B7 0, C1 0, C2 0, C3 0, C4 0, D -0.0663
- Total use of non-renewable primary energy resources (PENRT) [MJ]: A1-A3 503, A4 25.7, A5 0.49, B1 0, B2 529, B3 70.5, B4 0, B5 0, B6 0, B7 0, C1 0, C2 0.32, C3 1.16, C4 0.1, D -329
- Total use of renewable primary energy resources (PERT) [MJ]: A1-A3 194, A4 1.43, A5 0.0949, B1 0, B2 7.8, B3 8.89, B4 0, B5 0, B6 0, B7 0, C1 0, C2 0.0178, C3 0.49, C4 0.0137, D -63

## Outputs
- Components for re-use (CRU) [kg]: A1-A3 0, A4 0, A5 0, B1 0, B2 0, B3 0, B4 0, B5 0, B6 0, B7 0, C1 0, C2 0, C3 0, C4 0, D 0
- Exported electrical energy (EEE) [MJ]: A1-A3 0.0691, A4 0, A5 3.09, B1 0, B2 0, B3 1.29, B4 0, B5 0, B6 0, B7 0, C1 0, C2 0, C3 1.01, C4 0, D 0
- Exported thermal energy (EET) [MJ]: A1-A3 0.0976, A4 0, A5 5.55, B1 0, B2 0, B3 2.29, B4 0, B5 0, B6 0, B7 0, C1 0, C2 0, C3 1.82, C4 0, D 0
- Hazardous waste disposed (HWD) [kg]: A1-A3 2.26e-6, A4 1.3e-9, A5 8.76e-11, B1 0, B2 7.11e-8, B3 1.52e-9, B4 0, B5 0, B6 0, B7 0, C1 0, C2 1.61e-11, C3 2.92e-10, C4 1.08e-11, D -3.45e-8
- Material for Energy Recovery (MER) [kg]: A1-A3 0, A4 0, A5 0, B1 0, B2 0, B3 0, B4 0, B5 0, B6 0, B7 0, C1 0, C2 0, C3 0, C4 0, D 0
- Materials for Recycling (MFR) [kg]: A1-A3 1.29, A4 0, A5 0, B1 0, B2 0, B3 0.37, B4 0, B5 0, B6 0, B7 0, C1 0, C2 0, C3 9.43, C4 0, D 0
- Non-hazardous waste disposed (NHWD) [kg]: A1-A3 3.42, A4 0.00382, A5 0.0293, B1 0, B2 0.15, B3 0.00583, B4 0, B5 0, B6 0, B7 0, C1 0, C2 4.74e-5, C3 0.0447, C4 0.51, D -2
- Radioactive waste disposed (RWD) [kg]: A1-A3 0.0174, A4 3.11e-5, A5 2.59e-5, B1 0, B2 0.00128, B3 0.000108, B4 0, B5 0, B6 0, B7 0, C1 0, C2 3.86e-7, C3 0.000153, C4 1.07e-6, D -0.0105

## Impact indicators
- Abiotic depletion potential for non fossil resources (ADPE) [kg Sb-Äqv.]: A1-A3 0.00295, A4 1.65e-7, A5 2.84e-8, B1 0, B2 4.14e-6, B3 0.00198, B4 0, B5 0, B6 0, B7 0, C1 0, C2 2.04e-9, C3 4.96e-8, C4 2.67e-9, D -0.00292
- Abiotic depletion potential for fossil resources (ADPF) [MJ]: A1-A3 415, A4 25.7, A5 0.42, B1 0, B2 526, B3 40.5, B4 0, B5 0, B6 0, B7 0, C1 0, C2 0.32, C3 0.78, C4 0.0988, D -268
- Acidification potential of soil and water (AP) [kg SO2-Äqv.]: A1-A3 0.22, A4 0.00437, A5 0.000228, B1 0, B2 0.0172, B3 0.0224, B4 0, B5 0, B6 0, B7 0, C1 0, C2 2.96e-5, C3 0.000211, C4 4.37e-5, D -0.13
- Eutrophication potential (EP) [kg Phosphat-Äqv.]: A1-A3 0.0121, A4 0.00109, A5 4.49e-5, B1 0, B2 0.00284, B3 0.00304, B4 0, B5 0, B6 0, B7 0, C1 0, C2 7.14e-6, C3 2.08e-5, C4 4.96e-6, D -0.00861
- Global warming potential (GWP) [kg CO2-Äqv.]: A1-A3 31.3, A4 1.88, A5 2.07, B1 0, B2 17.1, B3 2.98, B4 0, B5 0, B6 0, B7 0, C1 0, C2 0.0234, C3 0.51, C4 0.00725, D -22
- Depletion potential of the stratospheric ozone layer (ODP) [kg R11 eq.]: A1-A3 1.31e-7, A4 3.29e-16, A5 4.01e-16, B1 0, B2 3.79e-14, B3 1.31e-7, B4 0, B5 0, B6 0, B7 0, C1 0, C2 4.08e-18, C3 1.95e-15, C4 3.96e-17, D -1.53e-7
- Formation potential of tropospheric ozone (POCP) [kg Ethen-Äqv.]: A1-A3 0.0109, A4 -0.00155, A5 1.73e-5, B1 0, B2 0.00462, B3 0.00146, B4 0, B5 0, B6 0, B7 0, C1 0, C2 -6.87e-6, C3 1.19e-5, C4 3.33e-6, D -0.00708

## Use advice
Dieser Datensatz beinhaltet die Ergebnisse für die Module A1-A3 sowie die Module A4, A5, B1, B2, B3, B4, B5, B6, B7, C1, C2, C3, C4, D gemäß EN 15804.
Ein Vergleich mit anderen Produkten ist nur mit einer vergleichbaren Anwendung im Gebäude zulässig. Grundsätzlich ist eine Gegenüberstellung oder die Bewertung von EPD Daten nur möglich, wenn alle zu vergleichenden Datensätze nach EN 15804 erstellt wurden und der Gebäudekontext, bzw. die produktspezifischen Leistungsmerkmale berücksichtigt werden.

## Review details
Die angewendete LCI Methode ist in Übereinstimmung mit ISO 14040 und 14044. Die Dokumentation enthält alle relevanten Informationen im Hinblick auf die Datenqualität und den Umfang der Anwendung der jeweiligen LCI Ergebnisse bzw. der Datensätze. Der Datensatz repräsentiert den Stand der Technik bezogen auf die funktionelle Einheit.

## Data sources
- GaBi database (general)
