# Online Access Control Devices - Compact Readers

Dataset: ILCD process, EPD, specific dataset
Geography: RER
Reference year: 2019
Valid until: 2024
Classification: OEKOBAU.DAT: Gebäudetechnik / Elektro / Schalter und Steckdosen
Classification: IBUCategories: 02 Building products / Doors, windows, shutters, and related products / Electronic and physical Access Control Systems
Method details: Electronic and physical Access Control Systems.pdf
Registration number: 10552
Owner: dormakaba International Holding AG
Compliance: DIN EN 15804; ISO 14025
Review: Accredited third party review by Institut Bauen und Umwelt e. V.
Amounts: rows without a unit in brackets have none in this file; such an amount is in the reference unit of its flow, which a separate flow dataset defines
copyright: true

## General comment
The dormakaba compact readers operate in an electronic access control system.

The compact reader is a device that reads a personalized credential via radio-frequency identification (RFID) or Bluetooth Low Energy technology.

The compact reader reads identity information from the credential and passes it on to an access controller via an RS-485 interface. In an online solution, the access controller then grants or denies access to the credential holder. In a stand-alone solution, the compact reader performs the access decision.

Model 91 04: The compact reader 91 04 is a mullion mount reader for outdoor or indoor use.

Model 91 10: The compact reader 91 10 is a reader for use in indoor or in protected outdoor areas.

Model 91 12: The compact reader 91 12 is a reader for outdoor or indoor use and offers an integrated PIN keypad for an added level of security.

Supported credential / communication technologies:

- LEGIC (advant & prime)

- MIFARE (DESFire & Classic)

- NFC (Near Field Communication)

- Bluetooth Low Energy

## Technology and included processes
The compact readers are manufactured and assembled at the production facility at Villingen-Schwenningen in Germany. The plastic housing is supplied by an external partner. During assembly the individual parts are assembled into the casing. The assembled compact readers are then packaged with the mounting plate, installation accessories, and installation manual for shipment. The plant in Villingen-Schwenningen, Germany, is certified to the quality management system /DIN EN ISO 9001:2015-11/, which ensures consistent quality of dormakaba's products.
Technical data:
The compact readers have following technical properties:
Declared unit:
The declared unit is 1 piece of compact reader with the technical specifications given in chapter 2.3.

## Technical purpose
The compact readers (91 04, 91 10 and 91 12) are suitable for indoor and outdoor use, where access control is required.

Common applications include: Corporate buildings, industrial sites, government buildings, military installations, education or healthcare buildings.

Possible fields of application are:

• External gates and gateways
• Exterior doors
• Office buildings / Entrances
• Automatic doors
• Lifts
• Garage doors
• Car park barriers
• Motorised locks

## Reference product
- compact reader 91 10: 1

## Inputs
- Renewable primary energy as energy carrier (PERE) [MJ]: A1-A3 26.5814, A5 1.28883, B6 929, C3 0.01993, D -1.354
- Renewable primary energy resources as material utilization (PERM) [MJ]: A1-A3 1.2886, A5 -1.2886, B6 0, C3 0, D 0
- Total use of renewable primary energy resources (PERT) [MJ]: A1-A3 27.87, A5 0.0002316, B6 929, C3 0.01993, D -1.354
- Non renewable primary energy as energy carrier (PENRE) [MJ]: A1-A3 147.892, A5 0.161195, B6 2470, C3 11.9185, D -14.98
- Non renewable primary energy as material utilization (PENRM) [MJ]: A1-A3 11.9078, A5 -0.1566, B6 0, C3 -11.7512, D 0
- Total use of non renewable primary energy resources (PENRT) [MJ]: A1-A3 159.8, A5 0.004595, B6 2470, C3 0.1674, D -14.98
- Use of secondary material (SM) [kg]: A1-A3 0.06513, A5 0, B6 0, C3 0, D 0
- Use of renewable secondary fuels (RSF) [MJ]: A1-A3 0, A5 0, B6 0, C3 0, D 0
- Use of non renewable secondary fuels (NRSF) [MJ]: A1-A3 0, A5 0, B6 0, C3 0, D 0
- Use of net fresh water (FW) [m^3]: A1-A3 0.08437, A5 2.438e-5, B6 1.27, C3 0.001269, D -0.02553

## Outputs
- Hazardous waste disposed (HWD) [kg]: A1-A3 4.197e-6, A5 1.222e-12, B6 1.16e-6, C3 3.483e-10, D -1.78e-8
- Non hazardous waste disposed (NHWD) [kg]: A1-A3 0.3472, A5 1.302e-5, B6 1.74, C3 0.01878, D -0.06504
- Radioactive waste disposed (RWD) [kg]: A1-A3 0.006823, A5 9.412e-8, B6 0.41, C3 7.228e-6, D -0.0004639
- Components for re-use (CRU) [kg]: A1-A3 0, A5 0, B6 0, C3 0, D 0
- Materials for recycling (MFR) [kg]: A1-A3 0, A5 0.0756, B6 0, C3 0.0002, D 0
- Materials for energy recovery (MER) [kg]: A1-A3 0, A5 0.0036, B6 0, C3 0.2495, D 0
- Exported electrical energy (EEE) [MJ]: A1-A3 0, A5 0.04277, B6 0, C3 1.675, D 0
- Exported thermal energy (EET) [MJ]: A1-A3 0, A5 0.02405, B6 0, C3 0.9331, D 0

## Impact indicators
- Global warming potential (GWP) [kg CO_(2)-Äq.]: A1-A3 11.38, A5 0.1387, B6 135, C3 0.5377, D -1.201
- Depletion potential of the stratospheric ozone layer (ODP) [kg CFC11-Äq.]: A1-A3 6.995e-10, A5 1.357e-16, B6 6.02e-10, C3 1.012e-14, D -6.86e-13
- Acidification potential of land and water (AP) [kg SO_(2)-Äq.]: A1-A3 0.05849, A5 1.211e-6, B6 0.384, C3 0.0002655, D -0.02175
- Eutrophication potential (EP) [kg PO_(4)^(3)-Äq.]: A1-A3 0.003859, A5 2.71e-7, B6 0.036, C3 6.802e-5, D -0.0006723
- Formation potential of tropospheric ozone photochemical oxidants (POCP) [kg Ethen-Äq.]: A1-A3 0.003771, A5 -1.203e-7, B6 0.0241, C3 1.655e-5, D -0.0009925
- Abiotic depletion potential for non fossil resources (ADPE) [kg Sb-Äq.]: A1-A3 0.0004474, A5 7.292e-11, B6 7.19e-5, C3 8.007e-9, D -0.0005493
- Abiotic depletion potential for fossil resources (ADPF) [MJ]: A1-A3 142.4, A5 0.004358, B6 1440, C3 0.1491, D -13.8

## Use advice
Scope:
This EPD refers to a specific compact reader (online access control device) manufactured by dormakaba EAD GmbH. The production site is located in Villingen-Schwenningen (Germany).

The LCA results declared in the EPD refer to the product model 91 10. To enable the user of the EPD to calculate the results for two other compact reader models 91 04 and 91 12, the factors in chapter 6 can be used for the calculation.
System boundary:
Type of EPD: cradle to gate - with options.

The Environmental Product Declaration refers to the production stage (A1-A3), the use stage (B6), the end of life stage (C3) and recycling potential which is declared in the module "benefits and loads beyond the product system boundary" (D).

Modules A1 to A3 include the provision and processing of raw materials as well as the processing of input materials, the transport to manufacturer and production. Module A5 includes the incineration of the product packaging after installation. Module B6 includes the operational energy consumption of the compact reader during its use. Module C3 includes the incineration of plastics for energy recovery. Module D comprises the recycling of metals and gives the recycling potentials.

## Data sources
- Online Access Control Devices - Compact Readers.pdf
- GaBi Database (all versions)
- GaBi database SP35 2018
