# Cork slab, 4 mm (generic); 1,8 kg/m2

Dataset: ILCD process, EPD, generic dataset
Geography: DE
Reference year: 2021
Valid until: 2022
Classification: oekobau.dat: Holz / Holzböden / Kork
Owner: Sphera Solutions GmbH
Compliance: EN 15804+A2
Review: Dependent internal review by Sphera Solutions GmbH; Independent external review by GaBi user forum
Amounts: rows without a unit in brackets have none in this file; such an amount is in the reference unit of its flow, which a separate flow dataset defines
copyright: true
licenseType: Free of charge for all users and uses
accessRestrictions: The license conditions as stated on https://www.oekobaudat.de/ apply.
accessRestrictions: Es gelten die Lizenzbedingungen wie sie auf https://www.oekobaudat.de/ genannt sind.

## General comment
This data set has been modeled according to the European Standard EN 15804+A2 for Sustainable Building. Results are depicted in modules that allow the structured expression of results over the entire life cycle.

## Geography
The data set represents the country specific situation in Germany, focusing on the main technologies, the region specific characteristics and / or import statistics.

## Time period
Annual average

## Technology and included processes
The life cycle analysis of cork board includes the life cycle phases cradle to gate, i.e. particularly the manufacturing of the formulation components and the grouting of them. The main component is cork powder, which is imported from Portugal. The manufacturing of the cork powder includes the forested production, the washing/boiling, drying and grinding. It is assumed that the manufacturing of cork boards follows the manufacturing of chip boards. Amount (6%). The kind of binding agents (melamine resin, and phenole formaldehyde resin) was estimated. Cork boards for walls have a density between 200-300kg/m3 and for floors 400-500 kg/m3. The system boundary is the finished product at the factory gate. Transports from the factory to the construction site are not taken into account and have to be incorporated in a system approach.

In module C1, a manual dismantling (no loads) is assumed, collecting losses are neglected.
The transport in module C2 to the recycling plant takes place with a truck (50km).
Module C3 takes into account the grinding and thermal treatment (combustion) of the material. It is assumed that the material reaches the end of the waste status immediately after dismantling. The CO2 absorbed and stored in the material by photosynthesis (from module A1) is written off in C3 (CO2 neutrality within the product system according to EN 16485: Round and sawn timber - Environmental Product Declarations - Product category rules for wood and wood-based products for use in construction, 2014).
Module D contains the loads through the operation of the recovery facility (excluding biogenic CO2, see above) and credits for the substitution of electricity (German electricity mix) and thermal energy (from natural gas). The calculation of combustion emissions and credits takes into account the specific calorific value of the material and the material composition.

## Technical purpose
This product can be used in construction.

## Safety margin
20 %. Product system depicted except for a few missing processes / flows. Technological, temporal and geographic representativeness partly given.

## Reference product
- Cork slab, 4 mm (generic): 1

## Inputs
- Use of renewable primary energy as energy carrier (PERE) [MJ]: A1-A3 0.473813, C2 0.0039351, C3 36.9769, D -3.88669
- Use of renewable primary energy resources used as raw materials (PERM) [MJ]: A1-A3 30.6, C2 0, C3 -30.6, D 0
- Total use of renewable primary energy (PERT) [MJ]: A1-A3 31.0738, C2 0.0039351, C3 6.37687, D -3.88669
- Use of non renewable primary energy as energy carrier (PENRE) [MJ]: A1-A3 14.2897, C2 0.0678018, C3 2.56142, D -11.3145
- Use of non renewable primary energy resources used as raw materials (PENRM) [MJ]: A1-A3 1.08, C2 0, C3 -1.08, D 0
- Total use of non renewable primary energy resource (PENRT) [MJ]: A1-A3 15.3697, C2 0.0678018, C3 1.48142, D -11.3145
- Use of secondary material (SM) [kg]: A1-A3 0, C2 0, C3 0, D 0
- Use of renewable secondary fuels (SF) [MJ]: A1-A3 0, C2 0, C3 0, D 0
- Use of non renewable secondary fuels (NRSF) [MJ]: A1-A3 0, C2 0, C3 0, D 0
- Net use of fresh water (FW) [m3]: A1-A3 0.00270571, C2 3.49732e-6, C3 0.00883662, D -0.00144541

## Outputs
- Hazardous waste disposed (HWD) [kg]: A1-A3 5.98524e-9, C2 2.8339e-12, C3 3.06736e-10, D -3.9395e-9
- Non harzardous waste disposed (NHWD) [kg]: A1-A3 0.0136935, C2 1.09448e-5, C3 0.0263144, D -0.0060063
- Radioactive waste disposed (RWD) [kg]: A1-A3 0.000245319, C2 6.50647e-8, C3 3.1536e-5, D -0.00041802
- Components for re-use (CRU) [kg]: A1-A3 0, C2 0, C3 0, D 0
- Materials for recycling (MFR) [kg]: A1-A3 0, C2 0, C3 0, D 0
- Materials for energy recovery (MER) [kg]: A1-A3 0, C2 0, C3 0, D 0
- Exported electrical energy (EEE) [MJ]: A1-A3 0, C2 0, C3 3.11394, D 0
- Exported thermal energy (EET) [MJ]: A1-A3 0, C2 0, C3 6.96649, D 0

## Impact indicators
- Global Warming Potential - total (GWP-total) [kg CO2 eq.]: A1-A3 -2.86445, C2 0.00515009, C3 3.96226, D -0.729422
- Global Warming Potential - fossil fuels (GWP-fossil) [kg CO2 eq.]: A1-A3 0.915463, C2 0.00511512, C3 0.088693, D -0.720517
- Global Warming Potential - biogenic (GWP-biogenic) [kg CO2 eq.]: A1-A3 -3.7835, C2 2.11888e-6, C3 3.87348, D -0.00783139
- Global Warming Potential - land use and land use change (GWP-luluc) [kg CO2 eq.]: A1-A3 0.00359137, C2 3.28507e-5, C3 8.50587e-5, D -0.00107331
- Depletion potenzial of the stratospheric ozone layer (ODP) [kg CFC-11 eq.]: A1-A3 2.80131e-15, C2 1.30883e-18, C3 1.05526e-15, D -1.69687e-14
- Acidifcation potential, Accumulated Exceedance (AP) [Mole of H+ eq.]: A1-A3 0.00398641, C2 1.45025e-5, C3 0.00212452, D -0.000743452
- Eutrophication potential - freshwater (EP-freshwater) [kg P eq.]: A1-A3 8.00297e-6, C2 1.05198e-8, C3 1.51412e-7, D -1.78547e-6
- Eutrophication potential - marine (EP-marine) [kg N eq.]: A1-A3 0.0020405, C2 6.68101e-6, C3 0.000952541, D -0.00027286
- Eutrophication potential - terrestrial (EP-terrestrial) [Mole of N eq.]: A1-A3 0.0206497, C2 7.47484e-5, C3 0.0115784, D -0.00290576
- Photochemical Ozone Creation Potential (POCP) [kg NMVOC eq.]: A1-A3 0.00381352, C2 1.30281e-5, C3 0.00243661, D -0.000713931
- Abiotic depletion potential - non-fossil resources (ADPE) [kg Sb eq.]: A1-A3 1.08487e-7, C2 4.44944e-10, C3 1.58872e-8, D -2.28439e-7
- Abiotic depletion potential - fossil resources (ADPF) [MJ]: A1-A3 15.5778, C2 0.067799, C3 1.26515, D -11.3129
- Water (user) deprivation potential (WDP) [m³ world equiv.]: A1-A3 0.366261, C2 1.98842e-5, C3 0.374234, D -0.00877249

## Use advice
The data set represents a cradle to gate inventory. It can be used to characterise the supply chain situation of the respective commodity in a representative manner. Combination with individual unit processes using this commodity enables the generation of user-specific (product) LCAs.

## Data sources
- ULLMANN'S Encyclopedia of Industrial Chemistry
- Documentation of data quality management
- GaBi Database Edition 2021, CUP2021.01
- GaBi database (all versions)
