# Glass - AGC Glass Europe - Pyrobel 16

Dataset: ILCD process, EPD, specific dataset
Geography: BE
Reference year: 2018
Valid until: 2026
Classification: OEKOBAU.DAT: Komponenten von Fenstern und Vorhangfassaden / Füllungen / Transparente Füllungen
Synonyms: PYROBEL; PYROBELite; fire resistant glass
Method details: EPD PYROBEL und PYROBELite (2021); Produktkategorieregeln Teil A; Produktkategorieregeln Teil B – für Flachglas im Bauwesen
Owner: AGC Glass Europe
Compliance: EN 15804
Review: Independent external review by Patrick Wortner
Amounts: rows without a unit in brackets have none in this file; such an amount is in the reference unit of its flow, which a separate flow dataset defines
copyright: true

## General comment
A1-A3 as well as modules A4, A5, C2, C3, C4, D. The environmental profile includes the expenditures for the life cycle stages cradle to gate with options (module A1-A3). The production of the packaging was taken into account within modules A1-A3.

## Geography
This data set represents the situation of AGC Glass Europe in BE-7180 Seneffe, with regard to the most important technologies and the legal framework.

## Time period
anual average

## Technology and included processes
The LCA results include the life cycle stages of the pre-products manufacture to the point of the raw material extraction and processing of secondary material input (e.g. recycling processes), their transport to the manufacturer as well as the maufacturing itself, including provision of all operating supplies, energy and the complete waste treatment or the landfill of residual waste during the stage of manufacture.
The modules A1, A2 and A3 are shown here as an aggregated module A1-A3. If further modules have been calculated for this dataset, these can be found separately and can be merged for consideration of the entire life cycle.

## Technical purpose
Fire resistant glass can be used either as component of an external glazing or as internal partition.

## Reference product
- Glass - AGC Glass Europe - Pyrobel 16: 1

## Inputs
- Use of net fresh water (FW) [m3]: A1-A3 0.169, A4 0.00238, A5 0.00153, C2 0.000141, C3 0, C4 0.00209, D 0.00365
- Nicht-erneuerbare Primärenergie als Energieträger (PENRE) [MJ]: A1-A3 910, A4 36.6, A5 0.81, C2 2.17, C3 0, C4 8.28, D 18.8
- Nicht-erneuerbare Primärenergie zur stofflichen Nutzung (PENRM) [MJ]: A1-A3 0.0221, A4 0, A5 -0.0221, C2 0, C3 0, C4 0, D 0
- Use of non renewable secondary fuels (NRSF) [MJ]: A1-A3 0, A4 0, A5 0, C2 0, C3 0, C4 0, D 0
- Erneuerbare Primärenergie als Energieträger (PERE) [MJ]: A1-A3 119, A4 2.06, A5 0.288, C2 0.122, C3 0, C4 1.08, D -4.29
- Erneuerbare Primärenergie zur stofflichen Nutzung (PERM) [MJ]: A1-A3 9.79, A4 0, A5 -9.79, C2 0, C3 0, C4 0, D 0
- Use of renewable secondary fuels (RSF) [MJ]: A1-A3 0, A4 0, A5 0, C2 0, C3 0, C4 0, D 0
- Input of secondary material (SM) [kg]: A1-A3 3.24, A4 0, A5 0, C2 0, C3 0, C4 0, D 0
- Total use of non-renewable primary energy resources (PENRT) [MJ]: A1-A3 910, A4 36.6, A5 0.787, C2 2.17, C3 0, C4 8.28, D 18.8
- Total use of renewable primary energy resources (PERT) [MJ]: A1-A3 129, A4 2.06, A5 -9.5, C2 0.122, C3 0, C4 1.08, D -4.29

## Outputs
- Components for re-use (CRU) [kg]: A1-A3 0, A4 0, A5 0, C2 0, C3 0, C4 0, D 0
- Exported electrical energy (EEE) [MJ]: A1-A3 0.176, A4 0, A5 0.742, C2 0, C3 0, C4 0, D 0
- Exported thermal energy (EET) [MJ]: A1-A3 0.395, A4 0, A5 1.29, C2 0, C3 0, C4 0, D 0
- Hazardous waste disposed (HWD) [kg]: A1-A3 2.09e-6, A4 1.7e-6, A5 4.02e-9, C2 1.01e-7, C3 0, C4 1.26e-7, D 3.63e-8
- Material for Energy Recovery (MER) [kg]: A1-A3 0, A4 0, A5 0, C2 0, C3 0, C4 0, D 0
- Materials for Recycling (MFR) [kg]: A1-A3 2.42, A4 0, A5 0.353, C2 0, C3 0, C4 0, D 0
- Non-hazardous waste disposed (NHWD) [kg]: A1-A3 1.26, A4 0.0056, A5 0.0263, C2 0.000332, C3 0, C4 41.6, D 0.0698
- Radioactive waste disposed (RWD) [kg]: A1-A3 0.0403, A4 4.53e-5, A5 9.58e-5, C2 2.69e-6, C3 0, C4 9.41e-5, D -0.00015

## Impact indicators
- Abiotic depletion potential for non fossil resources (ADPE) [kg Sb eq.]: A1-A3 4.65e-5, A4 1.97e-7, A5 1.19e-8, C2 1.17e-8, C3 0, C4 5.72e-8, D 1.59e-7
- Abiotic depletion potential for fossil resources (ADPF) [MJ]: A1-A3 775, A4 36.4, A5 0.565, C2 2.16, C3 0, C4 8.03, D 16.3
- Acidification potential of soil and water (AP) [kg SO2 eq.]: A1-A3 0.209, A4 0.00613, A5 0.000151, C2 0.000915, C3 0, C4 0.00361, D 0.00367
- Eutrophication potential (EP) [kg (PO4)3- eq.]: A1-A3 0.0322, A4 0.00145, A5 3.23e-5, C2 0.000231, C3 0, C4 0.000405, D 0.00071
- Global warming potential (GWP) [kg CO2 eq.]: A1-A3 60.5, A4 2.7, A5 0.595, C2 0.158, C3 0, C4 0.567, D 2.24
- Depletion potential of the stratospheric ozone layer (ODP) [kg CFC 11 eq.]: A1-A3 4.2e-8, A4 4.4e-16, A5 1.07e-15, C2 2.61e-17, C3 0, C4 3.12e-15, D 2.67e-9
- Formation potential of tropospheric ozone (POCP) [kg C2H2 eq.]: A1-A3 0.0132, A4 -0.00212, A5 8.55e-6, C2 -0.000413, C3 0, C4 0.000273, D 0.000285

## Use advice
This dataset is modelled according to the European Standard EN 15804 for Sustainable Construction. Results are declared in modules, which allow the structured expression of results throughout the life cycle. It contains the modules A1-A3, A4, A5, C2, C3, C4, D.
The comparison with other products is only permissible if the application in the building is comparable. A comparison or the evaluation of EPD data is only possible, if the datasets have been created according to EN 15804. The building context or the product-specific performance characteristics must be considered.

## Review details
The LCI method applied is in compliance with ISO 14040 and 14044. The documentation includes all relevant information in view of the data quality and scope of the application of the respective LCI result / data set. The dataset represents the state-of-the-art in view of the referenced functional unit.

## Data sources
- GaBi database (general)
