# Vacupor® NT-B2-S

Dataset: ILCD process, EPD, average dataset
Geography: DE
Reference year: 2020
Valid until: 2025
Classification: OEKOBAU.DAT: Dämmstoffe / Siliziumdioxid-basiert / Vakuumisolationspaneele
Classification: IBUCategories: 02 Bauprodukte / Wärmedämmungsprodukte / Vakuum-Isolations-Paneelen
Method details: Vakuum-Isolations-Paneelen.pdf
Generated by: Sphera Solutions GmbH
Registration number: EPD-POR-20200138-IBC1-DE
Owner: Porextherm Dämmstoffe GmbH
Compliance: DIN EN 15804; ISO 14025
Review: Accredited third party review by Institut Bauen und Umwelt e. V.
Amounts: rows without a unit in brackets have none in this file; such an amount is in the reference unit of its flow, which a separate flow dataset defines
copyright: true
licenseType: Free of charge for all users and uses
accessRestrictions: None

## General comment
Vakuum-Isolations-Paneele bestehen aus einem Stützkern aus hochdisperser Kieselsäure, Infrarot-Trübungsmittel sowie Cellulose-Fasern, der unter Vakuum in eine metallisierte Hochbarrierefolie eingeschweißt wird.

Für bestimmte Anwendungsgebiete, wie z.B. Dämmung von Böden, Flachdächern, Wänden, etc., können Vakuum-Isolations-Paneele ein- oder zweiseitig mit einer Funktionskaschierung versehen werden.

## Technology and included processes
The raw materials pyrogenic silicic acid, silicon carbide and rayon are mixed together in the appropriate composition and pressed into a sheet using a hydraulic press. The base plate produced in this way is then optionally prefabricated by means of saws. The plates are then dried at a temperature between 60° C. and 150° C. and wrapped with a spunbonded nonwoven before the metalized plastic composite film is wrapped around the supporting body that is thus present. In a vacuum chamber, the interior is evacuated via the plastic composite film shell, which is still open on one side, and this is finally welded when the corresponding pressure range is replaced. The vacuum insulation panels produced in this way (Vacupor® NT-B2-S / Vacuspeed®) have an internal pressure (pressure inside the plastic composite film shell) of less than 5 mbar. To manufacture the laminated products, the basic variants Vacupor® NT-B2-S and Vacuspeed® are glued on one or both sides with the appropriate laminating material in a further production step. The dust from the mixture that occurs during production is collected via an extraction system and fed back into the material cycle. The same procedure is used for disc waste that may be obtained during pre-assembly. These are crushed again and applied to the raw mixture. The company Thermal Ceramics - Porextherm applies a quality management system according to ISO 9001 and an environmental management system according to ISO 14001. The declared products are subject to external monitoring in accordance with the general technical approval no. Z-23.11-1662. By fulfilling the quality and test provisions of quality assurance RAL-GZ 960, Thermal Ceramics - Porextherm is entitled to label the declared products with the VIP quality mark of the Güteschutzgemeinschaft Hartschaum e.V., which is recognized by RAL and is protected by trademark law.

## Technical purpose
Die in dieser Umweltdeklaration behandelten Vakuum-Isolations-Paneele (VIP) werden als hocheffiziente Wärmedämmung von Wand, Dach, Decke und Bodenplatte bei Gebäuden eingesetzt.

Da Vakuum-Isolations-Paneele nicht vor Ort auf Maß zugeschnitten werden können, muss im Vorfeld der Bestellung der Wärmedämmung ein Verlegeplan mit exakter Stückliste der zu produzierenden Paneele erstellt werden.

Anwendungsbereich Boden:

Vacupor® NT-B2-S, Vacuspeed®, Vacupor® RP-B2-S, Vacuspeed® RP, Vacupor® XPS-B2-S, Vacuspeed® XPS, Vacupor® TS-B2-S, Vacuspeed® TS

Anwendungsbereich Wand:

Vacupor® NT-B2-S, Vacuspeed®, Vacupor® RP-B2-S, Vacuspeed® RP, Vacupor® XPS-B2-S, Vacuspeed® XPS, Vacupor® TS-B2-S, Vacuspeed® TS

Anwendungsbereich Dach:

Vacupor® NT-B2-S, Vacuspeed®, Vacupor® RP-B2-S, Vacuspeed® RP, Vacupor® XPS-B2-S, Vacuspeed® XPS, Vacupor® TS-B2-S, Vacuspeed® TS

## Scenarios
- S1: 100% Deponie
- S2: Szenario 2

## Reference product
- 1 m² VIP mit 25 mm Dicke (): 1

## Inputs
- Renewable primary energy as energy carrier (PERE) [MJ]: A1-A3 387.57, A4 0.0188, A5 9.16, B1 0, B2 0, C1 0, C2 0.006595, C3 (S1) 2.626, C3 (S2) 0.07013, C4 (S1) 0, C4 (S2) 0.1116, D (S1) -321.8, D (S2) -3.051
- Renewable primary energy resources as material utilization (PERM) [MJ]: A1-A3 9.1, A4 0, A5 -9.1, B1 0, B2 0, C1 0, C2 0, C3 (S1) 0, C3 (S2) 0, C4 (S1) 0, C4 (S2) 0, D (S1) 0, D (S2) 0
- Total use of renewable primary energy resources (PERT) [MJ]: A1-A3 396.67, A4 0.0188, A5 0.06175, B1 0, B2 0, C1 0, C2 0.006595, C3 (S1) 2.626, C3 (S2) 0.07013, C4 (S1) 0, C4 (S2) 0.1116, D (S1) -321.8, D (S2) -3.051
- Non renewable primary energy as energy carrier (PENRE) [MJ]: A1-A3 667.99, A4 0.323, A5 0.3729, B1 0, B2 0, C1 0, C2 1.419, C3 (S1) 14.213, C3 (S2) 9.7697, C4 (S1) 0, C4 (S2) 0.8504, D (S1) -647.8, D (S2) -11.84
- Non renewable primary energy as material utilization (PENRM) [MJ]: A1-A3 11.78, A4 0, A5 -2.28, B1 0, B2 0, C1 0, C2 0, C3 (S1) -9.5, C3 (S2) -9.5, C4 (S1) 0, C4 (S2) 0, D (S1) 0, D (S2) 0
- Total use of non renewable primary energy resources (PENRT) [MJ]: A1-A3 679.777, A4 0.323, A5 0.3729, B1 0, B2 0, C1 0, C2 1.419, C3 (S1) 4.713, C3 (S2) 0.2697, C4 (S1) 0, C4 (S2) 0.8504, D (S1) -647.8, D (S2) -11.84
- Use of secondary material (SM) [kg]: A1-A3 0, A4 0, A5 0, B1 0, B2 0, C1 0, C2 0, C3 (S1) 0, C3 (S2) 0, C4 (S1) 0, C4 (S2) 0, D (S1) 0, D (S2) 0
- Use of renewable secondary fuels (RSF) [MJ]: A1-A3 0, A4 0, A5 0, B1 0, B2 0, C1 0, C2 0, C3 (S1) 0, C3 (S2) 0, C4 (S1) 0, C4 (S2) 0, D (S1) 0, D (S2) 0
- Use of non renewable secondary fuels (NRSF) [MJ]: A1-A3 0, A4 0, A5 0, B1 0, B2 0, C1 0, C2 0, C3 (S1) 0, C3 (S2) 0, C4 (S1) 0, C4 (S2) 0, D (S1) 0, D (S2) 0
- Use of net fresh water (FW) [m^3]: A1-A3 0.407306, A4 1.684e-5, A5 0.002863, B1 0, B2 0, C1 0, C2 7.257e-6, C3 (S1) 0.002807, C3 (S2) 0.001423, C4 (S1) 0, C4 (S2) 0.000214, D (S1) -0.3375, D (S2) -0.001664

## Outputs
- Hazardous waste disposed (HWD) [kg]: A1-A3 5.97087e-6, A4 1.207e-8, A5 2.622e-10, B1 0, B2 0, C1 0, C2 1.65e-10, C3 (S1) 4.016e-9, C3 (S2) 1.028e-9, C4 (S1) 0, C4 (S2) 1.296e-8, D (S1) -5.818e-6, D (S2) -6.258e-9
- Non hazardous waste disposed (NHWD) [kg]: A1-A3 10.2241, A4 5.669e-5, A5 0.007615, B1 0, B2 0, C1 0, C2 0.0001953, C3 (S1) 0.06384, C3 (S2) 0.06042, C4 (S1) 0, C4 (S2) 4.275, D (S1) -10.17, D (S2) -0.005657
- Radioactive waste disposed (RWD) [kg]: A1-A3 0.022353, A4 3.4e-7, A5 8.946e-6, B1 0, B2 0, C1 0, C2 1.285e-6, C3 (S1) 0.0003814, C3 (S2) 1.001e-5, C4 (S1) 0, C4 (S2) 9.536e-6, D (S1) -0.02216, D (S2) -0.0004425
- Components for re-use (CRU) [kg]: A1-A3 0, A4 0, A5 0, B1 0, B2 0, C1 0, C2 0, C3 (S1) 0, C3 (S2) 0, C4 (S1) 0, C4 (S2) 0, D (S1) 0, D (S2) 0
- Materials for recycling (MFR) [kg]: A1-A3 0, A4 0, A5 0, B1 0, B2 0, C1 0, C2 0, C3 (S1) 4.271, C3 (S2) 0, C4 (S1) 0, C4 (S2) 0, D (S1) 0, D (S2) 0
- Materials for energy recovery (MER) [kg]: A1-A3 0, A4 0, A5 0, B1 0, B2 0, C1 0, C2 0, C3 (S1) 0, C3 (S2) 0, C4 (S1) 0, C4 (S2) 0, D (S1) 0, D (S2) 0
- Exported electrical energy (EEE) [MJ]: A1-A3 0, A4 0, A5 1.61, B1 0, B2 0, C1 0, C2 0, C3 (S1) 1.077, C3 (S2) 1.077, C4 (S1) 0, C4 (S2) 0, D (S1) 0, D (S2) 0
- Exported thermal energy (EET) [MJ]: A1-A3 0, A4 0, A5 3.535, B1 0, B2 0, C1 0, C2 0, C3 (S1) 2.47355, C3 (S2) 2.474, C4 (S1) 0, C4 (S2) 0, D (S1) 0, D (S2) 0

## Impact indicators
- Global warming potential (GWP) [kg CO_(2)-Äq.]: A1-A3 40.602, A4 0.024, A5 1.662, B1 0, B2 0, C1 0, C2 0.1039, C3 (S1) 0.9308, C3 (S2) 0.5785, C4 (S1) 0, C4 (S2) 0.05826, D (S1) -40.26, D (S2) -0.8135
- Depletion potential of the stratospheric ozone layer (ODP) [kg CFC11-Äq.]: A1-A3 4.83414e-12, A4 7.954e-18, A5 3.492e-16, B1 0, B2 0, C1 0, C2 3.269e-17, C3 (S1) 1.498e-14, C3 (S2) 3.912e-16, C4 (S1) 0, C4 (S2) 3.237e-16, D (S1) -5.985e-13, D (S2) -1.736e-14
- Acidification potential of land and water (AP) [kg SO_(2)-Äq.]: A1-A3 0.103123, A4 1.573e-5, A5 0.0005229, B1 0, B2 0, C1 0, C2 6.09e-5, C3 (S1) 0.0004817, C3 (S2) 6.422e-5, C4 (S1) 0, C4 (S2) 0.0003701, D (S1) -0.09678, D (S2) -0.0007001
- Eutrophication potential (EP) [kg PO_(4)^(3)-Äq.]: A1-A3 0.0121064, A4 2.906e-6, A5 0.0001323, B1 0, B2 0, C1 0, C2 9.409e-6, C3 (S1) 9.677e-5, C3 (S2) 1.431e-5, C4 (S1) 0, C4 (S2) 4.164e-5, D (S1) -0.01124, D (S2) -0.0001325
- Formation potential of tropospheric ozone photochemical oxidants (POCP) [kg Ethen-Äq.]: A1-A3 0.0128848, A4 -2.503e-7, A5 3.134e-5, B1 0, B2 0, C1 0, C2 -2.92e-6, C3 (S1) 4.033e-5, C3 (S2) 5.954e-6, C4 (S1) 0, C4 (S2) 2.807e-5, D (S1) -0.01243, D (S2) -7.025e-5
- Abiotic depletion potential for non fossil resources (ADPE) [kg Sb-Äq.]: A1-A3 0.000869314, A4 2.022e-9, A5 4.076e-9, B1 0, B2 0, C1 0, C2 3.792e-9, C3 (S1) 1.405e-7, C3 (S2) 4.084e-9, C4 (S1) 0, C4 (S2) 5.906e-9, D (S1) -0.0008685, D (S2) -1.854e-7
- Abiotic depletion potential for fossil resources (ADPF) [MJ]: A1-A3 623.14, A4 0.3221, A5 0.3504, B1 0, B2 0, C1 0, C2 1.416, C3 (S1) 3.75, C3 (S2) 0.2445, C4 (S1) 0, C4 (S2) 0.8264, D (S1) -591.7, D (S2) -10.72

## Use advice
Gültigkeitsbereich:
Diese Umwelt- Produktdeklaration ist gültig für das unkaschierte Produkt Vacupor® NT-B2-S, Vacuspeed®. Kombiniert mit den Ergebnissen im EPD Anhang für die entsprechenden Kaschierungen gilt diese Umwelt- Produktdeklaration auch für die kaschierten Produkte Vacupor® RP-B2-S, Vacuspeed® RP, Vacupor® XPS-B2-S, Vacuspeed® XPS, Vacupor® TS-B2-S und Vacuspeed® TS. Die deklarierten Produkte werden von der Firma Thermal Ceramics – Porextherm Dämmstoffe GmbH der Morgan Advanced Materials in ihrem Werk in Kempten (Allgäu), Deutschland hergestellt.

Es handelt sich hier um eine spezifische, für das jeweilige Produkt gültige Umwelt- Produktdeklaration.
Systemgrenze:
Typ der EPD: Wiege bis Werkstor - mit Optionen

Die Ökobilanz berücksichtigt die Rohstoff- und Energiegewinnung, und die eigentliche Produktherstellung (Module A1-A3), den Transport zur Baustelle (Modul A4), die Installation inkl. Verpackungsentsorgung (Modul A5), die Nutzung (Modul B1 und B2), den Ausbau (Modul C1), den Transport zur Verwertung/Entsorgung (Modul C2), Abfallbehandlung (Modul C3), Abfallbeseitigung (Modul C4) sowie Gutschriften und Lasten außerhalb der Systemgrenzen (Modul D).

## Data sources
- GaBi Database (all versions)
- GaBi database SP40 2020
