# TOURNIKET - All options included

Dataset: ILCD process, EPD, average dataset
Geography: RER
Reference year: 2018
Valid until: 2023
Classification: OEKOBAU.DAT: Komponenten von Fenstern und Vorhangfassaden / Türen und Tore / Aluminium
Classification: IBUCategories: 02 Building products / Doors, windows, shutters, and related products / Automatic doors, automatic gates, and revolving door systems
Method details: Automatic doors, automatic gates, and revolving door systems.pdf
Generated by: PRé Sustainability
Registration number: EPD-RBE-20180009-IBD1-EN
Owner: Royal Boon Edam International B.V.
Compliance: DIN EN 15804; ISO 14025
Review: Accredited third party review by Institut Bauen und Umwelt e. V.
Amounts: rows without a unit in brackets have none in this file; such an amount is in the reference unit of its flow, which a separate flow dataset defines
copyright: true
licenseType: Free of charge for all users and uses
accessRestrictions: None

## General comment
The Tourniket is Boon Edam’s most versatile entry solution. Available in virtually every colour or finish, with three or four door wings, manual or automatic operation, and with a variety of door set options, it is the ultimate solution for many different types of buildings.

For the product studied in this document, all options available for a Tourniket TQ were selected:

Maximum diameter (3800 mm) and height under canopy (2300mm) available for the range,
4 Collapsible door leaves with thickened-glass windows,
Thickened-glass windows curved walls,
Automated drive positioned in the canopy (hence a higher canopy),
Motion detector control and idle speed control,
External manual control panel,
Automatic night locking, including monitoring, with thickened-glass windows,
Protective aluminium strips on all windows,
Lighting, with 4 low energy lamps,
Increased thickness floor mat.

## Technology and included processes
All materials are shipped from suppliers to Boon Edam Manufacturing EMEA site in Edam, The Netherlands. Steel and aluminium profiles are cut to shape and size on site, and are assembled with the rest of the materials by Boon Edam. The manufacturing site in Edam is /ISO 9001/ certified.
Declared unit:
The LCA study used to draft this EPD is based on 1 Boon Edam Tourniket TQ-04, used in Europe for 20 years.

Declared Unit: 1 piece (1 revolving door), with a 3800mm diameter, 2300mm height under canopy and 3500mm height.
It is fitted with a 220V AC motor of 180W.

This is the maximum possible size for this range, with all potential options included, in effect presenting the 'worst-case scenario' for a product of the TQ range.

## Technical purpose
Automatic revolving doors are intended to be used in commercial buildings, in particular in:

Airports
Retail
Banks
Corporate Headquarters
Governmental buildings
Healthcare
Hotels & Restaurants

## Reference product
- 1 Tourniket TQ, all options included (): 1

## Inputs
- Renewable primary energy as energy carrier (PERE) [MJ]: A1-A3 31600, A4 37.7, A5 5420, B2 1060, B6 15800, C1 10.1, C2 7.96, C3 3920, C4 1.38
- Renewable primary energy resources as material utilization (PERM) [MJ]: A1-A3 9310, A4 0, A5 -5410, B2 0, B6 0, C1 0, C2 0, C3 -3900, C4 0
- Total use of renewable primary energy resources (PERT) [MJ]: A1-A3 40900, A4 37.7, A5 10.6, B2 1060, B6 15800, C1 10.1, C2 7.96, C3 19.8, C4 1.38
- Non renewable primary energy as energy carrier (PENRE) [MJ]: A1-A3 197000, A4 2590, A5 238, B2 9190, B6 83700, C1 53.6, C2 547, C3 2800, C4 29
- Non renewable primary energy as material utilization (PENRM) [MJ]: A1-A3 2570, A4 0, A5 -169, B2 0, B6 0, C1 0, C2 0, C3 -2400, C4 0
- Total use of non renewable primary energy resources (PENRT) [MJ]: A1-A3 199000, A4 2590, A5 68.8, B2 9190, B6 83700, C1 53.6, C2 547, C3 402, C4 29
- Use of secondary material (SM) [kg]: A1-A3 173, A4 0, A5 0, B2 17.7, B6 0, C1 0, C2 0, C3 0, C4 0
- Use of renewable secondary fuels (RSF) [MJ]: A1-A3 0, A4 0, A5 0, B2 0, B6 0, C1 0, C2 0, C3 0, C4 0
- Use of non renewable secondary fuels (NRSF) [MJ]: A1-A3 0, A4 0, A5 0, B2 0, B6 0, C1 0, C2 0, C3 0, C4 0
- Use of net fresh water (FW) [m^3]: A1-A3 181, A4 0.532, A5 0.0776, B2 6.93, B6 72, C1 0.0461, C2 0.112, C3 0.0934, C4 0.0258

## Outputs
- Hazardous waste disposed (HWD) [kg]: A1-A3 0.527, A4 0.00152, A5 0.0001, B2 0.0483, B6 0.127, C1 8.15e-5, C2 0.00032, C3 0.000577, C4 2.81e-5
- Non hazardous waste disposed (NHWD) [kg]: A1-A3 5870, A4 123, A5 75.6, B2 148, B6 277, C1 0.178, C2 26, C3 17.2, C4 95.1
- Radioactive waste disposed (RWD) [kg]: A1-A3 0.386, A4 0.0178, A5 0.000466, B2 0.0201, B6 0.593, C1 0.00038, C2 0.00376, C3 0.00226, C4 0.000144
- Components for re-use (CRU) [kg]: A1-A3 0, A4 0, A5 0, B2 0, B6 0, C1 0, C2 0, C3 0, C4 0
- Materials for recycling (MFR) [kg]: A1-A3 109, A4 0, A5 0, B2 40.8, B6 0, C1 0, C2 0, C3 0, C4 889
- Materials for energy recovery (MER) [kg]: A1-A3 0, A4 0, A5 0, B2 0, B6 0, C1 0, C2 0, C3 0, C4 0
- Exported electrical energy (EEE) [MJ]: A1-A3 56.9, A4 0, A5 52, B2 43, B6 0, C1 0, C2 0, C3 297, C4 0
- Exported thermal energy (EET) [MJ]: A1-A3 119, A4 0, A5 110, B2 883, B6 0, C1 0, C2 0, C3 613, C4 0

## Impact indicators
- Global warming potential (GWP) [kg CO_(2)-Äq.]: A1-A3 19900, A4 167, A5 3.45, B2 906, B6 4200, C1 2.69, C2 35.3, C3 127, C4 5.68
- Depletion potential of the stratospheric ozone layer (ODP) [kg CFC11-Äq.]: A1-A3 0.000916, A4 3.12e-5, A5 4.43e-7, B2 4.16e-5, B6 0.00042, C1 2.69e-7, C2 6.59e-6, C3 3.87e-6, C4 2.44e-7
- Acidification potential of land and water (AP) [kg SO_(2)-Äq.]: A1-A3 119, A4 0.754, A5 0.0284, B2 5.36, B6 21.2, C1 0.0136, C2 0.159, C3 0.162, C4 0.0128
- Eutrophication potential (EP) [kg PO_(4)^(3)-Äq.]: A1-A3 10.3, A4 0.117, A5 0.00473, B2 0.799, B6 3.16, C1 0.00202, C2 0.0247, C3 0.0276, C4 0.00469
- Formation potential of tropospheric ozone photochemical oxidants (POCP) [kg Ethen-Äq.]: A1-A3 7.18, A4 0.0274, A5 0.00101, B2 0.534, B6 0.79, C1 0.000506, C2 0.00578, C3 0.00911, C4 0.00145
- Abiotic depletion potential for non fossil resources (ADPE) [kg Sb-Äq.]: A1-A3 0.281, A4 0.000513, A5 5.28e-6, B2 0.033, B6 0.00636, C1 4.07e-6, C2 0.000108, C3 4.53e-5, C4 1.22e-6
- Abiotic depletion potential for fossil resources (ADPF) [MJ]: A1-A3 188000, A4 2530, A5 43.3, B2 8450, B6 44400, C1 28.5, C2 535, C3 368, C4 27.3

## Use advice
Scope:
The declaration and background LCA report represent an automatic revolving door Boon Edam Tourniket, type TQ.
Raw materials and components are provided by suppliers from around the globe and shipped to Boon Edam, where the doors are manufactured and assembled before being shipped and installed on a construction site in Europe.
The energy use on site and maintenance during the 20 years of use are taken in account.
System boundary:
The present EPD is declared as a "cradle-to-gate - with options"
The modules declared are:

Production stage

A1 - Raw material extraction and processing: All materials and parts that are constituents of the final product are considered. All pre-processing that are applied to the material, prior to handling by Boon Edam, are part of A1. Additional raw material quantities that are needed to cover-up for the production losses and metal cuttings that are sent back to suppliers are also accounted in A1.

A2 - Transport to the manufacturer: Transports of all raw materials (incl. quantities needed to cover-up for the production losses) and packaging materials are accounted for.

A3 - Manufacturing: All processes performed at Boon Edam are accounted for (incl. use of energy), as well as raw material extraction and pre-processing of packaging materials. Waste generated are accounted in A3, excepted for recycled metal cutting (included in A1)

Construction stage
A4 - Transport to building site: Transport from Boon Edam Distribution & Support centre to a theoretical building in Europe is modelled, including the door and its packaging.

A5 - Installation in the building: The effort for installation is minimal since the main parts of the doors are supplied pre-assembled, and (depending on the dimensions and option of the product) consist only in a couple of hours of use of electric screwdrivers and power drills. Disposal of packaging is also accounted for.

Use stage modules related to the building fabric

B2- Maintenance: For the door to be functional over a period of 20 years, some parts need to be replaced as preventive maintenance (mainly sensors and wear parts). The material needed for production of these parts, and the production effort in the upstream chain are included, as well as the transport to the construction site. When it comes to the replaced elements, their transport from the installation site back to Boon Edam and end of life treatment are taken into account.
Use stage modules related to operation of the building

B6 - operational energy use: The electricity use for powering the electric drive is computed in the model.

End-of-life stage
C1 - Deconstruction: Electricity needed for the use of power drills is included.
C2 - Transport to waste processing: Transport of the complete door is computed.
C3 - Waste processing: The processing of components which reach end of waste state and need conversion to secondary materials, and those which are incinerated, is included.
C4 - Disposal: End of life of all the materials is considered. Some of the materials used in the product - steel, aluminium and glass - present a value and reach the end of waste state (see detail of the ratios used in §4.1.4). The remaining components are incinerated and landfilled

## Data sources
- ecoinvent database (all versions)
- ecoinvent 3.3 database
