# Brick (unfilled)

Dataset: ILCD process, EPD, average dataset
Geography: DE
Reference year: 2021
Valid until: 2026
Classification: OEKOBAU.DAT: Mineralische Baustoffe / Steine und Elemente / Ziegel
Classification: IBUCategories: 02 Bauprodukte / Mauerwerk und Mörtel / Ziegel
Method details: Ziegel.pdf
Generated by: Life Cycle Engineering Experts GmbH
Registration number: EPD-BDZ-20210066-ICG1-DE
Owner: Bundesverband der Deutschen Ziegelindustrie e.V.
Compliance: DIN EN 15804+A2; ISO 14025
Review: Accredited third party review by Institut Bauen und Umwelt e. V.
Amounts: rows without a unit in brackets have none in this file; such an amount is in the reference unit of its flow, which a separate flow dataset defines
copyright: true
licenseType: Free of charge for all users and uses
accessRestrictions: None

## General comment
Mauerziegel sind Bauprodukte aus gebranntem Ton. Es wird unterschieden in Hochlochziegel und Formteile für tragendes und nichttragendes Mauerwerk und Mauertafeln (Ziegelelemente als Montageteile) jeweils für Außen- und Innenwände von Gebäuden. Es werden Ziegel für geschütztes und ungeschütztes Mauerwerk in dieser EPD behandelt, siehe auch die Rohdichtespanne von 550–2000 kg/m³. Bei hochwärmedämmenden Ziegeln werden Porosierungsmittel in der Produktion zugegeben. Mauerziegel können zusätzlich mit verschiedenen Dämmstoffen verfüllt werden. Diese Ziegel werden in einer eigenen EPD behandelt. Grundlage der Ökobilanzergebnisse in dieser EPD ist eine Durchschnittsbildung aller deutschen Werke, die als gewichteter Mittelwert bezogen auf den Anteil der einzelnen Produktionsstätten an der Gesamtjahresproduktion erfolgte. Als repräsentatives Produkt wurde ein Ziegel mit einer Rohdichte von 575 kg/m³ ausgewählt.

## Technology and included processes
After the clay has been extracted in the open pit, it is transported to temporary storage on the factory premises. The mechanical processing of the clays, such as crushing and mixing, takes place in the pan mill and the rolling mills. The above Basic materials are comminuted (processed), mixed and moistened in certain optimized proportions. This is followed by storage in the swamp house. The porosity agents are added before or after storage in the sump house. After passing through the fine rolling mill and adding more water, the blanks are shaped by extrusion with appropriate mouthpieces and a downstream cutter. The material formed in this way goes into the dryer, which is mainly operated with the waste heat from the tunnel kiln. The drying time varies depending on the format and bulk density and is usually 24 hours. The dried blanks are then fired in a tunnel kiln at approx. 1000 ° C for a maximum of 24 hours. The combustion of the porosity causes fine porosity. To produce flat bricks, the bricks are ground flat. The bricks are stacked, shrink-wrapped in recyclable PE film or strapped with polyester or steel straps. The energy requirement for brick production mainly relates to the firing process and drying. The electrical energy is mainly used in processing.

## Technical purpose
Je nach Konstruktion der Wände finden Mauerziegel verschiedener Formen Anwendung für massive Bauteile wie Kellerwände, Außenwände, tragende und nicht tragende Innenwände.

## Scenarios
- S1: 1

## Reference product
- Mauerziegel (575 kg/m³): 1

## Inputs
- Renewable primary energy as energy carrier (PERE) [MJ]: A1-A3 215, A4 3.19, A5 0.0559, C1 0.271, C2 0.725, C3 2.28, C4 1.7, D (S0) -5.45, D (S1) -3.78
- Renewable primary energy resources as material utilization (PERM) [MJ]: A1-A3 0, A4 0, A5 0, C1 0, C2 0, C3 0, C4 0, D (S0) 0, D (S1) 0
- Total use of renewable primary energy resources (PERT) [MJ]: A1-A3 215, A4 3.19, A5 0.0559, C1 0.271, C2 0.725, C3 2.28, C4 1.7, D (S0) -5.45, D (S1) -3.78
- Non renewable primary energy as energy carrier (PENRE) [MJ]: A1-A3 1180, A4 54.8, A5 0.292, C1 4.66, C2 12.5, C3 27.1, C4 12.9, D (S0) -19.1, D (S1) -15.1
- Non renewable primary energy as material utilization (PENRM) [MJ]: A1-A3 0, A4 0, A5 0, C1 0, C2 0, C3 0, C4 0, D (S0) 0, D (S1) 0
- Total use of non renewable primary energy resources (PENRT) [MJ]: A1-A3 1180, A4 54.8, A5 0.292, C1 4.66, C2 12.5, C3 27.1, C4 12.9, D (S0) -19.1, D (S1) -15.1
- Use of secondary material (SM) [kg]: A1-A3 142, A4 0, A5 0, C1 0, C2 0, C3 539, C4 0, D (S0) 0, D (S1) 0
- Use of renewable secondary fuels (RSF) [MJ]: A1-A3 0, A4 0, A5 0, C1 0, C2 0, C3 0, C4 0, D (S0) 0, D (S1) 0
- Use of non renewable secondary fuels (NRSF) [MJ]: A1-A3 0, A4 0, A5 0, C1 0, C2 0, C3 0, C4 0, D (S0) 0, D (S1) 0
- Use of net fresh water (FW) [m^3]: A1-A3 0.171, A4 0.00286, A5 0.00405, C1 0.000243, C2 0.00065, C3 0.00709, C4 0.00326, D (S0) 0.00354, D (S1) 0.00206

## Outputs
- Hazardous waste disposed (HWD) [kg]: A1-A3 1.47e-6, A4 2.05e-6, A5 2.28e-10, C1 1.74e-7, C2 4.66e-7, C3 5.7e-7, C4 1.08e-7, D (S0) -3.6e-7, D (S1) -7.95e-9
- Non hazardous waste disposed (NHWD) [kg]: A1-A3 1.71, A4 0.00962, A5 0.00761, C1 0.000818, C2 0.00219, C3 0.00815, C4 35.7, D (S0) -11.2, D (S1) -0.00712
- Radioactive waste disposed (RWD) [kg]: A1-A3 0.0171, A4 5.77e-5, A5 8.1e-6, C1 4.91e-6, C2 1.31e-5, C3 0.000217, C4 7.96e-5, D (S0) -0.000712, D (S1) -0.000548
- Components for re-use (CRU) [kg]: A1-A3 0, A4 0, A5 0, C1 0, C2 0, C3 0, C4 0, D (S0) 0, D (S1) 0
- Materials for recycling (MFR) [kg]: A1-A3 0, A4 0, A5 0, C1 0, C2 0, C3 539, C4 0, D (S0) 0, D (S1) 0
- Materials for energy recovery (MER) [kg]: A1-A3 0, A4 0, A5 0, C1 0, C2 0, C3 0, C4 0, D (S0) 0, D (S1) 0
- Exported electrical energy (EEE) [MJ]: A1-A3 0, A4 0, A5 3.42, C1 0, C2 0, C3 0, C4 0, D (S0) 0, D (S1) 0
- Exported thermal energy (EET) [MJ]: A1-A3 0, A4 0, A5 7.88, C1 0, C2 0, C3 0, C4 0, D (S0) 0, D (S1) 0

## Impact indicators
- Global Warming Potential total (GWP-total) [kg CO_(2)-Äq.]: A1-A3 113, A4 4.15, A5 0.824, C1 0.352, C2 0.942, C3 -10.1, C4 0.5, D (S0) -1.46, D (S1) -1.06
- Global Warming Potential fossil fuels (GWP-fossil) [kg CO_(2)-Äq.]: A1-A3 112.8, A4 4.13, A5 0.83, C1 0.366, C2 0.938, C3 1.44, C4 0.541, D (S0) -1.45, D (S1) -1.05
- Global Warming Potential biogenic (GWP-biogenic) [kg CO_(2)-Äq.]: A1-A3 0.18, A4 0.00166, A5 -0.0039, C1 -0.0156, C2 0.000377, C3 -11.5, C4 -0.0429, D (S0) -0.00909, D (S1) -0.00439
- Global Warming Potential luluc (GWP-luluc) [kg CO_(2)-Äq.]: A1-A3 0.0518, A4 0.0173, A5 -0.00132, C1 0.00147, C2 0.00392, C3 0.00529, C4 0.00156, D (S0) -0.00484, D (S1) -0.00135
- Depletion potential of the stratospheric ozone layer (ODP) [kg CFC11-Äq.]: A1-A3 4.91e-13, A4 1.01e-15, A5 -1.59e-14, C1 8.61e-17, C2 2.3e-16, C3 6.11e-15, C4 2.03e-15, D (S0) -2.07e-14, D (S1) -1.61e-14
- Acidification potential of land and water (AP) [mol H^(+)-Äq.]: A1-A3 0.0924, A4 0.00383, A5 -0.000866, C1 0.00173, C2 0.000871, C3 0.0135, C4 0.00388, D (S0) -0.00461, D (S1) -0.00116
- Eutrophication potential aquatic freshwater (EP-freshwater) [kg PO_(4)-Äq.]: A1-A3 9.27e-5, A4 8.99e-6, A5 -2.17e-6, C1 7.64e-7, C2 2.04e-6, C3 3.43e-6, C4 9.32e-7, D (S0) -4.41e-6, D (S1) -2.2e-6
- Eutrophication potential aquatic marine (EP-marine) [kg N-Äq.]: A1-A3 0.0269, A4 0.00119, A5 -0.000329, C1 0.000816, C2 0.000271, C3 0.00664, C4 0.000999, D (S0) -0.00175, D (S1) -0.000375
- Eutrophication potential terrestrial (EP-terrestrial) [mol N-Äq.]: A1-A3 0.341, A4 0.0145, A5 -0.00265, C1 0.00904, C2 0.00329, C3 0.073, C4 0.011, D (S0) -0.0192, D (S1) -0.004
- Formation potential of tropospheric ozone photochemical oxidants (POCP) [kg NMVOC-Äq.]: A1-A3 0.0765, A4 0.00315, A5 -0.000881, C1 0.00228, C2 0.000717, C3 0.0193, C4 0.00302, D (S0) -0.00414, D (S1) -0.00101
- Abiotic depletion potential for non fossil resources (ADPE) [kg Sb-Äq.]: A1-A3 9.9e-6, A4 3.43e-7, A5 -2.25e-7, C1 2.92e-8, C2 7.79e-8, C3 1.58e-6, C4 4.88e-8, D (S0) -3.14e-7, D (S1) -2.28e-7
- Abiotic depletion potential for fossil resources (ADPF) [MJ]: A1-A3 1150, A4 54.8, A5 -14.9, C1 4.66, C2 12.5, C3 27.1, C4 6.9, D (S0) -19.1, D (S1) -15.1
- Water use (WDP) [m^(3) Welt-Äq. entzogen]: A1-A3 2.37, A4 0.0178, A5 0.161, C1 0.00151, C2 0.00404, C3 0.242, C4 0.0565, D (S0) -0.0355, D (S1) -0.012
- Incidence of disease due to PM emissions (PM) [Krankheitsfälle]
- Human exposure efficiency relative to U235 (IR) [kBq U235-Äq.]
- Comparative toxic unit for ecosystems (ETP-fw) [CTUe]
- Comparative toxic unit for humans (carcinogenic) (HTP-c) [CTUh]
- Comparative toxic unit for humans (noncarcinogenic) (HTP-nc) [CTUh]
- Soil quality index (SQP) [SQP]

## Use advice
Gültigkeitsbereich:
Die Anwendung dieses Dokumentes ist auf Mauerziegel beschränkt, die von Mitgliedsunternehmen des Bundesverbands der Deutschen Ziegelindustrie e.V. in Deutschland hergestellt werden. Für diese Deklaration wurden von 20 Mitgliedsunternehmen Daten aus dem Jahr 2019 zur Verfügung gestellt. Diese Mitglieder repräsentieren nach Anzahl 90 % der im Bundesverband zusammengeschlossenen Hersteller von Mauerziegeln. Das Produktionsvolumen dieser Firmen liegt - nach Produktionsmenge - bei etwa 90 % des deutschen Marktes.
Systemgrenze:
Typ der EPD: Wiege bis zum Werkstor – mit Optionen. Die Ökobilanz berücksichtigt die Rohstoffgewinnung, die Rohstofftransporte und die eigentliche Produktherstellung inklusive der Verpackungsmaterialien (Module A1–A3). Der Transport zur Baustelle (Modul A4) sowie die Behandlung der Verpackungsmaterialien in Müllverbrennungsanlagen nach dem Einbau des Produktes (Modul A5) sind ebenfalls Teil der Systemgrenzen. Nach Ablauf der Nutzungsdauer wird das Produkt rückgebaut (Modul C1). Nach dem Transport des rückgebauten Produktes (Modul C2) ist für rund 6 % der Ziegel eine Deponierung auf einer Inertstoffdeponie vorgesehen (Modul C4), 94 % können weiterverwertet werden. Gutschriften infolge des Recyclings von Ziegelbruch sind in Modul D deklariert. Gutschriften für Strom und thermische Energie infolge der thermischen Verwertung der Verpackung innerhalb des Moduls A5 werden ebenfalls in Modul D berücksichtigt.

## Data sources
- GaBi Database (all versions)
- GaBi database SP39 2019
