# Phenolic resin foam

Dataset: ILCD process, EPD, generic dataset
Geography: DE
Reference year: 2021
Valid until: 2022
Classification: oekobau.dat: Dämmstoffe / Phenolharz-Hartschaum (PF) / PF-Platten
Owner: Sphera Solutions GmbH
Compliance: EN 15804+A2
Review: Dependent internal review by Sphera Solutions GmbH; Independent external review by GaBi user forum
Amounts: rows without a unit in brackets have none in this file; such an amount is in the reference unit of its flow, which a separate flow dataset defines
copyright: true
licenseType: Free of charge for all users and uses
accessRestrictions: The license conditions as stated on https://www.oekobaudat.de/ apply.
accessRestrictions: Es gelten die Lizenzbedingungen wie sie auf https://www.oekobaudat.de/ genannt sind.

## General comment
This data set has been modeled according to the European Standard EN 15804+A2 for Sustainable Building. Results are depicted in modules that allow the structured expression of results over the entire life cycle.

## Geography
The data set represents the country specific situation in Germany, focusing on the main technologies, the region specific characteristics and / or import statistics.

## Time period
Annual average

## Technology and included processes
Phenolic resin foam panels are produced in a foaming process using thermal and electrical energy. Subsequently, the formatting takes place. The upstream chain of the various resin blends dominates the LCA. Lamination was not taken into account due to its minor ecological relevance.

In module C1, a manual dismantling (no loads) is assumed, collecting losses are neglected.
The transport in module C2 to the recycling plant takes place with a truck (50km).
Module C3 takes into account the grinding and thermal treatment (combustion) of the material. When calculating combustion emissions and credits, the specific calorific value of each material and the material composition are taken into account.
In module D credits for the substitution of electricity (German electricity mix) and thermal energy (from natural gas) are given.

## Technical purpose
Phenolic resin foam panels are used as insulation, e.g. as on-roof or intermediate rafter insulation. The use as an External Thermal Insulation Composite System (ETICS) is also possible.

## Safety margin
20 %. Product system depicted except for a few missing processes / flows. Technological, temporal and geographic representativeness partly given.

## Reference product
- Phenolic resin foam: 1

## Inputs
- Use of renewable primary energy as energy carrier (PERE) [MJ]: A1-A3 120.01, C2 0.0874466, C3 5.08779, D -137.058
- Use of renewable primary energy resources used as raw materials (PERM) [MJ]: A1-A3 0, C2 0, C3 0, D 0
- Total use of renewable primary energy (PERT) [MJ]: A1-A3 120.01, C2 0.0874466, C3 5.08779, D -137.058
- Use of non renewable primary energy as energy carrier (PENRE) [MJ]: A1-A3 1562.32, C2 1.50671, C3 1065, D -393.492
- Use of non renewable primary energy resources used as raw materials (PENRM) [MJ]: A1-A3 864, C2 0, C3 -864, D 0
- Total use of non renewable primary energy resource (PENRT) [MJ]: A1-A3 2426.32, C2 1.50671, C3 201.005, D -393.492
- Use of secondary material (SM) [kg]: A1-A3 0, C2 0, C3 0, D 0
- Use of renewable secondary fuels (SF) [MJ]: A1-A3 0, C2 0, C3 0, D 0
- Use of non renewable secondary fuels (NRSF) [MJ]: A1-A3 0, C2 0, C3 0, D 0
- Net use of fresh water (FW) [m3]: A1-A3 0.501558, C2 7.77182e-5, C3 0.207848, D -0.0509568

## Outputs
- Hazardous waste disposed (HWD) [kg]: A1-A3 0.00158953, C2 6.29755e-11, C3 6.91704e-9, D -1.37361e-7
- Non harzardous waste disposed (NHWD) [kg]: A1-A3 1.18628, C2 0.000243217, C3 0.458462, D -0.210079
- Radioactive waste disposed (RWD) [kg]: A1-A3 0.0127535, C2 1.44588e-6, C3 0.00062455, D -0.0147409
- Components for re-use (CRU) [kg]: A1-A3 0, C2 0, C3 0, D 0
- Materials for recycling (MFR) [kg]: A1-A3 0, C2 0, C3 0, D 0
- Materials for energy recovery (MER) [kg]: A1-A3 0, C2 0, C3 40, D 0
- Exported electrical energy (EEE) [MJ]: A1-A3 0, C2 0, C3 109.818, D 0
- Exported thermal energy (EET) [MJ]: A1-A3 0, C2 0, C3 240.13, D 0

## Impact indicators
- Global Warming Potential - total (GWP-total) [kg CO2 eq.]: A1-A3 91.9186, C2 0.114446, C3 90.2781, D -25.408
- Global Warming Potential - fossil fuels (GWP-fossil) [kg CO2 eq.]: A1-A3 90.778, C2 0.113669, C3 90.0574, D -25.0953
- Global Warming Potential - biogenic (GWP-biogenic) [kg CO2 eq.]: A1-A3 -0.213918, C2 4.70863e-5, C3 0.21903, D -0.274869
- Global Warming Potential - land use and land use change (GWP-luluc) [kg CO2 eq.]: A1-A3 1.35451, C2 0.000730015, C3 0.00167847, D -0.0378376
- Depletion potenzial of the stratospheric ozone layer (ODP) [kg CFC-11 eq.]: A1-A3 2.35514e-7, C2 2.9085e-17, C3 2.0891e-14, D -5.98404e-13
- Acidifcation potential, Accumulated Exceedance (AP) [Mole of H+ eq.]: A1-A3 0.139391, C2 0.000322279, C3 0.0601991, D -0.0260213
- Eutrophication potential - freshwater (EP-freshwater) [kg P eq.]: A1-A3 0.000211689, C2 2.33774e-7, C3 3.08016e-6, D -6.29361e-5
- Eutrophication potential - marine (EP-marine) [kg N eq.]: A1-A3 0.0492417, C2 0.000148467, C3 0.0276412, D -0.00953243
- Eutrophication potential - terrestrial (EP-terrestrial) [Mole of N eq.]: A1-A3 0.491346, C2 0.00166107, C3 0.33231, D -0.101478
- Photochemical Ozone Creation Potential (POCP) [kg NMVOC eq.]: A1-A3 0.217049, C2 0.000289514, C3 0.0705988, D -0.0249198
- Abiotic depletion potential - non-fossil resources (ADPE) [kg Sb eq.]: A1-A3 8.95037e-5, C2 9.88765e-9, C3 3.27201e-7, D -8.03148e-6
- Abiotic depletion potential - fossil resources (ADPF) [MJ]: A1-A3 2598.64, C2 1.50664, C3 28.1991, D -393.434
- Water (user) deprivation potential (WDP) [m³ world equiv.]: A1-A3 4.07878, C2 0.000441872, C3 8.81951, D -0.309194

## Use advice
This data set refers to the production of 1 m³ phenolic resin foam. Lamination was not considered. The bulk density is 40 kg/m³. The thermal conductivity is 0.024 W/mK. The data set can be used approximately for the estimation of phenolic resin foam with a density of 35 - 45 kg/m³, as well as for the estimation of panels with thinner fiberglass lamination.

The data set represents a cradle to gate inventory. It can be used to characterise the supply chain situation of the respective commodity in a representative manner. Combination with individual unit processes using this commodity enables the generation of user-specific (product) LCAs.

## Data sources
- GaBi databases
- Documentation of data quality management
- GaBi Database Edition 2021, CUP2021.01
- GaBi database (all versions)
