# Mineral fibre ceiling board (15 mm); 2,4 kg/m2

Dataset: ILCD process, EPD, generic dataset
Geography: DE
Reference year: 2021
Valid until: 2022
Classification: oekobau.dat: Mineralische Baustoffe / Steine und Elemente / Deckenplatten
Owner: Sphera Solutions GmbH
Compliance: EN 15804+A2
Review: Dependent internal review by Sphera Solutions GmbH; Independent external review by GaBi user forum
Amounts: rows without a unit in brackets have none in this file; such an amount is in the reference unit of its flow, which a separate flow dataset defines
copyright: true
licenseType: Free of charge for all users and uses
accessRestrictions: The license conditions as stated on https://www.oekobaudat.de/ apply.
accessRestrictions: Es gelten die Lizenzbedingungen wie sie auf https://www.oekobaudat.de/ genannt sind.

## General comment
This data set has been modeled according to the European Standard EN 15804+A2 for Sustainable Building. Results are depicted in modules that allow the structured expression of results over the entire life cycle.

## Geography
The data set represents the country specific situation in Germany, focusing on the main technologies, the region specific characteristics and / or import statistics.

## Time period
Annual average

## Technology and included processes
The life cycle analysis of a 1m2 uncoated mineral fiber ceiling tile based a soft process.
The material composition is 12% resin, 3% oil and 85% mineral wool. It's weight is determined by area to be 2.4kg/m2 with a tile thickness of 15mm. The material composition of the tiles is also subject to uneven distribution. Not considered here are the method of suspension or varnishing.
Transportation from the manufacturer to the construction site is also not considered and must be included the system evaluation.

In the disposal phase, a manual dismantling (no loads) is assumed in module C1. The transport in module C2 to the landfill site takes place with a truck (50km). In C3, if relevant, a packaging with PE foil is taken into account (for example, for mineral fiber products. 0.0125 kg foil per kg of discarded material). In module C4 the average landfill emissions corresponding to the product (reference country Germany) are shown. The use of landfill gas is not taken into account.

## Technical purpose
This product can be used in construction.

## Safety margin
10 %. Product system almost completely covered. Good technological, temporal and geographic representativeness.

## Reference product
- Mineral fibre ceiling board (15 mm): 1

## Inputs
- Use of renewable primary energy as energy carrier (PERE) [MJ]: A1-A3 8.00008, C2 0.00600846, C4 0.0715636
- Use of renewable primary energy resources used as raw materials (PERM) [MJ]: A1-A3 0, C2 0, C4 0
- Total use of renewable primary energy (PERT) [MJ]: A1-A3 8.00008, C2 0.00600846, C4 0.0715636
- Use of non renewable primary energy as energy carrier (PENRE) [MJ]: A1-A3 58.8745, C2 0.103526, C4 0.529897
- Use of non renewable primary energy resources used as raw materials (PENRM) [MJ]: A1-A3 0, C2 0, C4 0
- Total use of non renewable primary energy resource (PENRT) [MJ]: A1-A3 58.8745, C2 0.103526, C4 0.529897
- Use of secondary material (SM) [kg]: A1-A3 0, C2 0, C4 0
- Use of renewable secondary fuels (SF) [MJ]: A1-A3 0, C2 0, C4 0
- Use of non renewable secondary fuels (NRSF) [MJ]: A1-A3 0, C2 0, C4 0
- Net use of fresh water (FW) [m3]: A1-A3 0.0136909, C2 5.34002e-6, C4 0.000130525

## Outputs
- Hazardous waste disposed (HWD) [kg]: A1-A3 1.30614e-8, C2 4.32705e-12, C4 5.63755e-11
- Non harzardous waste disposed (NHWD) [kg]: A1-A3 1.08711, C2 1.67114e-5, C4 2.6426
- Radioactive waste disposed (RWD) [kg]: A1-A3 0.00125096, C2 9.93466e-8, C4 5.47027e-6
- Components for re-use (CRU) [kg]: A1-A3 0, C2 0, C4 0
- Materials for recycling (MFR) [kg]: A1-A3 0, C2 0, C4 0
- Materials for energy recovery (MER) [kg]: A1-A3 0, C2 0, C4 0
- Exported electrical energy (EEE) [MJ]: A1-A3 0, C2 0, C4 0
- Exported thermal energy (EET) [MJ]: A1-A3 0, C2 0, C4 0

## Impact indicators
- Global Warming Potential - total (GWP-total) [kg CO2 eq.]: A1-A3 3.66983, C2 0.00787925, C4 0.0889127
- Global Warming Potential - fossil fuels (GWP-fossil) [kg CO2 eq.]: A1-A3 3.71759, C2 0.00782556, C4 0.0399493
- Global Warming Potential - biogenic (GWP-biogenic) [kg CO2 eq.]: A1-A3 -0.0499476, C2 3.52942e-6, C4 0.048846
- Global Warming Potential - land use and land use change (GWP-luluc) [kg CO2 eq.]: A1-A3 0.00218748, C2 5.01594e-5, C4 0.000117453
- Depletion potenzial of the stratospheric ozone layer (ODP) [kg CFC-11 eq.]: A1-A3 1.60371e-14, C2 1.99843e-18, C4 1.56753e-16
- Acidifcation potential, Accumulated Exceedance (AP) [Mole of H+ eq.]: A1-A3 0.0242873, C2 2.45379e-5, C4 0.00028436
- Eutrophication potential - freshwater (EP-freshwater) [kg P eq.]: A1-A3 4.15565e-6, C2 1.60626e-8, C4 6.72373e-8
- Eutrophication potential - marine (EP-marine) [kg N eq.]: A1-A3 0.00272838, C2 1.1455e-5, C4 7.38217e-5
- Eutrophication potential - terrestrial (EP-terrestrial) [Mole of N eq.]: A1-A3 0.0719335, C2 0.000127905, C4 0.000811057
- Photochemical Ozone Creation Potential (POCP) [kg NMVOC eq.]: A1-A3 0.00887028, C2 2.20903e-5, C4 0.000223687
- Abiotic depletion potential - non-fossil resources (ADPE) [kg Sb eq.]: A1-A3 8.97574e-6, C2 6.79381e-10, C4 3.78659e-9
- Abiotic depletion potential - fossil resources (ADPF) [MJ]: A1-A3 58.8592, C2 0.103522, C4 0.529618
- Water (user) deprivation potential (WDP) [m³ world equiv.]: A1-A3 0.246465, C2 3.0361e-5, C4 0.00427541

## Use advice
The data set represents a cradle to gate inventory. It can be used to characterise the supply chain situation of the respective commodity in a representative manner. Combination with individual unit processes using this commodity enables the generation of user-specific (product) LCAs.

## Data sources
- Mineral fibers production
- Documentation of data quality management
- GaBi Database Edition 2021, CUP2021.01
- GaBi database (all versions)
