# PU thermal insulation boards with multi-layer aluminium facing

Dataset: ILCD process, EPD, average dataset
Geography: DE
Reference year: 2021
Valid until: 2026
Classification: OEKOBAU.DAT: Dämmstoffe / Polyurethan-Hartschaum (PU) / PU mit Aluminium
Classification: IBUCategories: 02 Bauprodukte / Wärmedämmungsprodukte / Dämmstoffe aus Schaumkunststoffen
Method details: Dämmstoffe aus Schaumkunststoffen.pdf
Generated by: Sphera Solutions GmbH
Registration number: EPD-IVP-20210003-IBE2-DE
Owner: Industrieverband Polyurethan-Hartschaum e.V.
Compliance: DIN EN 15804; ISO 14025
Review: Accredited third party review by Institut Bauen und Umwelt e. V.
Amounts: rows without a unit in brackets have none in this file; such an amount is in the reference unit of its flow, which a separate flow dataset defines
copyright: true
licenseType: Free of charge for all users and uses
accessRestrictions: None

## General comment
Polyurethane rigid foam (PU) is a closed-cell foam and factory-made thermal insulating material, which is used in the form of insulation boardsfor insulating buildings as well as for the insulation of building equipment and industrial installations. The polyurethane insulating material (PU) product family consists mostly of the product variant polyurethane (PUR) - see EN 13165. PU insulating materials are produced, inter alia, as insulation boards with flexible facings.

This Product Declaration covers PU insulation boards with multi-layer aluminium foil facings on both sides.

## Technology and included processes
Polyurethane rigid foam insulation boards with flexible multi-layer aluminium facings are produced in a continuous process on a double belt line. In this process, the polyurethane reaction mixture pours from a mixing head onto the bottom facing where it foams up and glues – still within the line’s pressure area – with the top multi-layer aluminium facing. After passing the double belt line, the foam boards are cut to the desired dimensions. Quality assurance The declared products are subject to quality controls. Quality assurance is based on surveillance and certification by independent Notified Bodies.
Technical data:
For determining technical data, testing methods as stated in DIN EN 13165 are used. The gross density of PU insulation boards with multi-layer aluminium facings for building construction is approx. 31 - 32 kg/m³.

The boards are manufactured with thermal conductivity level (WLS) 023. This level is equivalent to a thermal conductivity design value of 0.023 W/(m.K). In addition, the nominal value of the thermal resistance of RD = 5.45 (m².K)/W and the thickness of 22 mm of the insulation board at RD = 1 (m².K)/W can be specified.

Nominal compressive stress or nominal compressive strength at 10% deformation is 100 kPa (dh) or 150 kPa (ds) acc. to DIN 4108-10. Higher compressive strength is possible. Nominal tensile strength perpendicular to the insulation board plane is 40 kPa. Higher tensile strength is possible.

PU insulation boards with multi-layer aluminium facings are impermeable to water vapour and do not absorb moisture.

Polyurethane rigid foam is a distinctive thermosetting material and therefore cannot be melted.
Declared unit:
The declared unit is 1 m² of installed PU thermal insulation board with multi-layer aluminium facing (on both sides) and has the following specifications:

## Technical purpose
The scope of application of PU rigid foam insulation materials includes thermal insulation in building construction (e.g. pitched roofs, flat roofs, floors, ceilings and exterior walls (inside and outside)).

Furthermore, PU rigid foam is used for insulating building equipment and industrial installations.

## Reference product
- 1 m² of installierte PU-Dämmplatte mit Aluminium-Mehrlagen-Deckschicht: 1

## Inputs
- Renewable primary energy as energy carrier (PERE) [MJ]: A1-A3 24, A4 0.327, A5 1.87, C2 0.0631, C3 1.036, D -15.8
- Renewable primary energy resources as material utilization (PERM) [MJ]: A1-A3 3.09, A4 0, A5 -1.84, C2 0, C3 0, D 0
- Total use of renewable primary energy resources (PERT) [MJ]: A1-A3 27.1, A4 0.327, A5 0.0253, C2 0.0631, C3 1.036, D -15.8
- Non renewable primary energy as energy carrier (PENRE) [MJ]: A1-A3 91.5, A4 5.82, A5 20.4, C2 1.12, C3 174.11, D -70.7
- Non renewable primary energy as material utilization (PENRM) [MJ]: A1-A3 190, A4 0, A5 -20.3, C2 0, C3 -170.21, D 0
- Total use of non renewable primary energy resources (PENRT) [MJ]: A1-A3 282, A4 5.82, A5 0.102, C2 1.12, C3 3.9, D -70.7
- Use of secondary material (SM) [kg]: A1-A3 0, A4 0, A5 0, C2 0, C3 0, D 0
- Use of renewable secondary fuels (RSF) [MJ]: A1-A3 0, A4 0, A5 0, C2 0, C3 0, D 0
- Use of non renewable secondary fuels (NRSF) [MJ]: A1-A3 0, A4 0, A5 0, C2 0, C3 0, D 0
- Use of net fresh water (FW) [m^3]: A1-A3 0.0885, A4 0.000378, A5 0.000813, C2 7.3e-5, C3 0.021014, D -0.0203

## Outputs
- Hazardous waste disposed (HWD) [kg]: A1-A3 9.14e-6, A4 2.71e-7, A5 5.7e-11, C2 5.23e-8, C3 2.068e-9, D -1.98e-8
- Non hazardous waste disposed (NHWD) [kg]: A1-A3 0.378, A4 0.00089, A5 0.00176, C2 0.000172, C3 0.04863, D -0.142
- Radioactive waste disposed (RWD) [kg]: A1-A3 0.00678, A4 7.2e-6, A5 8.13e-6, C2 1.39e-6, C3 0.0003331, D -0.00517
- Components for re-use (CRU) [kg]: A1-A3 0, A4 0, A5 0, C2 0, C3 0, D 0
- Materials for recycling (MFR) [kg]: A1-A3 0, A4 0, A5 0, C2 0, C3 0, D 0.26
- Materials for energy recovery (MER) [kg]: A1-A3 0, A4 0, A5 0, C2 0, C3 0, D 3.78
- Exported electrical energy (EEE) [MJ]: A1-A3 0, A4 0, A5 0.371, C2 0, C3 14.9, D 0
- Exported thermal energy (EET) [MJ]: A1-A3 0, A4 0, A5 0.66, C2 0, C3 26.9, D 0

## Impact indicators
- Global warming potential (GWP) [kg CO_(2)-Äq.]: A1-A3 11.2, A4 0.425, A5 0.362, C2 0.082, C3 8.7786, D -4.2
- Depletion potential of the stratospheric ozone layer (ODP) [kg CFC11-Äq.]: A1-A3 1.84e-5, A4 6.99e-17, A5 9.98e-17, C2 1.35e-17, C3 4.09e-15, D -5.31e-14
- Acidification potential of land and water (AP) [kg SO_(2)-Äq.]: A1-A3 0.0227, A4 0.000344, A5 8.41e-5, C2 6.64e-5, C3 0.003492, D -0.00576
- Eutrophication potential (EP) [kg PO_(4)^(3)-Äq.]: A1-A3 0.00321, A4 6.4e-5, A5 2.07e-5, C2 1.24e-5, C3 0.0008688, D -0.000672
- Formation potential of tropospheric ozone photochemical oxidants (POCP) [kg Ethen-Äq.]: A1-A3 0.012, A4 -5.59e-6, A5 5.85e-6, C2 -1.08e-6, C3 0.0002252, D -0.000521
- Abiotic depletion potential for non fossil resources (ADPE) [kg Sb-Äq.]: A1-A3 1.64e-6, A4 3.13e-8, A5 1.17e-9, C2 6.05e-9, C3 4.71e-8, D -6.96e-7
- Abiotic depletion potential for fossil resources (ADPF) [MJ]: A1-A3 265, A4 5.8, A5 0.0817, C2 1.12, C3 3.062, D -57.7

## Use advice
Scope:
This EPD applies to all declared products of the IVPU's member companies Karl Bachl GmbH & Co KG, IKO Insulation BV, Kingspan Insulation GmbH & Co KG, puren gmbh, Recticel Dämmsysteme GmbH, Soprema GmbH, Steinbacher Dämmstoff-GmbH, Unilin Insulation bv. The IVPU represents more than 90% of the companies within the German polyurethane insulating materials market. This EPD is based on weighted averages which have been determined on the basis of the single values originating from the factories of the mentioned manufacturing companies (see section 3.1).
System boundary:
Type of EPD: cradle to gate - with options

Life cycle assessment considers the following steps of the life cycle:

· production and supply of raw materials (A1)

· transporting raw materials (A2)

· production including packaging (A3)

· transport to construction site (A4)

· installation in buildings (recycling or therm. treatment of cutting leftovers and packaging waste) (A5)

· transport to End-of-Life (C2)

· waste treatment: energy for shredders (C3)

· thermal treatment (PU foam) (C3)

· recycling or use potentials beyond the system's boundary (D).

## Data sources
- GaBi Database (all versions)
- GaBi database SP40 2020
