# JACKOBOARD®

Dataset: ILCD process, EPD, average dataset
Geography: DE
Reference year: 2017
Valid until: 2022
Classification: OEKOBAU.DAT: Dämmstoffe / Extrudiertes Polystyrol (XPS) / XPS weiß
Classification: IBUCategories: 02 Bauprodukte / Wärmedämmungsprodukte / Dämmstoffe aus Schaumkunststoffen
Method details: Dämmstoffe aus Schaumkunststoffen.pdf
Owner: JACKON Insulation GmbH
Compliance: DIN EN 15804; ISO 14025
Review: Accredited third party review by IBU
Amounts: rows without a unit in brackets have none in this file; such an amount is in the reference unit of its flow, which a separate flow dataset defines
copyright: true

## General comment
JACKOBOARD® construction boards are made of extruded polystyrene foam (XPS) and coated on both sides with special mortar and fibre glass weave.
XPS is a polymer foam insulating material as defined in /EN 13164/ that is made into boards with an average bulk density of 34.85 kg/m³. The imputed density of the construction board including coating is 170 kg/m³.

Boards are supplied in thicknesses ranging from 4 to 100 mm and with smooth edges.

## Technology and included processes
XPS is manufactured in a continuous extrusion process that is mainly powered by electricity. Together with the auxiliary materials listed above, polystyrene granulate is melted under high pressure in the extruder. The blowing agent is added to the molten material, where it dissolves. The molten material is discharged through a wide slot die. As resistance lowers, the blowing agent foams the molten material, cooling it in the process, and the polystyrene becomes firm. The result is an endless strand of homogeneous and closed-cell rigid polystyrene foam, which cools down further, before the extrusion skin is removed. To apply the mortar coating, the mortar is mixed with water and applied to the XPS core together with the glass fibre weave. The boards are then left to dry before being cut to size. They are then packed on pallets and wrapped in polyester film. Waste and reject XPS from the manufacturing process can be recycled straight back into XPS production. Because polystyrene is a thermoplastic, it is easy and cheap to recycle by melting it down.
Declared unit:
This declaration is based on 1 m² of JACKOBOARD construction board, consisting of an 18.5 mm thick XPS board coated on both sides with reinforcing glass fibre weave and mortar, both with a thickness of 0.75 mm. The surface weight is 3.42 kg/m².

## Technical purpose
Use is subject to relevant national regulations.

JACKOBOARD® construction boards can be covered with all kinds of plaster and tiles. The surfaces of the JACKOBOARD® system provide a strong primer and can be used on virtually any substrate. At the same time, they are water repellent, thermally insulating, light and compression proof.
JACKOBOARD® construction board is therefore the ideal choice for bathroom and spa areas, and particularly wet areas. It is suitable for both construction and renovation projects. It is used as a base board for tiling on walls, partition walls and floors. Further uses include as a base board for tiling and for designing spa areas, to create bathroom furniture, washstands, benches, couches, shelves and niches.

## Scenarios
- S1: impact of product incineration
- S2: landfill cost

## Reference product
- 1 m² JACKOBOARD-Platte mit 20 mm Dicke (3,42 kg/m²): 1

## Inputs
- Erneuerbare Primärenergie als Energieträger (PERE) [MJ]: A1-A3 7.959, A4 0.007372, C2 0.03296, C4 (S1) 0.1119, C4 (S2) 0.08423, D (S1) -2.813, D (S2) 0
- Erneuerbare Primärenergie zur stofflichen Nutzung (PERM) [MJ]: A1-A3 0, A4 0, C2 0, C4 (S1) 0, C4 (S2) 0, D (S1) 0, D (S2) 0
- Total erneuerbare Primärenergie (PERT) [MJ]: A1-A3 7.959, A4 0.007372, C2 0.03296, C4 (S1) 0.1119, C4 (S2) 0.08423, D (S1) -2.813, D (S2) 0
- Nicht-erneuerbare Primärenergie als Energieträger (PENRE) [MJ]: A1-A3 59.77, A4 2.177, C2 0.4853, C4 (S1) 27.687, C4 (S2) 0.7405, D (S1) -15.78, D (S2) 0
- Nicht-erneuerbare Primärenergie zur stofflichen Nutzung (PENRM) [MJ]: A1-A3 33.7, A4 0, C2 0, C4 (S1) -26.84, C4 (S2) 0, D (S1) 0, D (S2) 0
- Total nicht erneuerbare Primärenergie (PENRT) [MJ]: A1-A3 93.47, A4 2.177, C2 0.4853, C4 (S1) 0.8466, C4 (S2) 0.7405, D (S1) -15.78, D (S2) 0
- Einsatz von Sekundärstoffen (SM) [kg]: A1-A3 0, A4 0, C2 0, C4 (S1) 0, C4 (S2) 0, D (S1) 0, D (S2) 0
- Erneuerbare Sekundärbrennstoffe (RSF) [MJ]: A1-A3 0.000471, A4 0, C2 0, C4 (S1) 0, C4 (S2) 0, D (S1) 0, D (S2) 0
- Nicht erneuerbare Sekundärbrennstoffe (NRSF) [MJ]: A1-A3 0.004946, A4 0, C2 0, C4 (S1) 0, C4 (S2) 0, D (S1) 0, D (S2) 0
- Einsatz von Süßwasserressourcen (FW) [m^3]: A1-A3 0.01613, A4 9.68e-6, C2 4.977e-5, C4 (S1) 0.004124, C4 (S2) 0.0001508, D (S1) -0.002114, D (S2) 0

## Outputs
- Gefährlicher Abfall zur Deponie (HWD) [kg]: A1-A3 0.0002631, A4 7.679e-10, C2 6.245e-8, C4 (S1) 7.214e-8, C4 (S2) 1.693e-8, D (S1) -9.972e-9, D (S2) 0
- Entsorgter nicht gefährlicher Abfall (NHWD) [kg]: A1-A3 0.3125, A4 1.618e-5, C2 5.999e-5, C4 (S1) 2.808, C4 (S2) 3.429, D (S1) -0.007444, D (S2) 0
- Entsorgter radioaktiver Abfall (RWD) [kg]: A1-A3 0.001808, A4 2.007e-6, C2 6.57e-7, C4 (S1) 1.87e-5, C4 (S2) 1.023e-5, D (S1) -0.0006761, D (S2) 0
- Komponenten für die Wiederverwendung (CRU) [kg]: A1-A3 0, A4 0, C2 0, C4 (S1) 0, C4 (S2) 0, D (S1) 0, D (S2) 0
- Stoffe zum Recycling (MFR) [kg]: A1-A3 0, A4 0, C2 0, C4 (S1) 0, C4 (S2) 0, D (S1) 0, D (S2) 0
- Stoffe für die Energierückgewinnung (MER) [kg]: A1-A3 0, A4 0, C2 0, C4 (S1) 0, C4 (S2) 0, D (S1) 0, D (S2) 0
- Exportierte elektrische Energie (EEE) [MJ]: A1-A3 0, A4 0, C2 0, C4 (S1) 3.29, C4 (S2) 0, D (S1) 0, D (S2) 0
- Exportierte thermische Energie (EET) [MJ]: A1-A3 0, A4 0, C2 0, C4 (S1) 7.98, C4 (S2) 0, D (S1) 0, D (S2) 0

## Impact indicators
- Globales Erwärmungspotenzial (GWP) [kg CO_(2)-Äq.]: A1-A3 4.771, A4 0.1565, C2 0.03569, C4 (S1) 2.147, C4 (S2) 0.05513, D (S1) -1.085, D (S2) 0
- Abbau Potential der stratosphärischen Ozonschicht (ODP) [kg CFC11-Äq.]: A1-A3 1.048e-8, A4 1.01e-13, C2 7.36e-14, C4 (S1) 9.551e-13, C4 (S2) 5.406e-13, D (S1) -3.338e-11, D (S2) 0
- Versauerungspotenzial von Boden und Wasser (AP) [kg SO_(2)-Äq.]: A1-A3 0.01023, A4 0.0003535, C2 8.634e-5, C4 (S1) 0.000385, C4 (S2) 0.0003294, D (S1) -0.001155, D (S2) 0
- Eutrophierungspotenzial (EP) [kg PO_(4)^(3)-Äq.]: A1-A3 0.001172, A4 7.769e-5, C2 2.164e-5, C4 (S1) 6.185e-5, C4 (S2) 4.482e-5, D (S1) -0.0001804, D (S2) 0
- Bildungspotential für troposphärisches Ozon (POCP) [kg Ethen-Äq.]: A1-A3 0.00261, A4 -0.0001232, C2 -2.786e-5, C4 (S1) 4.05e-5, C4 (S2) 3.166e-5, D (S1) -0.0001267, D (S2) 0
- Potenzial für den abiotischen Abbau nicht fossiler Ressourcen (ADPE) [kg Sb-Äq.]: A1-A3 1.738e-5, A4 5.596e-9, C2 2.691e-9, C4 (S1) 3.586e-8, C4 (S2) 1.901e-8, D (S1) -2.728e-7, D (S2) 0
- Potenzial für den abiotischen Abbau fossiler Brennstoffe (ADPF) [MJ]: A1-A3 88.95, A4 2.172, C2 0.4836, C4 (S1) 0.7995, C4 (S2) 0.7147, D (S1) -14.08, D (S2) 0

## Use advice
Scope:
The life cycle assessment is derived from data for 2015 that was collated at JACKON’s Arendsee plant in Germany.
This document is translated from the German Environmental Product Declaration into English. It is based on the German original version EPD-JAC-20170005-IBB1-DE. The verifier has no influence on the quality of the translation.
System boundary:
Type of EPD: Cradle to gate (A1-A3) – with options

The life cycle assessment analyses the following sections in the life cycle:

· Raw material supply (extraction and processing) (A1)

· Transport to manufacturer (A2)

· Manufacture of JACKOBOARD (A3)

· Manufacture of packaging (A3)

· Transport to place of utilisation (A4)

· Waste disposal (C4) with two scenarios:
1. Thermal recycling (EoL1) in a plant with efficiency R1 of less than 0.6
2. Landfill (EoL2)

· Recovery and recycling potential (D) - outside the system boundaries

## Data sources
- JACKOBOARD®.pdf
- GaBi Database (all versions)
- GaBi database SP29 2016
