# Fibre Cement Corrugated Sheets

Dataset: ILCD process, EPD, average dataset
Geography: DK
Reference year: 2016
Valid until: 2022
Classification: OEKOBAU.DAT: Mineralische Baustoffe / Steine und Elemente / Faserzement
Classification: IBUCategories: 02 Bauprodukte / Bedachungen / Faserzement / Faserbeton
Method details: Faserzement / Faserbeton.pdf
Generated by: Sphera Solutions GmbH
Registration number: EPD-CEM-20160114-IAD1-DE
Owner: Cembrit Holding A/S
Compliance: DIN EN 15804; ISO 14025
Review: Accredited third party review by Institut Bauen und Umwelt e. V.
Amounts: rows without a unit in brackets have none in this file; such an amount is in the reference unit of its flow, which a separate flow dataset defines
copyright: true
licenseType: Free of charge for all users and uses
accessRestrictions: None

## General comment
The products are corrugated sheets in fibre cement.

The sheets are commonly provided with a water-based coating but some products are provided uncoated. The declaration includes all coated and uncoated products.

Finishing accessories such as ridges and ventilation outlets are available in fibre cement or plastic.

## Technology and included processes
Technical data:
The data listed in the DoP apply.
Declared unit:
The declared unit and conversion factor are listed in the table below.

## Technical purpose
Cembrit corrugated sheets are intended for installation as roofing and/or cladding on wooden or metal sub constructions.

## Reference product
- 1 Tonne Faserzement-Wellplatten: 1000

## Inputs
- Renewable primary energy as energy carrier (PERE) [MJ]: A1 1050.93, A2 27.2878, A3 6.33454
- Renewable primary energy resources as material utilization (PERM) [MJ]: A1 686.948, A2 0, A3 184.499
- Total use of renewable primary energy resources (PERT) [MJ]: A1 1737.88, A2 27.2879, A3 190.833
- Non renewable primary energy as energy carrier (PENRE) [MJ]: A1 6668.15, A2 212.424, A3 193.238
- Non renewable primary energy as material utilization (PENRM) [MJ]: A1 354.58, A2 0, A3 30.3987
- Total use of non renewable primary energy resources (PENRT) [MJ]: A1 7022.73, A2 212.424, A3 223.636
- Use of secondary material (SM) [kg]
- Use of renewable secondary fuels (RSF) [MJ]: A1 183.932, A2 0.00209053, A3 0.0124959
- Use of non renewable secondary fuels (NRSF) [MJ]: A1 1038.02, A2 0.0218456, A3 0.0142922
- Use of net fresh water (FW) [m^3]: A1 2.25624, A2 0.0533712, A3 -0.47803

## Outputs
- Hazardous waste disposed (HWD) [kg]: A1 0.00143106, A2 9.60606e-5, A3 7.47727e-5
- Non hazardous waste disposed (NHWD) [kg]: A1 3.09091, A2 0.0647955, A3 34.7727
- Radioactive waste disposed (RWD) [kg]: A1 0.402273, A2 0.0157937, A3 0.00524242
- Components for re-use (CRU) [kg]: A1 0, A2 0, A3 0
- Materials for recycling (MFR) [kg]: A1 0, A2 0, A3 0
- Materials for energy recovery (MER) [kg]: A1 0, A2 0, A3 0
- Exported electrical energy (EEE) [MJ]: A1 0, A2 0, A3 0
- Exported thermal energy (EET) [MJ]: A1 0, A2 0, A3 0

## Impact indicators
- Global warming potential (GWP) [kg CO_(2)-Äq.]: A1 803.788, A2 13.803, A3 1.60606
- Depletion potential of the stratospheric ozone layer (ODP) [kg CFC11-Äq.]: A1 1.02955e-5, A2 4.40197e-9, A3 7.07576e-9
- Acidification potential of land and water (AP) [kg SO_(2)-Äq.]: A1 2.38864, A2 0.104167, A3 0.0273485
- Eutrophication potential (EP) [kg PO_(4)^(3)-Äq.]: A1 0.226742, A2 0.0152273, A3 0.00843939
- Formation potential of tropospheric ozone photochemical oxidants (POCP) [kg Ethen-Äq.]: A1 0.228712, A2 0.000734848, A3 0.0186061
- Abiotic depletion potential for non fossil resources (ADPE) [kg Sb-Äq.]: A1 0.000956818, A2 1.3228e-6, A3 1.40379e-5
- Abiotic depletion potential for fossil resources (ADPF) [MJ]: A1 5954.55, A2 172.955, A3 209.848

## Use advice
Scope:
The corrugated sheet roof covering is produced by Cembrit at two manufacturing sites in Trzemeszno, Poland and Sumperk, Czech Republic.Results declared in this EPD represent the average of both sites weighted by their respective annual production output (mass).
System boundary:
The following processes were included in the A1-A3 production stage of the Cembrit corrugated sheets:

A1: Manufacture of preliminary products (Cement, fillers, cellulose, PVA fibre, pigments, coatings and water)
A2: Transport of raw materials and packaging
A3: Manufacturing process in the plant including energy, water, disposal and process emissions
A3: Manufacture of packaging

## Data sources
- GaBi Database (all versions)
- GaBi database SP26 2014
