# EPDM roof sheets (thickness 0.0015 m); 2 kg/m2

Dataset: ILCD process, EPD, generic dataset
Geography: DE
Reference year: 2018
Valid until: 2022
Classification: oekobau.dat: Kunststoffe / Dachbahnen / Elastomer-Dachbahnen
Owner: thinkstep
Compliance: DIN EN 15804
Review: Dependent internal review by thinkstep, IABP-GaBi, IBP-GaBi; Independent external review by GaBi user forum, GaBi bug forum, GaBi user community
Amounts: rows without a unit in brackets have none in this file; such an amount is in the reference unit of its flow, which a separate flow dataset defines
copyright: true

## General comment
This data set has been modeled according to the European Standard EN 15804 for Sustainable Building. Results are depicted in modules that allow the structured expression of results over the entire life cycle.

## Geography
The data set represents the country specific situation in Germany, focusing on the main technologies, the region specific characteristics and / or import statistics.

## Time period
Annual average

## Technology and included processes
The life cycle analysis of the EPDM roofing membranes includes the life cycle phases cradle to gate. The system boundary is the product (ready for sale). Transports from the factory to the mounting location are not taken into account and have to be incorporated in a system approach if necessary. Production of EPDM: EPDM is produced by the copolymerization of ethylene and propylene. The polymerization is carried out in solution. The process is run at 10- 50°C and 1- 20 bar in a single continuous stirred tank reactor, a catalyst is used. Because the polymerization is strongly exothermal, cooling is required. Organic solvents like hexane are used. Unreacted propene is recycled and reintroduced into the reactor. The solvent is also recovered. Downstream of the reactor, the reaction is shortstopped with water, alcohol or other polar liquids. The polymer solution is mixed with sodium hydroxide to remove catalyst residues. After adding chemicals like extender oil, the polymer solution is stripped with steam and hot water to remove unreacted monomers and solvents. Antiagglomerants and antifoaming agents may be added to control crumb agglomeration of the rubber product. The product is then passed over a screen and dried.
Background system:
Electricity: Electricity is modelled according to the individual country-specific situations. The country-specific modelling is achieved on multiple levels. Firstly, individual energy carrier specific power plants and plants for renewable energy sources are modelled according to the current national electricity grid mix. Modelling the electricity consumption mix includes transmission / distribution losses and the own use by energy producers (own consumption of power plants and "other" own consumption e.g. due to pumped storage hydro power etc.), as well as imported electricity. Secondly, the national emission and efficiency standards of the power plants are modelled as well as the share of electricity plants and combined heat and power plants (CHP). Thirdly, the country-specific energy carrier supply (share of imports and / or domestic supply) including the country-specific energy carrier properties (e.g. element and energy content) are accounted for. Fourthly, the exploration, mining/production, processing and transport processes of the energy carrier supply chains are modelled according to the specific situation of each electricity producing country. The different production and processing techniques (emissions and efficiencies) in the different energy producing countries are considered, e.g. different crude oil production technologies or different flaring rates at the oil platforms.
Thermal energy, process steam: The thermal energy and process steam supply is modelled according to the individual country-specific situation with regard to emission standards and considered energy carriers. The thermal energy and process steam are produced at heat plants. Efficiencies for thermal energy production are by definition 100% in relation to the corresponding energy carrier input. For process steam the efficiency ranges from 85%, 90% to 95%. The energy carriers used for the generation of thermal energy and process steam are modelled according to the specific import situation (see electricity above).
Transports: All relevant and known transport processes are included. Ocean-going and inland ship transport as well as rail, truck and pipeline transport of bulk commodities are considered.
Energy carriers: The energy carriers are modelled according to the specific supply situation (see electricity above).
Refinery products: Diesel fuel, gasoline, technical gases, fuel oils, lubricants and residues such as bitumen are modelled with a parameterised country-specific refinery model. The refinery model represents the current national standard in refining techniques (e.g. emission level, internal energy consumption, etc.) as well as the individual country-specific product output spectrum, which can be quite different from country to country. The supply of crude oil is modelled, again, according to the country-specific situation with the respective properties of the resources.

## Technical purpose
This product can be used in construction.

## Safety margin
30 %. Processes / flows can be missing or estimated. Strongly restricted technological, temporal or geographical representativeness.

## Reference product
- Ethylene propylene diene elastomer (EPDM) roofing membrane m2: 1

## Inputs
- Use of renewable primary energy (PERE) [MJ]: A1-A3 9.62142, C1 0, C2 0.0047216, C3 0.307989, D -14.2696
- Primary energy resources used as raw materials (PERM) [MJ]: A1-A3 0, C1 0, C2 0, C3 0, D 0
- Total use of renewable primary energy resources (PERT) [MJ]: A1-A3 9.62142, C1 0, C2 0.0047216, C3 0.307989, D -14.2696
- Use of non-renewable primary energy (PENRE) [MJ]: A1-A3 179.606, C1 0, C2 0.0811048, C3 68.9246, D -49.5888
- Non-renewable primary energy resources used as raw materials (PENRM) [MJ]: A1-A3 67.6, C1 0, C2 0, C3 -67.6, D 0
- Total use of non-renewable primary energy resources (PENRT) [MJ]: A1-A3 247.206, C1 0, C2 0.0811048, C3 1.32459, D -49.5888
- Input of secondary material (SM) [kg]: A1-A3 0, C1 0, C2 0, C3 0, D 0
- Use of renewable secondary fuels (RSF) [MJ]: A1-A3 0, C1 0, C2 0, C3 0, D 0
- Use of non renewable secondary fuels (NRSF) [MJ]: A1-A3 0, C1 0, C2 0, C3 0, D 0
- Use of net fresh water (FW) [m3]: A1-A3 0.0293422, C1 0, C2 4.22859e-6, C3 0.01746, D -0.00665575

## Outputs
- Hazardous waste disposed (HWD) [kg]: A1-A3 9.27607e-7, C1 0, C2 3.0308e-9, C3 2.84876e-9, D -2.62541e-8
- Non-hazardous waste disposed (NHWD) [kg]: A1-A3 0.124724, C1 0, C2 1.42353e-5, C3 0.0883749, D -0.023406
- Radioactive waste disposed (RWD) [kg]: A1-A3 0.00140452, C1 0, C2 8.53867e-8, C3 4.43322e-5, D -0.00172401
- Components for re-use (CRU) [kg]: A1-A3 0, C1 0, C2 0, C3 0, D 0
- Materials for Recycling (MFR) [kg]: A1-A3 0, C1 0, C2 0, C3 0, D 0
- Material for Energy Recovery (MER) [kg]: A1-A3 0, C1 2.6, C2 0, C3 0, D 0
- Exported electrical energy (EEE) [MJ]: A1-A3 0, C1 0, C2 0, C3 14.824, D 0
- Exported thermal energy (EET) [MJ]: A1-A3 0, C1 0, C2 0, C3 33.7749, D 0

## Impact indicators
- Global warming potential (GWP) [kg CO2 eq.]: A1-A3 8.59954, C1 0, C2 0.0060343, C3 6.79964, D -3.39139
- Ozone Depletion Potential (ODP) [kg R11 eq.]: A1-A3 5.18776e-14, C1 0, C2 1.99738e-18, C3 1.73181e-15, D -7.89063e-14
- Acidification potential (AP) [kg SO2 eq.]: A1-A3 0.00828074, C1 0, C2 1.21886e-5, C3 0.000567172, D -0.00286918
- Eutrophication potential (EP) [kg Phosphate eq.]: A1-A3 0.00119985, C1 0, C2 2.89758e-6, C3 0.00012915, D -0.00054391
- Photochemical Ozone Creation Potential (POCP) [kg Ethene eq.]: A1-A3 0.00126116, C1 0, C2 -3.37081e-6, C3 4.27606e-5, D -0.000291849
- Abiotic depletion potential for non fossil resources (ADPE) [kg Sb eq.]: A1-A3 3.0702e-6, C1 0, C2 5.07791e-10, C3 1.84929e-8, D -8.46058e-7
- Abiotic depletion potential for fossil resources (ADPF) [MJ]: A1-A3 243.659, C1 0, C2 0.0808866, C3 1.21268, D -45.2366

## Use advice
The data set represents a cradle to gate inventory. It can be used to characterise the supply chain situation of the respective commodity in a representative manner. Combination with individual unit processes using this commodity enables the generation of user-specific (product) LCAs.

## Data sources
- ULLMANN'S Encyclopedia of Industrial Chemistry
- GaBi Database Edition 2020, SP40
- GaBi database (all versions)
