# Wood fiber insulation - dry process (German average)

Dataset: ILCD process, EPD, representative dataset
Geography: DE
Reference year: 2021
Valid until: 2026
Classification: OEKOBAU.DAT: Dämmstoffe / Holzfasern / Holzfaserdämmplatte
Method details: EN 15804; ILCD format
Generated by: Thünen-Institut für Holzforschung
Owner: Thünen-Institut für Holzforschung
Compliance: EN 16485; EN 15804+A2
Review: Dependent internal review by Thünen-Institut für Holzforschung
Amounts: rows without a unit in brackets have none in this file; such an amount is in the reference unit of its flow, which a separate flow dataset defines
copyright: true

## General comment
Further information on the declared unit and the inventory analysis based on manufacturer information (input and output of material and energy flows) are available for download as an Excel file within the section “background info”.
The data set was created in 2021 as an update with identical foreground system. All background data sets are taken from the GaBi Professional Database with content version 2021.1. The modeling and calculation of the life cycle assessment is based on the European standards EN 15804:2012+A2:2019 and EN 16485:2014. For questions, please contact holzundklima@thuenen.de.

## Geography
Für die Ökobilanzierung von Holzfaserdämmstoffen im Trockenverfahren in Deutschland wurden Daten von zwei Werken berücksichtigt (Möller et al. 2020). Produktionszahlen für die gesamte Produktion von Holzfaserdämmstoffen im Trockenverfahren in Deutschland in 2018 liegen nicht vor, und können nur grob abgeschätzt werden. Der Anteil der erhobenen Produktionsmenge für das Jahr 2018 entspricht etwa zwei Drittel (67 %) der abgeschätzten Gesamt-Produktionsmenge.

## Time period
The data set is based on production data from the year 2018 (foreground system).
The background system was updated in 2021.

## Technology and included processes
Zur Herstellung von Holzfaserdämmstoffen im Trockenverfahren werden zunächst Hackschnitzel aus Nadelholz zerkleinert. Die zerkleinerten Fraktionen werden anschließend unter Einwirkung von Wasserdampf mechanisch zerfasert. Die Fasern werden anschließend im Stromrohrtrockner getrocknet und nach Beimischung von Zusätzen wie Bi-Komponentenfasern oder Polyurethan-Klebstoffen auf eine Formstraße gestreut und dort durch Wärmezufuhr ausgehärtet. Im Nachgang werden die Platten auf Format gesägt und auf Paletten gelagert. Feste Platten können je nach gewünschter Anwendungsdicke schichtweise verklebt werden. Ein Sonderfall sind Einblasdämmstoffe aus Holzfasern. Die losen Fasern werden nach der Zugabe von Flammschutzmitteln direkt in Säcken verpackt und palettiert. Hackschnitzel zur Herstellung von Holzfaserdämmstoffen wurden durchschnittlich über eine Distanz von 84 km per LKW transportiert, Zusatzstoffe 332 km per LKW und 350 km per Zug. Die Holzfeuchte des Produktes liegt bei 10 %, der Wasseranteil bei 13 %.

## Technical purpose
The area of application varies depending on the type of insulation. Blow-in insulation is a room-filling thermal insulation that can be blown into closed cavities. It can be used for interior and exterior walls as well as in the ceiling. For flexible insulation mats, the area of application ranges from insulation between rafters to insulation of walls in timber frame construction, insulation of wooden beam ceilings and insulation of top floor ceilings.

## Scenarios
- energetisch (Modul D): thermische Verwertung
- Entsorgung Verpackung (Modul A5): Das Modul A5 enthält ausschließlich die Entsorgung der Verpackungsmaterialien

## Reference product
- Holzfaserdämmstoff Trockenverfahren (Durchschnitt DE): 1

## Inputs
- Use of renewable primary energy (PERE) [MJ]: A1 57.3967, A2 1.35242, A3 752.147, A1-A3 810.896, A5 (Entsorgung Verpackung) 0.960322, C2 0.338431, C3 0.878459, D (energetisch) 1867.88
- Use of renewable primary energy resources used as raw materials (PERM) [MJ]: A1 2491.51, A2 0, A3 116.408, A1-A3 2607.91, A5 (Entsorgung Verpackung) -116.408, C2 0, C3 -2491.51, D (energetisch) 0
- Total use of renewable primary energy resources (PERT) [MJ]: A1 2548.9, A2 1.35242, A3 868.555, A1-A3 3418.81, A5 (Entsorgung Verpackung) -115.448, C2 0.338431, C3 -2490.63, D (energetisch) 1867.88
- Use of non renewable primary energy (PENRE) [MJ]: A1 646.656, A2 17.8728, A3 1045.98, A1-A3 1710.5, A5 (Entsorgung Verpackung) 4.35208, C2 6.07239, C3 15.1364, D (energetisch) -2067.37
- Use of non renewable primary energy resources used as raw materials (PENRM) [MJ]: A1 85.5781, A2 0, A3 15.6909, A1-A3 101.269, A5 (Entsorgung Verpackung) -15.6909, C2 0, C3 -85.5781, D (energetisch) 0
- Total use of non renewable primary energy resource (PENRT) [MJ]: A1 732.234, A2 17.8728, A3 1061.67, A1-A3 1811.77, A5 (Entsorgung Verpackung) -11.3388, C2 6.07239, C3 -70.4418, D (energetisch) -2067.37
- Use of secondary material (SM) [kg]: A1 0, A2 0, A3 0, A1-A3 0, A5 (Entsorgung Verpackung) 0, C2 0, C3 0, D (energetisch) 0
- Use of renewable secondary fuels (RSF) [MJ]: A1 0, A2 0, A3 0, A1-A3 0, A5 (Entsorgung Verpackung) 0, C2 0, C3 0, D (energetisch) 0
- Use of non renewable secondary fuels (NRSF) [MJ]: A1 0, A2 0, A3 0, A1-A3 0, A5 (Entsorgung Verpackung) 0, C2 0, C3 0, D (energetisch) 0
- Use of net fresh water (FW) [m3]: A1 0.278755, A2 0.00147875, A3 0.491225, A1-A3 0.771459, A5 (Entsorgung Verpackung) 0.0400168, C2 0.000387388, C3 0.000780913, D (energetisch) 0.372582

## Outputs
- Hazardous waste disposed (HWD) [kg]: A1 1.43651e-5, A2 1.08883e-9, A3 1.40958e-6, A1-A3 1.57758e-5, A5 (Entsorgung Verpackung) 9.18801e-10, C2 3.05984e-10, C3 6.32762e-10, D (energetisch) -6.62917e-7
- Non hazardous waste dispose (NHWD) [kg]: A1 0.285509, A2 0.00314815, A3 0.772882, A1-A3 1.06154, A5 (Entsorgung Verpackung) 0.212143, C2 0.000902064, C3 0.00244319, D (energetisch) 2.73259
- Radioactive waste disposed (RWD) [kg]: A1 0.00736175, A2 0.00015155, A3 0.00536465, A1-A3 0.0128779, A5 (Entsorgung Verpackung) 0.000122064, C2 7.34532e-6, C3 1.45285e-5, D (energetisch) -0.076428
- Components for re-use (CRU) [kg]: A1 0, A2 0, A3 0, A1-A3 0, A5 (Entsorgung Verpackung) 0, C2 0, C3 0, D (energetisch) 0
- Materials for recycling (MFR) [kg]: A1 0, A2 0, A3 0, A1-A3 0, A5 (Entsorgung Verpackung) 0, C2 0, C3 0, D (energetisch) 0
- Materials for energy recovery (MER) [kg]: A1 0, A2 0, A3 0, A1-A3 0, A5 (Entsorgung Verpackung) 6.04059, C2 0, C3 150.759, D (energetisch) 0
- Exported electrical energy (EEE) [MJ]: A1 0, A2 0, A3 0.00888126, A1-A3 0.00888126, A5 (Entsorgung Verpackung) 21.2308, C2 0, C3 0, D (energetisch) 0
- Exported thermal energy (EET) [MJ]: A1 0, A2 0, A3 0.0206322, A1-A3 0.0206322, A5 (Entsorgung Verpackung) 48.4651, C2 0, C3 0, D (energetisch) 0

## Impact indicators
- Global Warming Potential - total (GWP-total) [kg CO2-Äqv.]: A1 -205.827, A2 1.29509, A3 50.6356, A1-A3 -153.897, A5 (Entsorgung Verpackung) 12.4653, C2 0.438135, C3 238.181, D (energetisch) -122.425
- Global Warming Potential - fossil fuels (GWP-fossil) [kg CO2-Äqv.]: A1 31.2002, A2 1.29509, A3 61.738, A1-A3 94.2333, A5 (Entsorgung Verpackung) 1.36283, C2 0.438135, C3 1.15296, D (energetisch) -122.425
- Global Warming Potential - biogenic (GWP-biogenic) [kg CO2-Äqv.]: A1 -237.028, A2 0, A3 -11.1024, A1-A3 -248.13, A5 (Entsorgung Verpackung) 11.1024, C2 0, C3 237.028, D (energetisch) 0
- Depletion potential of the stratospheric ozone layer (ODP) [kg CFC 11-Äquiv.]: A1 2.16089e-13, A2 1.3465e-15, A3 4.55601e-13, A1-A3 6.73037e-13, A5 (Entsorgung Verpackung) 3.85784e-15, C2 5.82037e-17, C3 2.92063e-16, D (energetisch) -2.57475e-12
- Acidification potential, Accumulated Exceedance (AP) [mol H+ eqv.]: A1 0.0806242, A2 0.007505, A3 0.112874, A1-A3 0.201003, A5 (Entsorgung Verpackung) 0.00305339, C2 0.0026451, C3 0.0142829, D (energetisch) -0.105577
- Eutrophication potential - freshwater (EP-freshwater) [kg P eqv.]: A1 7.31743e-5, A2 3.9171e-6, A3 0.000239853, A1-A3 0.000316944, A5 (Entsorgung Verpackung) 5.81122e-7, C2 1.35236e-6, C3 2.34936e-6, D (energetisch) -0.000320695
- Eutrophication potential - marine (EP-marine) [kg N eqv.]: A1 0.0325895, A2 0.00365135, A3 0.0477682, A1-A3 0.0840091, A5 (Entsorgung Verpackung) 0.000873781, C2 0.00129606, C3 0.00643111, D (energetisch) -0.0418812
- Eutrophication potential - terrestrial (EP-terrestrial) [mol N eqv.]: A1 0.352552, A2 0.0404003, A3 0.513245, A1-A3 0.906198, A5 (Entsorgung Verpackung) 0.0146468, C2 0.0143451, C3 0.070731, D (energetisch) -0.356937
- Versauerungspotenzial, kumulierte Überschreitung (AP) [kg NMVOC eqv.]: A1 0.0965293, A2 0.00690649, A3 0.158531, A1-A3 0.261967, A5 (Entsorgung Verpackung) 0.00227151, C2 0.00244429, C3 0.0187131, D (energetisch) -0.109463
- Abiotic depletion potential - non-fossil resources (ADPE) [kg Sb-Äqv.]: A1 5.30236e-6, A2 1.11602e-7, A3 1.07338e-5, A1-A3 1.61477e-5, A5 (Entsorgung Verpackung) 5.64135e-8, C2 3.46823e-8, C3 9.93204e-8, D (energetisch) -3.62446e-5
- Abiotic depletion potential - fossil resources (ADPF) [MJ]: A1 732.039, A2 17.85, A3 1045.88, A1-A3 1795.77, A5 (Entsorgung Verpackung) 4.35073, C2 6.0643, C3 15.1357, D (energetisch) -2152.65
- Water (user) deprivation potential (WDP) [m3 world eqv.]: A1 0.278755, A2 0.00147875, A3 0.491225, A1-A3 0.771459, A5 (Entsorgung Verpackung) 0.0400168, C2 0.000387388, C3 0.000780913, D (energetisch) 0.372582
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
## Use advice
Aufgrund der hohen Abdeckung bildet der Datensatz die durchschnittlichen Produktionsverhältnisse und die damit verbundenen Umweltwirkungen repräsentativ für Deutschland ab. Liegen keine herstellerspezifischen Ökobilanzergebnisse des verwendeten Produkts vor, empfiehlt sich die Verwendung dieses Durchschnittsdatensatzes.

## Review details
Der repräsentative Datensatz setzt sich aus herstellerspezifischen Daten einzelner Werke zusammen, welche zum überwiegenden Teil auch separat als EPD bei einem in der Ökobaudat vertretenen Programmhalter verifiziert und veröffentlicht wurden.

## Data sources
- Möller et al. (2020) Mehr als nur Dämmung - Zusatznutzen von Dämmstoffen aus nachwachsenden Rohstoffen - Arbeitsbereich Nachhaltigkeitsbetrachtung, Hamburg, Thünen-Institut für Holzforschung, Abschlussbericht
- GaBi database (general)
