# Isospan 1 GaBi Holzbetonmantelsteine mit Holzfaserdämmung OEKOPUR S 36,5/16,5 ohne Füllbeton; 79,5 kg/m2

Dataset: ILCD process, EPD, specific dataset
Geography: AT
Reference year: 2017
Valid until: 2022
Classification: OEKOBAU.DAT: Mineralische Baustoffe / Steine und Elemente / Betonfertigteile und Betonwaren
Synonyms: Holzmantelbeton, Holzfaserbeton, Holzbeton, Holzspanbeton, Betonsteine
Method details: PKR Bau EPD GmbH PKR-Code: 2.17.1 Version 16.05.2016
Owner: ISOSPAN Baustoffwerk GmbH
Compliance: EN 15804; ISO 14025
Review: Independent external review by Richter Sarah
Amounts: rows without a unit in brackets have none in this file; such an amount is in the reference unit of its flow, which a separate flow dataset defines
copyright: true

## General comment
Holzmantelbetonsteine mit integrierter Holzfaserdämmplatte zum Einsatz als Außenwand.
Das Produkt wird aus Holzspänen, Zement, Wasser und einer Holzfaserdämmplatte hergestellt. Der auf der Baustelle eingebrachte Beton, inklusive Bewehrungsstahl, ist nicht Teil der vorliegenden Deklaration.

## Time period
Die Sachbilanzdaten repräsentieren alle im Jahr 2015 von der ISOSPAN Baustoffwerk GmbH in der Produktionsstätte Ramingstein produzierten Holzmantelbetonsteine mit integrierter Holzfaserdämmplatte.

## Technology and included processes
Die Herstellung des Holzspanbetons erfolgt im Werk in Ramingstein. Dabei werden Holzspäne, Zement und Wasser gemischt, in Formkästen gefüllt und die Dämmstoffeinlage zugegeben.

## Technical purpose
Die Schalungssteine aus Holzspanbeton sind nach der Europäischen Technischen Zulassung für die Errichtung von ober- und unterirdischen jeweils tragenden oder nichttragenden Innen- und Außenwänden geeignet. Daneben ist auch die Anwendung des Schalungssystems als freistehende Wände oder Lärmschutzwände möglich.

## Reference product
- Isospan 1 Holzbetonmantelsteine mit Holzfaserdämmung OEKOPUR S 36,5-16,5 ohne Füllbeton: 1

## Inputs
- Use of renewable primary energy (PERE) [MJ]: A1-A3 69.7782, A4 0.471641, A5 0.0219418, B1 0, B2 0, B3 0, B4 0, B5 0, B6 0, B7 0, C1 0.837586, C2 0.162635, C3 0, C4 1.95869, D 0
- Use of renewable primary energy resources used as raw materials (PERM) [MJ]: A1-A3 869, A4 0, A5 0, B1 0, B2 0, B3 0, B4 0, B5 0, B6 0, B7 0, C1 0, C2 0, C3 0, C4 0, D 0
- Total use of renewable primary energy resources (PERT) [MJ]: A1-A3 938.778, A4 0.471641, A5 0.0219418, B1 0, B2 0, B3 0, B4 0, B5 0, B6 0, B7 0, C1 0.837586, C2 0.162635, C3 0, C4 1.95869, D 0
- Use of non renewable primary energy (PENRE) [MJ]: A1-A3 238.997, A4 8.21717, A5 0.38228, B1 0, B2 0, B3 0, B4 0, B5 0, B6 0, B7 0, C1 14.5928, C2 2.83351, C3 0, C4 17.2191, D 0
- Use of non renewable primary energy resources used as raw materials (PENRM) [MJ]: A1-A3 31.7317, A4 0, A5 0, B1 0, B2 0, B3 0, B4 0, B5 0, B6 0, B7 0, C1 0, C2 0, C3 0, C4 0, D 0
- Total use of non renewable primary energy resource (PENRT) [MJ]: A1-A3 270.729, A4 8.21717, A5 0.38228, B1 0, B2 0, B3 0, B4 0, B5 0, B6 0, B7 0, C1 14.5928, C2 2.83351, C3 0, C4 17.2191, D 0
- Use of secondary material (SM) [kg]: A1-A3 0, A4 0, A5 0, B1 0, B2 0, B3 0, B4 0, B5 0, B6 0, B7 0, C1 0, C2 0, C3 0, C4 0, D 0
- Use of renewable secondary fuels (RSF) [MJ]: A1-A3 0, A4 0, A5 0, B1 0, B2 0, B3 0, B4 0, B5 0, B6 0, B7 0, C1 0, C2 0, C3 0, C4 0, D 0
- Use of non renewable secondary fuels (NRSF) [MJ]: A1-A3 0, A4 0, A5 0, B1 0, B2 0, B3 0, B4 0, B5 0, B6 0, B7 0, C1 0, C2 0, C3 0, C4 0, D 0
- Use of net fresh water (FW) [m3]: A1-A3 126.593, A4 0.0686573, A5 0.00319409, B1 0, B2 0, B3 0, B4 0, B5 0, B6 0, B7 0, C1 0.121928, C2 0.0236749, C3 0, C4 1.78283, D 0

## Outputs
- Hazardous waste disposed (HWD) [kg]: A1-A3 0.0207704, A4 2.95615e-6, A5 7.04764e-5, B1 0, B2 0, B3 0, B4 0, B5 0, B6 0, B7 0, C1 6.95387e-6, C2 4.97463e-6, C3 0, C4 1.99494e-5, D 0
- Non hazardous waste dispose (NHWD) [kg]: A1-A3 3.21774, A4 0.00089313, A5 7.76225, B1 0, B2 0, B3 0, B4 0, B5 0, B6 0, B7 0, C1 0.00210095, C2 0.00150297, C3 0, C4 293.691, D 0
- Radioactive waste disposed (RWD) [kg]: A1-A3 0.00803478, A4 1.29674e-5, A5 0.00328725, B1 0, B2 0, B3 0, B4 0, B5 0, B6 0, B7 0, C1 3.05037e-5, C2 2.18216e-5, C3 0, C4 0.0010224, D 0
- Components for re-use (CRU) [kg]: A1-A3 0, A4 0, A5 0, B1 0, B2 0, B3 0, B4 0, B5 0, B6 0, B7 0, C1 0, C2 0, C3 0, C4 0, D 0
- Materials for recycling (MFR) [kg]: A1-A3 0, A4 0, A5 0, B1 0, B2 0, B3 0, B4 0, B5 0, B6 0, B7 0, C1 0, C2 0, C3 0, C4 0, D 0
- Materials for energy recovery (MER) [kg]: A1-A3 0, A4 0, A5 0, B1 0, B2 0, B3 0, B4 0, B5 0, B6 0, B7 0, C1 0, C2 0, C3 0, C4 0, D 0
- Exported electrical energy (EEE) [MJ]: A1-A3 0, A4 0, A5 0, B1 0, B2 0, B3 0, B4 0, B5 0, B6 0, B7 0, C1 0, C2 0, C3 0, C4 0, D 0
- Exported thermal energy (EET) [MJ]: A1-A3 0, A4 0, A5 0, B1 0, B2 0, B3 0, B4 0, B5 0, B6 0, B7 0, C1 0, C2 0, C3 0, C4 0, D 0

## Impact indicators
- Global warming potential (GWP) [kg CO2-Äqv.]: A1-A3 -56.0596, A4 0.602694, A5 0.0280386, B1 0, B2 0, B3 0, B4 0, B5 0, B6 0, B7 0, C1 0.164859, C2 0.207825, C3 0, C4 81.3048, D 0
- Depletion potential of the stratospheric ozone layer (ODP) [kg R11-Äqv.]: A1-A3 4.58275e-10, A4 4.29455e-12, A5 1.99792e-13, B1 0, B2 0, B3 0, B4 0, B5 0, B6 0, B7 0, C1 7.62668e-12, C2 1.48088e-12, C3 0, C4 1.25709e-11, D 0
- Acidification potential of soil and water (AP) [kg SO2-Äqv.]: A1-A3 0.0488234, A4 0.00263668, A5 0.000122664, B1 0, B2 0, B3 0, B4 0, B5 0, B6 0, B7 0, C1 0.000903259, C2 0.000909201, C3 0, C4 0.00766106, D 0
- Eutrophication potential (EP) [kg Phosphat-Äqv.]: A1-A3 0.00742455, A4 0.000647327, A5 3.01151e-5, B1 0, B2 0, B3 0, B4 0, B5 0, B6 0, B7 0, C1 0.00015737, C2 0.000223216, C3 0, C4 0.00104227, D 0
- Formation potential of tropospheric ozone (POCP) [kg Ethen-Äqv.]: A1-A3 0.00602042, A4 -0.000899408, A5 -4.18424e-5, B1 0, B2 0, B3 0, B4 0, B5 0, B6 0, B7 0, C1 0.000133024, C2 -0.000310141, C3 0, C4 0.000736193, D 0
- Abiotic depletion potential for non fossil resources (ADPE) [kg Sb-Äqv.]: A1-A3 4.21549e-5, A4 4.44056e-8, A5 2.06584e-9, B1 0, B2 0, B3 0, B4 0, B5 0, B6 0, B7 0, C1 7.88598e-8, C2 1.53123e-8, C3 0, C4 4.40371e-7, D 0
- Abiotic depletion potential for fossil resources (ADPF) [MJ]: A1-A3 247.192, A4 8.17239, A5 0.380197, B1 0, B2 0, B3 0, B4 0, B5 0, B6 0, B7 0, C1 14.5133, C2 2.81806, C3 0, C4 16.6196, D 0

## Use advice
Anwendung im Gebäude sinnvoll. Grundsätzlich ist eine Gegenüberstellung oder die Bewertung von EPD Daten nur möglich, wenn alle zu vergleichenden Datensätze nach EN 15804 erstellt wurden und die produktspezifischen Leistungsmerkmale berücksichtigt werden.

Holzmantelbetonsteine mit integrierter Holzfaserdämmplatte zum Einsatz als Außenwand.
Das Produkt wird aus Holzspänen, Zement, Wasser und einer Holzfaserdämmplatte hergestellt. Der auf der Baustelle eingebrachte Beton, inklusive Bewehrungsstahl, ist nicht Teil der vorliegenden Deklaration.

## Data sources
- Software: Umberto NXT Universal Version 7.1.
- Hintergrunddatenbank GaBi SP29 2016
- GaBi database (general)
- Bau EPD GmbH EPD GABI Isospan 2017-01 OEKOPUR
