# Application paint emulsion, interior, wear resistant; 1 kg

Dataset: ILCD process, EPD, generic dataset
Geography: DE
Reference year: 2018
Valid until: 2022
Classification: oekobau.dat: Beschichtungen / Innenbeschichtungen / Innenfarben
Owner: thinkstep
Compliance: DIN EN 15804
Review: Dependent internal review by thinkstep, IABP-GaBi, IBP-GaBi; Independent external review by GaBi user forum, GaBi bug forum, GaBi user community
Amounts: rows without a unit in brackets have none in this file; such an amount is in the reference unit of its flow, which a separate flow dataset defines
copyright: true

## General comment
This data set has been modeled according to the European Standard EN 15804 for Sustainable Building. Results are depicted in modules that allow the structured expression of results over the entire life cycle.

## Geography
The data set represents the country specific situation in Germany, focusing on the main technologies, the region specific characteristics and / or import statistics.

## Time period
Annual average

## Technology and included processes
The life cycle analysis of 1 kg wear resistant interior emulsion coating includes the life cycle phases cradle to gate and processing, i.e. manufacturing of raw and auxiliary materials as well as the production including packaging as well as the processing at the construction site (solvent emissions). The coating (painting) of houses and parts of houses like windows, parquet etc. is typically done on the builiding site by hand and without waste air treatment. This dataset accounts for this situation by including the application of the coating in the sope and by modelling all the NMVOCs included inthe coating material as NMVOC emissions to air. Since the transport of the coating material is specific to the special boundary conditions of the study, this transpoort is not included in the scope and shall be modeled individually by the user of the dataset. 2% of the coating material is modeled to be not used (packaging residue) and to be incinerated in a municipal waste incineration plant.
The data sets represent exterior paints as well as first coatings. There are datasets for latex paints and precoats with a silicate and polymer base. Silicate paints have a soluble potassium as a bonding agent. The curing is achieved through silification (crystalline petrification) with the subgrade. Latex silicate paints are silicate paints with additives of maximum 5% organic constituents compared to the total weight of the coating material. Emulsion paints are water-containing, active paints with a polymer emulsion base in combination with dispersion bonding element. Emulsion paints combine the positive properties of mineral and polymer bound materials. Like latex paints, they are markedly water-based and at the same time, like silicate paints, are very vapour permeable.
Background system:
Electricity: Electricity is modelled according to the individual country-specific situations. The country-specific modelling is achieved on multiple levels. Firstly, individual energy carrier specific power plants and plants for renewable energy sources are modelled according to the current national electricity grid mix. Modelling the electricity consumption mix includes transmission / distribution losses and the own use by energy producers (own consumption of power plants and "other" own consumption e.g. due to pumped storage hydro power etc.), as well as imported electricity. Secondly, the national emission and efficiency standards of the power plants are modelled as well as the share of electricity plants and combined heat and power plants (CHP). Thirdly, the country-specific energy carrier supply (share of imports and / or domestic supply) including the country-specific energy carrier properties (e.g. element and energy content) are accounted for. Fourthly, the exploration, mining/production, processing and transport processes of the energy carrier supply chains are modelled according to the specific situation of each electricity producing country. The different production and processing techniques (emissions and efficiencies) in the different energy producing countries are considered, e.g. different crude oil production technologies or different flaring rates at the oil platforms.
Thermal energy, process steam: The thermal energy and process steam supply is modelled according to the individual country-specific situation with regard to emission standards and considered energy carriers. The thermal energy and process steam are produced at heat plants. Efficiencies for thermal energy production are by definition 100% in relation to the corresponding energy carrier input. For process steam the efficiency ranges from 85%, 90% to 95%. The energy carriers used for the generation of thermal energy and process steam are modelled according to the specific import situation (see electricity above).
Transports: All relevant and known transport processes are included. Ocean-going and inland ship transport as well as rail, truck and pipeline transport of bulk commodities are considered.
Energy carriers: The energy carriers are modelled according to the specific supply situation (see electricity above).
Refinery products: Diesel fuel, gasoline, technical gases, fuel oils, lubricants and residues such as bitumen are modelled with a parameterised country-specific refinery model. The refinery model represents the current national standard in refining techniques (e.g. emission level, internal energy consumption, etc.) as well as the individual country-specific product output spectrum, which can be quite different from country to country. The supply of crude oil is modelled, again, according to the country-specific situation with the respective properties of the resources.

## Technical purpose
This product can be used in construction.

## Safety margin
10 %. Product system almost completely covered. Good technological, temporal and geographic representativeness.

## Reference product
- Emulsion paint (scouring proof): 1

## Inputs
- Use of renewable primary energy (PERE) [MJ]: A1-A3 7.29298, A5 0.00420556, C2 0.00249555, C4 0.0287474, D -0.0447885
- Primary energy resources used as raw materials (PERM) [MJ]: A1-A3 0, A5 0, C2 0, C4 0, D 0
- Total use of renewable primary energy resources (PERT) [MJ]: A1-A3 7.29298, A5 0.00420556, C2 0.00249555, C4 0.0287474, D -0.0447885
- Use of non-renewable primary energy (PENRE) [MJ]: A1-A3 58.035, A5 0.0187261, C2 0.042867, C4 0.219027, D -0.158613
- Non-renewable primary energy resources used as raw materials (PENRM) [MJ]: A1-A3 0, A5 0, C2 0, C4 0, D 0
- Total use of non-renewable primary energy resources (PENRT) [MJ]: A1-A3 58.035, A5 0.0187261, C2 0.042867, C4 0.219027, D -0.158613
- Input of secondary material (SM) [kg]: A1-A3 0, A5 0, C2 0, C4 0, D 0
- Use of renewable secondary fuels (RSF) [MJ]: A1-A3 0, A5 0, C2 0, C4 0, D 0
- Use of non renewable secondary fuels (NRSF) [MJ]: A1-A3 0, A5 0, C2 0, C4 0, D 0
- Use of net fresh water (FW) [m3]: A1-A3 0.0135003, A5 0.00012632, C2 2.23497e-6, C4 5.51079e-5, D -2.08968e-5

## Outputs
- Hazardous waste disposed (HWD) [kg]: A1-A3 3.34564e-8, A5 5.40101e-11, C2 1.6019e-9, C4 3.33828e-9, D -8.3626e-11
- Non-hazardous waste disposed (NHWD) [kg]: A1-A3 0.793508, A5 0.00175177, C2 7.52392e-6, C4 1.10109, D -7.41806e-5
- Radioactive waste disposed (RWD) [kg]: A1-A3 0.000989093, A5 6.02932e-7, C2 4.51302e-8, C4 2.45586e-6, D -5.41097e-6
- Components for re-use (CRU) [kg]: A1-A3 0, A5 0, C2 0, C4 0, D 0
- Materials for Recycling (MFR) [kg]: A1-A3 0, A5 0, C2 0, C4 0, D 0
- Material for Energy Recovery (MER) [kg]: A1-A3 0, A5 0, C2 0, C4 0, D 0
- Exported electrical energy (EEE) [MJ]: A1-A3 0, A5 0.0393655, C2 0, C4 0, D 0
- Exported thermal energy (EET) [MJ]: A1-A3 0, A5 0.0926989, C2 0, C4 0, D 0

## Impact indicators
- Global warming potential (GWP) [kg CO2 eq.]: A1-A3 2.62123, A5 0.0314319, C2 0.00319526, C4 0.0150055, D -0.010823
- Ozone Depletion Potential (ODP) [kg R11 eq.]: A1-A3 3.95041e-14, A5 2.35752e-17, C2 1.05569e-18, C4 8.33609e-17, D -2.47646e-16
- Acidification potential (AP) [kg SO2 eq.]: A1-A3 0.00917009, A5 1.28082e-5, C2 7.11016e-6, C4 9.53255e-5, D -9.09723e-6
- Eutrophication potential (EP) [kg Phosphate eq.]: A1-A3 0.000763057, A5 2.78529e-6, C2 1.7071e-6, C4 1.07251e-5, D -1.72266e-6
- Photochemical Ozone Creation Potential (POCP) [kg Ethene eq.]: A1-A3 0.0010842, A5 0.00337546, C2 -2.42006e-6, C4 7.22809e-6, D -9.293e-7
- Abiotic depletion potential for non fossil resources (ADPE) [kg Sb eq.]: A1-A3 1.15401e-5, A5 2.5542e-10, C2 2.68387e-10, C4 1.52099e-9, D -2.66579e-9
- Abiotic depletion potential for fossil resources (ADPF) [MJ]: A1-A3 55.538, A5 0.017204, C2 0.0427517, C4 0.212826, D -0.144953

## Use advice
The data set represents a cradle to gate inventory. It can be used to characterise the supply chain situation of the respective commodity in a representative manner. Combination with individual unit processes using this commodity enables the generation of user-specific (product) LCAs.

## Data sources
- Roempp Lexikon - Lacke und Druckfarben, 1997
- Paints, Coatings and Solvents, 1998
- Ökologische Bilanzierung von Baustoffen und Gebäuden, 2000
- Lackformulierung und Lackrezeptur
- Lackrohstoffkunde
- Farben und Lacke
- GaBi Database Edition 2020, SP40
- GaBi database (all versions)
