# Hot-dip galvanized steel strip

Dataset: ILCD process, EPD, average dataset
Geography: AT
Reference year: 2019
Valid until: 2024
Classification: OEKOBAU.DAT: Metalle / Stahl und Eisen / Stahlbleche
Classification: IBUCategories: 02 Bauprodukte / Metallbauprodukte und Zubehör / Dünnwandige Profile und Profiltafeln aus Metall
Method details: Dünnwandige Profile und Profiltafeln aus Metall.pdf
Registration number: EPD-VOE-20190048-IBC1-DE
Owner: voestalpine AG
Compliance: DIN EN 15804; ISO 14025
Review: Accredited third party review by Institut Bauen und Umwelt e. V.
Amounts: rows without a unit in brackets have none in this file; such an amount is in the reference unit of its flow, which a separate flow dataset defines
copyright: true

## General comment
Hot-dip galvanized steel strips manufactured by voestalpine Stahl GmbH consist of steel strips produced in blast furnaces coated with a zinc or zinc-magnesium layer including client-specific post-treatment (e.g. anti-corrosive oiling). The average represents low-alloyed mild steel, press-hardened steels but also higher-strength IF steels.For the placing on the market of the product in the European Union/European Free Trade Association (EU/EFTA) (with the exception of Switzerland) /Regulation (EU) No. 305/2011 Construction Product Regulation (CPR)/ applies. The product needs a declaration of performance taking into consideration /EN 10025/, 2005, Hot rolled products of structural steels and the CE-marking.

For the application and use the respective national provisions apply. In Austria, for example, it is the building regulations of the individual federal states as well as the technical stipulations based on these regulations.

## Technology and included processes
The starting material for the production of hot-dip galvanized steel strip at voestalpine is crude steel made in the primary route (blast furnace, LD steelmaking plant) at the Linz site. The molten crude steel is cast into slabs using a continuous casting method. After cooling, the slabs are reheated in pusher-type or walking beam furnaces to 1100 - 1250 °C and rolled to strips of 1.2 - 4 mm thickness in several rolling steps. A mill scale layer forms on the hot-rolled strip which is removed before further processing in the cold rolling mill (scale removal). This production step first proceeds through a mechanical loosening of the scale layer (levelling line). The steel strip is subsequently pickled with hydrochloric and sulphuric acid. After pickling, the strip is rinsed, dried, and oiled. The pickled hot strip is further processed in voestalpine's cold rolling mill. The steel strip can be rolled to thicknesses of between 0.4 and 4 mm. Heat treatment (batch or continuous annealing) is performed to restore the formability of the steel strip and to produce a material with certain material properties. Metallic coatings (zinc and zinc-magnesium) are used to protect the surface of the steel strip, which exhibit a protective cathodic effect for the steel strip. The declared product is galvanized in a hot-dip galvanizing process.
Technical data:
The data given in the Declaration of Performance apply.
Declared unit:
This environmental product declaration refers to a declared unit of 1 m² of hot-dip galvanized steel strip with an average surface weight of 9 kg/m² and a reference thickness of 1.13 mm. The LCA result for other thicknesses can be calculated by means of linear conversion of the surface weight.

## Technical purpose
The application areas for hot-dip galvanized steel strips cover many sectors such as:

- Household-appliance industry

- House Technology

- Roof/Cladding/Drainage

- Section industry

- Tube industry

- Commercial vehicle industry

- Automotive sub-suppliers

- Automotive industry

Hot-dip galvanized steel strips manufactured by voestalpine Stahl GmbH are produced with various zinc coatings, surface qualities and post-treatments such as oil, passivation or anti-fingerprinting. As a result, the product shows best processing characteristics (e.g. rolling, deep-drawing, etc.) and a high degree of corrosion protection.

## Reference product
- Feuerverzinktes Stahlband [9 kg/m²]: 1

## Inputs
- Renewable primary energy as energy carrier (PERE) [MJ]: A1-A3 11.7, C3 0, C4 0.024, D 7.54
- Renewable primary energy resources as material utilization (PERM) [MJ]: A1-A3 0, C3 0, C4 0, D 0
- Total use of renewable primary energy resources (PERT) [MJ]: A1-A3 11.7, C3 0, C4 0.024, D 7.54
- Non renewable primary energy as energy carrier (PENRE) [MJ]: A1-A3 191, C3 0, C4 0.325, D -110
- Non renewable primary energy as material utilization (PENRM) [MJ]: A1-A3 0, C3 0, C4 0, D 0
- Total use of non renewable primary energy resources (PENRT) [MJ]: A1-A3 191, C3 0, C4 0.325, D -110
- Use of secondary material (SM) [kg]: A1-A3 1.29, C3 0, C4 0, D 7.2885
- Use of renewable secondary fuels (RSF) [MJ]: A1-A3 0, C3 0, C4 0, D 0
- Use of non renewable secondary fuels (NRSF) [MJ]: A1-A3 0, C3 0, C4 0, D 0
- Use of net fresh water (FW) [m^3]: A1-A3 0.0417, C3 0, C4 -1.53e-7, D 0.0157

## Outputs
- Hazardous waste disposed (HWD) [kg]: A1-A3 3.56e-6, C3 0, C4 1.74e-9, D -7.66e-6
- Non hazardous waste disposed (NHWD) [kg]: A1-A3 0.21, C3 0, C4 0.453, D 1.26
- Radioactive waste disposed (RWD) [kg]: A1-A3 0.00214, C3 0, C4 4.53e-6, D 3.77e-6
- Components for re-use (CRU) [kg]: A1-A3 0, C3 0, C4 0, D 0
- Materials for recycling (MFR) [kg]: A1-A3 0, C3 8.55, C4 0, D 0
- Materials for energy recovery (MER) [kg]: A1-A3 0, C3 0, C4 0, D 0
- Exported electrical energy (EEE) [MJ]: A1-A3 0, C3 0, C4 0, D 0
- Exported thermal energy (EET) [MJ]: A1-A3 0, C3 0, C4 0, D 0

## Impact indicators
- Global warming potential (GWP) [kg CO_(2)-Äq.]: A1-A3 19.9, C3 0, C4 0.0216, D -11.7
- Depletion potential of the stratospheric ozone layer (ODP) [kg CFC11-Äq.]: A1-A3 6e-11, C3 0, C4 5.72e-15, D 6.54e-8
- Acidification potential of land and water (AP) [kg SO_(2)-Äq.]: A1-A3 0.0527, C3 0, C4 6.01e-5, D -0.0231
- Eutrophication potential (EP) [kg PO_(4)^(3)-Äq.]: A1-A3 0.00486, C3 0, C4 7.56e-6, D -0.00171
- Formation potential of tropospheric ozone photochemical oxidants (POCP) [kg Ethen-Äq.]: A1-A3 0.00608, C3 0, C4 5.41e-6, D -0.00541
- Abiotic depletion potential for non fossil resources (ADPE) [kg Sb-Äq.]: A1-A3 0.000711, C3 0, C4 2.34e-9, D -3.59e-5
- Abiotic depletion potential for fossil resources (ADPF) [MJ]: A1-A3 186, C3 0, C4 0.313, D -114

## Use advice
Scope:
This EPD is based on a declared unit of 1 m² of average hot-dip galvanized steel strip with a surface weight of 9 kg/m² produced at the production site in Linz.
System boundary:
The life cycle assessment of average hot-dip galvanized steel strips produced by voestalpine refers to a cradle-to-gate analysis with options. The following lifecycle phases are taken into consideration in the analysis:

Module A1-A3 | Production stage

The product stage includes upstream burdens of purchased raw materials (coal, iron ore, pellets, etc.) and the corresponding transport to the production site in Linz. Material and energy flows needed for the coking plant, sintering plant, blast furnaces, steelmaking plant and rolling mill as well as during hot-dip galvanizing were recorded on site. Electricity is provided at Linz in a power station where furnace gases are used as fuel. Since more energy is used than is supplied by this company-owned power station, natural gas and electricity is additionally procured from Austrian networks.

Scrap input in module A1-A3 is regarded as burden-free. Module A1-A3 also includes the production of the product packaging.

Module C3 | Waste treatment

Product flows that reach Module D for recycling leave the product system in C3. Environmental impacts resulting from the grinding and sorting of steel scrap are not included.

Module C4 | Landfilling

Module C4 declares the environmental impacts incurred by landfilling (5% of the product).

Module D | Credits and loads beyond the system boundary

The potential for substituting primary steel with a recycling scenario (95% of the product) is set forth in Module D.

## Data sources
- Feuerverzinktes Stahlband.pdf
- GaBi Database (all versions)
- GaBi database SP33 2017
