# Structural Steel: Sections

Dataset: ILCD process, EPD, average dataset
Geography: RER
Reference year: 2021
Valid until: 2026
Classification: OEKOBAU.DAT: Metalle / Stahl und Eisen / Stahlprofile
Classification: IBUCategories: 02 Building products / Metallic products and ancillaries / Structural steels
Method details: Structural steels.pdf
Generated by: Sphera Solutions GmbH
Registration number: EPD-CEL-20200277-IBD1-EN
Owner: Celsa Huta Ostrowiec Sp. z o.o.
Compliance: DIN EN 15804; ISO 14025
Review: Accredited third party review by Institut Bauen und Umwelt e. V.
Amounts: rows without a unit in brackets have none in this file; such an amount is in the reference unit of its flow, which a separate flow dataset defines
copyright: true
licenseType: Free of charge for all users and uses
accessRestrictions: None

## General comment
The product declared is 'structural section steel'. The production process used is the Electric Arc Furnace (EAF). This route, used by CELSA for the production of structural steel, is based on the direct melting of scrap with an Electric Arc Furnace, which is subsequently processed in rolling mills in order to obtain the finished products.

The steel section is hot rolled into structural steel in various shapes (I, H, L, U, T, flats, etc.)

Technical properties (strength level) are: from quality S235 to S960. No metallic or organic coating.

For the placing on the market of the product in the European Union/European Free Trade Association (EU/EFTA) (with the exception of Switzerland) Regulation (EU) No. 305/2011 (CPR) applies. The products need a Declaration of Performance taking into consideration the harmonised European standard EN 10025 and the CE-marking. Related to EN10025, applies the following standards:

EN 10025-1:2004: Hot rolled products of structural steels. Part 1: General technical delivery conditions.
EN 10025-2:2019: Hot rolled products of structural steels. Part 2 Technical delivery conditions for non-alloy structural steels.

See further product standards in section “2.4 Technical Data”.

For the application and use, the respective national provisions apply.

## Technology and included processes
The product declared is structural section steel, produced by two sites: CELSA Huta Ostrowiec located in Poland and CELSA Barcelona located in Spain. Both are head companies of CELSA Group™. In both cases, the plants melt ferrous scrap in an Electric Arc Furnace to obtain liquid steel. The chemical adjustment of molten steel is performed in Ladle Furnaces (LF), where the steel is alloyed (e.g. approx. 1% Mn, 0.2% Si) and micro alloyed (e.g., 0.01% V) to achieve the appropriate chemical composition for the product and to give the steel specific properties (quality, etc.). At the end phase of steel mill, molten steel casted into a semi-finished product in a continuous casting machine. The semi-finished product (billet) is then hot rolled in order to obtein the structural steel in various shapes (I, H, L, U, T, flats, etc.). The final performance characteristics are reached by thermo-mechanical process. The two sites, CELSA Huta Ostrowiec and CELSA Barcelona, operates under a Quality Management Systems in accordance with ISO9001 (independent third party certification). Manufacturing the building product Scrap metal is melted in an electric arc furnace to obtain liquid steel. Refinement is used (reduction of sulphur and phosphorus) and can be alloyed (e.g. approx. 1% Mn, 0.2% Si) and micro alloyed (e.g., 0.01% V) to give the steel specific properties. At the end of the production of steel, molten steel is transformed into a semi-finished product with a continuous casting system. The semi-finished product (billet) is hot rolled to obtain the final product.
Declared unit:
The declaration refers to the functional unit of 1 metric ton of structural section steel as specified in Part B requirements on the EPD for structural steels.

## Technical purpose
Steel products are used in the majority of buildings and civil works, mainly in reinforced structural concrete and structural steel constructions. In addition to the construction sector there are numerous applications in very diverse sectors, such as transport, agriculture, automotive, livestock farming, electricity pylons and cranes, etc.

Examples:

Bridges (railway bridge, road bridge, pedestrian bridge, etc.)
Multi-storey buildings (offices, residential, shops, car parks, high rise, etc.)
Single-storey buildings (industrial and storage halls, etc.)
Other structures (warehouses, industrial and commercial buildings)

## Reference product
- 1 ton structural section steel (): 1000

## Inputs
- Renewable primary energy as energy carrier (PERE) [MJ]: A1-A3 1930
- Renewable primary energy resources as material utilization (PERM) [MJ]: A1-A3 0
- Total use of renewable primary energy resources (PERT) [MJ]: A1-A3 1930
- Non renewable primary energy as energy carrier (PENRE) [MJ]: A1-A3 7260
- Non renewable primary energy as material utilization (PENRM) [MJ]: A1-A3 0
- Total use of non renewable primary energy resources (PENRT) [MJ]: A1-A3 7260
- Use of secondary material (SM) [kg]: A1-A3 1110
- Use of renewable secondary fuels (RSF) [MJ]: A1-A3 0
- Use of non renewable secondary fuels (NRSF) [MJ]: A1-A3 0
- Use of net fresh water (FW) [m^3]: A1-A3 3.32

## Outputs
- Hazardous waste disposed (HWD) [kg]: A1-A3 1.46e-5
- Non hazardous waste disposed (NHWD) [kg]: A1-A3 2.91
- Radioactive waste disposed (RWD) [kg]: A1-A3 0.425
- Components for re-use (CRU) [kg]: A1-A3 0
- Materials for recycling (MFR) [kg]: A1-A3 0
- Materials for energy recovery (MER) [kg]: A1-A3 0
- Exported electrical energy (EEE) [MJ]: A1-A3 0
- Exported thermal energy (EET) [MJ]: A1-A3 0

## Impact indicators
- Global warming potential (GWP) [kg CO_(2)-Äq.]: A1-A3 558
- Depletion potential of the stratospheric ozone layer (ODP) [kg CFC11-Äq.]: A1-A3 4.05e-12
- Acidification potential of land and water (AP) [kg SO_(2)-Äq.]: A1-A3 1.6
- Eutrophication potential (EP) [kg PO_(4)^(3)-Äq.]: A1-A3 0.134
- Formation potential of tropospheric ozone photochemical oxidants (POCP) [kg Ethen-Äq.]: A1-A3 0.116
- Abiotic depletion potential for non fossil resources (ADPE) [kg Sb-Äq.]: A1-A3 0.000129
- Abiotic depletion potential for fossil resources (ADPF) [MJ]: A1-A3 6160

## Use advice
Scope:
This EPD represents a weighted average of the production of structural steel sections by the CELSA Group at the 2 sites: Huta Ostrowiec, Poland and Barcelona, Spain.
System boundary:
Type of the EPD: cradle-to-gate - with options. Module A1-A3 were considered.

Modules A1-A3 of the production include the following:

The provision of resources, additives, and energy
Transport of resources and additives to the production site
Production processes on-site including energy, production of additives, disposal of production residues, and consideration of related emissions
Recycling of production/manufacturing scrap. Steel scrap is assumed to reach the end-of-waste status once it is shredded and sorted, thus becomes an input to the product system in the inventory.

## Data sources
- GaBi Database (all versions)
- GaBi database SP40 2020
