# Sustainable and permeable paving: TTE®-MultiDrainPLUS

Dataset: ILCD process, EPD, average dataset
Geography: RER
Reference year: 2021
Valid until: 2026
Classification: OEKOBAU.DAT: Kunststoffe / Bodenbeläge / Synth. Thermoplast / Polyolefin
Classification: IBUCategories: 02 Building products / Civil engineering products / Permanent way materials for outdoor traffic routes
Method details: Permanent way materials for outdoor traffic routes.pdf
Generated by: Sphera Solutions GmbH
Registration number: EPD-HBL-20210070-IBB1-EN
Owner: Hübner-Lee GmbH & Co. KG
Compliance: DIN EN 15804; ISO 14025
Review: Accredited third party review by Institut Bauen und Umwelt e. V.
Amounts: rows without a unit in brackets have none in this file; such an amount is in the reference unit of its flow, which a separate flow dataset defines
copyright: true
licenseType: Free of charge for all users and uses
accessRestrictions: None

## General comment
TTE®-MultiDrainPLUS is a massive plastic grid that is connected to an ecological building concept for unsealed traffic areas and pavements. It offers different design options and possibilities for combination, as it can be grassed or filled with concrete pavers and mineral filling materials. The Product is also available pregrassed or prefilled with TTE®-Pavers.

Its key function is the distribution of load on a large area, due to an innovative frictional interlocking between the single modules. This reduces the requirements on the bearing capacity and compaction of the underground (testet by "Engineering Office Siegfried Ziegler" ibz). Therefore the efforts and CO2-emission for the underground preparation can be reduced. All variations provide a draining capacity, which guarantees full decentralized retention of heavy rainfall (testet by "Bayrische Landesanstalt für Weinbau und Gartenbau" LWG).

The raw material of TTE®-MultiDrainPLUS is based on mixed recycling plastic originating from 100% post-consumer material (PCM) from “Der Grüne Punkt” (The Green Dot) and other systems for waste collection and recycling. The production process of the product is injection and intrusion moulding.
For the use and application of the product the respective national provisions at the place of use apply, in Germany for example the building codes of the federal states and the corresponding national specifications.

## Technology and included processes
TTE®-MultiDrainPLUS is produced in the following stages: melting of recycling material in an extruder forming by injection moulding or intrusion moulding, depending on the machine formed product cooled down active or passive, depending on the machine quality assurance palletising and packingQuality Management System in the production sites: ISO -9001
Declared unit:
The declaration refers to 1 m² of TTE®-MultiDrainPLUS, with 27,188 kg/m². 1 m² of TTE®-MultiDrainPLUS consists of 3,125 grids of the product.

## Technical purpose
TTE®-MultiDrainPLUS is SLW 60 - certified for vehicle weights up to 60 t / 20 t axle load (certification via "Technical Inspection Association" TUEV). The static load limit of an unfilled TTE®-MultidrainPLUS grid is 147,5 kN on a 20 x 20 cm stamp, in acc. with DIN 53 454).

TTE®-MultiDrainPLUS is suitable for various applications for permeable pavements and traffic areas, like parking lots and access roads for personal cars and heavy traffic, fire brigade access roads, residential streets, logistic areas, automobile logistics, maintenance paths, event areas, golf paths, campsite, temporary pavements, specific solutions for tree-root protection, weak underground, modular base and drainage for sportsfields.

## Scenarios
- S1: Scenario 1
- S2: Scenario 2
- S3: Scenario 3

## Reference product
- TTE®-MultiDrainPLUS / m²: 1

## Inputs
- Renewable primary energy as energy carrier (PERE) [MJ]: A1-A3 31.16, A4 0.0241, A5 6.2779, B1 0, B2 0, B6 0, B7 0, C1 0, C2 (S1) 0.0235, C2 (S2) 0.0117, C2 (S3) 0.00203, C3 (S1) 76.3, C3 (S2) 0, C3 (S3) 5.19, C4 2.03, D (S1) -1.2, D (S2) -31, D (S3) -128
- Renewable primary energy resources as material utilization (PERM) [MJ]: A1-A3 6.24, A4 0, A5 -6.24, B1 0, B2 0, B6 0, B7 0, C1 0, C2 (S1) 0, C2 (S2) 0, C2 (S3) 0, C3 (S1) 0, C3 (S2) 0, C3 (S3) 0, C4 0, D (S1) 0, D (S2) 0, D (S3) 0
- Total use of renewable primary energy resources (PERT) [MJ]: A1-A3 37.4, A4 0.0241, A5 0.0379, B1 0, B2 0, B6 0, B7 0, C1 0, C2 (S1) 0.0235, C2 (S2) 0.0117, C2 (S3) 0.00203, C3 (S1) 76.3, C3 (S2) 0, C3 (S3) 5.19, C4 2.03, D (S1) -1.2, D (S2) -31, D (S3) -128
- Non renewable primary energy as energy carrier (PENRE) [MJ]: A1-A3 -1082.9, A4 8.2, A5 1.017, B1 0, B2 0, B6 0, B7 0, C1 0, C2 (S1) 7.99, C2 (S2) 4, C2 (S3) 0.692, C3 (S1) 141, C3 (S2) 1163, C3 (S3) 1189.9, C4 1192.5, D (S1) -5.96, D (S2) -84, D (S3) -636
- Non renewable primary energy as material utilization (PENRM) [MJ]: A1-A3 1163.8, A4 0, A5 -0.8, B1 0, B2 0, B6 0, B7 0, C1 0, C2 (S1) 0, C2 (S2) 0, C2 (S3) 0, C3 (S1) 1304, C3 (S2) -1163, C3 (S3) -1163, C4 -1163, D (S1) 0, D (S2) 0, D (S3) 0
- Total use of non renewable primary energy resources (PENRT) [MJ]: A1-A3 80.9, A4 8.2, A5 0.217, B1 0, B2 0, B6 0, B7 0, C1 0, C2 (S1) 7.99, C2 (S2) 4, C2 (S3) 0.692, C3 (S1) 141, C3 (S2) 0, C3 (S3) 26.9, C4 29.5, D (S1) -5.96, D (S2) -84, D (S3) -636
- Use of secondary material (SM) [kg]: A1-A3 27.7, A4 0, A5 0, B1 0, B2 0, B6 0, B7 0, C1 0, C2 (S1) 0, C2 (S2) 0, C2 (S3) 0, C3 (S1) 0, C3 (S2) 0, C3 (S3) 0, C4 0, D (S1) 0, D (S2) -27.7, D (S3) 0
- Use of renewable secondary fuels (RSF) [MJ]: A1-A3 0, A4 0, A5 0, B1 0, B2 0, B6 0, B7 0, C1 0, C2 (S1) 0, C2 (S2) 0, C2 (S3) 0, C3 (S1) 0, C3 (S2) 0, C3 (S3) 0, C4 0, D (S1) 0, D (S2) 0, D (S3) 0
- Use of non renewable secondary fuels (NRSF) [MJ]: A1-A3 0, A4 0, A5 0, B1 0, B2 0, B6 0, B7 0, C1 0, C2 (S1) 0, C2 (S2) 0, C2 (S3) 0, C3 (S1) 0, C3 (S2) 0, C3 (S3) 0, C4 0, D (S1) 0, D (S2) 0, D (S3) 0
- Use of net fresh water (FW) [m^3]: A1-A3 0.0203, A4 4.45e-5, A5 0.00239, B1 0, B2 0, B6 0, B7 0, C1 0, C2 (S1) 4.33e-5, C2 (S2) 2.17e-5, C2 (S3) 3.75e-6, C3 (S1) 0.0428, C3 (S2) 0, C3 (S3) 0.168, C4 0.000499, D (S1) -0.00142, D (S2) -0.0209, D (S3) -0.151

## Outputs
- Hazardous waste disposed (HWD) [kg]: A1-A3 7.47e-8, A4 8.69e-10, A5 1.78e-10, B1 0, B2 0, B6 0, B7 0, C1 0, C2 (S1) 8.47e-10, C2 (S2) 4.24e-10, C2 (S3) 7.33e-11, C3 (S1) 1.1e-7, C3 (S2) 0, C3 (S3) 1.26e-7, C4 1.24e-7, D (S1) -2.45e-9, D (S2) -4.59e-8, D (S3) -2.62e-7
- Non hazardous waste disposed (NHWD) [kg]: A1-A3 0.0763, A4 4.89e-5, A5 0.00697, B1 0, B2 0, B6 0, B7 0, C1 0, C2 (S1) 4.77e-5, C2 (S2) 2.39e-5, C2 (S3) 4.13e-6, C3 (S1) 0.146, C3 (S2) 0, C3 (S3) 6.57, C4 27.1, D (S1) -0.00257, D (S2) -0.0761, D (S3) -0.274
- Radioactive waste disposed (RWD) [kg]: A1-A3 0.0116, A4 9.43e-6, A5 1.36e-5, B1 0, B2 0, B6 0, B7 0, C1 0, C2 (S1) 9.19e-6, C2 (S2) 4.6e-6, C2 (S3) 7.95e-7, C3 (S1) 0.0133, C3 (S2) 0, C3 (S3) 0.00124, C4 0.000393, D (S1) -0.000481, D (S2) -0.012, D (S3) -0.0512
- Components for re-use (CRU) [kg]: A1-A3 0, A4 0, A5 0, B1 0, B2 0, B6 0, B7 0, C1 0, C2 (S1) 0, C2 (S2) 0, C2 (S3) 0, C3 (S1) 0, C3 (S2) 27.2, C3 (S3) 0, C4 0, D (S1) 0, D (S2) 0, D (S3) 0
- Materials for recycling (MFR) [kg]: A1-A3 0, A4 0, A5 0, B1 0, B2 0, B6 0, B7 0, C1 0, C2 (S1) 0, C2 (S2) 0, C2 (S3) 0, C3 (S1) 27.2, C3 (S2) 0, C3 (S3) 0, C4 0, D (S1) 0, D (S2) 0, D (S3) 0
- Materials for energy recovery (MER) [kg]: A1-A3 0, A4 0, A5 0, B1 0, B2 0, B6 0, B7 0, C1 0, C2 (S1) 0, C2 (S2) 0, C2 (S3) 0, C3 (S1) 0, C3 (S2) 0, C3 (S3) 27.2, C4 0, D (S1) 0, D (S2) 0, D (S3) 0
- Exported electrical energy (EEE) [MJ]: A1-A3 0, A4 0, A5 1.43, B1 0, B2 0, B6 0, B7 0, C1 0, C2 (S1) 0, C2 (S2) 0, C2 (S3) 0, C3 (S1) 0, C3 (S2) 0, C3 (S3) 151, C4 0, D (S1) 0, D (S2) 0, D (S3) 0
- Exported thermal energy (EET) [MJ]: A1-A3 0, A4 0, A5 2.56, B1 0, B2 0, B6 0, B7 0, C1 0, C2 (S1) 0, C2 (S2) 0, C2 (S3) 0, C3 (S1) 0, C3 (S2) 0, C3 (S3) 271, C4 0, D (S1) 0, D (S2) 0, D (S3) 0

## Impact indicators
- Global warming potential (GWP) [kg CO_(2)-Äq.]: A1-A3 3.79, A4 0.596, A5 0.991, B1 0, B2 0, B6 0, B7 0, C1 0, C2 (S1) 0.581, C2 (S2) 0.291, C2 (S3) 0.0504, C3 (S1) 11.1, C3 (S2) 0, C3 (S3) 67.8, C4 1.86, D (S1) -0.336, D (S2) -4.63, D (S3) -35.9
- Depletion potential of the stratospheric ozone layer (ODP) [kg CFC11-Äq.]: A1-A3 1.83e-13, A4 7.66e-17, A5 1.59e-16, B1 0, B2 0, B6 0, B7 0, C1 0, C2 (S1) 7.46e-17, C2 (S2) 3.73e-17, C2 (S3) 6.46e-18, C3 (S1) 4.62e-13, C3 (S2) 0, C3 (S3) 2.68e-14, C4 6.52e-15, D (S1) -4.63e-15, D (S2) -1.85e-13, D (S3) -4.93e-13
- Acidification potential of land and water (AP) [kg SO_(2)-Äq.]: A1-A3 0.00656, A4 0.000409, A5 9.84e-5, B1 0, B2 0, B6 0, B7 0, C1 0, C2 (S1) 0.000398, C2 (S2) 0.000199, C2 (S3) 3.68e-5, C3 (S1) 0.0171, C3 (S2) 0, C3 (S3) 0.016, C4 0.00516, D (S1) -0.000567, D (S2) -0.0067, D (S3) -0.0605
- Eutrophication potential (EP) [kg PO_(4)^(3)-Äq.]: A1-A3 0.00112, A4 5.92e-5, A5 2.03e-5, B1 0, B2 0, B6 0, B7 0, C1 0, C2 (S1) 5.75e-5, C2 (S2) 2.88e-5, C2 (S3) 5.67e-6, C3 (S1) 0.00278, C3 (S2) 0, C3 (S3) 0.00126, C4 0.00522, D (S1) -6.14e-5, D (S2) -0.00109, D (S3) -0.00655
- Formation potential of tropospheric ozone photochemical oxidants (POCP) [kg Ethen-Äq.]: A1-A3 0.000446, A4 1.46e-5, A5 7.96e-6, B1 0, B2 0, B6 0, B7 0, C1 0, C2 (S1) 1.45e-5, C2 (S2) 7.24e-6, C2 (S3) 2.94e-7, C3 (S1) 0.00113, C3 (S2) 0, C3 (S3) 0.000615, C4 0.00058, D (S1) -4.5e-5, D (S2) -0.000475, D (S3) -0.0048
- Abiotic depletion potential for non fossil resources (ADPE) [kg Sb-Äq.]: A1-A3 1.81e-6, A4 1.63e-8, A5 9.19e-9, B1 0, B2 0, B6 0, B7 0, C1 0, C2 (S1) 1.59e-8, C2 (S2) 7.94e-9, C2 (S3) 1.37e-9, C3 (S1) 4.62e-6, C3 (S2) 0, C3 (S3) 4.65e-6, C4 3.61e-7, D (S1) -6.06e-8, D (S2) -1.83e-6, D (S3) -6.46e-6
- Abiotic depletion potential for fossil resources (ADPF) [MJ]: A1-A3 51.5, A4 8.18, A5 0.183, B1 0, B2 0, B6 0, B7 0, C1 0, C2 (S1) 7.97, C2 (S2) 3.99, C2 (S3) 0.69, C3 (S1) 108, C3 (S2) 0, C3 (S3) 23.8, C4 28.5, D (S1) -4.74, D (S2) -53.6, D (S3) -507

## Use advice
Scope:
The declaration refers to the production, transport, application and end-of-life of 1 m² TTE®-MultiDrainPLUS (without filling material). The declared product includes the surface finishes diamond nubs (MDP 2000) and round nubs (MDP 3000). The Life Cycle Assessment is based on data collected from the production sites in Weira (Germany) and Herstal (Belgium). A production average over the reference year 2018 was used.
System boundary:
The EPD of TTE®-MultiDrainPLUS, includes the production as well as installation, use phase and the End-of-Life of the product with four different options for disposal (closed-loop recycling, re-use, incineration and landfill). It represents a "cradle-to-gate" EPD with options. The following life cycle phases are considered:

ProductionA1-A3 – Raw material supply, transport and manufacturing.

InstallationA4 – Transport to building site
A5 – Installation (including

packaging waste processing)

Use stageB1 – Use / application
B2 – Maintenance
B6 – Operational energy use
B7 – Operational water use

For use stage no further effort for TTE®-MultiDrainPLUS is required.

End-of-life

4 Scenarios for End-of-life:

Scenario 1: Recycling “closed loop” (C2/1, C3/1, D/1) and
Scenario 2: Re-use ( C2/2, C3/2) with potential benefits for material substitution for the product TTE®-MultiDrainPLUS declared in module D (D/2),
Scenario 3: Incineration with potential benefits from energy substitutions from incineration processes declared in module D (C2/3, C3/3, D/3),

Scenario 4: Landfill - in some countries not applicable depending on the regulations, e.g. Germany (C2/3, C4, D/1)

C1 – Deconstruction/ demolition

C2 – Transport to Waste processing: C2/1 Transport to Recycling, transport to Re-use C2/2, transport to incineration and to landfill C2/3

C3 – Waste processing: C3/1 Recycling "closed-loop", C3/2 Re-use, C3/3 Incineration

C4 – Landfill

Benefits and loads beyond the product system
boundary

In module D the potential benefits given for energy substitution from incineration of packaging material in module A5 are declared for all scenarios.

D/1: potential benefits from energy substitutions from incineration processes of the packaging materials in A5, D/2: potential benefits from material substitution for re-use of TTE®-MultiDrainPLUS, D/3 potential benefits from energy substitutions from incineration processes of the packaging materials and product.

## Data sources
- GaBi Database (all versions)
- GaBi database SP39 2019
