# IMPREGNATED PLASTERBOARD / Tool

Dataset: ILCD process, EPD, average dataset
Geography: DE
Reference year: 2021
Valid until: 2026
Classification: OEKOBAU.DAT: Mineralische Baustoffe / Steine und Elemente / Gipsplatten
Classification: IBUCategories: 02 Bauprodukte / Gipsprodukte / Gipsplatten
Method details: Gipsplatten.pdf
Generated by: Sphera Solutions GmbH
Registration number: EPD-BVG-20210163-IBE1-DE
Owner: Bundesverband der Gipsindustrie e.V.
Compliance: DIN EN 15804+A2; ISO 14025
Review: Accredited third party review by Institut Bauen und Umwelt e. V.
Amounts: rows without a unit in brackets have none in this file; such an amount is in the reference unit of its flow, which a separate flow dataset defines
copyright: true
licenseType: Free of charge for all users and uses
accessRestrictions: None

## General comment
Die Deklaration umfasst 1 m2 Gipsplatte - imprägniert mit einem Flächengewicht von 10 kg/m2.

## Technology and included processes
The production process is described in section 2.6 of the EPD.

## Technical purpose
Gipsplatten werden als Trockenputz direkt auf den Untergrund geklebt; als Beplankungen für Wand- und Deckenbekleidungen, Montagewände und Unterdecken aus Holz oder verzinktem Metall sowie für die Herstellung vorgefertigter Bauteile, wie z.B. im Fertighausbau verschraubt oder genagelt.

Der Einsatz kann in öffentlichen, privaten oder gewerblich genutzten Gebäuden erfolgen.

## Scenarios
- S1: Recycling
- S2: Deponierung

## Reference product
- 1 m2 = 10 kg Gipsplatte - imprägniert: 1

## Inputs
- Renewable primary energy as energy carrier (PERE) [MJ]: A1-A3 3.989, A4 0.00535, A5 0.00784, C1 0, C2 (S1) 0.00268, C2 (S2) 0.00268, C3 (S1) 0.941, C3 (S2) 0, C4 (S1) 0, C4 (S2) 0.261, D (S1) -0.0529, D (S2) 0
- Renewable primary energy resources as material utilization (PERM) [MJ]: A1-A3 4.9, A4 0, A5 0, C1 0, C2 (S1) 0, C2 (S2) 0, C3 (S1) 0, C3 (S2) 0, C4 (S1) 0, C4 (S2) 0, D (S1) 0, D (S2) 0
- Total use of renewable primary energy resources (PERT) [MJ]: A1-A3 8.889, A4 0.00535, A5 0.00784, C1 0, C2 (S1) 0.00268, C2 (S2) 0.00268, C3 (S1) 0.941, C3 (S2) 0, C4 (S1) 0, C4 (S2) 0.261, D (S1) -0.0529, D (S2) 0
- Non renewable primary energy as energy carrier (PENRE) [MJ]: A1-A3 28.33, A4 1.7, A5 0.0177, C1 0, C2 (S1) 0.849, C2 (S2) 0.849, C3 (S1) 2.12, C3 (S2) 0, C4 (S1) 0, C4 (S2) 1.99, D (S1) -0.513, D (S2) 0
- Non renewable primary energy as material utilization (PENRM) [MJ]: A1-A3 0, A4 0, A5 0, C1 0, C2 (S1) 0, C2 (S2) 0, C3 (S1) 0, C3 (S2) 0, C4 (S1) 0, C4 (S2) 0, D (S1) 0, D (S2) 0
- Total use of non renewable primary energy resources (PENRT) [MJ]: A1-A3 28.33, A4 1.7, A5 0.0177, C1 0, C2 (S1) 0.849, C2 (S2) 0.849, C3 (S1) 2.12, C3 (S2) 0, C4 (S1) 0, C4 (S2) 1.99, D (S1) -0.513, D (S2) 0
- Use of secondary material (SM) [kg]: A1-A3 5.3, A4 0, A5 0, C1 0, C2 (S1) 0, C2 (S2) 0, C3 (S1) 0, C3 (S2) 0, C4 (S1) 0, C4 (S2) 0, D (S1) 0, D (S2) 0
- Use of renewable secondary fuels (RSF) [MJ]: A1-A3 0, A4 0, A5 0, C1 0, C2 (S1) 0, C2 (S2) 0, C3 (S1) 0, C3 (S2) 0, C4 (S1) 0, C4 (S2) 0, D (S1) 0, D (S2) 0
- Use of non renewable secondary fuels (NRSF) [MJ]: A1-A3 0, A4 0, A5 0, C1 0, C2 (S1) 0, C2 (S2) 0, C3 (S1) 0, C3 (S2) 0, C4 (S1) 0, C4 (S2) 0, D (S1) 0, D (S2) 0
- Use of net fresh water (FW) [m^3]: A1-A3 0.0067051, A4 9.6e-6, A5 9.07e-6, C1 0, C2 (S1) 4.8e-6, C2 (S2) 4.8e-6, C3 (S1) 0.00109, C3 (S2) 0, C4 (S1) 0, C4 (S2) 0.000502, D (S1) -7.29e-5, D (S2) 0

## Outputs
- Hazardous waste disposed (HWD) [kg]: A1-A3 1.24579e-6, A4 1.65e-10, A5 7.32e-12, C1 0, C2 (S1) 8.24e-11, C2 (S2) 8.24e-11, C3 (S1) 8.79e-10, C3 (S2) 0, C4 (S1) 0, C4 (S2) 3.03e-8, D (S1) -2.59e-8, D (S2) 0
- Non hazardous waste disposed (NHWD) [kg]: A1-A3 0.039766, A4 0.000174, A5 1.26e-5, C1 0, C2 (S1) 8.68e-5, C2 (S2) 8.68e-5, C3 (S1) 0.00151, C3 (S2) 0, C4 (S1) 0, C4 (S2) 10, D (S1) -0.000109, D (S2) 0
- Radioactive waste disposed (RWD) [kg]: A1-A3 0.00034947, A4 1.82e-6, A5 2.69e-6, C1 0, C2 (S1) 9.11e-7, C2 (S2) 9.11e-7, C3 (S1) 0.000322, C3 (S2) 0, C4 (S1) 0, C4 (S2) 2.26e-5, D (S1) -9.13e-6, D (S2) 0
- Components for re-use (CRU) [kg]: A1-A3 0, A4 0, A5 0, C1 0, C2 (S1) 0, C2 (S2) 0, C3 (S1) 0, C3 (S2) 0, C4 (S1) 0, C4 (S2) 0, D (S1) 0, D (S2) 0
- Materials for recycling (MFR) [kg]: A1-A3 0, A4 0, A5 0, C1 0, C2 (S1) 0, C2 (S2) 0, C3 (S1) 4.7, C3 (S2) 0, C4 (S1) 0, C4 (S2) 0, D (S1) 0, D (S2) 0
- Materials for energy recovery (MER) [kg]: A1-A3 0, A4 0, A5 0, C1 0, C2 (S1) 0, C2 (S2) 0, C3 (S1) 0, C3 (S2) 0, C4 (S1) 0, C4 (S2) 0, D (S1) 0, D (S2) 0
- Exported electrical energy (EEE) [MJ]: A1-A3 0, A4 0, A5 0, C1 0, C2 (S1) 0, C2 (S2) 0, C3 (S1) 0, C3 (S2) 0, C4 (S1) 0, C4 (S2) 0, D (S1) 0, D (S2) 0
- Exported thermal energy (EET) [MJ]: A1-A3 0, A4 0, A5 0, C1 0, C2 (S1) 0, C2 (S2) 0, C3 (S1) 0, C3 (S2) 0, C4 (S1) 0, C4 (S2) 0, D (S1) 0, D (S2) 0

## Impact indicators
- Global Warming Potential total (GWP-total) [kg CO_(2)-Äq.]: A1-A3 1.301, A4 0.126, A5 0.00101, C1 0, C2 (S1) 0.0629, C2 (S2) 0.0629, C3 (S1) 0.692, C3 (S2) 0, C4 (S1) 0, C4 (S2) 0.723, D (S1) -0.0373, D (S2) 0
- Global Warming Potential fossil fuels (GWP-fossil) [kg CO_(2)-Äq.]: A1-A3 1.846, A4 0.12, A5 0.00101, C1 0, C2 (S1) 0.0601, C2 (S2) 0.0601, C3 (S1) 0.691, C3 (S2) 0, C4 (S1) 0, C4 (S2) 0.722, D (S1) -0.0372, D (S2) 0
- Global Warming Potential biogenic (GWP-biogenic) [kg CO_(2)-Äq.]: A1-A3 -0.54836, A4 0.00553, A5 3.35e-6, C1 0, C2 (S1) 0.00277, C2 (S2) 0.00277, C3 (S1) 0.0521, C3 (S2) 0, C4 (S1) 0, C4 (S2) 0.0517, D (S1) 0.000138, D (S2) 0
- Global Warming Potential luluc (GWP-luluc) [kg CO_(2)-Äq.]: A1-A3 0.0031211, A4 2.85e-6, A5 1.46e-6, C1 0, C2 (S1) 1.42e-6, C2 (S2) 1.42e-6, C3 (S1) 0.000175, C3 (S2) 0, C4 (S1) 0, C4 (S2) 0.000437, D (S1) -0.00027, D (S2) 0
- Depletion potential of the stratospheric ozone layer (ODP) [kg CFC11-Äq.]: A1-A3 1.66005e-10, A4 1.26e-17, A5 2.21e-17, C1 0, C2 (S1) 6.32e-18, C2 (S2) 6.32e-18, C3 (S1) 2.66e-15, C3 (S2) 0, C4 (S1) 0, C4 (S2) 5.62e-16, D (S1) -7.17e-17, D (S2) 0
- Acidification potential of land and water (AP) [mol H^(+)-Äq.]: A1-A3 0.003016, A4 0.000113, A5 2.22e-6, C1 0, C2 (S1) 5.64e-5, C2 (S2) 5.64e-5, C3 (S1) 0.000267, C3 (S2) 0, C4 (S1) 0, C4 (S2) 0.00109, D (S1) -0.000137, D (S2) 0
- Eutrophication potential aquatic freshwater (EP-freshwater) [kg PO_(4)-Äq.]: A1-A3 1.13349e-5, A4 2.56e-8, A5 2.69e-9, C1 0, C2 (S1) 1.28e-8, C2 (S2) 1.28e-8, C3 (S1) 3.23e-7, C3 (S2) 0, C4 (S1) 0, C4 (S2) 2.6e-7, D (S1) -1.27e-7, D (S2) 0
- Eutrophication potential aquatic marine (EP-marine) [kg N-Äq.]: A1-A3 0.000962, A4 3.42e-5, A5 4.93e-7, C1 0, C2 (S1) 1.71e-5, C2 (S2) 1.71e-5, C3 (S1) 5.92e-5, C3 (S2) 0, C4 (S1) 0, C4 (S2) 0.00028, D (S1) -5.74e-5, D (S2) 0
- Eutrophication potential terrestrial (EP-terrestrial) [mol N-Äq.]: A1-A3 0.01011, A4 0.000383, A5 5.18e-6, C1 0, C2 (S1) 0.000192, C2 (S2) 0.000192, C3 (S1) 0.000622, C3 (S2) 0, C4 (S1) 0, C4 (S2) 0.00308, D (S1) -0.000655, D (S2) 0
- Formation potential of tropospheric ozone photochemical oxidants (POCP) [kg NMVOC-Äq.]: A1-A3 0.002618, A4 0.0001, A5 1.35e-6, C1 0, C2 (S1) 5e-5, C2 (S2) 5e-5, C3 (S1) 0.000162, C3 (S2) 0, C4 (S1) 0, C4 (S2) 0.000848, D (S1) -0.000146, D (S2) 0
- Abiotic depletion potential for non fossil resources (ADPE) [kg Sb-Äq.]: A1-A3 1.9723e-6, A4 3.59e-9, A5 2.91e-10, C1 0, C2 (S1) 1.79e-9, C2 (S2) 1.79e-9, C3 (S1) 3.5e-8, C3 (S2) 0, C4 (S1) 0, C4 (S2) 1.36e-8, D (S1) -3.61e-9, D (S2) 0
- Abiotic depletion potential for fossil resources (ADPF) [MJ]: A1-A3 28.32, A4 1.7, A5 0.0177, C1 0, C2 (S1) 0.848, C2 (S2) 0.848, C3 (S1) 2.12, C3 (S2) 0, C4 (S1) 0, C4 (S2) 1.99, D (S1) -0.511, D (S2) 0
- Water use (WDP) [m^(3) Welt-Äq. entzogen]: A1-A3 0.164532, A4 0.000234, A5 0.000219, C1 0, C2 (S1) 0.000117, C2 (S2) 0.000117, C3 (S1) 0.0263, C3 (S2) 0, C4 (S1) 0, C4 (S2) 0.0159, D (S1) -0.00223, D (S2) 0
- Incidence of disease due to PM emissions (PM) [Krankheitsfälle]: A1-A3 7.352e-8, A4 6.12e-10, A5 1.86e-11, C1 0, C2 (S1) 3.06e-10, C2 (S2) 3.06e-10, C3 (S1) 2.24e-9, C3 (S2) 0, C4 (S1) 0, C4 (S2) 1.35e-8, D (S1) -6.24e-8, D (S2) 0
- Human exposure efficiency relative to U235 (IR) [kBq U235-Äq.]: A1-A3 0.043724, A4 0.000261, A5 0.000441, C1 0, C2 (S1) 0.00013, C2 (S2) 0.00013, C3 (S1) 0.0529, C3 (S2) 0, C4 (S1) 0, C4 (S2) 0.00232, D (S1) -0.00167, D (S2) 0
- Comparative toxic unit for ecosystems (ETP-fw) [CTUe]: A1-A3 17.088, A4 1.2, A5 0.00757, C1 0, C2 (S1) 0.601, C2 (S2) 0.601, C3 (S1) 0.908, C3 (S2) 0, C4 (S1) 0, C4 (S2) 1.14, D (S1) -0.36, D (S2) 0
- Comparative toxic unit for humans (carcinogenic) (HTP-c) [CTUh]: A1-A3 7.222e-10, A4 2.26e-11, A5 2.09e-13, C1 0, C2 (S1) 1.13e-11, C2 (S2) 1.13e-11, C3 (S1) 2.51e-11, C3 (S2) 0, C4 (S1) 0, C4 (S2) 1.68e-10, D (S1) -7.78e-12, D (S2) 0
- Comparative toxic unit for humans (noncarcinogenic) (HTP-nc) [CTUh]: A1-A3 6.685e-8, A4 9.67e-10, A5 7.7e-12, C1 0, C2 (S1) 4.84e-10, C2 (S2) 4.84e-10, C3 (S1) 9.24e-10, C3 (S2) 0, C4 (S1) 0, C4 (S2) 1.86e-8, D (S1) -4.36e-10, D (S2) 0
- Soil quality index (SQP) [SQP]: A1-A3 10.3975, A4 0.00436, A5 0.00563, C1 0, C2 (S1) 0.00218, C2 (S2) 0.00218, C3 (S1) 0.676, C3 (S2) 0, C4 (S1) 0, C4 (S2) 0.415, D (S1) -0.161, D (S2) 0

## Use advice
Gültigkeitsbereich:
Die EPD gilt für die Mitgliedsunternehmen des
Bundesverbandes der Gipsindustrie e.V. gemäß
aktueller Mitgliederliste auf https://www.gips.de/epd-ansprechpartner/gipsplatten/ für die in
Deutschland hergestellten Produkte. Die Ökobilanz
berücksichtigt spezifische Informationen der Hersteller
und der Zulieferer von Komponenten für den gesamten
Lebenszyklus.
Systemgrenze:
Typ der EPD gemäß /EN 15804/ von der Wiege bis zum Werkstor mit- Optionen (A4–A5),
- Module C1–C4 und
- Modul D
(A1–A3 + C + D und zusätzliche Module: A4 und A5).

Die Module A1–A3 (Produktionsstadium) enthalten dieRohstoffproduktion unter Berücksichtigung deutscher Randbedingungen und deren Transporte, die Energiebereitstellung (Strom-Mix Deutschland) sowie Herstellungsprozesse, die für die Produktion sämtlicher Komponenten für das Erzeugnis Gipsplatte erforderlich sind. Da im Allgemeinen die Gipsplatten auf Mehrwegpaletten mit Ladungssicherungsbändern zur Baustelle transportiert werden ist keine Verpackung berücksichtigt.

Modul A4 enthält den Transport zur Baustelle.

Modul A5 umfasst den Einbau auf der Baustelle

inklusive Entsorgung etwaiger Verpackung unter europäischen Randbedingungen.

Modul C1 deklariert den manuellen Rückbau.

Modul C2 enthält den Transport zum Ort derVerwertung.

Modul C3 umfasst das Zerkleinern und Aufbereiten der

Gipsprodukte.

Modul C4 wird in der Regel nicht betrachtet, da die Gewerbeabfallverordnung eine Zuführung von Gipsplatten zum Recycling vorsieht. In der vorliegenden Ökobilanz wird zusätzlich ein Deponierungsszenario berechnet, um Legalausnahmen der Gewerbeabfallverordnung mit abzudecken.

Modul D enthält potenzielle Gutschriften des Gipsrecyclings.

## Data sources
- GaBi Database (all versions)
- GaBi Database Edition 2021, CUP 2021.01
