# PVC floor covering

Dataset: ILCD process, EPD, generic dataset
Geography: DE
Reference year: 2018
Valid until: 2022
Classification: oekobau.dat: Kunststoffe / Bodenbeläge / PVC-Bodenbeläge
Owner: thinkstep
Compliance: DIN EN 15804
Review: Dependent internal review by thinkstep, IABP-GaBi, IBP-GaBi; Independent external review by GaBi user forum, GaBi bug forum, GaBi user community
Amounts: rows without a unit in brackets have none in this file; such an amount is in the reference unit of its flow, which a separate flow dataset defines
copyright: true

## General comment
This data set has been modeled according to the European Standard EN 15804 for Sustainable Building. Results are depicted in modules that allow the structured expression of results over the entire life cycle.

## Geography
The data set represents the country specific situation in Germany, focusing on the main technologies, the region specific characteristics and / or import statistics.

## Time period
annual average

## Technology and included processes
There are six theoretical process steps to produce homogeneous PVC flooring. In the first step, the raw materials are mixed and heated. The mixture is homogenised with plasticisers and pigments. After lamination a sheet is formed and cooled down to allow the lacquering of the sheet. The surface can be treated through mechanical embossing for creating a texture and tightening the material. Afterwards the sheet is trimmed, inspected and packaged.

Background system:
Electricity: Electricity from renewable and non- renewable powerplants is modelled so that it represents a countrys specific consumption mix including transmission / distribution losses, own consumption, imports, emissions and efficiency standards, and energy carrier properties. Several factors are taken into account. (1) Energy carrier production - The exploration, mining / production, processing, and transportation of energy carrier supply chains are modelled for each country. The models account for differences among countries in production and processing, including crude oil production technologies, flaring rates, production efficiencies, emissions, etc. (2) Energy carrier supply - Each countrys specific energy carrier supply is modelled, taking into account domestic supply versus imports from abroad. Energy carrier properties (e.g. carbon and energy content), which can vary depending from where an energy carrier is sourced, are adjusted accordingly. (3) Power plants - Models are created to represent energy carrier-specific power plants and electricity generation facilities specific to different renewable energy resources. Energy carrier production and supply models are used to represent power plant inputs. Combined heat and power (CHP) plants are also considered. (4) Electricity grid - Models representing the electricity generation facilities are combined into a larger model that reflects a countrys consumption mix. The larger model accounts for a countrys production mix, internal consumption (e.g. pumped storage for hydro power), transmission / distribution losses, and imported electricity. The country model is also adjusted according to national power plant emission and efficiency standards, as well as the countrys share of electricity plants versus CHP facilities.
Thermal energy, process steam: The thermal energy and process steam supply is modelled to reflect each countrys emission standards and typical energy carriers (e.g., coal, natural gas, etc.) Both thermal energy and process steam are assumed to be produced at heat plants. Thermal energy datasets assume energy carrier inputs are converted to thermal energy with 100% efficiency; process steam datasets assume conversion efficiencies of 85%, 90% to 95%. The energy carriers used for the generation of thermal energy and process steam are modelled according to each countrys import situation (see electricity above).
Transportation: All relevant and known transportation processes are included. Ocean-going and inland ship transport as well as rail, truck and pipeline transport of bulk commodities are considered.
Energy carriers: The energy carriers and their respective properties are modelled according to the specific supply situation (see electricity above).
Refinery products: Diesel fuel, gasoline, technical gases, fuel oils, lubricants and residues such as bitumen are modelled with a parameterised country-specific refinery model. The refinery model aims to represent each countrys refining processes (e.g. emissions levels, internal energy consumption, etc.), as well as the countrys product output spectrum, which can vary significantly among countries. The supply of crude oil is likewise modelled according to the country-specific situation and accounts for differences in resource properties (e.g., crude oil energy content).

## Technical purpose
Homogeneous PVC floor coverings are resilient floor coverings, that are produced in one or more layers of the same composition and color patterned throughout its thickness. Resilient floor coverings can provide different functionalities (acoustic, static control, slip resistance, easy maintenance etc.) to match a wide range of domestic, commercial and industrial applications. It is available in a wide range of patterns and colors.

## Safety margin
20 %. Product system depicted except for a few missing processes / flows. Technological, temporal and geographic representativeness partly given.

## Reference product
- PVC floor covering [m2]: 1

## Inputs
- Use of renewable primary energy (PERE) [MJ]: A1-A3 22.1819, C1 0, C2 0.00719136, C3 6.53396, D -9.09697
- Primary energy resources used as raw materials (PERM) [MJ]: A1-A3 0, C1 0, C2 0, C3 0, D 0
- Total use of renewable primary energy resources (PERT) [MJ]: A1-A3 22.1819, C1 0, C2 0.00719136, C3 6.53396, D -9.09697
- Use of non-renewable primary energy (PENRE) [MJ]: A1-A3 90.349, C1 0, C2 0.123529, C3 102.261, D -32.2779
- Non-renewable primary energy resources used as raw materials (PENRM) [MJ]: A1-A3 79.2, C1 0, C2 0, C3 -79.2, D 0
- Total use of non-renewable primary energy resources (PENRT) [MJ]: A1-A3 169.549, C1 0, C2 0.123529, C3 23.0608, D -32.2779
- Input of secondary material (SM) [kg]: A1-A3 0, C1 0, C2 0, C3 0, D 0
- Use of renewable secondary fuels (RSF) [MJ]: A1-A3 0, C1 0, C2 0, C3 0, D 0
- Use of non renewable secondary fuels (NRSF) [MJ]: A1-A3 0, C1 0, C2 0, C3 0, D 0
- Use of net fresh water (FW) [m3]: A1-A3 0.0415336, C1 0, C2 6.44047e-6, C3 0.0222093, D -0.00424445

## Outputs
- Hazardous waste disposed (HWD) [kg]: A1-A3 4.26461e-6, C1 0, C2 4.61615e-9, C3 1.17421e-7, D -1.70108e-8
- Non-hazardous waste disposed (NHWD) [kg]: A1-A3 1.14218, C1 0, C2 2.16815e-5, C3 7.10882, D -0.0150817
- Radioactive waste disposed (RWD) [kg]: A1-A3 0.00285223, C1 0, C2 1.30051e-7, C3 0.000927671, D -0.00109901
- Components for re-use (CRU) [kg]: A1-A3 0, C1 0, C2 0, C3 0, D 0
- Materials for Recycling (MFR) [kg]: A1-A3 0, C1 0, C2 0, C3 0, D 0
- Material for Energy Recovery (MER) [kg]: A1-A3 0, C1 3.96, C2 0, C3 0, D 0
- Exported electrical energy (EEE) [MJ]: A1-A3 0, C1 0, C2 0, C3 8.72225, D 0
- Exported thermal energy (EET) [MJ]: A1-A3 0, C1 0, C2 0, C3 20.6082, D 0

## Impact indicators
- Global warming potential (GWP) [kg CO2 eq.]: A1-A3 8.191, C1 0, C2 0.0091907, C3 10.8467, D -2.20199
- Ozone Depletion Potential (ODP) [kg R11 eq.]: A1-A3 6.91302e-10, C1 0, C2 3.04216e-18, C3 3.62701e-14, D -5.02988e-14
- Acidification potential (AP) [kg SO2 eq.]: A1-A3 0.0110353, C1 0, C2 1.85642e-5, C3 0.00245437, D -0.00184965
- Eutrophication potential (EP) [kg Phosphate eq.]: A1-A3 0.00211538, C1 0, C2 4.41323e-6, C3 0.000521682, D -0.000350213
- Photochemical Ozone Creation Potential (POCP) [kg Ethene eq.]: A1-A3 0.00225897, C1 0, C2 -5.56184e-6, C3 0.000331428, D -0.000189028
- Abiotic depletion potential for non fossil resources (ADPE) [kg Sb eq.]: A1-A3 9.55392e-6, C1 0, C2 7.73406e-10, C3 3.738e-7, D -5.41662e-7
- Abiotic depletion potential for fossil resources (ADPF) [MJ]: A1-A3 162.342, C1 0, C2 0.123197, C3 20.7191, D -29.5035

## Use advice
This dataset refers to the production of 1 m² of homogeneous polyvinyl chloride floor covering with a weight of 3.3 kg/m² and a thickness of 2 mm. The main components are PVC-polymers and fillers with plasticizers and additives like pigments.

The data set represents a cradle to gate inventory. It can be used to characterise the supply chain situation of the respective commodity in a representative manner. Combination with individual unit processes using this commodity enables the generation of user-specific (product) LCAs.

## Data sources
- GaBi databases
- GaBi Database Edition 2020, SP40
- GaBi database (all versions)
