# Flat roof fastening systems

Dataset: ILCD process, EPD, average dataset
Geography: RER
Reference year: 2021
Valid until: 2026
Classification: OEKOBAU.DAT: Komponenten von Fenstern und Vorhangfassaden / Beschläge / Befestigungen
Classification: IBUCategories: 02 Bauprodukte / Befestigungen / Dübel aus Kunststoff und Metall
Method details: Dübel aus Kunststoff und Metall.pdf
Generated by: brands and values GmbH
Registration number: EPD-EJO-20210059-IBD1-DE
Owner: EJOT BAUBEFESTIGUNGEN GmbH
Compliance: DIN EN 15804+A2; ISO 14025
Review: Accredited third party review by Institut Bauen und Umwelt e. V.
Amounts: rows without a unit in brackets have none in this file; such an amount is in the reference unit of its flow, which a separate flow dataset defines
copyright: true
licenseType: Free of charge for all users and uses
accessRestrictions: None

## General comment
The flat roof fastening system is formed by combinations of the screws with stress plates made of metal or plastic or plastic anchor sleeves with pre-assembled screw.

This declaration describes a hypothetical, general flat roof fastening system of the total length 160mm/200mm/240mm and is thus valid for all fastening combinations mentioned below that may be used according to European Technical Approval ETA 07- 0013 for the mechanical securing of flat roof structures against wind suction forces.

## Technology and included processes
Raw materials/Ancillary materials: The main raw materials and primary products for the flat roof fastening systems of EJOT Baubefestigungen GmbH are: - Steel / stainless steel (approx. 74 %) - Polyethylene (approx. 15 %) - Polyamide (approx. 10 %) - Dyes (approx. 1 %). The plastic granulate contains auxiliary materials and additives. In the EJOT production companies, no auxiliary materials and additives are used in production. Production: The plastic anchor sleeves are produced using conventional injection moulding techniques. For this purpose, an injection moulding machine is used to plasticise the respective plastic in an injection unit and inject it into an injection mould. The cavity of the tool determines the shape and surface structure of the finished part (here plastic anchor sleeve or plastic stress plate). Screws: The vast majority of screws and fasteners are produced by non-cutting cold forming. The cold extrusion process: The starting material is delivered as "wire" wound on spools and uncoiled, straightened and, if necessary, reduced to the desired diameter in equipment upstream of the presses. Modern cold extrusion presses work in several stages, i.e. several operations are linked in succession per stroke, e.g. preforming the screw head, upsetting, deburring and reducing the threaded part. In the subsequent process, the threads are rolled onto the reduced threaded parts by thread rolling machines with flat dies or rolling and segment tools without cutting. Preferably, cold extrusion presses with integrated thread rolling machines are used. Declared unit: The declared unit is an average system for fixing 1 m² of flat roof with a specific length of 200 mm, consisting of three individual systems."Average" describes all fastening types of the system produced on average according to production shares weighted on the basis of a parameter analysis. This means that a hypothetical fastening system is calculated that represents the entire flat roof fastening system. In order to convert the declared unit to kg, the weight per system is given.
Declared unit:
The declared unit is an average system for fixing 1 m² of flat roof with a specific length of 200 mm, consisting of three individual systems.

"Average" describes all fastening types of the system produced on average according to production shares weighted on the basis of a parameter analysis. This means that a hypothetical fastening system is calculated that represents the entire flat roof fastening system. In order to convert the declared unit to kg, the weight per system is given.

## Technical purpose
Flat roof fastening systems from EJOT Baubefestigungen GmbH are used to mechanically secure vapour barriers, insulation materials and roof membranes against dynamically occurring wind suction forces on the anchoring bases of trapezoidal sheet metal, concrete, lightweight and aerated concrete, wood and wood-based materials.

## Reference product
- durchschnittliche Flachdachbefestigungssysteme von 200 mm Länge: 1

## Inputs
- Renewable primary energy as energy carrier (PERE) [MJ]: A1-A3 0.952858, C1 0.00197, C2 0.000508, C3 0.000357, C4 0.00176, D 0.0818
- Renewable primary energy resources as material utilization (PERM) [MJ]: A1-A3 0.167142, C1 0, C2 0, C3 0, C4 0, D 0
- Total use of renewable primary energy resources (PERT) [MJ]: A1-A3 1.12, C1 0.00197, C2 0.000508, C3 0.000357, C4 0.00176, D 0.0818
- Non renewable primary energy as energy carrier (PENRE) [MJ]: A1-A3 5.80193, C1 0.0342, C2 0.00882, C3 0.733023, C4 0.025, D -1.06
- Non renewable primary energy as material utilization (PENRM) [MJ]: A1-A3 0.728073, C1 0, C2 0, C3 -0.728073, C4 0, D 0
- Total use of non renewable primary energy resources (PENRT) [MJ]: A1-A3 6.53, C1 0.0342, C2 0.00882, C3 0.00495, C4 0.025, D -1.06
- Use of secondary material (SM) [kg]: A1-A3 0.00604281, C1 0, C2 0, C3 0, C4 0, D 0.0726
- Use of renewable secondary fuels (RSF) [MJ]: A1-A3 0, C1 0, C2 0, C3 0, C4 0, D 0
- Use of non renewable secondary fuels (NRSF) [MJ]: A1-A3 0, C1 0, C2 0, C3 0, C4 0, D 0
- Use of net fresh water (FW) [m^3]: A1-A3 0.00104, C1 2.3e-6, C2 5.92e-7, C3 1.39e-6, C4 3.07e-7, D -0.000217

## Outputs
- Hazardous waste disposed (HWD) [kg]: A1-A3 1.42e-8, C1 1.58e-9, C2 4.08e-10, C3 1.3e-10, C4 9.12e-11, D -1.35e-7
- Non hazardous waste disposed (NHWD) [kg]: A1-A3 0.00451, C1 5.42e-6, C2 1.4e-6, C3 1.34e-6, C4 0.024, D 0.0126
- Radioactive waste disposed (RWD) [kg]: A1-A3 0.000107, C1 6.3e-8, C2 1.62e-8, C3 6.54e-8, C4 3.01e-7, D 3.75e-8
- Components for re-use (CRU) [kg]: A1-A3 0, C1 0, C2 0, C3 0, C4 0, D 0
- Materials for recycling (MFR) [kg]: A1-A3 0, C1 0, C2 0, C3 0.0726, C4 0, D 0
- Materials for energy recovery (MER) [kg]: A1-A3 0.00207591, C1 0, C2 0, C3 0, C4 0, D 0
- Exported electrical energy (EEE) [MJ]: A1-A3 0, C1 0, C2 0, C3 0, C4 0, D 0
- Exported thermal energy (EET) [MJ]: A1-A3 0, C1 0, C2 0, C3 0, C4 0, D 0

## Impact indicators
- Global Warming Potential total (GWP-total) [kg CO_(2)-Äq.]: A1-A3 0.491, C1 0.00256, C2 0.000658, C3 0.000255, C4 0.00174, D -0.123
- Global Warming Potential fossil fuels (GWP-fossil) [kg CO_(2)-Äq.]: A1-A3 0.491, C1 0.00254, C2 0.000653, C3 0.000253, C4 0.00174, D -0.123
- Global Warming Potential biogenic (GWP-biogenic) [kg CO_(2)-Äq.]: A1-A3 0, C1 0, C2 0, C3 0, C4 0, D 0
- Global Warming Potential luluc (GWP-luluc) [kg CO_(2)-Äq.]: A1-A3 0.000313, C1 2.07e-5, C2 5.33e-6, C3 1.73e-6, C4 1.41e-6, D 3.5e-6
- Depletion potential of the stratospheric ozone layer (ODP) [kg CFC11-Äq.]: A1-A3 1.75e-11, C1 4.69e-19, C2 1.21e-19, C3 6.14e-19, C4 3.95e-18, D 2.68e-16
- Acidification potential of land and water (AP) [mol H^(+)-Äq.]: A1-A3 0.00111, C1 1.29e-5, C2 4.02e-6, C3 2.49e-6, C4 5.27e-6, D -0.000273
- Eutrophication potential aquatic freshwater (EP-freshwater) [kg PO_(4)-Äq.]: A1-A3 1.18e-6, C1 7.78e-9, C2 2e-9, C3 7.38e-10, C4 3.19e-7, D -6.95e-8
- Eutrophication potential aquatic marine (EP-marine) [kg N-Äq.]: A1-A3 0.000281, C1 6.13e-6, C2 1.94e-6, C3 1.21e-6, C4 1.17e-6, D -4.99e-5
- Eutrophication potential terrestrial (EP-terrestrial) [mol N-Äq.]: A1-A3 0.00289, C1 6.8e-5, C2 2.15e-5, C3 1.33e-5, C4 1.28e-5, D -0.000505
- Formation potential of tropospheric ozone photochemical oxidants (POCP) [kg NMVOC-Äq.]: A1-A3 0.000859, C1 1.25e-5, C2 3.75e-6, C3 3.52e-6, C4 3.81e-6, D -0.000206
- Abiotic depletion potential for non fossil resources (ADPE) [kg Sb-Äq.]: A1-A3 1.32e-5, C1 2.06e-10, C2 5.32e-11, C3 2.77e-10, C4 1.18e-10, D -1.99e-6
- Abiotic depletion potential for fossil resources (ADPF) [MJ]: A1-A3 6.52, C1 0.0341, C2 0.00878, C3 0.00495, C4 0.025, D -1.06
- Water use (WDP) [m^(3) Welt-Äq. entzogen]: A1-A3 0.0177, C1 2.49e-5, C2 6.42e-6, C3 4.88e-5, C4 -1.95e-5, D -0.00925
- Incidence of disease due to PM emissions (PM) [Krankheitsfälle]
- Human exposure efficiency relative to U235 (IR) [kBq U235-Äq.]
- Comparative toxic unit for ecosystems (ETP-fw) [CTUe]
- Comparative toxic unit for humans (carcinogenic) (HTP-c) [CTUh]
- Comparative toxic unit for humans (noncarcinogenic) (HTP-nc) [CTUh]
- Soil quality index (SQP) [SQP]

## Use advice
Scope:
This declaration is valid for all fastening combinations mentioned in the European Technical Approval ETA 07-0013, which are manufactured in the plants in Germany (Berghausen) and Poland (Ciasna) of EJOT Baubefestigungen GmbH. The data basis is the year 2012. The declared results apply to a length of 200 mm, for all other lengths the results can be extrapolated with the formula given in chapter 5.
System boundary:
Type of EPD: Cradle to factory gate - with options. The environmental product declaration refers to the production stage (module A1-A3), the disposal stage (modules C1-C4) as well as credits and loads outside the system boundary (module D).

In the production stage, the procurement of raw materials including the corresponding upstream chains, the necessary procurement transports to the plants and the energies required for the production of the fastening systems are considered.

The country-specific electricity mix was modelled for each of the plants. The material composition and energy demand of the declared fastening systems were calculated according to their production shares in each plant.

In the disposal phase, the dismantling of the fastening systems (module C1), the transport to waste treatment (module C2), the waste treatment (module C3) and the landfilling of the plastics (module C4) are considered. Avoided loads from the recycling of metals are considered in Module D.

For this purpose, only the net scrap quantities are considered.

## Data sources
- GaBi Database (all versions)
- GaBi database SP40 2020
