# Acetylated wood (1 m³, 510 kg/m³); 510 kg/m³

Dataset: ILCD process, EPD, generic dataset
Geography: DE
Reference year: 2021
Valid until: 2022
Classification: oekobau.dat: Holz / Modifiziertes Holz / Acetyliertes Holz
Owner: Sphera Solutions GmbH
Compliance: EN 15804+A2
Review: Dependent internal review by Sphera Solutions GmbH; Independent external review by GaBi user forum
Amounts: rows without a unit in brackets have none in this file; such an amount is in the reference unit of its flow, which a separate flow dataset defines
copyright: true
licenseType: Free of charge for all users and uses
accessRestrictions: The license conditions as stated on https://www.oekobaudat.de/ apply.
accessRestrictions: Es gelten die Lizenzbedingungen wie sie auf https://www.oekobaudat.de/ genannt sind.

## General comment
This data set has been modeled according to the European Standard EN 15804+A2 for Sustainable Building. Results are depicted in modules that allow the structured expression of results over the entire life cycle.

## Geography
The data set represents the country specific situation in Germany, focusing on the main technologies, the region specific characteristics and / or import statistics.

## Time period
Annual average

## Technology and included processes
For the production of acetylated wood, dried softwood is used for this data set.

For the acetylation process, an acetic anhydride solution is injected into special stainless steel reactors filled with the wood to be treated. The wood and the acetic anhydride solution react at temperatures of around 120 °C. The hydroxyl groups on the wood cell wall are esterified to form acetic acid esters and acetic acid is released.

For this data set, in the sense of a conservative approach, only acetic anhydride from primary production was balanced (from the acetic acid produced, acetic anhydride can theoretically be recovered and fed back into the process). The acetic acid produced during the process was treated as a by-product in the life cycle assessment and the environmental impacts of the acetylation process were allocated economically: approx. 88% of the environmental impacts were attributed to the acetylated wood and approx. 12% to the acetic acid.

The production of acetic anhydride and the wood upstream chain dominate the life cycle assessment of the product system.

In module C1, a manual dismantling (no loads) is assumed, collecting losses are neglected.
The transport in module C2 to the recycling plant takes place with a truck (50km).
Module C3 takes into account the grinding and thermal treatment (combustion) of the material. The CO2 absorbed and stored in the material by photosynthesis (from module A1) is written off in C3 (CO2 neutrality within the product system according to EN 16485: Round and sawn timber - Environmental Product Declarations - Product category rules for wood and wood-based products for use in construction, 2014). Furthermore module C3 contains the loads for running the treatment facility.
Module D contains the credits for the substitution of electricity (German electricity mix) and thermal energy (from natural gas). The calculation of combustion emissions and credits takes into account the specific calorific value of the material and the material composition.

## Technical purpose
Acetylated wood can be used for structural and non-structural applications. Due to the improved durability, acetylated wood is mainly used outdoors, as well as for applications with soil and water contact. Color coatings are possible.

## Safety margin
20 %. Product system depicted except for a few missing processes / flows. Technological, temporal and geographic representativeness partly given.

## Reference product
- Acetylated wood (1 m³, 510 kg/m³): 1

## Inputs
- Use of renewable primary energy as energy carrier (PERE) [MJ]: A1-A3 2141.13, C2 1.11494, C3 8092.66, D -1206.83
- Use of renewable primary energy resources used as raw materials (PERM) [MJ]: A1-A3 6678, C2 0, C3 -6678, D 0
- Total use of renewable primary energy (PERT) [MJ]: A1-A3 8819.13, C2 1.11494, C3 1414.66, D -1206.83
- Use of non renewable primary energy as energy carrier (PENRE) [MJ]: A1-A3 21881.6, C2 19.2105, C3 391.843, D -3513.18
- Use of non renewable primary energy resources used as raw materials (PENRM) [MJ]: A1-A3 0, C2 0, C3 0, D 0
- Total use of non renewable primary energy resource (PENRT) [MJ]: A1-A3 21881.6, C2 19.2105, C3 391.843, D -3513.18
- Use of secondary material (SM) [kg]: A1-A3 0, C2 0, C3 0, D 0
- Use of renewable secondary fuels (SF) [MJ]: A1-A3 0, C2 0, C3 0, D 0
- Use of non renewable secondary fuels (NRSF) [MJ]: A1-A3 0, C2 0, C3 0, D 0
- Net use of fresh water (FW) [m3]: A1-A3 3.64701, C2 0.000990907, C3 2.74346, D -0.448804

## Outputs
- Hazardous waste disposed (HWD) [kg]: A1-A3 5.03505e-6, C2 8.02938e-10, C3 9.48522e-8, D -1.22322e-6
- Non harzardous waste disposed (NHWD) [kg]: A1-A3 7.18342, C2 0.00310102, C3 8.16985, D -1.86497
- Radioactive waste disposed (RWD) [kg]: A1-A3 0.0566484, C2 1.8435e-5, C3 0.00970609, D -0.129796
- Components for re-use (CRU) [kg]: A1-A3 0, C2 0, C3 0, D 0
- Materials for recycling (MFR) [kg]: A1-A3 0, C2 0, C3 0, D 0
- Materials for energy recovery (MER) [kg]: A1-A3 0, C2 0, C3 0, D 0
- Exported electrical energy (EEE) [MJ]: A1-A3 0, C2 0, C3 966.884, D 0
- Exported thermal energy (EET) [MJ]: A1-A3 0, C2 0, C3 2163.11, D 0

## Impact indicators
- Global Warming Potential - total (GWP-total) [kg CO2 eq.]: A1-A3 197.742, C2 1.45919, C3 1012.85, D -226.487
- Global Warming Potential - fossil fuels (GWP-fossil) [kg CO2 eq.]: A1-A3 955.78, C2 1.44928, C3 27.4545, D -223.722
- Global Warming Potential - biogenic (GWP-biogenic) [kg CO2 eq.]: A1-A3 -758.337, C2 0.00060035, C3 985.372, D -2.43167
- Global Warming Potential - land use and land use change (GWP-luluc) [kg CO2 eq.]: A1-A3 0.298911, C2 0.00930769, C3 0.0261952, D -0.333266
- Depletion potenzial of the stratospheric ozone layer (ODP) [kg CFC-11 eq.]: A1-A3 1.79935e-12, C2 3.70834e-16, C3 3.24768e-13, D -5.26881e-12
- Acidifcation potential, Accumulated Exceedance (AP) [Mole of H+ eq.]: A1-A3 1.01236, C2 0.00410905, C3 0.659547, D -0.230844
- Eutrophication potential - freshwater (EP-freshwater) [kg P eq.]: A1-A3 0.00091086, C2 2.98062e-6, C3 4.66593e-5, D -0.000554393
- Eutrophication potential - marine (EP-marine) [kg N eq.]: A1-A3 0.396785, C2 0.00189295, C3 0.295727, D -0.0847237
- Eutrophication potential - terrestrial (EP-terrestrial) [Mole of N eq.]: A1-A3 4.31348, C2 0.0211787, C3 3.5947, D -0.902247
- Photochemical Ozone Creation Potential (POCP) [kg NMVOC eq.]: A1-A3 1.28474, C2 0.0036913, C3 0.756477, D -0.221677
- Abiotic depletion potential - non-fossil resources (ADPE) [kg Sb eq.]: A1-A3 0.000107564, C2 1.26068e-7, C3 4.8983e-6, D -7.09308e-5
- Abiotic depletion potential - fossil resources (ADPF) [MJ]: A1-A3 21879.8, C2 19.2097, C3 391.761, D -3512.67
- Water (user) deprivation potential (WDP) [m³ world equiv.]: A1-A3 12.0342, C2 0.00563386, C3 116.199, D -2.72388

## Use advice
This data set refers to 1 m³ of acetylated wood with a density of 510 kg/m³. The chemical modification of the wood increases the durability of the wood against rot, fungal attack and insect attack. The data set can be used to estimate other wood densities of 450 - 550 kg/m³.

## Data sources
- ULLMANN'S Encyclopedia of Industrial Chemistry
- Documentation of data quality management
- GaBi Database Edition 2021, CUP2021.01
- GaBi database (all versions)
