# Brass component; Brass

Dataset: ILCD process, EPD, generic dataset
Geography: DE
Reference year: 2021
Valid until: 2022
Classification: oekobau.dat: Metalle / Kupfer / Schmiede- und Gussteile aus Kupfer und Messing
Owner: Sphera Solutions GmbH
Compliance: EN 15804+A2
Review: Dependent internal review by Sphera Solutions GmbH; Independent external review by GaBi user forum
Amounts: rows without a unit in brackets have none in this file; such an amount is in the reference unit of its flow, which a separate flow dataset defines
copyright: true
licenseType: Free of charge for all users and uses
accessRestrictions: The license conditions as stated on https://www.oekobaudat.de/ apply.
accessRestrictions: Es gelten die Lizenzbedingungen wie sie auf https://www.oekobaudat.de/ genannt sind.

## General comment
This data set has been modeled according to the European Standard EN 15804+A2 for Sustainable Building. Results are depicted in modules that allow the structured expression of results over the entire life cycle.

## Geography
The data set represents the country specific situation in Germany, focusing on the main technologies, the region specific characteristics and / or import statistics.

## Time period
Annual average

## Technology and included processes
Brasses are alloys of copper and zinc and are medium and strength engineering materials. By varying the share of copper and zinc, the properties of the brass can be changed The data set describes a copper (80%) -zinc (20%) alloy (CuZn20) melting and casting process. The melting process of copper and zinc is done in an electrical crucible furnace where the most power is used. The natural gas, which is a second energy resource, is used during the casting as process heat. The brass in Europe is produced mainly based on secondary material. The recycling system is well developed, so secondary brass is available to a large extent. Anyway, primary material of copper and zinc needs to be added (estimation: 90% secondary material, 10% primary material).
The data set includes the process of the alloy production as described above and the manufacture of die. Transportation from the factory to the site is not included and must be taken into account in modeling life cycle systems.

In the disposal phase, mechanical dismantling is accounted for in module C1 for steel products (excavator), for all other metals a manual dismantling is assumed (no loads). Collecting losses are neglected. It is assumed that all metals reach the end of the waste status immediately after dismantling. This means that the loads for processing and the credits for the substitution of primary material are shown in Module D.
The transport in module C2 to the treatment plant takes place with a truck (50km).
Module D includes loads for sorting, remelting, slag treatment, landfill, filtration of dusts and dross treatment. Credits are given for the net scrap amount (amount returned minus secondary material content, minus processing losses) for the average material mix (from different alloys).

## Technical purpose
This product can be used in construction.

## Safety margin
20 %. Product system depicted except for a few missing processes / flows. Technological, temporal and geographic representativeness partly given.

## Reference product
- Brass component: 1

## Inputs
- Use of renewable primary energy as energy carrier (PERE) [MJ]: A1-A3 6.2232, C1 0, C2 0.00218616, D 0.0575154
- Use of renewable primary energy resources used as raw materials (PERM) [MJ]: A1-A3 0, C1 0, C2 0, D 0
- Total use of renewable primary energy (PERT) [MJ]: A1-A3 6.2232, C1 0, C2 0.00218616, D 0.0575154
- Use of non renewable primary energy as energy carrier (PENRE) [MJ]: A1-A3 19.6184, C1 0, C2 0.0376677, D 0.343552
- Use of non renewable primary energy resources used as raw materials (PENRM) [MJ]: A1-A3 0, C1 0, C2 0, D 0
- Total use of non renewable primary energy resource (PENRT) [MJ]: A1-A3 19.6184, C1 0, C2 0.0376677, D 0.343552
- Use of secondary material (SM) [kg]: A1-A3 1.24467, C1 0, C2 0, D 0
- Use of renewable secondary fuels (SF) [MJ]: A1-A3 0, C1 0, C2 0, D 0
- Use of non renewable secondary fuels (NRSF) [MJ]: A1-A3 0, C1 0, C2 0, D 0
- Net use of fresh water (FW) [m3]: A1-A3 0.011102, C1 0, C2 1.94295e-6, D 0.00010442

## Outputs
- Hazardous waste disposed (HWD) [kg]: A1-A3 4.27739e-9, C1 0, C2 1.57439e-12, D 3.5635e-11
- Non harzardous waste disposed (NHWD) [kg]: A1-A3 0.352328, C1 0, C2 6.08042e-6, D 0.00107141
- Radioactive waste disposed (RWD) [kg]: A1-A3 0.00154122, C1 0, C2 3.61471e-8, D 9.05889e-7
- Components for re-use (CRU) [kg]: A1-A3 0, C1 0, C2 0, D 0
- Materials for recycling (MFR) [kg]: A1-A3 0, C1 1, C2 0, D 0
- Materials for energy recovery (MER) [kg]: A1-A3 0, C1 0, C2 0, D 0
- Exported electrical energy (EEE) [MJ]: A1-A3 0, C1 0, C2 0, D 0
- Exported thermal energy (EET) [MJ]: A1-A3 0, C1 0, C2 0, D 0

## Impact indicators
- Global Warming Potential - total (GWP-total) [kg CO2 eq.]: A1-A3 1.41539, C1 0, C2 0.00286116, D 0.0322526
- Global Warming Potential - fossil fuels (GWP-fossil) [kg CO2 eq.]: A1-A3 1.40887, C1 0, C2 0.00284173, D 0.0321863
- Global Warming Potential - biogenic (GWP-biogenic) [kg CO2 eq.]: A1-A3 0.00254329, C1 0, C2 1.17716e-6, D -1.53334e-5
- Global Warming Potential - land use and land use change (GWP-luluc) [kg CO2 eq.]: A1-A3 0.00397644, C1 0, C2 1.82504e-5, D 8.16457e-5
- Depletion potenzial of the stratospheric ozone layer (ODP) [kg CFC-11 eq.]: A1-A3 1.69261e-14, C1 0, C2 7.27125e-19, D 1.02997e-16
- Acidifcation potential, Accumulated Exceedance (AP) [Mole of H+ eq.]: A1-A3 0.0138851, C1 0, C2 8.05696e-6, D 0.000395656
- Eutrophication potential - freshwater (EP-freshwater) [kg P eq.]: A1-A3 3.05883e-6, C1 0, C2 5.84435e-9, D 8.35266e-8
- Eutrophication potential - marine (EP-marine) [kg N eq.]: A1-A3 0.00115235, C1 0, C2 3.71167e-6, D 3.02754e-5
- Eutrophication potential - terrestrial (EP-terrestrial) [Mole of N eq.]: A1-A3 0.012328, C1 0, C2 4.15269e-5, D 0.000324584
- Photochemical Ozone Creation Potential (POCP) [kg NMVOC eq.]: A1-A3 0.00364322, C1 0, C2 7.23785e-6, D 0.000106931
- Abiotic depletion potential - non-fossil resources (ADPE) [kg Sb eq.]: A1-A3 0.000543706, C1 0, C2 2.47191e-10, D 2.25072e-5
- Abiotic depletion potential - fossil resources (ADPF) [MJ]: A1-A3 19.6104, C1 0, C2 0.0376661, D 0.343254
- Water (user) deprivation potential (WDP) [m³ world equiv.]: A1-A3 0.472445, C1 0, C2 1.10468e-5, D 0.0061038

## Use advice
The data set represents a cradle to gate inventory. It can be used to characterise the supply chain situation of the respective commodity in a representative manner. Combination with individual unit processes using this commodity enables the generation of user-specific (product) LCAs.

## Data sources
- European update Study on LCA of Copper products
- Documentation of data quality management
- GaBi Database Edition 2021, CUP2021.01
- GaBi database (all versions)
