# Automatic folding door FFT FLEX Green

Dataset: ILCD process, EPD, representative dataset
Geography: DE
Reference year: 2016
Valid until: 2022
Classification: OEKOBAU.DAT: Komponenten von Fenstern und Vorhangfassaden / Antriebssysteme / elektrisch
Classification: IBUCategories: 02 Bauprodukte / Türen, Fenster, Beschläge und Zubehör / Automatiktüren und -tore, sowie Karusselltüranlagen
Method details: Automatiktüren und -tore, sowie Karusselltüranlagen.pdf
Generated by: brands and values GmbH
Registration number: EPD-DOR-20160041-IBA1-DE
Owner: DORMA Deutschland GmbH
Compliance: DIN EN 15804; ISO 14025
Review: Accredited third party review by Institut Bauen und Umwelt e. V.
Amounts: rows without a unit in brackets have none in this file; such an amount is in the reference unit of its flow, which a separate flow dataset defines
copyright: true
licenseType: Free of charge for all users and uses
accessRestrictions: None

## General comment
The FFT FLEX Green is an automatic folding door with thermally separated, particularly slim profiles and a silent, dynamic drive system. It is particularly suitable where space is restricted yet as wide an opening as possible is to be achieved. This also achieves a maximum escape route width (2D variant). It permits opening widths of up to 2.4 metres and heights of up to 2.5 metres.

The dual-drive technology also offers a safe operational solution for emergency exits and escape routes according to /DIN 18650/ and /EN 16005/ (2D variant).

Other features include:
Currentless opening thanks to integrated battery pack module
Escape routes ensured by single-fault secure control technology
Function safeguarded by self-monitoring sensors

The FFT FLEX Green folding door avails of highly-efficient thermal separation with very good thermal transmittance values (UD values) ranging from 1.7 to max. 2.4 (thermal coefficient) which can be calculated individually for each door system. In combination with ISO glass, the FFT FLEX Green ensures good thermal insulation of external doors.

A new drive system, whose force is transferred without toothed belts, improves smooth running and increases dynamism. Reserves are also achieved against wind loads as these are detected and compensated for by the FFT FLEX Green. In the opening and closing direction, the operating parameters are altered dynamically as required in order to adapt operation to the respective weather conditions.

## Technology and included processes
The FFT FLEX Green is an automatic folding door with thermally separated, particularly slim profiles and a silent, dynamic drive system. It is particularly suitable where space is restricted yet as wide an opening as possible is to be achieved. This also achieves a maximum escape route width (2D variant). It permits opening widths of up to 2.4 metres and heights of up to 2.5 metres. The dual-drive technology also offers a safe operational solution for emergency exits and escape routes according to /DIN 18650/ and /EN 16005/ (2D variant). Other features include:  Currentless opening thanks to integrated battery pack module  Escape routes ensured by single-fault secure control technology  Function safeguarded by self-monitoring sensors The FFT FLEX Green folding door avails of highlyefficient thermal separation with very good thermal transmittance values (UD values) ranging from 1.7 to max. 2.4 (thermal coefficient) which can be calculated individually for each door system. In combination with ISO glass, the FFT FLEX Green ensures good thermal insulation of external doors. A new drive system, whose force is transferred without toothed belts, improves smooth running and increases dynamism. Reserves are also achieved against wind loads as these are detected and compensated for by 3 Environmental Product Declaration DORMA Deutschland GmbH – Automatic folding door FFT FLEX Green the FFT FLEX Green. In the opening and closing direction, the operating parameters are altered dynamically as required in order to adapt operation to the respective weather conditions. The FFT FLEX Green folding door leaves, lockcolumns and floor rails are manufactured in the DORMA plant in Zusmarshausen. Electronic components are also manufactured within the DORMA Group. The ES 200 FFT (2D) drive unit and printed circuit boards are manufactured in the Ennepetal plant. The certified Quality Management system to /DIN EN ISO 9001/ safeguards the high quality standard of DORMA products at all locations.
Declared unit:
The declared unit is one (1) m² (37.3 kg) of the automatic FFT FLEX Green folding door system comprising:

- the ES 200 FFT 2D drive unit

- two pairs of folding panels

- two lock columns

- a floor rail and

- the respective packaging materials.

## Technical purpose
The FFT FLEX Green folding door is used when as wide an opening width as possible is to be achieved despite low wall opening dimensions. It is suitable for both external and internal doors in narrow passageways, barrier-free access points in public buildings as well as escape routes and emergency exits.

While opening, the door panel is simultaneously folded and automatically moved to the side.

Bi-parting opening

Both pairs of door panels are synchronously swivelled to the side and in opposing directions while opening, thereby permitting a maximum opening width of 2.4 metres. Unilateral opening

For smaller applications: the FFT FLEX Green folding door comprising a single pair of panels permits a maximum opening width of 1.2 metres.

## Reference product
- Automatische Faltflügeltür FFT FLEX Green: 1

## Inputs
- Renewable primary energy as energy carrier (PERE) [MJ]: A1-A3 2570, A4 2.61, A5 0.357, B6 4150, C2 1.14, C3 27.3, D -2380
- Renewable primary energy resources as material utilization (PERM) [MJ]: A1-A3 144, A4 2.46e-12, A5 1.15e-11, B6 1.16e-7, C2 1.08e-12, C3 0.0261, D -0.0147
- Total use of renewable primary energy resources (PERT) [MJ]: A1-A3 2710, A4 2.61, A5 0.357, B6 4150, C2 1.14, C3 27.3, D -2380
- Non renewable primary energy as energy carrier (PENRE) [MJ]: A1-A3 14000, A4 46.7, A5 3.72, B6 19700, C2 20.5, C3 516, D -7390
- Non renewable primary energy as material utilization (PENRM) [MJ]: A1-A3 221, A4 0, A5 0, B6 0, C2 0, C3 0.00732, D -3.85e-6
- Total use of non renewable primary energy resources (PENRT) [MJ]: A1-A3 14200, A4 46.7, A5 3.72, B6 19700, C2 20.5, C3 516, D -7390
- Use of secondary material (SM) [kg]: A1-A3 77.7, A4 0, A5 0, B6 0, C2 0, C3 0, D 0
- Use of renewable secondary fuels (RSF) [MJ]: A1-A3 0, A4 0.00031, A5 0.000102, B6 0.26, C2 0.000136, C3 0.00702, D 0.302
- Use of non renewable secondary fuels (NRSF) [MJ]: A1-A3 0, A4 0.00324, A5 0.00056, B6 2.72, C2 0.00142, C3 0.0574, D 3.4
- Use of net fresh water (FW) [m^3]: A1-A3 5620, A4 0.209, A5 0.341, B6 3740, C2 0.0917, C3 29, D -6010

## Outputs
- Hazardous waste disposed (HWD) [kg]: A1-A3 0.087, A4 0, A5 0, B6 0, C2 0, C3 0.0528, D -0.00225
- Non hazardous waste disposed (NHWD) [kg]: A1-A3 2480, A4 0.176, A5 0.635, B6 4580, C2 0.0771, C3 86.3, D -1130
- Radioactive waste disposed (RWD) [kg]: A1-A3 0.719, A4 6.38e-5, A5 0.000232, B6 2.95, C2 2.8e-5, C3 0.0183, D -0.365
- Components for re-use (CRU) [kg]: A1-A3 0, A4 0, A5 0, B6 0, C2 0, C3 0, D 0
- Materials for recycling (MFR) [kg]: A1-A3 0.775, A4 0, A5 0, B6 0, C2 0, C3 39.1, D 0
- Materials for energy recovery (MER) [kg]: A1-A3 0.0145, A4 0, A5 2.03, B6 0, C2 0, C3 3.64, D 0
- Exported electrical energy (EEE) [MJ]: A1-A3 0.47, A4 0, A5 20.2, B6 0, C2 0, C3 39.2, D 0
- Exported thermal energy (EET) [MJ]: A1-A3 1.52, A4 0, A5 47.1, B6 0, C2 0, C3 99.4, D 0

## Impact indicators
- Global warming potential (GWP) [kg CO_(2)-Äq.]: A1-A3 954, A4 3.39, A5 14.8, B6 1110, C2 1.49, C3 68.5, D -584
- Depletion potential of the stratospheric ozone layer (ODP) [kg CFC11-Äq.]: A1-A3 1.09e-5, A4 1.39e-11, A5 6.01e-11, B6 8.23e-7, C2 6.09e-12, C3 4.02e-7, D -1.33e-5
- Acidification potential of land and water (AP) [kg SO_(2)-Äq.]: A1-A3 4.85, A4 0.0218, A5 0.00232, B6 5.57, C2 0.00948, C3 0.0959, D -3.08
- Eutrophication potential (EP) [kg PO_(4)^(3)-Äq.]: A1-A3 1.21, A4 0.00559, A5 0.000414, B6 0.303, C2 0.00243, C3 0.00772, D -0.194
- Formation potential of tropospheric ozone photochemical oxidants (POCP) [kg Ethen-Äq.]: A1-A3 0.232, A4 -0.00903, A5 0.000184, B6 0.325, C2 -0.00389, C3 0.00661, D -0.2
- Abiotic depletion potential for non fossil resources (ADPE) [kg Sb-Äq.]: A1-A3 0.0782, A4 1.32e-7, A5 1.77e-7, B6 0.000175, C2 5.79e-8, C3 6.71e-5, D -0.0114
- Abiotic depletion potential for fossil resources (ADPF) [MJ]: A1-A3 11500, A4 46.5, A5 3.13, B6 12300, C2 20.4, C3 470, D -6500

## Use advice
Scope:
This EPD refers to the entire life cycle of a DORMA FFT FLEX Green folding door system. The various technical characteristics are depicted in section 2.3. The product is manufactured at the DORMA production facility in Zusmarshausen, Germany. Product components are also procured from the DORMA location in Ennepetal. The material and energy flows were taken into consideration accordingly.
System boundary:
Type of EPD: cradle to gate, with options.

Modules A1-3, A4 and A5

The product stage commences with considering production of the requisite raw materials and energies including all of the corresponding upstream chains and the actual procurement transport. Furthermore, the entire manufacturing phase was depicted, including processing of production waste as far as End-of-Waste status (EoW). Transport associated with distribution as well as installation in the building were also taken into consideration.

Module B6

The module includes the energy required for operating the ES 200 FFT 2D drive unit across its entire service life of 10 years.

Modules C2-3

The modules include the environmental impacts associated with processing the waste fractions as far as End-of-Waste status (EoW), including transport at the end of the product life cycle.

Module D

Evidence of credits incurred by waste treatment as a result of energetic (MVA route) or material recycling (recycling route) of packaging (A5), spare parts (B3) and the product at the End of Life (C3).

## Data sources
- GaBi Database (all versions)
- GaBi database SP20 2013
