# door - Hodapp GmbH und Co. KG - safety door

Dataset: ILCD process, EPD, specific dataset
Geography: DE
Reference year: 2021
Valid until: 2027
Classification: OEKOBAU.DAT: Komponenten von Fenstern und Vorhangfassaden / Türen und Tore / Stahl
Synonyms: Multipurpose door; security door, soundproofing with panel (≤40dB); soundproofing with panel (>40dB); burglary protection RC-2 with panel; burglary protection RC-3 with panel; burglary protection RC-4/ bullet resistance FB-4 with panelung FB-4 mit Füllung
Method details: Produktkategorieregeln Teil B – für Türen und Tore; Produktkategorieregeln Teil A; EPD Mehrzwecktürsystem HoSta
Generated by: ift Rosenheim
Registration number: EPD-HMZ-55.0
Owner: Hodapp GmbH und Co. KG
Compliance: EN 15804+A2
Review: Independent external review by Patrick Wortner
Amounts: rows without a unit in brackets have none in this file; such an amount is in the reference unit of its flow, which a separate flow dataset defines
copyright: true
licenseType: Free of charge for all users and uses
accessRestrictions: none

## General comment
A1-A3 as well as modules A4, A5, B2, B3, B4, B5, B6, B7, C1, C2, C3, C4, D. The environmental profile includes the expenses for the life cycle stages cradle to grave. The production of packaging was considered within modules A1-A3.

## Geography
This dataset represents the situation of the company Hodapp GmbH &Co. KG in D-77855 Achern, with regard to the most important technologies and the legal framework.

## Time period
anual average

## Technology and included processes
The LCA results cover the life cycle stages of the manufacture of intermediate products up to raw material extraction and processing operations of secondary materials serving as input (e.g. recycling processes), their transports to the plant as well as the production itself, including the provision of all auxiliary and operating materials, energy, and the complete waste treatment or landfilling of residual waste during the stage of production. Modules A1, A2, and A3 are shown here as one aggregated module A1-A3. If further modules were calculated for this data set, they can be found separately and can be combined for a consideration of the entire life cycle.

## Technical purpose
Safety door with optional performance features.

## Reference product
- Tür - Hodapp GmbH und Co. KG - Sicherheitstür: 1

## Inputs
- Use of net fresh water (FW) [m3]: A1-A3 1.25, A4 0.00185, A5 0.0279, B2 0.13, B3 1.08, B4 0, B5 0, B6 0, B7 0, C1 0, C2 0.000126, C3 0.0348, C4 0.00227, D -0.13
- Nicht-erneuerbare Primärenergie als Energieträger (PENRE) [MJ]: A1-A3 4249.45, A4 28.8, A5 9.06, B2 13, B3 2990, B4 0, B5 0, B6 0, B7 0, C1 0, C2 1.97, C3 55.7, C4 8.97, D -823
- Nicht-erneuerbare Primärenergie zur stofflichen Nutzung (PENRM) [MJ]: A1-A3 23.88, A4 0, A5 -1.86, B2 0, B3 0, B4 0, B5 0, B6 0, B7 0, C1 0, C2 0, C3 -20.92, C4 -1.1, D 0
- Use of non renewable secondary fuels (NRSF) [MJ]: A1-A3 6.82e-19, A4 0, A5 0, B2 0, B3 6.82e-19, B4 0, B5 0, B6 0, B7 0, C1 0, C2 0, C3 0, C4 0, D 0
- Erneuerbare Primärenergie als Energieträger (PERE) [MJ]: A1-A3 1112.29, A4 1.63, A5 4.39, B2 0.21, B3 653, B4 0, B5 0, B6 0, B7 0, C1 0, C2 0.11, C3 30.7, C4 1.35, D -136
- Erneuerbare Primärenergie zur stofflichen Nutzung (PERM) [MJ]: A1-A3 87.36, A4 0, A5 -87.36, B2 0, B3 0, B4 0, B5 0, B6 0, B7 0, C1 0, C2 0, C3 0, C4 0, D 0
- Use of renewable secondary fuels (RSF) [MJ]: A1-A3 5.8e-20, A4 0, A5 0, B2 0, B3 5.8e-20, B4 0, B5 0, B6 0, B7 0, C1 0, C2 0, C3 0, C4 0, D 0
- Input of secondary material (SM) [kg]: A1-A3 2.51, A4 0, A5 0, B2 0, B3 2.51, B4 0, B5 0, B6 0, B7 0, C1 0, C2 0, C3 0, C4 0, D 0
- Total use of non-renewable primary energy resources (PENRT) [MJ]: A1-A3 4249.45, A4 28.8, A5 9.06, B2 13, B3 2990, B4 0, B5 0, B6 0, B7 0, C1 0, C2 1.97, C3 55.7, C4 8.97, D -823
- Total use of renewable primary energy resources (PERT) [MJ]: A1-A3 1112.29, A4 1.63, A5 4.39, B2 0.21, B3 653, B4 0, B5 0, B6 0, B7 0, C1 0, C2 0.11, C3 30.7, C4 1.35, D -136

## Outputs
- Components for re-use (CRU) [kg]: A1-A3 0, A4 0, A5 0, B2 0, B3 0, B4 0, B5 0, B6 0, B7 0, C1 0, C2 0, C3 0, C4 0, D 0
- Exported electrical energy (EEE) [MJ]: A1-A3 2.67, A4 0, A5 12.3, B2 0, B3 1.48, B4 0, B5 0, B6 0, B7 0, C1 0, C2 0, C3 3.93, C4 0, D 0
- Exported thermal energy (EET) [MJ]: A1-A3 6.22, A4 0, A5 28.8, B2 0, B3 3.39, B4 0, B5 0, B6 0, B7 0, C1 0, C2 0, C3 9.02, C4 0, D 0
- Hazardous waste disposed (HWD) [kg]: A1-A3 3.37e-6, A4 1.38e-10, A5 8.32e-10, B2 1.87e-10, B3 2.92e-6, B4 0, B5 0, B6 0, B7 0, C1 0, C2 9.45e-12, C3 4.83e-9, C4 4.61e-10, D -1.01e-7
- Material for Energy Recovery (MER) [kg]: A1-A3 0, A4 0, A5 0, B2 0, B3 0, B4 0, B5 0, B6 0, B7 0, C1 0, C2 0, C3 0, C4 0, D 0
- Materials for Recycling (MFR) [kg]: A1-A3 25.11, A4 0, A5 0, B2 0, B3 62, B4 0, B5 0, B6 0, B7 0, C1 0, C2 0, C3 51.3, C4 0, D 0
- Non-hazardous waste disposed (NHWD) [kg]: A1-A3 70.01, A4 0.00413, A5 0.1, B2 0.04, B3 66.1, B4 0, B5 0, B6 0, B7 0, C1 0, C2 0.000283, C3 0.0913, C4 45.9, D -4.63
- Radioactive waste disposed (RWD) [kg]: A1-A3 0.32, A4 3.55e-5, A5 0.00114, B2 5.77e-5, B3 0.28, B4 0, B5 0, B6 0, B7 0, C1 0, C2 2.43e-6, C3 0.00882, C4 9.99e-5, D -0.02

## Impact indicators
- Abiotic depletion potential - non-fossil resources (ADPE) [kg Sb-Äqv.]: A1-A3 0.000112, A4 1.8e-7, A5 1.36e-7, B2 4.3e-8, B3 8.61e-5, B4 0, B5 0, B6 0, B7 0, C1 0, C2 1.23e-8, C3 8.36e-7, C4 7.01e-8, D -7.47e-6
- Abiotic depletion potential - fossil resources (ADPF) [MJ]: A1-A3 4241.44, A4 28.7, A5 9.05, B2 13, B3 2990, B4 0, B5 0, B6 0, B7 0, C1 0, C2 1.97, C3 55.7, C4 8.96, D -822
- Acidification potential, Accumulated Exceedance (AP) [mol H+ eqv.]: A1-A3 1.44, A4 0.00275, A5 0.0027, B2 0.000877, B3 1.21, B4 0, B5 0, B6 0, B7 0, C1 0, C2 0.000171, C3 0.00735, C4 0.00485, D -0.29
- Eutrophication potential - freshwater (EP-freshwater) [kg P eqv.]: A1-A3 0.000714, A4 6.42e-6, A5 1.41e-6, B2 2.18e-6, B3 0.00051, B4 0, B5 0, B6 0, B7 0, C1 0, C2 4.4e-7, C3 8.95e-6, C4 1.16e-6, D -6.63e-5
- Eutrophication potential - marine (EP-marine) [kg N eqv.]: A1-A3 0.28, A4 0.00101, A5 0.000717, B2 0.000142, B3 0.22, B4 0, B5 0, B6 0, B7 0, C1 0, C2 6e-5, C3 0.00171, C4 0.00124, D -0.08
- Eutrophication potential - terrestrial (EP-terrestrial) [mol N eqv.]: A1-A3 3.2, A4 0.0117, A5 0.0109, B2 0.00153, B3 2.55, B4 0, B5 0, B6 0, B7 0, C1 0, C2 0.000704, C3 0.019, C4 0.0136, D -0.89
- Global Warming Potential - total (GWP-total) [kg CO2-Äqv.]: A1-A3 265.76, A4 2.17, A5 10.4, B2 0.29, B3 171, B4 0, B5 0, B6 0, B7 0, C1 0, C2 0.15, C3 5.41, C4 0.67, D -63.7
- Global Warming Potential - fossil fuels (GWP-fossil) [kg CO2-Äqv.]: A1-A3 271.47, A4 2.16, A5 0.77, B2 0.28, B3 169, B4 0, B5 0, B6 0, B7 0, C1 0, C2 0.15, C3 5.38, C4 0.68, D -63.4
- Global Warming Potential - biogenic (GWP-biogenic) [kg CO2-Äqv.]: A1-A3 -5.69, A4 -0.00297, A5 9.62, B2 0.00264, B3 1.04, B4 0, B5 0, B6 0, B7 0, C1 0, C2 -0.000203, C3 0.0275, C4 -0.0203, D -0.2
- Global Warming Potential - land use and land use change (GWP-luluc) [kg CO2-Äqv.]: A1-A3 0.2, A4 0.012, A5 0.000113, B2 1.74e-5, B3 0.16, B4 0, B5 0, B6 0, B7 0, C1 0, C2 0.000821, C3 0.000654, C4 0.00126, D -0.01
- Depletion potential of the stratospheric ozone layer (ODP) [kg CFC 11-Äquiv.]: A1-A3 1.2e-7, A4 1.29e-13, A5 6.84e-12, B2 3e-13, B3 1.19e-7, B4 0, B5 0, B6 0, B7 0, C1 0, C2 8.82e-15, C3 4.48e-11, C4 1.61e-12, D -2.51e-10
- Photochemical Ozone Creation Potential (POCP) [kg NMVOC eqv.]: A1-A3 0.93, A4 0.00244, A5 0.00189, B2 0.00067, B3 0.62, B4 0, B5 0, B6 0, B7 0, C1 0, C2 0.00015, C3 0.0046, C4 0.00377, D -0.18
- Water (user) deprivation potential (WDP) [m3 world eqv.]: A1-A3 29.21, A4 0.0192, A5 1.12, B2 5.38, B3 28.9, B4 0, B5 0, B6 0, B7 0, C1 0, C2 0.00132, C3 0.93, C4 0.0748, D -2.02
- Potential incidence of disease due to PM emissions (PM) [disease incidence]: A1-A3 1.46e-5, A4 1.58e-8, A5 1.69e-8, B2 5.45e-9, B3 1.08e-5, B4 0, B5 0, B6 0, B7 0, C1 0, C2 1.03e-9, C3 5.9e-8, C4 5.97e-8, D -2.06e-6
- Potential Human exposure efficiency relative to U235 (IRP) [kBq U235 eqv.]: A1-A3 49.14, A4 0.0052, A5 0.19, B2 0.01, B3 45.2, B4 0, B5 0, B6 0, B7 0, C1 0, C2 0.000356, C3 1.49, C4 0.0111, D -3.22
- Potential Comparative Toxic Unit for ecosystems (ETP-fw) [CTUe]: A1-A3 4119.43, A4 20, A5 3.89, B2 8.85, B3 3790, B4 0, B5 0, B6 0, B7 0, C1 0, C2 1.37, C3 24.4, C4 5.02, D -674
- Potential Comparative Toxic Unit for humans - cancer effects (HTP-c) [CTUh]: A1-A3 1.85e-7, A4 4.02e-10, A5 1.51e-10, B2 1.75e-10, B3 9.12e-8, B4 0, B5 0, B6 0, B7 0, C1 0, C2 2.75e-11, C3 7.17e-10, C4 7.66e-10, D -2.77e-8
- Potential Comparative Toxic Unit for humans - non-cancer effects (HTP-nc) [CTUh]: A1-A3 5.03e-6, A4 2.12e-8, A5 5.71e-9, B2 7.88e-9, B3 2.5e-6, B4 0, B5 0, B6 0, B7 0, C1 0, C2 1.44e-9, C3 2.69e-8, C4 8.49e-8, D -8.09e-7
- Potential Soil quality index (SQP) [dimensionless]: A1-A3 2160.09, A4 9.89, A5 3.15, B2 0.14, B3 597, B4 0, B5 0, B6 0, B7 0, C1 0, C2 0.68, C3 20, C4 1.86, D -97.5

## Use advice
This data set contains the results for modules A1-A3 as well as modules A4, A5, B2, B3, B4, B5, B6, B7, C1, C2, C3, C4, D according to EN 15804. A comparison with other products is only permitted with a comparable application in the building. In principle, a comparison or the evaluation of EPD data is only possible if all data sets to be compared were created according to EN 15804 and the building context, or the product-specific performance characteristics are taken into account.

## Review details
The applied LCI method is in accordance with ISO 14040 and 14044. The documentation contains all relevant information with regard to the data quality and the scope of application of the respective LCI results or data sets. The data set represents the state of the art related to the functional unit.

## Data sources
- GaBi database (general)
