# Facades - Schindler Fenster+Fassaden GmbH - HMEF 2020 with wood-aluminum insert window

Dataset: ILCD process, EPD, specific dataset
Geography: DE
Reference year: 2020
Valid until: 2026
Classification: OEKOBAU.DAT: Komponenten von Fenstern und Vorhangfassaden / Fassaden / Vorhangfassade - Element-Fassaden
Synonyms: Wood/aluminium-Facade; HMEF wood/aluminium unitised facade construction; facade system HMEF 2020
Method details: Produktkategorieregeln Teil A; Produktkategorieregeln Teil B – für Fassaden und Dächer aus Glas und Kunststoff
Generated by: ift Rosenheim
Registration number: EPD-SFA-GB-49.0
Owner: Schindler Fenster+Fassaden GmbH
Compliance: EN 15804
Review: Independent external review by Patrick Wortner
Amounts: rows without a unit in brackets have none in this file; such an amount is in the reference unit of its flow, which a separate flow dataset defines
copyright: true
licenseType: Free of charge for all users and uses

## General comment
Wood/aluminium unitised facade constructions with face width 90mm.

This data set includes the results for modules A1-A3 as well as modules B2, B3, B4, B5, B6, B7, C1, C2, C3, C4, and D according to EN 15804. The environmental profile includes the expenditures for the life cycle stages cradle to gate with options. The production of the packaging was considered within modules A1-A3.

## Geography
This data set represents the situation of Schindler Fenster + Fassaden GmbH , with regard to the most important technologies and the legal framework.

## Time period
annual average

## Technology and included processes
The life cycle assessment results cover the life cycle stages of manufacturing the intermediate products up to raw material extraction and processing operations of secondary materials serving as input (e.g. recycling processes), their transports to the plant as well as the production itself, including the provision of all auxiliary and operating materials, energy, and the complete waste treatment or landfilling of the residual waste during the stage of production. Modules A1, A2, and A3 are shown here as one aggregated module A1-A3. If further modules were calculated for this data set, they can be found separately and can be combined for a consideration of the entire life cycle.

## Technical purpose
unitised facade construction for use as an outer building envelope in commercial construction.

## Reference product
- Fassaden - Schindler Fenster+Fassaden GmbH - HMEF 2020 mit Holz-Aluminium-Einsatzfenster: 1

## Inputs
- Use of net fresh water (FW) [m3]: A1-A3 0.55, A4 0.00136, A5 0.0038, B2 0.57, B3 0.31, B4 0, B5 0, B6 0, B7 0, C1 0, C2 6.49e-5, C3 2.13, C4 0.00156, D -0.23
- Nicht-erneuerbare Primärenergie als Energieträger (PENRE) [MJ]: A1-A3 2230.9, A4 20.8, A5 12.29, B2 2990, B3 1310, B4 0, B5 0, B6 0, B7 0, C1 0, C2 1.02, C3 545.16, C4 8.19, D -1370
- Nicht-erneuerbare Primärenergie zur stofflichen Nutzung (PENRM) [MJ]: A1-A3 39.1, A4 0, A5 -2.09, B2 0, B3 0, B4 0, B5 0, B6 0, B7 0, C1 0, C2 0, C3 -35.16, C4 -1.85, D 0
- Use of non renewable secondary fuels (NRSF) [MJ]: A1-A3 0.00697, A4 0, A5 0, B2 0, B3 4.09e-11, B4 0, B5 0, B6 0, B7 0, C1 0, C2 0, C3 0, C4 0, D -3.19e-11
- Erneuerbare Primärenergie als Energieträger (PERE) [MJ]: A1-A3 1011.72, A4 1.19, A5 6.64, B2 42.6, B3 196, B4 0, B5 0, B6 0, B7 0, C1 0, C2 0.0567, C3 227.14, C4 79.99, D -587
- Erneuerbare Primärenergie zur stofflichen Nutzung (PERM) [MJ]: A1-A3 158.28, A4 0, A5 0, B2 0, B3 0, B4 0, B5 0, B6 0, B7 0, C1 0, C2 0, C3 -79.14, C4 -79.14, D 0
- Use of renewable secondary fuels (RSF) [MJ]: A1-A3 3.48e-12, A4 0, A5 0, B2 0, B3 3.48e-12, B4 0, B5 0, B6 0, B7 0, C1 0, C2 0, C3 0, C4 0, D -2.72e-12
- Input of secondary material (SM) [kg]: A1-A3 2.91, A4 0, A5 0, B2 0, B3 1.94, B4 0, B5 0, B6 0, B7 0, C1 0, C2 0, C3 0, C4 0, D -1.51
- Total use of non-renewable primary energy resources (PENRT) [MJ]: A1-A3 2270, A4 20.8, A5 10.2, B2 2990, B3 1310, B4 0, B5 0, B6 0, B7 0, C1 0, C2 1.02, C3 510, C4 6.34, D -1370
- Total use of renewable primary energy resources (PERT) [MJ]: A1-A3 1170, A4 1.19, A5 6.64, B2 42.6, B3 196, B4 0, B5 0, B6 0, B7 0, C1 0, C2 0.0567, C3 148, C4 0.85, D -587

## Outputs
- Components for re-use (CRU) [kg]: A1-A3 0, A4 0, A5 0, B2 0, B3 0, B4 0, B5 0, B6 0, B7 0, C1 0, C2 0, C3 0, C4 0, D 0
- Exported electrical energy (EEE) [MJ]: A1-A3 7.79, A4 0, A5 0.57, B2 0, B3 20.1, B4 0, B5 0, B6 0, B7 0, C1 0, C2 0, C3 20.8, C4 0, D 0
- Exported thermal energy (EET) [MJ]: A1-A3 17.5, A4 0, A5 1.32, B2 0, B3 45.2, B4 0, B5 0, B6 0, B7 0, C1 0, C2 0, C3 46.7, C4 0, D 0
- Hazardous waste disposed (HWD) [kg]: A1-A3 0.00697, A4 1.09e-9, A5 3.71e-9, B2 4.1e-7, B3 0.00697, B4 0, B5 0, B6 0, B7 0, C1 0, C2 5.13e-11, C3 1.12e-7, C4 6.73e-10, D -0.00544
- Material for Energy Recovery (MER) [kg]: A1-A3 0, A4 0, A5 0, B2 0, B3 0, B4 0, B5 0, B6 0, B7 0, C1 0, C2 0, C3 0, C4 0, D 0
- Materials for Recycling (MFR) [kg]: A1-A3 5.3, A4 0, A5 0, B2 0, B3 48.4, B4 0, B5 0, B6 0, B7 0, C1 0, C2 0, C3 21.1, C4 0, D 0
- Non-hazardous waste disposed (NHWD) [kg]: A1-A3 61, A4 0.00326, A5 0.00919, B2 0.9, B3 50.3, B4 0, B5 0, B6 0, B7 0, C1 0, C2 0.000151, C3 103, C4 31.6, D -39.4
- Radioactive waste disposed (RWD) [kg]: A1-A3 0.0334, A4 3.77e-5, A5 0.000815, B2 0.00669, B3 0.0257, B4 0, B5 0, B6 0, B7 0, C1 0, C2 1.23e-6, C3 0.0176, C4 6.65e-5, D -0.025

## Impact indicators
- Abiotic depletion potential for non fossil resources (ADPE) [kg Sb-Äqv.]: A1-A3 0.00284, A4 1.52e-7, A5 3.58e-7, B2 2.13e-5, B3 0.00192, B4 0, B5 0, B6 0, B7 0, C1 0, C2 6.5e-9, C3 0.000147, C4 1.67e-7, D -0.002
- Abiotic depletion potential for fossil resources (ADPF) [MJ]: A1-A3 1820, A4 20.7, A5 8.15, B2 2980, B3 1250, B4 0, B5 0, B6 0, B7 0, C1 0, C2 1.01, C3 465, C4 6.17, D -1160
- Acidification potential of soil and water (AP) [kg SO2-Äqv.]: A1-A3 0.88, A4 0.00145, A5 0.00107, B2 0.0955, B3 0.66, B4 0, B5 0, B6 0, B7 0, C1 0, C2 6.42e-5, C3 0.0945, C4 0.00273, D -0.61
- Eutrophication potential (EP) [kg Phosphat-Äqv.]: A1-A3 0.0754, A4 0.000332, A5 0.000199, B2 0.0159, B3 0.0548, B4 0, B5 0, B6 0, B7 0, C1 0, C2 1.48e-5, C3 0.023, C4 0.00031, D -0.0483
- Global warming potential (GWP) [kg CO2-Äqv.]: A1-A3 114, A4 1.53, A5 1.12, B2 97.7, B3 71.4, B4 0, B5 0, B6 0, B7 0, C1 0, C2 0.0747, C3 86.7, C4 0.45, D -77
- Depletion potential of the stratospheric ozone layer (ODP) [kg R11 eq.]: A1-A3 2.28e-6, A4 4.09e-16, A5 3.66e-14, B2 2.09e-13, B3 2.8e-8, B4 0, B5 0, B6 0, B7 0, C1 0, C2 1.3e-17, C3 7.86e-13, C4 2.47e-15, D -1.55e-6
- Formation potential of tropospheric ozone (POCP) [kg Ethen-Äqv.]: A1-A3 0.0488, A4 -0.00014, A5 7.57e-5, B2 0.0261, B3 0.0376, B4 0, B5 0, B6 0, B7 0, C1 0, C2 -6.12e-6, C3 0.00889, C4 0.000208, D -0.0335

## Use advice
This dataset is modelled according to the European Standard EN 15804 for Sustainable Construction. Results are declared in modules, which allow the structured expression of results throughout the life cycle. It contains the modules A1-A3, A4, A5, B2, B3, B4, B5, B6, B7, C1, C2, C3, C4, D.
The comparison with other products is only permissible if the application in the building is comparable. A comparison or the evaluation of EPD data is only possible, if the datasets have been created according to EN 15804. The building context or the product-specific performance characteristics must be considered.

## Review details
The LCI method applied is in compliance with ISO 14040 and 14044. The documentation includes all relevant information in view of the data quality and scope of the application of the respective LCI result / data set. The dataset represents the state-of-the-art in view of the referenced functional unit.

## Data sources
- GaBi database (general)
