# TECU Bronze

Dataset: ILCD process, EPD, specific dataset
Geography: DE
Reference year: 2019
Valid until: 2024
Classification: OEKOBAU.DAT: Metalle / Kupfer / Kupferbleche
Classification: IBUCategories: 02 Bauprodukte / Metallbauprodukte und Zubehör / Baumetalle
Method details: Baumetalle.pdf
Generated by: SUSTAINUM Institut für zukunftsfähiges Wirtschaften Berlin eG
Registration number: EPD-KME-20190039-IBA1-DE
Owner: KME Germany GmbH & Co. KG
Compliance: DIN EN 15804; ISO 14025
Review: Accredited third party review by Institut Bauen und Umwelt e. V.
Amounts: rows without a unit in brackets have none in this file; such an amount is in the reference unit of its flow, which a separate flow dataset defines
copyright: true
licenseType: Free of charge for all users and uses
accessRestrictions: None

## General comment
The copper alloy TECU® Bronze consists of CU-DHP and Tin. It is produced according to /DIN EN 1172/ and with the material designation CW450K.

The initial shiny warm reddish-brown surface develops completely through weathering over various brown-red and brown-gray tones towards a dark brown-anthracite appearance. The characterstic green patina formation, on inclined surfaces, takes place considerably slower than with conventional non-alloyed copper.

## Technology and included processes
TECU® Bronze manufacturing process consists of 7 steps: Pouring TECU® Bronze is cast to strips on special alloying lines. Milling Due to the thermal oxidation and high temperatures during warming up and hot-rolling, a scale layer develops on the surface of the copper, which is re-moved by milling before further steps. In this process, few tenths of millimetres are removed from each side. Cold pre-rolling On a reverse quartet (four-high rolling mill stand), the TECU® Bronze strips are rolled down with more passes, during which they solidify by forming. Intermediate annealing For further processing, a heat treatment is carried out by intermediate annealing, which causes a targeted softening of the copper alloy. This process is carried out in a protected atmosphere to prevent a renewed thermal oxidation of the surface. Finish rolling The final thickness of the material, for TECU® Bronze alloys is achieved in the stability or condition rolling process. Stretch straightening On a stretch straightening unit, the tolerances with regard to straightness and flatness is further reduced. Packaging By guillotine shearing, the large coils are splitted into small coils and sheets. Then the TECU® Bronze products are packed.
Technical data:
The following technical data and standards apply for copper alloys TECU® Bronze:
/DIN EN ISO 6507-1:2005/, /DIN EN ISO 6507-2:2005/, /DIN EN ISO 6892-1:2009/, /ISO 1811-2:1988-10/, /ISO 4739-1985-05/.
Declared unit:
The declaration applies to copper alloys. The declared unit is 1 kg copper sheet alloyed (TECU® Bronze).

## Technical purpose
TECU® Bronze copper sheets and strips are used for roofing, wall cladding and roof drainage systems (roof gutters, pipes and equipment).

## Reference product
- TECU Bronze Kupferlegierung (): 1

## Inputs
- Renewable primary energy as energy carrier (PERE) [MJ]: A1-A3 4.2243, C2 0.00666, C3 0, D 0.0681
- Renewable primary energy resources as material utilization (PERM) [MJ]: A1-A3 0, C2 0, C3 0, D 0
- Total use of renewable primary energy resources (PERT) [MJ]: A1-A3 4.2243, C2 0.00666, C3 0, D 0.0681
- Non renewable primary energy as energy carrier (PENRE) [MJ]: A1-A3 11.467, C2 0.0988, C3 0, D 0.411
- Non renewable primary energy as material utilization (PENRM) [MJ]: A1-A3 0, C2 0, C3 0, D 0
- Total use of non renewable primary energy resources (PENRT) [MJ]: A1-A3 11.467, C2 0.0988, C3 0, D 0.411
- Use of secondary material (SM) [kg]: A1-A3 1.091, C2 0, C3 0, D 0
- Use of renewable secondary fuels (RSF) [MJ]: A1-A3 0, C2 0, C3 0, D 0
- Use of non renewable secondary fuels (NRSF) [MJ]: A1-A3 0, C2 0, C3 0, D 0
- Use of net fresh water (FW) [m^3]: A1-A3 0.0405785, C2 7.72e-6, C3 0, D 0.000577

## Outputs
- Hazardous waste disposed (HWD) [kg]: A1-A3 3.10464e-8, C2 0, C3 0, D 2.64421e-9
- Non hazardous waste disposed (NHWD) [kg]: A1-A3 4.11668, C2 0.000532769, C3 0, D 2.96671
- Radioactive waste disposed (RWD) [kg]: A1-A3 0.000976186, C2 1.19334e-7, C3 0, D 6.3842e-6
- Components for re-use (CRU) [kg]: A1-A3 0, C2 0, C3 0, D 0
- Materials for recycling (MFR) [kg]: A1-A3 0, C2 0, C3 -0.00949, D 0
- Materials for energy recovery (MER) [kg]: A1-A3 0, C2 0, C3 0, D 0
- Exported electrical energy (EEE) [MJ]: A1-A3 0, C2 0, C3 0, D 0
- Exported thermal energy (EET) [MJ]: A1-A3 0, C2 0, C3 0, D 0

## Impact indicators
- Global warming potential (GWP) [kg CO_(2)-Äq.]: A1-A3 0.8157, C2 0.00731, C3 0, D 0.0352
- Depletion potential of the stratospheric ozone layer (ODP) [kg CFC11-Äq.]: A1-A3 1.20157e-12, C2 1.55e-16, C3 0, D 8.15e-15
- Acidification potential of land and water (AP) [kg SO_(2)-Äq.]: A1-A3 0.001625, C2 2.8e-5, C3 0, D 0.000247
- Eutrophication potential (EP) [kg PO_(4)^(3)-Äq.]: A1-A3 0.0002323, C2 7.1e-6, C3 0, D 1.48e-5
- Formation potential of tropospheric ozone photochemical oxidants (POCP) [kg Ethen-Äq.]: A1-A3 5.92e-5, C2 -1.05e-5, C3 0, D 1.36e-5
- Abiotic depletion potential for non fossil resources (ADPE) [kg Sb-Äq.]: A1-A3 0.000217354, C2 7.63e-10, C3 0, D 3.91e-5
- Abiotic depletion potential for fossil resources (ADPF) [MJ]: A1-A3 9.016, C2 0.0985, C3 0, D 0.395

## Use advice
Scope:
This document refers to TECU® Bronze produced by KME Germany GmbH & Co. KG in Osnabrück, Germany. The declared unit is 1 kg average copper sheet, alloyed. The data for the production of the declared product was collected on a plant-specific basis with current annual data from 2017. The declarant is responsible for the underlying data and their verification. The declarant is responsible for the underlying data

and their verification.
System boundary:
The Life Cycle Assessment considers the system boundaries "cradle to gate - with options" and follows the modular construction system described by /EN 15804/. The LCA takes into account the following

modules:

A1-A3: Raw material supply, Transport, Manufacturing
C2: Transport to waste-processing facility
C4: Disposal
D: Potential for reuse, recovery and/or recycling as net flows and benefit

## Data sources
- GaBi Database (all versions)
- GaBi database SP36 2018
