# Rammed earth wall; 2000 kg/m3

Dataset: ILCD process, EPD, generic dataset
Geography: DE
Reference year: 2021
Valid until: 2022
Classification: oekobau.dat: Mineralische Baustoffe / Steine und Elemente / Lehmsteine
Owner: Sphera Solutions GmbH
Compliance: EN 15804+A2
Review: Dependent internal review by Sphera Solutions GmbH; Independent external review by GaBi user forum
Amounts: rows without a unit in brackets have none in this file; such an amount is in the reference unit of its flow, which a separate flow dataset defines
copyright: true
licenseType: Free of charge for all users and uses
accessRestrictions: The license conditions as stated on https://www.oekobaudat.de/ apply.
accessRestrictions: Es gelten die Lizenzbedingungen wie sie auf https://www.oekobaudat.de/ genannt sind.

## General comment
This data set has been modeled according to the European Standard EN 15804+A2 for Sustainable Building. Results are depicted in modules that allow the structured expression of results over the entire life cycle.

## Geography
The data set represents the country specific situation in Germany, focusing on the main technologies, the region specific characteristics and / or import statistics.

## Time period
Annual average

## Technology and included processes
Rammed earth walls can be composed of clay, sand, straw and other additives. When using clay with many coarse materials the addition of additives is not necessary, which is particularly characteristic for the south of Germany. The processing of the rammed earth is carried out with a pneumatic rammer, whereby the material is compressed thoroughly and layer by layer. The system boundaries are represented by the finished product rammed earth wall with a density of approx. 1700 to 2200 kg/m3.

During the disposal phase, manual dismantling is taken into account in Module C1 for plasters, mortar and construction boards made of clay, and a mechanical dismantling for staple walls and clay masonry.
The transport in module C2 to the treatment plant takes place with a truck (50km).
In module C3 a treatment of the clay product is accounted for, whereby 3% material is lost.
In Module D, a credit for the net amount of material (amount recovered minus treatment losses, including possible fiber reinforcements) for the substitution of clay powder.

## Technical purpose
This product can be used in construction.

## Safety margin
30 %. Processes / flows can be missing or estimated. Strongly restricted technological, temporal or geographical representativeness.

## Reference product
- Rammed earth wall: 1

## Inputs
- Use of renewable primary energy as energy carrier (PERE) [MJ]: A1-A3 2.95591, C1 0.541745, C2 4.73669, C3 11.5677, D -1.8116
- Use of renewable primary energy resources used as raw materials (PERM) [MJ]: A1-A3 0, C1 0, C2 0, C3 0, D 0
- Total use of renewable primary energy (PERT) [MJ]: A1-A3 2.95591, C1 0.541745, C2 4.73669, C3 11.5677, D -1.8116
- Use of non renewable primary energy as energy carrier (PENRE) [MJ]: A1-A3 124.788, C1 9.33428, C2 81.6133, C3 130.911, D -31.214
- Use of non renewable primary energy resources used as raw materials (PENRM) [MJ]: A1-A3 0, C1 0, C2 0, C3 0, D 0
- Total use of non renewable primary energy resource (PENRT) [MJ]: A1-A3 124.788, C1 9.33428, C2 81.6133, C3 130.911, D -31.214
- Use of secondary material (SM) [kg]: A1-A3 0, C1 0, C2 0, C3 0, D 0
- Use of renewable secondary fuels (SF) [MJ]: A1-A3 0, C1 0, C2 0, C3 0, D 0
- Use of non renewable secondary fuels (NRSF) [MJ]: A1-A3 0, C1 0, C2 0, C3 0, D 0
- Net use of fresh water (FW) [m3]: A1-A3 0.00269494, C1 0.000481476, C2 0.00420973, C3 0.0339469, D -0.00161006

## Outputs
- Hazardous waste disposed (HWD) [kg]: A1-A3 6.12686e-7, C1 3.90143e-10, C2 3.41117e-9, C3 7.60401e-9, D -1.30464e-9
- Non harzardous waste disposed (NHWD) [kg]: A1-A3 0.0173195, C1 0.00150677, C2 0.0131743, C3 0.0376991, D -0.00503865
- Radioactive waste disposed (RWD) [kg]: A1-A3 0.000119233, C1 8.95746e-6, C2 7.83186e-5, C3 0.000963798, D -2.99539e-5
- Components for re-use (CRU) [kg]: A1-A3 0, C1 0, C2 0, C3 0, D 0
- Materials for recycling (MFR) [kg]: A1-A3 0, C1 0, C2 0, C3 1939.86, D 0
- Materials for energy recovery (MER) [kg]: A1-A3 0, C1 0, C2 0, C3 0, D 0
- Exported electrical energy (EEE) [MJ]: A1-A3 0, C1 0, C2 0, C3 0, D 0
- Exported thermal energy (EET) [MJ]: A1-A3 0, C1 0, C2 0, C3 0, D 0

## Impact indicators
- Global Warming Potential - total (GWP-total) [kg CO2 eq.]: A1-A3 9.68714, C1 0.698317, C2 6.19898, C3 6.99111, D -2.33462
- Global Warming Potential - fossil fuels (GWP-fossil) [kg CO2 eq.]: A1-A3 9.6598, C1 0.693656, C2 6.15709, C3 6.93939, D -2.3187
- Global Warming Potential - biogenic (GWP-biogenic) [kg CO2 eq.]: A1-A3 0.00692608, C1 0.000138744, C2 0.00235432, C3 0.013706, D -0.000794145
- Global Warming Potential - land use and land use change (GWP-luluc) [kg CO2 eq.]: A1-A3 0.0204123, C1 0.00452255, C2 0.0395425, C3 0.0380083, D -0.0151235
- Depletion potenzial of the stratospheric ozone layer (ODP) [kg CFC-11 eq.]: A1-A3 2.63065e-15, C1 1.80186e-16, C2 1.57544e-15, C3 3.09441e-14, D -6.02545e-16
- Acidifcation potential, Accumulated Exceedance (AP) [Mole of H+ eq.]: A1-A3 0.0459683, C1 0.00933926, C2 0.0174568, C3 0.0646708, D -0.0260423
- Eutrophication potential - freshwater (EP-freshwater) [kg P eq.]: A1-A3 9.13483e-6, C1 1.44827e-6, C2 1.26628e-5, C3 1.58028e-5, D -4.84302e-6
- Eutrophication potential - marine (EP-marine) [kg N eq.]: A1-A3 0.0202595, C1 0.00424877, C2 0.00804196, C3 0.0319914, D -0.0132677
- Eutrophication potential - terrestrial (EP-terrestrial) [Mole of N eq.]: A1-A3 0.240092, C1 0.0467157, C2 0.0899749, C3 0.351577, D -0.145921
- Photochemical Ozone Creation Potential (POCP) [kg NMVOC eq.]: A1-A3 0.0631258, C1 0.0127246, C2 0.015682, C3 0.0929889, D -0.0383998
- Abiotic depletion potential - non-fossil resources (ADPE) [kg Sb eq.]: A1-A3 5.11432e-7, C1 6.12555e-8, C2 5.35581e-7, C3 7.64729e-6, D -2.04839e-7
- Abiotic depletion potential - fossil resources (ADPF) [MJ]: A1-A3 124.785, C1 9.33389, C2 81.6099, C3 130.903, D -31.2127
- Water (user) deprivation potential (WDP) [m³ world equiv.]: A1-A3 0.0216014, C1 0.00273746, C2 0.0239347, C3 1.16543, D -0.00915411

## Use advice
The data set represents a cradle to gate inventory. It can be used to characterise the supply chain situation of the respective commodity in a representative manner. Combination with individual unit processes using this commodity enables the generation of user-specific (product) LCAs.

## Data sources
- Stampflehm, 2001
- Homepage Lehmbauwerk, 2008
- Documentation of data quality management
- GaBi Database Edition 2021, CUP2021.01
- GaBi database (all versions)
