# Fastening solutions for external thermal insulation composite systems

Dataset: ILCD process, EPD, average dataset
Geography: RER
Reference year: 2021
Valid until: 2026
Classification: OEKOBAU.DAT: Komponenten von Fenstern und Vorhangfassaden / Beschläge / Befestigungen
Classification: IBUCategories: 02 Bauprodukte / Befestigungen / Dübel aus Kunststoff und Metall
Method details: Dübel aus Kunststoff und Metall.pdf
Generated by: brands and values GmbH
Registration number: EPD-EJO-20210060-IBD1-DE
Owner: EJOT BAUBEFESTIGUNGEN GmbH
Compliance: DIN EN 15804+A2; ISO 14025
Review: Accredited third party review by Institut Bauen und Umwelt e. V.
Amounts: rows without a unit in brackets have none in this file; such an amount is in the reference unit of its flow, which a separate flow dataset defines
copyright: true
licenseType: Free of charge for all users and uses
accessRestrictions: None

## General comment
The declared products of EJOT Baubefestigungen GmbH, business unit ETICS Fasteners, are made of various plastics and/or steel. The products can be differentiated by the application and the length. Within the scope of this declaration, average anchors and screws with lengths of 175, 195 and 215 mm are considered. Linear extrapolation is permissible for lengths not shown. The declaration includes all products of the following product groups in the portfolio:

Washer Anchor (screw and impact anchors)
Additional washers for washer anchors
Facade anchors (screw-in and hammer-in anchors)
Screw-in anchor for securing double- leaf masonry
Concrete screw for fastening ceiling insulation
Accessories

These are products approved by European or national building authorities as well as constructive products without approval. This results in the following variants:

## Technology and included processes
Raw materials/ Ancillary materials: The raw materials or intermediate products of the products under consideration consist of: - Polyamide (unreinforced or glass fibre reinforced) (5-15 %) - Polyethylene (10-20 %) - Polypropylene (0-5 %) - Dyes (1 %) - Steel (70-80 %) Auxiliary materials and additives are contained in the plastic granulate. In the EJOT production companies, no auxiliary materials and additives are added during production. Production: The plastic anchor sleevesare manufactured using conventional injection moulding techniques. For this purpose, an injection moulding machine is used to plasticise the respective plastic in an injection unit and inject it into an injection mould.The cavity of the mould determines the shape and surface structure of the finished product.Screws:By far the largest proportion of screws and fasteners are produced by non-cutting cold forming in the so-called “cold extrusion process”. In this process, the starting material is delivered as "wire" wound on spools and uncoiled, straightened and, if necessary, reduced to the desired diameter in equipment upstream of the presses. Modern cold extrusion presses work in several stages, i.e. several operations are linked in succession per stroke, e.g.preforming the screw head, upsetting, deburring and reducing the threaded part. In the subsequent process, the threads are rolled onto the reduced threaded parts by thread rolling machines with flat dies or rolling and segment tools without cutting. Preferably, cold extrusion presses with integrated thread rolling machines are used. Plugs and ring washers are bought in, they are moulded from polystyrene under steam and packaged. Declared unit: The declared unit is an average anchor system for fixing 1 m²ETICS with a specific length of 195 mm, consisting of six individual systems. "Average" describes all produced anchor types of the system on average according to production shares weighted on the basis of a parameter analysis. This means that a hypothetical anchor system is calculated which represents the entire ETICS system. In order to convert the declared unit to kg, the weight per system is given. .
Declared unit:
The declared unit is an average anchor system for fixing 1 m² ETICS with a specific length of 195 mm, consisting of six individual systems.

"Average" describes all produced anchor types of the system on average according to production shares weighted on the basis of a parameter analysis. This means that a hypothetical anchor system is calculated which represents the entire ETICS system. In order to convert the declared unit to kg, the weight per system is given.

## Technical purpose
The products covered by this declaration are mainly used for the mechanical fastening of external thermal insulation composite systems on different substrates. Part of the product portfolio under consideration is used to secure double-leaf masonry or to fasten ceiling insulation.

## Reference product
- durchschnittliche Dübelsysteme für WDVS von 195 mm (): 1

## Inputs
- Renewable primary energy as energy carrier (PERE) [MJ]: A1-A3 1.89704, C1 0.00198, C2 0.00097, C3 0.000736, C4 0.0044, D 0.156
- Renewable primary energy resources as material utilization (PERM) [MJ]: A1-A3 0.712959, C1 0, C2 0, C3 0, C4 0, D 0
- Total use of renewable primary energy resources (PERT) [MJ]: A1-A3 2.61, C1 0.00198, C2 0.00097, C3 0.000736, C4 0.0044, D 0.156
- Non renewable primary energy as energy carrier (PENRE) [MJ]: A1-A3 9.31922, C1 0.0343, C2 0.0168, C3 2.09098, C4 0.0626, D -2.02
- Non renewable primary energy as material utilization (PENRM) [MJ]: A1-A3 2.08078, C1 0, C2 0, C3 -2.08078, C4 0, D 0
- Total use of non renewable primary energy resources (PENRT) [MJ]: A1-A3 11.4, C1 0.0343, C2 0.0168, C3 0.0102, C4 0.0626, D -2.02
- Use of secondary material (SM) [kg]: A1-A3 0.000674854, C1 0, C2 0, C3 0, C4 0, D 0.13866
- Use of renewable secondary fuels (RSF) [MJ]: A1-A3 0, C1 0, C2 0, C3 0, C4 0, D 0
- Use of non renewable secondary fuels (NRSF) [MJ]: A1-A3 0, C1 0, C2 0, C3 0, C4 0, D 0
- Use of net fresh water (FW) [m^3]: A1-A3 0.00218, C1 2.3e-6, C2 1.13e-6, C3 2.87e-6, C4 7.68e-7, D -0.000414

## Outputs
- Hazardous waste disposed (HWD) [kg]: A1-A3 3.75e-8, C1 1.59e-9, C2 7.79e-10, C3 2.67e-10, C4 2.28e-10, D -2.58e-7
- Non hazardous waste disposed (NHWD) [kg]: A1-A3 0.0104, C1 5.44e-6, C2 2.67e-6, C3 2.76e-6, C4 0.06, D 0.024
- Radioactive waste disposed (RWD) [kg]: A1-A3 0.000253, C1 6.33e-8, C2 3.1e-8, C3 1.35e-7, C4 7.55e-7, D 7.17e-8
- Components for re-use (CRU) [kg]: A1-A3 0, C1 0, C2 0, C3 0, C4 0, D 0
- Materials for recycling (MFR) [kg]: A1-A3 0, C1 0, C2 0, C3 0.13866, C4 0, D 0
- Materials for energy recovery (MER) [kg]: A1-A3 0.00246125, C1 0, C2 0, C3 0, C4 0, D 0
- Exported electrical energy (EEE) [MJ]: A1-A3 0, C1 0, C2 0, C3 0, C4 0, D 0
- Exported thermal energy (EET) [MJ]: A1-A3 0, C1 0, C2 0, C3 0, C4 0, D 0

## Impact indicators
- Global Warming Potential total (GWP-total) [kg CO_(2)-Äq.]: A1-A3 0.811, C1 0.00257, C2 0.00126, C3 0.000526, C4 0.00437, D -0.234
- Global Warming Potential fossil fuels (GWP-fossil) [kg CO_(2)-Äq.]: A1-A3 0.811, C1 0.00255, C2 0.00125, C3 0.000522, C4 0.00436, D -0.234
- Global Warming Potential biogenic (GWP-biogenic) [kg CO_(2)-Äq.]: A1-A3 0, C1 0, C2 0, C3 0, C4 -3.97e-7, D 0
- Global Warming Potential luluc (GWP-luluc) [kg CO_(2)-Äq.]: A1-A3 0.000642, C1 2.08e-5, C2 1.02e-5, C3 3.57e-6, C4 3.54e-6, D 6.69e-6
- Depletion potential of the stratospheric ozone layer (ODP) [kg CFC11-Äq.]: A1-A3 2.91e-11, C1 4.71e-19, C2 2.31e-19, C3 1.27e-18, C4 9.88e-18, D 5.12e-16
- Acidification potential of land and water (AP) [mol H^(+)-Äq.]: A1-A3 0.00225, C1 1.3e-5, C2 7.67e-6, C3 5.12e-6, C4 1.32e-5, D -0.000522
- Eutrophication potential aquatic freshwater (EP-freshwater) [kg PO_(4)-Äq.]: A1-A3 2.49e-6, C1 7.81e-9, C2 3.83e-9, C3 1.52e-9, C4 7.98e-7, D -1.33e-7
- Eutrophication potential aquatic marine (EP-marine) [kg N-Äq.]: A1-A3 0.000555, C1 6.15e-6, C2 3.71e-6, C3 2.49e-6, C4 2.93e-6, D -9.53e-5
- Eutrophication potential terrestrial (EP-terrestrial) [mol N-Äq.]: A1-A3 0.00588, C1 6.83e-5, C2 4.11e-5, C3 2.73e-5, C4 3.21e-5, D -0.000965
- Formation potential of tropospheric ozone photochemical oxidants (POCP) [kg NMVOC-Äq.]: A1-A3 0.00173, C1 1.25e-5, C2 7.17e-6, C3 7.25e-6, C4 9.54e-6, D -0.000393
- Abiotic depletion potential for non fossil resources (ADPE) [kg Sb-Äq.]: A1-A3 2.53e-5, C1 2.07e-10, C2 1.02e-10, C3 5.72e-10, C4 2.94e-10, D -3.81e-6
- Abiotic depletion potential for fossil resources (ADPF) [MJ]: A1-A3 11.4, C1 0.0342, C2 0.0168, C3 0.0102, C4 0.0625, D -2.02
- Water use (WDP) [m^(3) Welt-Äq. entzogen]: A1-A3 0.03, C1 2.5e-5, C2 1.23e-5, C3 0.000101, C4 -4.89e-5, D -0.0177
- Incidence of disease due to PM emissions (PM) [Krankheitsfälle]
- Human exposure efficiency relative to U235 (IR) [kBq U235-Äq.]
- Comparative toxic unit for ecosystems (ETP-fw) [CTUe]
- Comparative toxic unit for humans (carcinogenic) (HTP-c) [CTUh]
- Comparative toxic unit for humans (noncarcinogenic) (HTP-nc) [CTUh]
- Soil quality index (SQP) [SQP]

## Use advice
Scope:
The EPD refers to the fastening elements in the ETICS portfolio including accessories. These products are produced in the manufacturing plants in Ciasna (Poland) and Dozwil (Switzerland). The results are given for the effective length 195 mm. For all other lengths, an interpolation or extrapolation can be carried out using the formula given in chapter 5.
System boundary:
Type of EPD: Cradle to factory gate - with options. The environmental product declaration refers to the production stage (module A1-A3), the disposal stage (modules C1-C4) as well as credits and loads outside the system boundary (module D).

In the production stage, the procurement of raw materials including the corresponding upstream chains, the necessary procurement transports to the plants as well as the energies required for the production of the anchor systems are considered.

The country-specific electricity mix was modelled for each of the plants. The material composition and the energy demand of the declared anchor systems were calculated according to their production shares in each plant.

In the disposal phase, the dismantling of the anchor systems (module C1), the transport to the waste treatment (Module C2), waste processing (Module C3) and the landfilling of plastics (Module C4) are considered. Avoided burdens from the recycling of metals are reported in Module D. Only the net scrap quantities are considered here.

## Data sources
- GaBi Database (all versions)
- GaBi database SP40 2020
