# Anhydrite (CaSO4); grinded and purified product

Dataset: ILCD process, EPD, generic dataset
Geography: DE
Reference year: 2021
Valid until: 2022
Classification: oekobau.dat: Mineralische Baustoffe / Bindemittel / Gips
Owner: Sphera Solutions GmbH
Compliance: EN 15804+A2
Review: Dependent internal review by Sphera Solutions GmbH; Independent external review by GaBi user forum
Amounts: rows without a unit in brackets have none in this file; such an amount is in the reference unit of its flow, which a separate flow dataset defines
copyright: true
licenseType: Free of charge for all users and uses
accessRestrictions: The license conditions as stated on https://www.oekobaudat.de/ apply.
accessRestrictions: Es gelten die Lizenzbedingungen wie sie auf https://www.oekobaudat.de/ genannt sind.

## General comment
This data set has been modeled according to the European Standard EN 15804+A2 for Sustainable Building. Results are depicted in modules that allow the structured expression of results over the entire life cycle.

## Geography
The data set represents the country specific situation in Germany, focusing on the main technologies, the region specific characteristics and / or import statistics.

## Time period
Annual average

## Technology and included processes
The composition of the anhydrite mix is one third each natural anhydrite from open cast and underground mining, thermal anhydrite and anhydrite produced as a by-product in the hydrofluoric acid synthesis. Thermal anhydrite is produced by the calcination of calcium sulphate dihydrate (two molecules of chemically bind water per molecule of calcium sulphate to anhydrous form of calcium sulphate). The calcium sulphate dihydrate used for the calcination process is generated during flue gas desulphurisation in hard coal power plants. One third of the calcium sulphate dihydrate from power plants is transported over longer distances via train. To assess the impacts of the production of calcium sulphate dihydrate from power plants the real electricity consumption for the dehydration and purification of the gypsum slurry is considered. The anhydrite from the hydrofluoric acid synthesis is assessed via an allocation using actual market values.

## Technical purpose
This product can be used in construction.

## Safety margin
20 %. Product system depicted except for a few missing processes / flows. Technological, temporal and geographic representativeness partly given.

## Reference product
- Anhydrite (CaSO4): 1

## Inputs
- Use of renewable primary energy as energy carrier (PERE) [MJ]: A1-A3 0.179279
- Use of renewable primary energy resources used as raw materials (PERM) [MJ]: A1-A3 0
- Total use of renewable primary energy (PERT) [MJ]: A1-A3 0.179279
- Use of non renewable primary energy as energy carrier (PENRE) [MJ]: A1-A3 1.76784
- Use of non renewable primary energy resources used as raw materials (PENRM) [MJ]: A1-A3 0
- Total use of non renewable primary energy resource (PENRT) [MJ]: A1-A3 1.76784
- Use of secondary material (SM) [kg]: A1-A3 0
- Use of renewable secondary fuels (SF) [MJ]: A1-A3 0
- Use of non renewable secondary fuels (NRSF) [MJ]: A1-A3 0
- Net use of fresh water (FW) [m3]: A1-A3 0.000224866

## Outputs
- Hazardous waste disposed (HWD) [kg]: A1-A3 3.62108e-10
- Non harzardous waste disposed (NHWD) [kg]: A1-A3 0.00071438
- Radioactive waste disposed (RWD) [kg]: A1-A3 2.06564e-5
- Components for re-use (CRU) [kg]: A1-A3 0
- Materials for recycling (MFR) [kg]: A1-A3 0
- Materials for energy recovery (MER) [kg]: A1-A3 0
- Exported electrical energy (EEE) [MJ]: A1-A3 0
- Exported thermal energy (EET) [MJ]: A1-A3 0

## Impact indicators
- Global Warming Potential - total (GWP-total) [kg CO2 eq.]: A1-A3 0.0898837
- Global Warming Potential - fossil fuels (GWP-fossil) [kg CO2 eq.]: A1-A3 0.0891047
- Global Warming Potential - biogenic (GWP-biogenic) [kg CO2 eq.]: A1-A3 0.000720423
- Global Warming Potential - land use and land use change (GWP-luluc) [kg CO2 eq.]: A1-A3 5.8633e-5
- Depletion potenzial of the stratospheric ozone layer (ODP) [kg CFC-11 eq.]: A1-A3 7.61317e-16
- Acidifcation potential, Accumulated Exceedance (AP) [Mole of H+ eq.]: A1-A3 0.000592219
- Eutrophication potential - freshwater (EP-freshwater) [kg P eq.]: A1-A3 1.15299e-7
- Eutrophication potential - marine (EP-marine) [kg N eq.]: A1-A3 6.1763e-5
- Eutrophication potential - terrestrial (EP-terrestrial) [Mole of N eq.]: A1-A3 0.000678599
- Photochemical Ozone Creation Potential (POCP) [kg NMVOC eq.]: A1-A3 0.00019942
- Abiotic depletion potential - non-fossil resources (ADPE) [kg Sb eq.]: A1-A3 1.43964e-8
- Abiotic depletion potential - fossil resources (ADPF) [MJ]: A1-A3 1.76771
- Water (user) deprivation potential (WDP) [m³ world equiv.]: A1-A3 0.00315758

## Use advice
The data set represents a cradle to gate inventory. It can be used to characterise the supply chain situation of the respective commodity in a representative manner. Combination with individual unit processes using this commodity enables the generation of user-specific (product) LCAs.

## Data sources
- Documentation of data quality management
- GaBi Database Edition 2021, CUP2021.01
- GaBi database (all versions)
