# Holzfaser-Einblasdämmung STEICOzell

Dataset: ILCD process, EPD, specific dataset
Geography: RER
Reference year: 2020
Valid until: 2025
Classification: OEKOBAU.DAT: Dämmstoffe / Holzfasern / Holzfasern und Holzspäne, lose
Classification: IBUCategories: 02 Bauprodukte / Wärmedämmungsprodukte / Einblasdämmstoffe aus Zellulose- und Holzfasern
Method details: Einblasdämmstoffe aus Zellulose- und Holzfasern.pdf
Registration number: EPD-STE-20200172-IBA1-DE
Owner: STEICO SE
Compliance: DIN EN 15804; ISO 14025
Review: Accredited third party review by Institut Bauen und Umwelt e. V.
Amounts: rows without a unit in brackets have none in this file; such an amount is in the reference unit of its flow, which a separate flow dataset defines
copyright: true

## General comment
STEICOzell ist eine lose Holzfaser-Einblasdämmung aus natürlicher Holzfaser. Das Produkt dient zur Dämmung von Hohlräumen aller Größen und Dicken bei schneller maschineller Verarbeitung, das Ergebnis ist fugen- und verschnittfrei. Durch eine dreidimensionale Verzahnung der Holzfasern ist STEICOzell dauerhaft setzungssicher.

## Technology and included processes
STEICOzell wird aus unbehandeltem Nadelholz mittels thermo-mechanischem Holzaufschluss und anschließender Trocknung in folgenden Schritten hergestellt: Verarbeitung des Rohholzes zu Hackschnitzeln Erhitzen der Hackschnitzel unter Dampfdruck Zerfaserung der Hackschnitzel im Refiner Trocknung der Fasern mittels Stromrohrtrockner Kompression Verpackung Alle während der Produktion anfallenden Reststoffe werden entweder erneut der Produktion oder intern einer energetischen Verwertung zugeführt. Systeme zur Gütesicherung: Qualitätsmanagementsystem nach /DIN EN ISO 9001:2015/ Umweltmanagementsystem nach /DIN EN ISO 14001:2015/ CE-Kennzeichnung nach /DIN EN 13171/MPA Nordrhein-Westfalen, D FSC Zertifikat /CU-COC-841217/ PEFC Zertifikat /CU-PEFC-841217/ Konformitätszertifikat /MPA NRW-00664-01/
Technische Daten:
Die folgenden Angaben beziehen sich auf das Produkt STEICOzell im Auslieferungszustand.
Deklarierte Einheit:
Die deklarierte Einheit ist 1 kg STEICOzell Einblasdämmstoff aus Holzfasern.

Hinweis: für die Bilanzierung auf Gebäudeebene sind je nach Anwendungsfall unterschiedliche Dichten anzunehmen (siehe Kapitel 2.3).

Es handelt sich gemäß des Punktes 5.2.1a aus PCR Teil A um eine „Deklaration eines spezifischen Produkts aus einem Werk eines Herstellers“.

## Technical purpose
STEICOzell eignet sich sowohl als Dämmstoff für die industrielle Vorfertigung (z.  B. von kompletten Wand­elementen) als auch für Sanierungsarbeiten von Neubau, Altbau, Fachwerk und Holzbau. Zur Erzeugung der Dämmschicht wird das Fasermaterial unter hohem Druck in die geschlossenen Gefache eingeblasen. Das Material passt sich dort exakt den begrenzenden Bauteilen an und füllt sämtliche Hohlräume vollständig aus. Auch Installationselemente in den Gefachen werden beim Einblasen ohne langwierige Handarbeit exakt umschlossen.

Somit spielt es keine Rolle, ob die Gefache auf gängige Dämmstoffgrößen abgestimmt sind, mit STEICOzell wird eine homogene und fugenfreie­ Füllung selbst bei kompliziertesten Konstruktionen erreicht.

Neben der Einblasdämmung lässt sich STEICOzell auch als Aufblasdämmung verwenden. Das Aufblasverfahren kommt zum Einsatz, wenn STEICOzell als freiliegender Wärmedämmstoff auf horizontalen, gewölbten oder mäßig geneigten Flächen zwischen Bindern oder Balken von Dachstühlen aufgeblasen wird.

## Reference product
- STEICO zell (): 1

## Inputs
- Erneuerbare Primärenergie als Energieträger (PERE) [MJ]: A1 0.0733326, A2 0.0119526, A3 1.04717, A5 0.00354536, C2 0.00225642, C3 0, D -3.61791
- Erneuerbare Primärenergie zur stofflichen Nutzung (PERM) [MJ]: A1 15.3532, A2 0, A3 0.13951, A5 -0.13951, C2 0, C3 -15.3532, D 0
- Total erneuerbare Primärenergie (PERT) [MJ]: A1 15.4265, A2 0.0119526, A3 1.18668, A5 -0.135965, C2 0.00225642, C3 -15.3532, D -3.61791
- Nicht-erneuerbare Primärenergie als Energieträger (PENRE) [MJ]: A1 2.14035, A2 0.212848, A3 11.4397, A5 0.0175085, C2 0.0401815, C3 0, D -13.0506
- Nicht-erneuerbare Primärenergie zur stofflichen Nutzung (PENRM) [MJ]: A1 3.7188, A2 0, A3 0.4698, A5 -0.4698, C2 0, C3 -3.7188, D 0
- Total nicht erneuerbare Primärenergie (PENRT) [MJ]: A1 5.85915, A2 0.212848, A3 11.9095, A5 -0.452291, C2 0.0401815, C3 -3.7188, D -13.0506
- Einsatz von Sekundärstoffen (SM) [kg]: A1 0, A2 0, A3 0, A5 0, C2 0, C3 0, D 0
- Erneuerbare Sekundärbrennstoffe (RSF) [MJ]: A1 0, A2 0, A3 1.65222, A5 0, C2 0, C3 0, D 15.3532
- Nicht erneuerbare Sekundärbrennstoffe (NRSF) [MJ]: A1 0, A2 0, A3 0, A5 0, C2 0, C3 0, D 3.7188
- Einsatz von Süßwasserressourcen (FW) [m^3]: A1 0.0011559, A2 1.38403e-5, A3 0.00296436, A5 0.000125178, C2 2.61277e-6, C3 0, D 0.00231381

## Outputs
- Gefährlicher Abfall zur Deponie (HWD) [kg]: A1 4.21351e-6, A2 9.90529e-9, A3 8.45134e-9, A5 6.69115e-11, C2 1.86992e-9, C3 0, D -6.61241e-9
- Entsorgter nicht gefährlicher Abfall (NHWD) [kg]: A1 0.0014034, A2 3.25739e-5, A3 0.00624532, A5 0.00327934, C2 6.1493e-6, C3 0, D 0.0287437
- Entsorgter radioaktiver Abfall (RWD) [kg]: A1 8.73171e-6, A2 2.6345e-7, A3 5.68785e-5, A5 6.57939e-7, C2 4.97341e-8, C3 0, D -0.000523727
- Komponenten für die Wiederverwendung (CRU) [kg]: A1 0, A2 0, A3 0, A5 0, C2 0, C3 0, D 0
- Stoffe zum Recycling (MFR) [kg]: A1 0, A2 0, A3 0, A5 0, C2 0, C3 0, D 0
- Stoffe für die Energierückgewinnung (MER) [kg]: A1 0, A2 0, A3 0, A5 0, C2 0, C3 1, D 0
- Exportierte elektrische Energie (EEE) [MJ]: A1 0, A2 0, A3 0, A5 0.0946411, C2 0.0946411, C3 0.0946411, D 3.18048
- Exportierte thermische Energie (EET) [MJ]: A1 0, A2 0, A3 0, A5 0.182716, C2 0.182716, C3 0.182716, D 6.29985

## Impact indicators
- Globales Erwärmungspotenzial (GWP) [kg CO_(2)-Äq.]: A1 -1.35775, A2 0.0153711, A3 0.944543, A5 0.0462231, C2 0.00290176, C3 1.46062, D -0.654912
- Abbau Potential der stratosphärischen Ozonschicht (ODP) [kg CFC11-Äq.]: A1 3.2938e-10, A2 2.55871e-18, A3 2.54985e-15, A5 1.79799e-17, C2 4.83033e-19, C3 0, D -2.06161e-14
- Versauerungspotenzial von Boden und Wasser (AP) [kg SO_(2)-Äq.]: A1 0.00035293, A2 6.4404e-5, A3 0.00159471, A5 9.87747e-6, C2 1.21582e-5, C3 0, D -0.000686334
- Eutrophierungspotenzial (EP) [kg PO_(4)^(3)-Äq.]: A1 6.1193e-5, A2 1.6202e-5, A3 0.000183223, A5 1.11895e-6, C2 3.0586e-6, C3 0, D -0.000120152
- Bildungspotential für troposphärisches Ozon (POCP) [kg Ethen-Äq.]: A1 3.91248e-5, A2 -2.70843e-5, A3 0.000312179, A5 3.74708e-7, C2 -5.11296e-6, C3 0, D -6.70291e-5
- Potenzial für den abiotischen Abbau nicht fossiler Ressourcen (ADPE) [kg Sb-Äq.]: A1 1.73731e-5, A2 1.29432e-9, A3 8.53888e-8, A5 2.46078e-9, C2 2.44341e-10, C3 0, D -2.00487e-7
- Potenzial für den abiotischen Abbau fossiler Brennstoffe (ADPF) [MJ]: A1 2.11827, A2 0.212176, A3 11.2974, A5 0.0158493, C2 0.0400545, C3 0, D -11.7286

## Use advice
Gültigkeitsbereich:
Diese Umwelt-Produktdeklaration gilt für die Holzfaser-Einblasdämmung STEICOzell, welche in folgendem Werk hergestellt wird:

STEICO Sp. z o.o.

ul. Przemysłowa 2

64-700 Czarnków
Systemgrenze:
Der Deklarationstyp entspricht einer EPD „Wiege bis Werkstor – mit Optionen“. Inhalte sind das Stadium der Produktion, d. h. von der Bereitstellung der Rohstoffe bis zum Werkstor der Produktion (cradle-to-gate, Module A1 bis A3), sowie das Modul A5 und Teile des Endes des Lebensweges (Modul C2 und C3). Darüber hinaus erfolgt eine Betrachtung der potenziellen Nutzen und Lasten über den Lebensweg des Produktes hinaus (Modul D).

Das Modul A1 umfasst die Bereitstellung des Holzes aus dem Forst sowie die Bereitstellung der Additive. Die Transporte dieser Stoffe werden in Modul A2 berücksichtigt. Modul A3 beinhaltet die Aufwendungen der Herstellung des Produktes, wie die Bereitstellung der Brennstoffe, Betriebsmittel und Energie, sowie die Verpackung des Produktes.

In Modul A5 wird ausschließlich die Entsorgung der Produktverpackung abgedeckt, welche den Ausgang des enthaltenen biogenen Kohlenstoffs sowie der enthaltenen Primärenergie (PERM und PENRM) einschließt.

Modul C2 berücksichtigt den Transport zum Entsorger und Modul C3 die Aufbereitung und Sortierung des Materials.

Zudem werden in Modul C3 gemäß /EN 16485/ die CO2-Äquivalente des im Produkt befindlichen holzinhärenten Kohlenstoffs sowie die im Produkt enthaltene erneuerbare und nicht-erneuerbare Primärenergie (PERM und PENRM) als Abgänge verbucht.

In Modul D werden die thermische Verwertung des Produktes am Ende seines Lebenswegs sowie die daraus resultierenden potenziellen Nutzen und Lasten in Form einer Systemerweiterung bilanziert.

## Data sources
- Holzfaser-Einblasdämmung STEICOzell.pdf
- GaBi Database (all versions)
- GaBi database SP40 2020
