# MAXI-TEC® CW- und UW-Profile

Dataset: ILCD process, EPD, average dataset
Geography: DE
Reference year: 2019
Valid until: 2024
Classification: OEKOBAU.DAT: Metalle / Edelstahl / Edelstahlprofile
Classification: IBUCategories: 02 Bauprodukte / Metallbauprodukte und Zubehör / Dünnwandige Profile und Profiltafeln aus Metall
Method details: Dünnwandige Profile und Profiltafeln aus Metall.pdf
Registration number: 10849
Owner: Profil-Vertrieb GmbH/PROTEKTORWERK Florenz Maisch GmbH & Co. KG
Compliance: DIN EN 15804; ISO 14025
Review: Accredited third party review by Institut Bauen und Umwelt e. V.
Amounts: rows without a unit in brackets have none in this file; such an amount is in the reference unit of its flow, which a separate flow dataset defines
copyright: true

## General comment
MAXI-TEC® profiles are prefabricated, thin-walled profiles made of hot-dip coated slit strip.

The MAXI-TEC® CW 75-06 profile in a delivery length of 300 cm was selected as a representative product for all MAXI-TEC® profiles as it is an average product in terms of geometry and also displays the most popular shape and average values for all MAXI-TEC® profiles. Use of this profile can be regarded as a worst case scenario as it is heavier at 0.706 kg / running metre than the average weight of all profiles (approx. 0.648 kg / running metre).

## Technology and included processes
MAXI-TEC® profiles are manufactured from hot-dip coated steel slit strip in a cutting and forming process. The slit strip is added continuously in a conveyor process. The first step involves cutting and stamping the central section followed by continuous splaying by a suitable device. The folded area of the strip is rolled smooth and then the modified slit strip is roll-formed. This step is followed by marking by ink jet lettering before the profiles are cut to length in a shearing process and packed in bundles of 8. The material is processed without waste.

## Technical purpose
MAXI-TEC® profiles are used as substructures for non-bearing single- or dual-layer partition walls and wall linings in accordance with /DIN 4103-1/ and /DIN 18183-1/. The constructions are suitable for use in normal air-conditioned interior rooms. Corrosion protection complies with /DIN EN 14195/ and /DIN 18182-1/.

## Reference product
- 1 lfm MAXI-TEC®: 1

## Inputs
- Renewable primary energy as energy carrier (PERE) [MJ]: A1-A3 0.752, A4 0.00529, A5 0.000297, C4 0.00281, D 0.451
- Renewable primary energy resources as material utilization (PERM) [MJ]: A1-A3 0, A4 0, A5 0, C4 0, D 0
- Total use of renewable primary energy resources (PERT) [MJ]: A1-A3 0.752, A4 0.00529, A5 0.000297, C4 0.00281, D 0.451
- Non renewable primary energy as energy carrier (PENRE) [MJ]: A1-A3 21, A4 0.0786, A5 0.847, C4 0.0226, D -8.25
- Non renewable primary energy as material utilization (PENRM) [MJ]: A1-A3 0, A4 0, A5 -0.836, C4 0, D 0
- Total use of non renewable primary energy resources (PENRT) [MJ]: A1-A3 21, A4 0.0786, A5 0.0111, C4 0.0226, D -8.25
- Use of secondary material (SM) [kg]: A1-A3 0, A4 0, A5 0, C4 0, D 0
- Use of renewable secondary fuels (RSF) [MJ]: A1-A3 0, A4 0, A5 0, C4 0, D 0
- Use of non renewable secondary fuels (NRSF) [MJ]: A1-A3 0, A4 0, A5 0, C4 0, D 0
- Use of net fresh water (FW) [m^3]: A1-A3 0.00348, A4 6.14e-6, A5 0.000111, C4 4.31e-6, D 0.00106

## Outputs
- Hazardous waste disposed (HWD) [kg]: A1-A3 2.93e-9, A4 0, A5 0, C4 0, D 0.000508
- Non hazardous waste disposed (NHWD) [kg]: A1-A3 6.54, A4 0.000424, A5 0.00142, C4 0.216, D 0.115
- Radioactive waste disposed (RWD) [kg]: A1-A3 0.000259, A4 9.49e-8, A5 6.42e-7, C4 0, D 1.48e-5
- Components for re-use (CRU) [kg]: A1-A3 0, A4 0, A5 0, C4 0, D 0
- Materials for recycling (MFR) [kg]: A1-A3 0, A4 0, A5 0, C4 0, D 0.552
- Materials for energy recovery (MER) [kg]: A1-A3 0, A4 0, A5 0.019, C4 0, D 0
- Exported electrical energy (EEE) [MJ]: A1-A3 0, A4 0, A5 0.1, C4 0, D 0
- Exported thermal energy (EET) [MJ]: A1-A3 0, A4 0, A5 0.33, C4 0, D 0

## Impact indicators
- Global warming potential (GWP) [kg CO_(2)-Äq.]: A1-A3 1.49, A4 0.00586, A5 0.0537, C4 0.00169, D -0.863
- Depletion potential of the stratospheric ozone layer (ODP) [kg CFC11-Äq.]: A1-A3 1.22e-7, A4 1.23e-16, A5 5.23e-11, C4 3.75e-16, D 4.69e-9
- Acidification potential of land and water (AP) [kg SO_(2)-Äq.]: A1-A3 0.00397, A4 1.44e-5, A5 4.74e-6, C4 9.89e-6, D -0.00166
- Eutrophication potential (EP) [kg PO_(4)^(3)-Äq.]: A1-A3 0.000374, A4 3.51e-6, A5 8.2e-7, C4 1.36e-6, D -0.000127
- Formation potential of tropospheric ozone photochemical oxidants (POCP) [kg Ethen-Äq.]: A1-A3 0.000577, A4 -5.26e-6, A5 3.87e-7, C4 7.85e-7, D -0.000386
- Abiotic depletion potential for non fossil resources (ADPE) [kg Sb-Äq.]: A1-A3 2.54e-5, A4 6.12e-10, A5 2.72e-10, C4 6.36e-10, D -2.41e-6
- Abiotic depletion potential for fossil resources (ADPF) [MJ]: A1-A3 19.9, A4 0.0784, A5 0.0089, C4 0.0218, D -8.51

## Use advice
Scope:
This Declaration applies for the MAXI-TEC® products manufactured by Profil-Vertrieb GmbH/PROTEKTORWERK Florenz Maisch GmbH & Co. KG in the Gaggenau plant. The Declaration is representative for the CW profiles 50-06, 75-06, 100-06 and UW profiles 50-06, 75-06 and 100-06.
System boundary:
Type of EPD: cradle to gate with options

The following modules were considered for calculating the LCA:

· A1: Raw material supply and processing

· A2: Transport and delivery of the base material

· A3: Production process

· A4: Transporting the profiles to the construction
site

· A5: Handling waste from product packaging

· C4: Landfilling

· D: Re-use, recovery and/or recycling potential

## Data sources
- MAXI-TEC® CW- und UW-Profile.pdf
- GaBi Database (all versions)
- GaBi database SP35 2018
