# LED office luminaire

Dataset: ILCD process, EPD, generic dataset
Geography: DE
Reference year: 2018
Valid until: 2022
Classification: oekobau.dat: Gebäudetechnik / Elektro / Beleuchtung
Owner: thinkstep
Compliance: DIN EN 15804
Review: Dependent internal review by thinkstep, IABP-GaBi, IBP-GaBi; Independent external review by GaBi user forum, GaBi bug forum, GaBi user community
Amounts: rows without a unit in brackets have none in this file; such an amount is in the reference unit of its flow, which a separate flow dataset defines
copyright: true

## General comment
This data set has been modeled according to the European Standard EN 15804 for Sustainable Building. Results are depicted in modules that allow the structured expression of results over the entire life cycle.

## Geography
The data set represents the country specific situation in Germany, focusing on the main technologies, the region specific characteristics and / or import statistics.

## Time period
annual average

## Technology and included processes
The LEDs used in the office lighting are surface-mounted devices (SMD) LEDs. Other main components built in the LED luminaire include steel, plastic, aluminum and electronic components (ballast, cable).

To calculate the energy consumption of the LED luminaire, the calculation rules of the product category rules of the Institut Bauen und Umwelt e.V. Part B: "Requirements for the EPD for luminaires, lamps and components for luminaires" (https://epd-online.com) are used with assumption of the following parameters:

- period considered: 1 year

- nominal power: 52 W

- passive power: 1 W

- active running time: 2.500 h

- passive running time: 6.260 h

- correction factors FCP/FD/FO for dimming/presence detection: 1/0.9/1

The energy consumption in the considered period of one year is thus calculated to be 125 kWh. The German electricity mix was used for the calculation of the environmental effects during the use phase.

Background system:
Electricity: Electricity from renewable and non- renewable powerplants is modelled so that it represents a countrys specific consumption mix including transmission / distribution losses, own consumption, imports, emissions and efficiency standards, and energy carrier properties. Several factors are taken into account. (1) Energy carrier production - The exploration, mining / production, processing, and transportation of energy carrier supply chains are modelled for each country. The models account for differences among countries in production and processing, including crude oil production technologies, flaring rates, production efficiencies, emissions, etc. (2) Energy carrier supply - Each countrys specific energy carrier supply is modelled, taking into account domestic supply versus imports from abroad. Energy carrier properties (e.g. carbon and energy content), which can vary depending from where an energy carrier is sourced, are adjusted accordingly. (3) Power plants - Models are created to represent energy carrier-specific power plants and electricity generation facilities specific to different renewable energy resources. Energy carrier production and supply models are used to represent power plant inputs. Combined heat and power (CHP) plants are also considered. (4) Electricity grid - Models representing the electricity generation facilities are combined into a larger model that reflects a countrys consumption mix. The larger model accounts for a countrys production mix, internal consumption (e.g. pumped storage for hydro power), transmission / distribution losses, and imported electricity. The country model is also adjusted according to national power plant emission and efficiency standards, as well as the countrys share of electricity plants versus CHP facilities.
Thermal energy, process steam: The thermal energy and process steam supply is modelled to reflect each countrys emission standards and typical energy carriers (e.g., coal, natural gas, etc.) Both thermal energy and process steam are assumed to be produced at heat plants. Thermal energy datasets assume energy carrier inputs are converted to thermal energy with 100% efficiency; process steam datasets assume conversion efficiencies of 85%, 90% to 95%. The energy carriers used for the generation of thermal energy and process steam are modelled according to each countrys import situation (see electricity above).
Transportation: All relevant and known transportation processes are included. Ocean-going and inland ship transport as well as rail, truck and pipeline transport of bulk commodities are considered.
Energy carriers: The energy carriers and their respective properties are modelled according to the specific supply situation (see electricity above).
Refinery products: Diesel fuel, gasoline, technical gases, fuel oils, lubricants and residues such as bitumen are modelled with a parameterised country-specific refinery model. The refinery model aims to represent each countrys refining processes (e.g. emissions levels, internal energy consumption, etc.), as well as the countrys product output spectrum, which can vary significantly among countries. The supply of crude oil is likewise modelled according to the country-specific situation and accounts for differences in resource properties (e.g., crude oil energy content).

## Technical purpose
The area of application of the LED office luminaire is for indoor use only.

## Safety margin
20 %. Product system depicted except for a few missing processes / flows. Technological, temporal and geographic representativeness partly given.

## Reference product
- LED office luminaire [pcs]: 1

## Inputs
- Use of renewable primary energy (PERE) [MJ]: A1-A3 75.4936, B6 672.139, C1 0.00181265, C2 0.0129662, C3 0.685614, D -30.3117
- Primary energy resources used as raw materials (PERM) [MJ]: A1-A3 0, B6 0, C1 0, C2 0, C3 0, D 0
- Total use of renewable primary energy resources (PERT) [MJ]: A1-A3 75.4936, B6 672.139, C1 0.00181265, C2 0.0129662, C3 0.685614, D -30.3117
- Use of non-renewable primary energy (PENRE) [MJ]: A1-A3 510.892, B6 1003.7, C1 0.0311366, C2 0.222726, C3 2.58694, D -153.343
- Non-renewable primary energy resources used as raw materials (PENRM) [MJ]: A1-A3 0, B6 0, C1 0, C2 0, C3 0, D 0
- Total use of non-renewable primary energy resources (PENRT) [MJ]: A1-A3 510.892, B6 1003.7, C1 0.0311366, C2 0.222726, C3 2.58694, D -153.343
- Input of secondary material (SM) [kg]: A1-A3 0.687686, B6 0, C1 0, C2 0, C3 0, D 0
- Use of renewable secondary fuels (RSF) [MJ]: A1-A3 0, B6 0, C1 0, C2 0, C3 0, D 0
- Use of non renewable secondary fuels (NRSF) [MJ]: A1-A3 0, B6 0, C1 0, C2 0, C3 0, D 0
- Use of net fresh water (FW) [m3]: A1-A3 0.149164, B6 0.310783, C1 1.62338e-6, C2 1.16124e-5, C3 0.0134437, D -0.0678726

## Outputs
- Hazardous waste disposed (HWD) [kg]: A1-A3 1.46229e-6, B6 6.88339e-7, C1 1.16354e-9, C2 8.32305e-9, C3 9.72802e-9, D -1.48795e-7
- Non-hazardous waste disposed (NHWD) [kg]: A1-A3 2.69833, B6 0.781403, C1 5.46502e-6, C2 3.90924e-5, C3 0.570216, D -1.72794
- Radioactive waste disposed (RWD) [kg]: A1-A3 0.0155829, B6 0.0813233, C1 3.27805e-8, C2 2.34485e-7, C3 9.79047e-5, D -0.00586364
- Components for re-use (CRU) [kg]: A1-A3 0, B6 0, C1 0, C2 0, C3 0, D 0
- Materials for Recycling (MFR) [kg]: A1-A3 0, B6 0, C1 4.98, C2 0, C3 0, D 0
- Material for Energy Recovery (MER) [kg]: A1-A3 0, B6 0, C1 2.16, C2 0, C3 0, D 0
- Exported electrical energy (EEE) [MJ]: A1-A3 0, B6 0, C1 0, C2 0, C3 10.1678, D 0
- Exported thermal energy (EET) [MJ]: A1-A3 0, B6 0, C1 0, C2 0, C3 23.3446, D 0

## Impact indicators
- Global warming potential (GWP) [kg CO2 eq.]: A1-A3 33.4641, B6 79.6768, C1 0.00230039, C2 0.0165711, C3 5.46256, D -13.7268
- Ozone Depletion Potential (ODP) [kg R11 eq.]: A1-A3 1.97518e-10, B6 3.72606e-12, C1 7.66805e-19, C2 5.48511e-18, C3 3.82718e-15, D 2.17945e-12
- Acidification potential (AP) [kg SO2 eq.]: A1-A3 0.101947, B6 0.0940082, C1 8.02362e-6, C2 3.34719e-5, C3 0.000609966, D -0.0485117
- Eutrophication potential (EP) [kg Phosphate eq.]: A1-A3 0.00804791, B6 0.018674, C1 1.89314e-6, C2 7.95719e-6, C3 0.000135812, D -0.00282215
- Photochemical Ozone Creation Potential (POCP) [kg Ethene eq.]: A1-A3 0.00858585, B6 0.00779188, C1 7.92817e-7, C2 -1.00282e-5, C3 5.65142e-5, D -0.00352813
- Abiotic depletion potential for non fossil resources (ADPE) [kg Sb eq.]: A1-A3 0.00104441, B6 3.52558e-5, C1 1.94944e-10, C2 1.39447e-9, C3 3.98098e-8, D -0.000911493
- Abiotic depletion potential for fossil resources (ADPF) [MJ]: A1-A3 471.298, B6 798.406, C1 0.0310529, C2 0.222127, C3 2.3398, D -138.488

## Use advice
This data base refers to a piece of LED office luminaire including ballast, with the following specifications:
- power: 52 W

- luminous efficacy: 75 lm/W

- luminous flux: 3,900 lm

- weight: 5.95 kg

Consideration is given to the transport of the preliminary products, the manufacture of the luminaire and the use-phase.

A scaling of the data base in relation to the manufacturing phase (modules A1-A3) to other LED luminaires is not possible / recommendable due to the complex material composition. The scaling of the usage phase (module B6) is possible without restriction.

The data set represents a cradle to gate inventory. It can be used to characterise the supply chain situation of the respective commodity in a representative manner. Combination with individual unit processes using this commodity enables the generation of user-specific (product) LCAs.

## Data sources
- GaBi databases
- GaBi Database Edition 2020, SP40
- GaBi database (all versions)
