# Adhesive for gypsum board; 1000 kg/m3

Dataset: ILCD process, EPD, generic dataset
Geography: DE
Reference year: 2018
Valid until: 2022
Classification: oekobau.dat: Mineralische Baustoffe / Mörtel und Beton / Kleber und Klebemörtel
Owner: thinkstep
Compliance: DIN EN 15804
Review: Dependent internal review by thinkstep, IABP-GaBi, IBP-GaBi; Independent external review by GaBi user forum, GaBi bug forum, GaBi user community
Amounts: rows without a unit in brackets have none in this file; such an amount is in the reference unit of its flow, which a separate flow dataset defines
copyright: true

## General comment
This data set has been modeled according to the European Standard EN 15804 for Sustainable Building. Results are depicted in modules that allow the structured expression of results over the entire life cycle.

## Geography
The data set represents the country specific situation in Germany, focusing on the main technologies, the region specific characteristics and / or import statistics.

## Time period
Annual average

## Technology and included processes
A CaSo4 beta hemihydrate serves as adhesive for plaster boards. Plaster (chemical denotation calcium sulphate) is available in different hydration levels, hydrous and anhydrous. Natural gypsum stone is dihydrate of calcium sulphate (CaSO4*2H2O). The anhydrous calcium sulphate found in nature is also known as anhydrite (CaSO4). Plaster is also produced in great quantities as by-product in industry. An example is REA-plaster. REA-plaster is obtained from exhaust emissions from flue gas desulphurisation. Thereby, the sulphur dioxide contained reacts with the additionally added limestone to plaster. REA-plaster is a dihydrate. With supply of thermic energy, the chemically bonded water in dihydrates can be evaporated partly or totally to water. Consequently, alpha and beta hemihydrates are produced. Alpha hemihydrates are the basic material for more rigid plasters, beta hemihydrates for more flexible. Hemihydrates are especially important for the building industry. Anhydrate is extracted at open pit mine plaster or underground mining. Dihydrate is extracted by open-cast mining. The system boundaries are represented by the finished product at the factory gate. Transports from the factory to the building site are not considered and must be included according to the system boundaries. Plaster-cardboard sandwiches are mainly composed of plaster (Beta hemihydrate), the surface is a cover of paperboard, often based on recycling paper.
Background system:
Electricity: Electricity is modelled according to the individual country-specific situations. The country-specific modelling is achieved on multiple levels. Firstly, individual energy carrier specific power plants and plants for renewable energy sources are modelled according to the current national electricity grid mix. Modelling the electricity consumption mix includes transmission / distribution losses and the own use by energy producers (own consumption of power plants and "other" own consumption e.g. due to pumped storage hydro power etc.), as well as imported electricity. Secondly, the national emission and efficiency standards of the power plants are modelled as well as the share of electricity plants and combined heat and power plants (CHP). Thirdly, the country-specific energy carrier supply (share of imports and / or domestic supply) including the country-specific energy carrier properties (e.g. element and energy content) are accounted for. Fourthly, the exploration, mining/production, processing and transport processes of the energy carrier supply chains are modelled according to the specific situation of each electricity producing country. The different production and processing techniques (emissions and efficiencies) in the different energy producing countries are considered, e.g. different crude oil production technologies or different flaring rates at the oil platforms.
Thermal energy, process steam: The thermal energy and process steam supply is modelled according to the individual country-specific situation with regard to emission standards and considered energy carriers. The thermal energy and process steam are produced at heat plants. Efficiencies for thermal energy production are by definition 100% in relation to the corresponding energy carrier input. For process steam the efficiency ranges from 85%, 90% to 95%. The energy carriers used for the generation of thermal energy and process steam are modelled according to the specific import situation (see electricity above).
Transports: All relevant and known transport processes are included. Ocean-going and inland ship transport as well as rail, truck and pipeline transport of bulk commodities are considered.
Energy carriers: The energy carriers are modelled according to the specific supply situation (see electricity above).
Refinery products: Diesel fuel, gasoline, technical gases, fuel oils, lubricants and residues such as bitumen are modelled with a parameterised country-specific refinery model. The refinery model represents the current national standard in refining techniques (e.g. emission level, internal energy consumption, etc.) as well as the individual country-specific product output spectrum, which can be quite different from country to country. The supply of crude oil is modelled, again, according to the country-specific situation with the respective properties of the resources.

## Technical purpose
This product can be used in construction.

## Safety margin
10 %. Product system almost completely covered. Good technological, temporal and geographic representativeness.

## Reference product
- Plasterboard adhesive: 1

## Inputs
- Use of renewable primary energy (PERE) [MJ]: A1-A3 0.142651, C2 0.00249555, C4 0.0287474
- Primary energy resources used as raw materials (PERM) [MJ]: A1-A3 0, C2 0, C4 0
- Total use of renewable primary energy resources (PERT) [MJ]: A1-A3 0.142651, C2 0.00249555, C4 0.0287474
- Use of non-renewable primary energy (PENRE) [MJ]: A1-A3 1.54147, C2 0.042867, C4 0.219027
- Non-renewable primary energy resources used as raw materials (PENRM) [MJ]: A1-A3 0, C2 0, C4 0
- Total use of non-renewable primary energy resources (PENRT) [MJ]: A1-A3 1.54147, C2 0.042867, C4 0.219027
- Input of secondary material (SM) [kg]: A1-A3 0, C2 0, C4 0
- Use of renewable secondary fuels (RSF) [MJ]: A1-A3 0, C2 0, C4 0
- Use of non renewable secondary fuels (NRSF) [MJ]: A1-A3 0, C2 0, C4 0
- Use of net fresh water (FW) [m3]: A1-A3 0.000157886, C2 2.23497e-6, C4 5.51079e-5

## Outputs
- Hazardous waste disposed (HWD) [kg]: A1-A3 1.02752e-9, C2 1.6019e-9, C4 3.33828e-9
- Non-hazardous waste disposed (NHWD) [kg]: A1-A3 0.000631729, C2 7.52392e-6, C4 1.10109
- Radioactive waste disposed (RWD) [kg]: A1-A3 1.72664e-5, C2 4.51302e-8, C4 2.45586e-6
- Components for re-use (CRU) [kg]: A1-A3 0, C2 0, C4 0
- Materials for Recycling (MFR) [kg]: A1-A3 0, C2 0, C4 0
- Material for Energy Recovery (MER) [kg]: A1-A3 0, C2 0, C4 0
- Exported electrical energy (EEE) [MJ]: A1-A3 0, C2 0, C4 0
- Exported thermal energy (EET) [MJ]: A1-A3 0, C2 0, C4 0

## Impact indicators
- Global warming potential (GWP) [kg CO2 eq.]: A1-A3 0.103165, C2 0.00319526, C4 0.0150055
- Ozone Depletion Potential (ODP) [kg R11 eq.]: A1-A3 7.7914e-16, C2 1.05569e-18, C4 8.33609e-17
- Acidification potential (AP) [kg SO2 eq.]: A1-A3 8.0222e-5, C2 7.11016e-6, C4 9.53255e-5
- Eutrophication potential (EP) [kg Phosphate eq.]: A1-A3 1.46446e-5, C2 1.7071e-6, C4 1.07251e-5
- Photochemical Ozone Creation Potential (POCP) [kg Ethene eq.]: A1-A3 9.65481e-6, C2 -2.42006e-6, C4 7.22809e-6
- Abiotic depletion potential for non fossil resources (ADPE) [kg Sb eq.]: A1-A3 1.16104e-8, C2 2.68387e-10, C4 1.52099e-9
- Abiotic depletion potential for fossil resources (ADPF) [MJ]: A1-A3 1.49787, C2 0.0427517, C4 0.212826

## Use advice
The data set represents a cradle to gate inventory. It can be used to characterise the supply chain situation of the respective commodity in a representative manner. Combination with individual unit processes using this commodity enables the generation of user-specific (product) LCAs.

## Data sources
- Datenerhebung in Gipswerken, 2007
- GaBi Database Edition 2020, SP40
- GaBi database (all versions)
