# Profiled sheets made of steel for roof, wall, deck and ceiling constructions

Dataset: ILCD process, EPD, average dataset
Geography: RER
Reference year: 2018
Valid until: 2023
Classification: OEKOBAU.DAT: Metalle / Stahl und Eisen / Stahlbleche
Classification: IBUCategories: 02 Building products / Metallic products and ancillaries / Thin walled profiles and profiled panels of metal
Method details: Thin walled profiles and profiled panels of metal.pdf
Generated by: thinkstep AG
Registration number: EPD-PPA-20180077-CBG2-EN
Owner: PPA-Europe
Compliance: DIN EN 15804; ISO 14025
Review: Accredited third party review by Institut Bauen und Umwelt e. V.
Amounts: rows without a unit in brackets have none in this file; such an amount is in the reference unit of its flow, which a separate flow dataset defines
copyright: true
licenseType: Free of charge for all users and uses
accessRestrictions: None

## General comment
The EPD is valid for prefabricated thin walled profiled sheets made of steel for load-bearing, self-supporting and non-supporting applications in single- and double-layer roof, wall, deck and ceiling structures. The profiled sheets are made of a core of steel, which is protected against corrosion with zinc and organic coatings. The LCA is based on vertical averaging of the specific producer datasets under consideration of the respective yearly production amounts.

## Technology and included processes
The profiled sheets made of steel, such as trapezoidal profiles, liner trays or standing seam profiles are prefabricated thin walled elements for load-bearing, self-supporting and non-supporting applications in single- and doublelayer roof, wall, deck and ceiling structures. They are made of a core of steel with zinc and organic coatings for protection against corrosion. The steel profiles are produced on continuously operating roll formers. This is a cold forming process, which begings by unwinding the steel coil. The roll forming machine is set in correspondence with the wished profile type. After forming, the sheets are cut at the wished length and stacked on each other.
Technical data:
Technical specifications for profiled sheets are:

/EN 14782/
/EN 508/
/EN 1090/
Declared unit:
The declared unit is 1 m2 of steel profile. The averaging is done weighted based on the production volume (in m²) per company.

## Technical purpose
The products are used as covering components in single- and double-layer roof and wall structures, as well as supporting tray in single- and double-layer roof, wall, deck and ceiling structures for mainly static loads. The profiled sheets are used in interior and exterior application.

## Reference product
- Steel profile (11.3 kg/m²): 1

## Inputs
- Renewable primary energy as energy carrier (PERE) [MJ]: A1-A3 21.7364, A4 0.0444863, C4 0.0284325, D 8.84291
- Renewable primary energy resources as material utilization (PERM) [MJ]: A1-A3 1.62106, A4 0, C4 0, D 0
- Total use of renewable primary energy resources (PERT) [MJ]: A1-A3 23.3575, A4 0.0444863, C4 0.0284325, D 8.84291
- Non renewable primary energy as energy carrier (PENRE) [MJ]: A1-A3 318.241, A4 0.886158, C4 0.243992, D -140.519
- Non renewable primary energy as material utilization (PENRM) [MJ]: A1-A3 0.573499, A4 0, C4 0, D 0
- Total use of non renewable primary energy resources (PENRT) [MJ]: A1-A3 318.814, A4 0.886158, C4 0.243992, D -140.519
- Use of secondary material (SM) [kg]: A1-A3 1.17, A4 0, A5 0.15, C4 0, D 9
- Use of renewable secondary fuels (RSF) [MJ]: A1-A3 6.25111e-22, A4 0, C4 0, D 0
- Use of non renewable secondary fuels (NRSF) [MJ]: A1-A3 7.34269e-21, A4 0, C4 0, D 0
- Use of net fresh water (FW) [m^3]: A1-A3 0.125699, A4 8.23116e-5, C4 4.64229e-5, D -0.00900174

## Outputs
- Hazardous waste disposed (HWD) [kg]: A1-A3 4.57756e-7, A4 4.65084e-8, C4 3.85834e-9, D -1.05638e-7
- Non hazardous waste disposed (NHWD) [kg]: A1-A3 0.363308, A4 6.76811e-5, C4 1.13116, D -0.217113
- Radioactive waste disposed (RWD) [kg]: A1-A3 0.00455446, A4 1.21326e-6, C4 3.3276e-6, D 0.00242429
- Components for re-use (CRU) [kg]: A1-A3 0, A4 0, C4 0, D 0
- Materials for recycling (MFR) [kg]: A1-A3 0, A4 0, C4 10.17, D 0
- Materials for energy recovery (MER) [kg]: A1-A3 0, A4 0, C4 0, D 0
- Exported electrical energy (EEE) [MJ]: A1-A3 0, A4 0, C4 0, D 0
- Exported thermal energy (EET) [MJ]: A1-A3 0, A4 0, C4 0, D 0

## Impact indicators
- Global warming potential (GWP) [kg CO_(2)-Äq.]: A1-A3 26.6733, A4 0.0638747, A5 0.85, C4 0.0182055, D -15.6069
- Depletion potential of the stratospheric ozone layer (ODP) [kg CFC11-Äq.]: A1-A3 4.91824e-10, A4 2.14105e-14, C4 1.84167e-14, D -7.12733e-11
- Acidification potential of land and water (AP) [kg SO_(2)-Äq.]: A1-A3 0.0913065, A4 0.000270011, C4 0.000107785, D -0.0598239
- Eutrophication potential (EP) [kg PO_(4)^(3)-Äq.]: A1-A3 0.00808959, A4 6.72053e-5, C4 1.46797e-5, D -0.00469182
- Formation potential of tropospheric ozone photochemical oxidants (POCP) [kg Ethen-Äq.]: A1-A3 0.011585, A4 -9.92021e-5, C4 8.61052e-6, D -0.00862472
- Abiotic depletion potential for non fossil resources (ADPE) [kg Sb-Äq.]: A1-A3 0.0020594, A4 5.13853e-9, C4 6.52628e-9, D 1.3983e-6
- Abiotic depletion potential for fossil resources (ADPF) [MJ]: A1-A3 307.462, A4 0.882589, C4 0.235596, D -146.652

## Use advice
Scope:
This document is an association EPD and it represents an average EPD, based on vertical averaging of the specific producer data under consideration of the yearly production amounts. Its applicability is limited to profiled sheets made of steel, which are manufactured by member companies of the European Association for Panels and Profiles.

The following eleven member companies of the European Association for Panels and Profiles have provided data for the year 2016:

1. ArcelorMittal Construction Deutschland

2. Fischer Profil

3. Hoesch Bausysteme

4. Isolpack

5. Italpannelli

6. Montana Bausysteme

7. N.V. Joris Ide Belgium

8. SAB-profiel

9. Salzgitter Bauelemente

10. Wurzer Profiliertechnik

11. Zambelli RIB-ROOF These companies are representative for the European production of profiled sheets made of steel.
System boundary:
Type of the EPD: cradle to gate - with options

Production stage (modules A1-A3) includes processes that provide materials and energy input for the system, manufacturing and transport processes up to the factory gate, as well as waste processing.For the end of life a collection rate of 90% is assumed. This means after use stage and demolishment, 10% of construction steel products is considered as lost. The loses are modelled with landfilling. The 90% recollected steel is modelled with a credit given as if it was re-melted in an Electric Arc Furnace secondary steel plan and substituted by the same amount of steel which is produced in a Blast Furnace primary steel plan (/worldsteel LCA methodology/).

Factors for different types
The LCA results for the steel profiles declared in the EPD refer to a trapezoidal 135/310 type with an average weight of 11.3 kg/m2.

In order to enable the user of the EPD to calculate the results for different profiles type the factors in the following table can be used for the calculation. For A1-A3, A4, C and D the LCA results of the declared product have to be multiplied with these factors.

The different types have the following average weight:Steel profiles standing seam: 7.5 kg/m2
Steel profiles liner tray: 11.1 kg/m2
Steel profiles trapezoidal 35/207: 7.1 kg/m2

The declared results for A5 are valid for all product variations.

## Data sources
- GaBi Database (all versions)
- GaBi database SP34 2017
