# Lithium bromide

Dataset: ILCD process, EPD, generic dataset
Geography: DE
Reference year: 2018
Valid until: 2022
Classification: oekobau.dat: Gebäudetechnik / Klimatisierung und Lüftung / Kältemittel
Owner: thinkstep
Compliance: DIN EN 15804
Review: Dependent internal review by thinkstep, IABP-GaBi, IBP-GaBi; Independent external review by GaBi user forum, GaBi bug forum, GaBi user community
Amounts: rows without a unit in brackets have none in this file; such an amount is in the reference unit of its flow, which a separate flow dataset defines
copyright: true

## General comment
This data set has been modeled according to the European Standard EN 15804 for Sustainable Building. Results are depicted in modules that allow the structured expression of results over the entire life cycle.

## Geography
The data set represents the country specific situation in Germany, focusing on the main technologies, the region specific characteristics and / or import statistics.

## Time period
annual average

## Technology and included processes
Lithium bromide is used together with water in absorption refrigeration systems, where water is the refrigerant. Depending on the system and boundary conditions, different mixing ratios are used. These must be determined at building level.

The production was modeled with lithium hydroxide and hydrobromic acid as basic materials, with hydrobromic acid dominating the LCA.

No emissions into the air are expected during the use phase (Module B1, lithium bromide is a non-volatile solid).

In the disposal phase any burdens were neglected, e.g. loads for deconstruction, transport to the disposal site.

In Module C4 100% landfill incl. pre-treatment of hazardous waste was accounted for (worst-case). No loads or benefits in Module D.

## Technical purpose
The usual purpose is the use in absorption refrigeration machines.

## Safety margin
10 %. Product system almost completely covered. Good technological, temporal and geographic representativeness.

## Reference product
- Lithium bromide 46% solution: 1

## Inputs
- Use of renewable primary energy (PERE) [MJ]: A1-A3 8.5658, C4 9.80168
- Primary energy resources used as raw materials (PERM) [MJ]: A1-A3 0, C4 0
- Total use of renewable primary energy resources (PERT) [MJ]: A1-A3 8.5658, C4 9.80168
- Use of non-renewable primary energy (PENRE) [MJ]: A1-A3 127.092, C4 142.472
- Non-renewable primary energy resources used as raw materials (PENRM) [MJ]: A1-A3 0, C4 0
- Total use of non-renewable primary energy resources (PENRT) [MJ]: A1-A3 127.092, C4 142.472
- Input of secondary material (SM) [kg]: A1-A3 0, C4 0
- Use of renewable secondary fuels (RSF) [MJ]: A1-A3 0, C4 0
- Use of non renewable secondary fuels (NRSF) [MJ]: A1-A3 0, C4 0
- Use of net fresh water (FW) [m3]: A1-A3 0.0432543, C4 0.0449826

## Outputs
- Hazardous waste disposed (HWD) [kg]: A1-A3 1.21037e-6, C4 1.22456e-6
- Non-hazardous waste disposed (NHWD) [kg]: A1-A3 1.24065, C4 3.05321
- Radioactive waste disposed (RWD) [kg]: A1-A3 0.00154794, C4 0.00172085
- Components for re-use (CRU) [kg]: A1-A3 0, C4 0
- Materials for Recycling (MFR) [kg]: A1-A3 0, C4 0
- Material for Energy Recovery (MER) [kg]: A1-A3 0, C4 0
- Exported electrical energy (EEE) [MJ]: A1-A3 0, C4 0
- Exported thermal energy (EET) [MJ]: A1-A3 0, C4 0

## Impact indicators
- Global warming potential (GWP) [kg CO2 eq.]: A1-A3 8.08139, C4 9.23499
- Ozone Depletion Potential (ODP) [kg R11 eq.]: A1-A3 1.80999e-10, C4 1.81005e-10
- Acidification potential (AP) [kg SO2 eq.]: A1-A3 0.0239287, C4 0.0258334
- Eutrophication potential (EP) [kg Phosphate eq.]: A1-A3 0.00313545, C4 0.00335069
- Photochemical Ozone Creation Potential (POCP) [kg Ethene eq.]: A1-A3 0.00177036, C4 0.00204487
- Abiotic depletion potential for non fossil resources (ADPE) [kg Sb eq.]: A1-A3 2.40762e-6, C4 2.51357e-6
- Abiotic depletion potential for fossil resources (ADPF) [MJ]: A1-A3 123.243, C4 138.186

## Use advice
The dataset refers to the manufacture, use and recycling of 1 kg of refrigerant. The dataset can not be used for the estimation of other refrigerants since environmental effects, durability and intended use can be very different.
For the calculation of the potential environmental effects through the use of the refrigerant at the building level, the specifications/calculation rules of the respective certification scheme must be followed. For a first estimate the following formulas may be used:

I_tot= I_(man.)+ I_use+ I_(disp.)

with

I_(man.) = I_(A1-A3) × m × a_b/a_r
I_use = (I_(A1-A3) × L × a_b ) + (I_B1 × L × a_b )
I_(disp.) = (I_B1 × m × a_b/a_r × E ) + (I_C4 × m × a_b/a_r × (1-E)) + (I_D × m × a_b/a_r × (1-E))

with:

I Indicator value of the respective life cycle stage
m Mass of the refrigerant [kg]
a_b Life time of the building [a]
a_r Life time of the refrigerant [a]
L Leakage rate [%/a]
E Disposal losses [%]

Typical values for the required mass m of the coolant in kg per kW nominal cooling capacity can be taken from Table 46 /UBA/ (see figures).
Approximate values for the usual service life a_KM, leakage rate L and disposal losses E can be taken from Table 50 /UBA/ (see figures).

/UBA/: Environment Federal Office (UBA), Climate-friendly air conditioning (heating and cooling) with natural refrigerants - Concepts for non-residential buildings with server rooms / data centers, 2016

## Data sources
- GaBi Database Edition 2020, SP40
- GaBi database (all versions)
