# Lose Zellulosedämmung

Dataset: ILCD process, EPD, average dataset
Geography: EU-25
Reference year: 2021
Valid until: 2026
Classification: OEKOBAU.DAT: Dämmstoffe / Zellulosefaser / Zellulose-Einblas-Dämmstoff
Classification: IBUCategories: 02 Bauprodukte / Wärmedämmungsprodukte / Einblasdämmstoffe aus Zellulose- und Holzfasern
Method details: Einblasdämmstoffe aus Zellulose- und Holzfasern.pdf
Generated by: IBO - Österreichisches Institut für Bauen und Ökologie GmbH
Registration number: EPD-ECI-20200217-ICG1-DE
Owner: European Cellulose Insulation Association (ECIA)
Compliance: DIN EN 15804; ISO 14025
Review: Accredited third party review by Institut Bauen und Umwelt e. V.
Amounts: rows without a unit in brackets have none in this file; such an amount is in the reference unit of its flow, which a separate flow dataset defines
copyright: true
licenseType: Free of charge for all users and uses
accessRestrictions: None

## General comment
Der Zellulosedämmstoff wird aus recyceltem Zeitungspapier und anorganischen Brandschutzmitteln hergestellt. Dieses Dämmmaterial wird für thermische wie akustische Zwecke hauptsächlich in Wänden, Dächern und Dachböden eingesetzt. Die Verarbeitung erfolgt mittels Einblasmaschinen durch Fachpersonal.

## Technology and included processes
Der Zellulosedämmstoff wird aus recyceltem Zeitungspapier und anorganischen Brandschutzmitteln hergestellt. Dieses Dämmmaterial wird für thermische wie akustische Zwecke hauptsächlich in Wänden, Dächern und Dachböden eingesetzt. Die Verarbeitung erfolgt mittels Einblasmaschinen durch Fachpersonal. Herstellung: Das Altpapier wird nach der Anlieferung von Verunreinigungen getrennt und geshreddert. Zum zerkleinerten Material werden Flammschutzmittel zugeführt. Anschließend wird der Zellulosedämmstoff komprimiert (auf ca. 140 kg/m³) und verpackt.
Technische Daten:
In folgender Tabelle sind die technischen Daten der Zellulosedämmung zu sehen.

Es handelt sich um Durchschnittswerte, basierend auf den Leistungswerten der einzelnen Produkte, gewichtet nach dem in Deutschland verkauften Anteil aus den jeweiligen Werken.
Deklarierte Einheit:
Die deklarierte Einheit der ökologischen Betrachtung ist die Bereitstellung von 1 kg Zellulosedämmstoff. Beim Output von A3 handelt es sich um 1 kg produziertes Produkt, in A5 wird dann 1 kg installiertes Material berechnet (inklusive Verschnitt).

Der Durchschnitt wurde mittels Marktanteiles in Deutschland der 7 Firmen von ECIA ermittelt.

Hinweis: für die Bilanzierung auf Gebäudeebene sind je nach Anwendungsfall unterschiedliche Dichten anzunehmen (siehe Kapitel 2.3).

## Technical purpose
Die Produkte werden in folgenden Anwendungsbereichen eingesetzt: • Dachböden;
• Dachanwendungen;
• Wandanwendungen.

## Reference product
- Zellulosedämmstoff: 1

## Inputs
- Erneuerbare Primärenergie als Energieträger (PERE) [MJ]: A1-A3 1.04401, A4 0.0450856, A5 0.0228736, C1 0.00285778, C2 0.00417394, C3 0.0503756, D -1.21442
- Erneuerbare Primärenergie zur stofflichen Nutzung (PERM) [MJ]: A1-A3 12.6653, A4 0, A5 0, C1 0, C2 0, C3 0, D 0
- Total erneuerbare Primärenergie (PERT) [MJ]: A1-A3 13.7094, A4 0.0450856, A5 0.0228736, C1 0.00285778, C2 0.00417394, C3 0.0503756, D -1.21442
- Nicht-erneuerbare Primärenergie als Energieträger (PENRE) [MJ]: A1-A3 3.71595, A4 0.785504, A5 0.122032, C1 0.0497897, C2 0.073702, C3 0.401017, D -7.92227
- Nicht-erneuerbare Primärenergie zur stofflichen Nutzung (PENRM) [MJ]: A1-A3 0, A4 0, A5 0, C1 0, C2 0, C3 0, D 0
- Total nicht erneuerbare Primärenergie (PENRT) [MJ]: A1-A3 3.71595, A4 0.785504, A5 0.122032, C1 0.0497897, C2 0.073702, C3 0.401017, D -7.92227
- Einsatz von Sekundärstoffen (SM) [kg]: A1-A3 0.898252, A4 0, A5 0, C1 0, C2 0, C3 0, D 0
- Erneuerbare Sekundärbrennstoffe (RSF) [MJ]: A1-A3 0, A4 0, A5 0, C1 0, C2 0, C3 0, D 0
- Nicht erneuerbare Sekundärbrennstoffe (NRSF) [MJ]: A1-A3 0, A4 0, A5 0, C1 0, C2 0, C3 0, D 0
- Einsatz von Süßwasserressourcen (FW) [m^3]: A1-A3 0.000934183, A4 0.000111433, A5 8.61048e-5, C1 7.06323e-6, C2 1.04548e-5, C3 0, D -0.00291986

## Outputs
- Gefährlicher Abfall zur Deponie (HWD) [kg]: A1-A3 2.90842e-7, A4 9.65982e-9, A5 9.65982e-9, C1 3.72864e-9, C2 5.57365e-9, C3 9.02834e-10, D -2.51936e-9
- Entsorgter nicht gefährlicher Abfall (NHWD) [kg]: A1-A3 0.00670334, A4 0.0154826, A5 0.0154826, C1 4.28921e-6, C2 6.19309e-6, C3 0.0252842, D -0.00114524
- Entsorgter radioaktiver Abfall (RWD) [kg]: A1-A3 2.87164e-5, A4 1.89342e-6, A5 1.89342e-6, C1 1.06557e-7, C2 1.05374e-7, C3 1.8829e-5, D -0.000339569
- Komponenten für die Wiederverwendung (CRU) [kg]: A1-A3 0, A4 0, A5 0, C1 0, C2 0, C3 0, D 0
- Stoffe zum Recycling (MFR) [kg]: A1-A3 0, A4 0, A5 0.0163696, C1 0, C2 0, C3 0, D 0
- Stoffe für die Energierückgewinnung (MER) [kg]: A1-A3 0, A4 0, A5 0.0122814, C1 0, C2 0, C3 0.896327, D -0.908608
- Exportierte elektrische Energie (EEE) [MJ]: A1-A3 0, A4 0, A5 0.061316, C1 0, C2 0, C3 1.65286, D -1.71417
- Exportierte thermische Energie (EET) [MJ]: A1-A3 0, A4 0, A5 0.139787, C1 0, C2 0, C3 3.8949, D -4.03469

## Impact indicators
- Globales Erwärmungspotenzial (GWP) [kg CO_(2)-Äq.]: A1-A3 -1.23155, A4 0.0576857, A5 0.04293, C1 0.000562485, C2 0.00541002, C3 1.45263, D -0.446603
- Abbau Potential der stratosphärischen Ozonschicht (ODP) [kg CFC11-Äq.]: A1-A3 5.68651e-9, A4 4.10529e-13, A5 1.54959e-10, C1 2.60217e-14, C2 2.45043e-14, C3 1.78726e-9, D -1.03695e-10
- Versauerungspotenzial von Boden und Wasser (AP) [kg SO_(2)-Äq.]: A1-A3 0.00108224, A4 0.000275175, A5 5.10966e-5, C1 3.08185e-6, C2 3.34129e-5, C3 0.000312564, D -0.000760497
- Eutrophierungspotenzial (EP) [kg PO_(4)^(3)-Äq.]: A1-A3 9.90253e-5, A4 6.80733e-5, A5 1.23993e-5, C1 5.36933e-7, C2 8.37909e-6, C3 5.91935e-5, D -7.86343e-5
- Bildungspotential für troposphärisches Ozon (POCP) [kg Ethen-Äq.]: A1-A3 5.41259e-5, A4 -0.000105534, A5 -7.18342e-6, C1 4.53867e-7, C2 -1.39814e-5, C3 2.07246e-5, D -8.96993e-5
- Potenzial für den abiotischen Abbau nicht fossiler Ressourcen (ADPE) [kg Sb-Äq.]: A1-A3 0.000395545, A4 4.24486e-9, A5 8.0841e-6, C1 2.69064e-10, C2 3.54932e-10, C3 3.2853e-5, D -8.36507e-8
- Potenzial für den abiotischen Abbau fossiler Brennstoffe (ADPF) [MJ]: A1-A3 3.41747, A4 0.781223, A5 0.112971, C1 0.0495183, C2 0.0734319, C3 0.341645, D -6.87401

## Use advice
Gültigkeitsbereich:
Es handelt sich um eine Durchschnitts-EPD für den deutschen Markt. Die Ökobilanz basiert auf den Prozess- und Produktionsdaten, die von 7 Mitgliedern der European Cellulose Insulation Association (ECIA) zur Verfügung gestellt wurden. Folgende Hersteller sind berücksichtigt:

• Cellulosedämmstoffproduktion Hartberg, Isocell Österreich

• Cellulosedämmstoffproduktion Amel, Isocell Belgien
• CIUR a.s., Tschechien
• CWA Cellulosewerk Angelbachtal GmbH, Deutschland

• Dämmstatt GmbH, Deutschland
• ISOPROC cvba, Belgien
• WOLFINGER GmbH, Österreich
Systemgrenze:
Es handelt sich um eine EPD „von der Wiege bis zum Werkstor mit Optionen“ (A1-A3, A4, A5, C1-C4 und Modul D).

Im Modul A1 wird die Herstellung der Brandschutzmittel und die Bereitstellung des Altpapiers berechnet. Der Transport der Einsatzstoffe wird im Modul A2 abgebildet. Die Herstellung (Modul A3) beinhaltet die Aufbereitung des Altpapiers, den Energieeinsatz für die Produktionsanlage sowie weitere Einsatz- und Betriebsstoffe wie Wasser, Diesel und anfallende Abfälle.

In der Auslieferung (Modul A4) werden die Transporte zu den Kunden bilanziert.

Beim Einbau (Modul A5) werden notwendige Energieeinsätze, der Verschleiß sowie die anfallenden Verpackungsmaterialien berechnet.

In der Entsorgungsphase wird in die Energie für den Abbruch (Modul C1), den Transport zur Verbrennungsanlage (Modul C2) und die thermische Verwertung mit Energierückgewinnung (Modul C3) berücksichtigt.

Die Gutschriften der thermischen Verwertung werden in Modul D, außerhalb der Systemgrenze, berücksichtigt.

## Data sources
- GaBi Database (all versions)
- GaBi database SP30 2016
