# Sarnafil TS 77-E

Dataset: ILCD process, EPD, specific dataset
Geography: DE
Reference year: 2020
Valid until: 2025
Classification: OEKOBAU.DAT: Kunststoffe / Dachbahnen / TPO-Dachbahnen (FPO)
Classification: IBUCategories: 02 Bauprodukte / Abdichtungen / Dach- und Dichtungsbahnsysteme aus Kunststoffen und Elastomeren
Method details: Dach- und Dichtungsbahnsysteme aus Kunststoffen und Elastomeren.pdf
Generated by: Sika Services AG
Registration number: EPD-SIK-20190187-IBA1-DE
Owner: Sika Deutschland GmbH
Compliance: DIN EN 15804; ISO 14025
Review: Accredited third party review by Institut Bauen und Umwelt e. V.
Amounts: rows without a unit in brackets have none in this file; such an amount is in the reference unit of its flow, which a separate flow dataset defines
copyright: true
licenseType: Free of charge for all users and uses
accessRestrictions: None

## General comment
Sarnafil® TS 77-E polymeric waterproofing membrane is made of flexible polyolefin (FPO) and is treated with flame retardant and stabilizers against UV radiation. An inlay of glass non-woven and polyester reinforcement is encapsulated within the sheet.

Sarnafil® TS 77-E polymeric waterproofing membrane is available in the following thicknesses: 1.5 mm (TS 77-15 E), 1.8 mm (TS 77-18 E) and 2.0 mm (TS 77-20 E).

## Technology and included processes
Sarnafil® TS 77-E polymeric waterproofing sheets are manufactured on production lines developed in-house in the following stages: Melting of the polymeric components and additives in extruders Dispersing of the molten materials Coating of the carrier or the reinforcing in layers, producing homogenous encapsulation Cooling of the polymeric waterproofing sheet Winding of the sheets onto cardboard spools made of recycled paper Individually wrapping each roll The quality management system of the Sarnen plant has been ISO 9001 certified since 1993.
Declared unit:
This declaration applies to 1 m2 of installed Sarnafil® TS 77-E polymeric waterproofing membrane, thickness 2.0 mm.

A formula is given in Chapter 5 for independent calculation of the values for other thicknesses.

## Technical purpose
Sarnafil® TS 77-E polymeric waterproofing membrane is used exclusively to seal unballasted flat roofs. On roofs with a slope of ≥ 20°, the roofing sheets should be loose laid and mechanically fastened. Sarnafil® TS 77-E polymeric waterproofing membrane provides greater protection against fire than does Sarnafil® TS 77 polymeric waterproofing membrane.

## Scenarios
- S0: Scenario 0
- S1: 100% recycling
- S2: 100% thermal energy recovery

## Reference product
- 1 m² Dachbahn (): 1

## Inputs
- Renewable primary energy as energy carrier (PERE) [MJ]: A1-A3 8.38, A4 0.0902, A5 1.06, C1 0, C2 (S1) 0.0369, C2 (S2) 0.00737, C3 (S1) 0.929, C3 (S2) 0.178, C4 0, D (S1) -6.71, D (S2) -18.6
- Renewable primary energy resources as material utilization (PERM) [MJ]: A1-A3 1.99, A4 0, A5 -0.159, C1 0, C2 (S1) 0, C2 (S2) 0, C3 (S1) 0, C3 (S2) 0, C4 0, D (S1) 0, D (S2) 0
- Total use of renewable primary energy resources (PERT) [MJ]: A1-A3 10.4, A4 0.0902, A5 0.905, C1 0, C2 (S1) 0.0369, C2 (S2) 0.00737, C3 (S1) 0.929, C3 (S2) 0.178, C4 0, D (S1) -6.71, D (S2) -18.6
- Non renewable primary energy as energy carrier (PENRE) [MJ]: A1-A3 49.5, A4 1.48, A5 4.26, C1 0, C2 (S1) 0.636, C2 (S2) 0.127, C3 (S1) 62, C3 (S2) 61.2, C4 0, D (S1) -142, D (S2) -59.9
- Non renewable primary energy as material utilization (PENRM) [MJ]: A1-A3 57, A4 0, A5 4.53, C1 0, C2 (S1) 0, C2 (S2) 0, C3 (S1) -60.2, C3 (S2) -60.2, C4 0, D (S1) 0, D (S2) 0
- Total use of non renewable primary energy resources (PENRT) [MJ]: A1-A3 106, A4 1.48, A5 8.8, C1 0, C2 (S1) 0.636, C2 (S2) 0.127, C3 (S1) 1.78, C3 (S2) 1, C4 0, D (S1) -142, D (S2) -59.9
- Use of secondary material (SM) [kg]: A1-A3 0.0687, A4 0, A5 0.0055, C1 0, C2 (S1) 0, C2 (S2) 0, C3 (S1) 0, C3 (S2) 0, C4 0, D (S1) -2.43, D (S2) 0
- Use of renewable secondary fuels (RSF) [MJ]: A1-A3 1.78e-21, A4 0, A5 1.42e-22, C1 0, C2 (S1) 0, C2 (S2) 0, C3 (S1) 0, C3 (S2) 0, C4 0, D (S1) 0, D (S2) 0
- Use of non renewable secondary fuels (NRSF) [MJ]: A1-A3 2.08e-20, A4 0, A5 1.67e-21, C1 0, C2 (S1) 0, C2 (S2) 0, C3 (S1) 0, C3 (S2) 0, C4 0, D (S1) 0, D (S2) 0
- Use of net fresh water (FW) [m^3]: A1-A3 0.0187, A4 0.000104, A5 0.00204, C1 0, C2 (S1) 6.23e-5, C2 (S2) 1.25e-5, C3 (S1) 0.000971, C3 (S2) 0.0173, C4 0, D (S1) -0.0163, D (S2) -0.0195

## Outputs
- Hazardous waste disposed (HWD) [kg]: A1-A3 2.42e-6, A4 8.44e-8, A5 2.01e-7, C1 0, C2 (S1) 3.55e-8, C2 (S2) 7.1e-9, C3 (S1) 1.72e-9, C3 (S2) 7.98e-10, C4 0, D (S1) -3.54e-8, D (S2) -2.59e-8
- Non hazardous waste disposed (NHWD) [kg]: A1-A3 0.254, A4 9.91e-5, A5 0.0224, C1 0, C2 (S1) 5.17e-5, C2 (S2) 1.03e-5, C3 (S1) 0.0238, C3 (S2) 0.0317, C4 0, D (S1) -0.0188, D (S2) -0.0413
- Radioactive waste disposed (RWD) [kg]: A1-A3 0.00227, A4 1.76e-6, A5 0.000195, C1 0, C2 (S1) 8.62e-7, C2 (S2) 1.72e-7, C3 (S1) 0.000164, C3 (S2) 6.43e-5, C4 0, D (S1) -0.00138, D (S2) -0.00697
- Components for re-use (CRU) [kg]: A1-A3 0, A4 0, A5 0, C1 0, C2 (S1) 0, C2 (S2) 0, C3 (S1) 0, C3 (S2) 0, C4 0, D (S1) 0, D (S2) 0
- Materials for recycling (MFR) [kg]: A1-A3 0, A4 0, A5 0, C1 0, C2 (S1) 0, C2 (S2) 0, C3 (S1) 2.43, C3 (S2) 0, C4 0, D (S1) 0, D (S2) 0
- Materials for energy recovery (MER) [kg]: A1-A3 0, A4 0, A5 0, C1 0, C2 (S1) 0, C2 (S2) 0, C3 (S1) 0, C3 (S2) 0, C4 0, D (S1) 0, D (S2) 0
- Exported electrical energy (EEE) [MJ]: A1-A3 0, A4 0, A5 0.426, C1 0, C2 (S1) 0, C2 (S2) 0, C3 (S1) 0.605, C3 (S2) 17.5, C4 0, D (S1) 0, D (S2) 0
- Exported thermal energy (EET) [MJ]: A1-A3 0, A4 0, A5 0.759, C1 0, C2 (S1) 0, C2 (S2) 0, C3 (S1) 1.1, C3 (S2) 31.1, C4 0, D (S1) 0, D (S2) 0

## Impact indicators
- Global warming potential (GWP) [kg CO_(2)-Äq.]: A1-A3 3.72, A4 0.111, A5 0.532, C1 0, C2 (S1) 0.0468, C2 (S2) 0.00936, C3 (S1) 0.294, C3 (S2) 8, C4 0, D (S1) -3.41, D (S2) -2.89
- Depletion potential of the stratospheric ozone layer (ODP) [kg CFC11-Äq.]: A1-A3 1.5e-8, A4 3.77e-17, A5 1.2e-9, C1 0, C2 (S1) 7.72e-18, C2 (S2) 1.54e-18, C3 (S1) 5.61e-15, C3 (S2) 7.43e-16, C4 0, D (S1) -2.4e-9, D (S2) -2.4e-9
- Acidification potential of land and water (AP) [kg SO_(2)-Äq.]: A1-A3 0.00825, A4 0.000245, A5 0.000715, C1 0, C2 (S1) 0.000109, C2 (S2) 2.18e-5, C3 (S1) 0.00027, C3 (S2) 0.000515, C4 0, D (S1) -0.00541, D (S2) -0.00408
- Eutrophication potential (EP) [kg PO_(4)^(3)-Äq.]: A1-A3 0.0017, A4 6.12e-5, A5 0.000148, C1 0, C2 (S1) 2.72e-5, C2 (S2) 5.45e-6, C3 (S1) 4.53e-5, C3 (S2) 0.000109, C4 0, D (S1) -0.000729, D (S2) -0.000434
- Formation potential of tropospheric ozone photochemical oxidants (POCP) [kg Ethen-Äq.]: A1-A3 0.000991, A4 -8.7e-5, A5 7.43e-5, C1 0, C2 (S1) -3.64e-5, C2 (S2) -7.28e-6, C3 (S1) 1.74e-5, C3 (S2) 5.28e-5, C4 0, D (S1) -0.00098, D (S2) -0.000436
- Abiotic depletion potential for non fossil resources (ADPE) [kg Sb-Äq.]: A1-A3 7.48e-6, A4 1.05e-8, A5 6.05e-7, C1 0, C2 (S1) 3.6e-9, C2 (S2) 7.2e-10, C3 (S1) 6.27e-8, C3 (S2) 4.38e-8, C4 0, D (S1) -8.66e-7, D (S2) -7.76e-7
- Abiotic depletion potential for fossil resources (ADPF) [MJ]: A1-A3 100, A4 1.47, A5 8.25, C1 0, C2 (S1) 0.633, C2 (S2) 0.127, C3 (S1) 1.36, C3 (S2) 0.841, C4 0, D (S1) -138, D (S2) -41.9

## Use advice
Scope:
This document applies to Sarnafil® TS 77-E polymeric waterproofing membrane in thicknesses of 1.5, 1.8, 2.0 and 2.5 mm manufactured by Sika Services AG in CH-6060 Sarnen (Switzerland).

The EPD covers the production of the waterproofing membrane, transport of the product to the construction site, installation of the waterproofing membrane, disposal, as well as benefits and loads outside the system limits. The model was calculated on the basis of production data for the thickness 2.0 mm provided by Sika Services AG from the year 2018.
System boundary:
Type of EPD: Cradle to gate with options

The system boundaries of the EPD follow the modular structure set forth by EN 15804. The LCA takes into account the following modules:

A1-A3: Extraction, processing and transport of raw materials (e.g. polymers, pigments, processing aids, stabilizers, fillers, flame retardants and carrier materials) used for the production of intermediate products and the waterproofing membrane and the packaging materials used to package the waterproofing membranes, such as wooden pallets, cardboard and PE film, for transport to the plant. Waste processing of production waste (edge trim), which occurs during the production of the waterproofing membrane.
A4: Transport of the waterproofing membrane to the building site
A5: Installation of the waterproofing membrane into the building by means of hot-air welding (including welding energy and water consumption), disposal or recycling of packaging, and waterproofing membrane scraps
C1: Manual deconstruction and removal of the waterproofing membrane (recovery)
C2: Transport of the recovered waterproofing membrane to waste-processing facility
C3: Processing of the recovered waterproofing membrane for material recycling (Scenario 1 – C3/1) or thermal energy recovery (Scenario 2 – C3/2)
C4: Disposal of the recovered waterproofing membrane in landfill
D: Benefits for reuse, recovery and/or recycling (through thermal energy recovery, recycling of the recovered waterproofing membrane and reuse of the wooden pallets)

## Data sources
- GaBi Database (all versions)
- GaBi database SP39 2019
