# Stabilenka®

Dataset: ILCD process, EPD, representative dataset
Geography: DE
Reference year: 2016
Valid until: 2021
Classification: OEKOBAU.DAT: Kunststoffe / Folien und Vliese / Technische Textilien
Classification: IBUCategories: 02 Bauprodukte / Bedachungen / Technische Textilien
Method details: Technische Textilien.pdf
Owner: HUESKER Synthetic GmbH
Compliance: DIN EN 15804; ISO 14025
Review: Accredited third party review by IBU
Amounts: rows without a unit in brackets have none in this file; such an amount is in the reference unit of its flow, which a separate flow dataset defines
copyright: false

## General comment
Stabilenka® is a high-quality, water-permeable woven fabric for soil reinforcement. High tensile strength, low-creep Stabilenka® woven fabric can permanently accommodate high tensile forces even at very low elongations. When subjected to a permanent load equal to 50% of the short-term strength, the low-creep yarn ensures that the creep strain does not exceed 1% after two years. Stabilenka® thus lends itself to a wide variety of applications, such as earthwork reinforcement or sludge lagoon capping.

Stabilenka® is woven or knitted with polyester in the longitudinal direction (warp) and in the transverse direction (weft). The use of high-modulus polyester multifilament yarn and a special patented weaving process (straight warp) allows Stabilenka® to mobilise high tensile forces at low strains. Stabilenka® is manufactured in ten standard versions with maximum tensile strengths up to 1000 kN/m in the main loading direction. Special models with higher strengths can be fabricated on request.

This Life Cycle Assessment examines an average product. This product is based on the averages of the following product items:

Stabilenka® 100/50 (woven)
Stabilenka® 150/45 (woven)
Stabilenka® 200/45 (woven)
Stabilenka® 300/45 (knitted)
Stabilenka® 400/50 (knitted)
Stabilenka® 600/50 (knitted)
Stabilenka® 800/100 (knitted)
Stabilenka® 1000/100 (knitted) The average was established by adding the LCA results for each individual product and dividing by the number of product items. The surface reference can be applied for deriving specific values for each product item.
The products do not differ in their composition. The differences are to be found in the mass per unit area and the technical characteristics.

## Technology and included processes
The woven fabric structure is manufactured on textile machines, whereby Stabilenka® 100/50 to 200/45 are woven while Stabilenka® 300/45 to 1000/100 are knitted. The transverse (weft) and longitudinal (warp) yarns are entirely made of polyester. Depending on the model, the geosynthetic woven fabric has an area of between 500 and 1,500m² and a width of 5 metres. The geosynthetic is wound onto steel cores. The goods are packaged by winding onto steel cores followed by sheathing in PE foil.
Technical data:
The following section outlines details on product performance in terms of their essential characteristics in accordance with EN 13249 et seq. were included and specified in the Declaration of Performance.
Declared unit:
The average was established by adding the LCA results for each individual product and divided by the number of product items. The surface reference can be applied for deriving specific values for each product item.
1 m² geosynthetic woven fabric was selected as the declared unit in accordance with /PCR, Part B/.
The conversion factor and surface reference for individual products are indicated in the following table.

## Technical purpose
Stabilenka® geosynthetics have represented designs with technical and economic advantages since 1974. The Stabilenka® product group is installed and used as primary reinforcement in a wide variety of earthworks. For example, in the following areas of application:

Soil reinforcement
Dam construction
Landfill construction
Hydraulic engineering
Reinforced earth-retaining structures

## Reference product
- 1 m2 geosynthetisches Gewebe: 1

## Inputs
- Erneuerbare Primärenergie als Energieträger (PERE) [MJ]: A1-A3 4.60046
- Erneuerbare Primärenergie zur stofflichen Nutzung (PERM) [MJ]
- Total erneuerbare Primärenergie (PERT) [MJ]: A1-A3 4.60046
- Nicht-erneuerbare Primärenergie als Energieträger (PENRE) [MJ]: A1-A3 68.2152
- Nicht-erneuerbare Primärenergie zur stofflichen Nutzung (PENRM) [MJ]: A1-A3 19.3
- Total nicht erneuerbare Primärenergie (PENRT) [MJ]: A1-A3 87.5108
- Einsatz von Sekundärstoffen (SM) [kg]
- Erneuerbare Sekundärbrennstoffe (RSF) [MJ]
- Nicht erneuerbare Sekundärbrennstoffe (NRSF) [MJ]
- Einsatz von Süßwasserressourcen (FW) [m^3]: A1-A3 0.0186

## Outputs
- Gefährlicher Abfall zur Deponie (HWD) [kg]: A1-A3 1.44703e-5
- Entsorgter nicht gefährlicher Abfall (NHWD) [kg]: A1-A3 5.60547
- Entsorgter radioaktiver Abfall (RWD) [kg]: A1-A3 0.00312502
- Komponenten für die Wiederverwendung (CRU) [kg]
- Stoffe zum Recycling (MFR) [kg]
- Stoffe für die Energierückgewinnung (MER) [kg]
- Exportierte elektrische Energie (EEE) [MJ]
- Exportierte thermische Energie (EET) [MJ]

## Impact indicators
- Globales Erwärmungspotenzial (GWP) [kg CO_(2)-Äq.]: A1-A3 3.77416
- Abbau Potential der stratosphärischen Ozonschicht (ODP) [kg CFC11-Äq.]: A1-A3 8.487e-10
- Versauerungspotenzial von Boden und Wasser (AP) [kg SO_(2)-Äq.]: A1-A3 0.0099114
- Eutrophierungspotenzial (EP) [kg PO_(4)^(3)-Äq.]: A1-A3 0.000786679
- Bildungspotential für troposphärisches Ozon (POCP) [kg Ethen-Äq.]: A1-A3 0.00199157
- Potenzial für den abiotischen Abbau nicht fossiler Ressourcen (ADPE) [kg Sb-Äq.]: A1-A3 9.08485e-7
- Potenzial für den abiotischen Abbau fossiler Brennstoffe (ADPF) [MJ]: A1-A3 79.6569

## Use advice
Scope:
Stabilenka® geosynthetic woven fabric is manufactured in the HUESKER Synthetic GmbH plants in Dülmen and Gescher, Germany. This EPD was created for an average product in the Stabilenka® product range. The surface reference can be applied for deriving specific values for each product item.
System boundary:
This Environmental Product Declaration is a cradle-to-gate EPD, i.e. all potential environmental impacts by the product from the cradle to the plant gate are considered. In accordance with /DIN EN 15804/, this applies to product phases A1-A3. The following production steps were considered during the manufacturing phase:

Manufacture of the synthetic yarn
Transport between the Dülmen and Gescher plants
Manufacture of the geosynthetic woven fabric (twisting process, weaving/knitting process)
Packing the geosynthetic woven fabric

## Data sources
- Stabilenka®.pdf
- GaBi Database (all versions)
- GaBi database SP29 2016
