# Scheucher Multilayer Parquet

Dataset: ILCD process, EPD, average dataset
Geography: AT
Reference year: 2020
Valid until: 2025
Classification: OEKOBAU.DAT: Holz / Holzböden / Parkett
Classification: IBUCategories: 02 Bauprodukte / Produkte aus Bauholz / Vollholzprodukte
Method details: Vollholzprodukte.pdf
Registration number: EPD-SCP-20200238-IBC1-DE
Owner: Scheucher Holzindustrie GmbH
Compliance: DIN EN 15804; ISO 14025
Review: Accredited third party review by Institut Bauen und Umwelt e. V.
Amounts: rows without a unit in brackets have none in this file; such an amount is in the reference unit of its flow, which a separate flow dataset defines
copyright: true

## General comment
Scheucher produces multilayer parquet flooring:

3-layer parquet WOODflor® (3-strip, planks)
Top layer: various hardwoods
Core layer: spruce, pine
Balancing: spruce
2-layer parquet BILAflor®
Top layer: various hardwoods
Substrate: spruce

2-layer parquet MULTIflor NOVOLOC® 5G

Top layer: various hardwoods
Substrate: plywood panel

The declared product represents a surface-weighted average of the ranges manufactured.

## Technology and included processes
Purchased lamellae are glued as a top layer after drying, planing, separating and sorting. Then they are processed to WOODflor®, BILAflor®- or MULTIflor NOVOLOC® 5G-multilayer parquet. Purchased top layers are tested piece by piece for grading and quality and processed to WOODflor®, BILAflor®- or MULTIflor NOVOLOC® 5G multilayer parquet as well. Top layers are glued together with the substrate and balancing veneer if applicable. After an acclimatisation phase, the planks get puttied when necessary, all boards are sanded and treated with UV varnish or an oxidative drying oil/wax. After profiling with tongue-and-groove connections or a click profile for glueless installation (NovoLOC® 5G), the boards are packed for shipping and stored in air-conditioned warehouse until delivery.
Technical data:
The following information must be provided in accordance with EU Directive No. 305/2011:
Declared unit:
This EPD refers to a declared unit of 1 m² of Scheucher multilayer parquet with an average surface weight of 7,37 kg/m² at 6-9 % moisture at delivery.

## Technical purpose
Multilayer parquet flooring manufactured by Scheucher is intended for installation in Grade 1 interior applications (heated interiors with largely constant temperatures and climatic conditions typical for living areas).

WOODflor® can be installed with or without adhesives. BILAflor® and MULTIflor NOVOLOC® 5G must be installed fully glued down to subfloor.

## Reference product
- 1 m² Mehrschichtparkett: 1

## Inputs
- Renewable primary energy as energy carrier (PERE) [MJ]: A1-A3 124.721, C3 125.48, D -28.7997
- Renewable primary energy resources as material utilization (PERM) [MJ]: A1-A3 125.018, C3 -125.018, D 0
- Total use of renewable primary energy resources (PERT) [MJ]: A1-A3 249.738, C3 0.462353, D -28.7997
- Non renewable primary energy as energy carrier (PENRE) [MJ]: A1-A3 76.4507, C3 11.7986, D -117.147
- Non renewable primary energy as material utilization (PENRM) [MJ]: A1-A3 10.7545, C3 -10.7545, D 0
- Total use of non renewable primary energy resources (PENRT) [MJ]: A1-A3 87.2052, C3 1.04409, D -117.147
- Use of secondary material (SM) [kg]: A1-A3 0.0378, C3 0, D 0
- Use of renewable secondary fuels (RSF) [MJ]: A1-A3 1.2, C3 0, D 115.838
- Use of non renewable secondary fuels (NRSF) [MJ]: A1-A3 0, C3 0, D -107.119
- Use of net fresh water (FW) [m^3]: A1-A3 1.05784, C3 0.0005346, D -0.0238226

## Outputs
- Hazardous waste disposed (HWD) [kg]: A1-A3 8.84727e-7, C3 4.31931e-10, D -4.6363e-8
- Non hazardous waste disposed (NHWD) [kg]: A1-A3 0.145247, C3 0.000740236, D 0.00546322
- Radioactive waste disposed (RWD) [kg]: A1-A3 0.00459364, C3 0.000158313, D -0.00984819
- Components for re-use (CRU) [kg]: A1-A3 0, C3 0, D 0
- Materials for recycling (MFR) [kg]: A1-A3 0, C3 0, D 0
- Materials for energy recovery (MER) [kg]: A1-A3 0, C3 7.71439, D 0
- Exported electrical energy (EEE) [MJ]: A1-A3 0, C3 0, D 0
- Exported thermal energy (EET) [MJ]: A1-A3 0, C3 0, D 0

## Impact indicators
- Global warming potential (GWP) [kg CO_(2)-Äq.]: A1-A3 -6.70672, C3 12.1575, D -6.48162
- Depletion potential of the stratospheric ozone layer (ODP) [kg CFC11-Äq.]: A1-A3 6.68918e-8, C3 1.74035e-15, D -1.08154e-13
- Acidification potential of land and water (AP) [kg SO_(2)-Äq.]: A1-A3 0.0203198, C3 0.000106464, D 0.00337253
- Eutrophication potential (EP) [kg PO_(4)^(3)-Äq.]: A1-A3 0.00485619, C3 1.30307e-5, D 0.000227496
- Formation potential of tropospheric ozone photochemical oxidants (POCP) [kg Ethen-Äq.]: A1-A3 0.00323856, C3 8.70386e-6, D 0.00130513
- Abiotic depletion potential for non fossil resources (ADPE) [kg Sb-Äq.]: A1-A3 3.86667e-6, C3 1.8158e-8, D -1.29081e-6
- Abiotic depletion potential for fossil resources (ADPF) [MJ]: A1-A3 74.6993, C3 0.645605, D -92.3581

## Use advice
Scope:
This Environmental Product Declaration refers to a declared unit of 1 m² average Scheucher multilayer parquet produced at the production site in Mettersdorf.
System boundary:
The life cycle assessment of average Scheucher multilayer parquet refers to a cradle-to-gate analysis with modules C1-C3 and D (A1-A3, +C, +D). The following life-cycle phases are taken into consideration in the analysis:

Module A1-A3 Production stage

The production stage includes the upstream burdens of raw material supply (wood, adhesive system, etc.) and their transports to the manufacturing plant in Mettersdorf. The provision of thermal energy is taken into account at the production stage in the form of the factory's own furnace. Electricity is obtained from the photovoltaic system on the roof of the production halls as well as from the regional electricity grid.

Module C3 Waste processing

Module C3 declares the biogenic carbon dioxide emissions during energetic utilisation at the end of the product's life. In addition, the chipping after removal of the product is considered.

Module D Benefits and loads beyond the system boundary

Module D describes the energetic recovery of the product at the end of life, including the corresponding energy substitution potentials in the form of an European average scenario.

## Data sources
- Scheucher Mehrschichtparkett.pdf
- GaBi Database (all versions)
- GaBi database SP40 2020
