# Glas - Promat GmbH - Promaglas G30 type 1

Dataset: ILCD process, EPD, specific dataset
Geography: RER
Reference year: 2018
Valid until: 2026
Classification: OEKOBAU.DAT: Komponenten von Fenstern und Vorhangfassaden / Füllungen / Transparente Füllungen
Synonyms: PROMAGLAS; Promat-SYSTEMGLAS; Brandschutzglas
Method details: Produktkategorieregeln Teil A; Produktkategorieregeln Teil B – für Flachglas im Bauwesen; EPD PROMAGLAS und Promat-SYSTEMGLAS (2021)
Owner: Promat GmbH
Compliance: EN 15804
Review: Independent external review by Patrick Wortner
Amounts: rows without a unit in brackets have none in this file; such an amount is in the reference unit of its flow, which a separate flow dataset defines
copyright: true

## General comment
A1-A3 sowie Module A4, A5, C2, C3, C4, D. Das Umweltprofil beinhaltet die Aufwendungen für die Lebenszyklus-Stadien cradle to gate mit Optionen (Modul A1-A3). Die Herstellung der Verpackung wurde innerhalb der Module A1-A3 berücksichtigt.

## Geography
Dieser Datensatz repräsentiert die Situation des Unternehmens Promat GmbH in 40878 Ratingen im Hinblick auf die wichtigsten Technologien und die gesetzlichen Rahmenbedingungen.

## Time period
jährlicher Durchschnitt

## Technology and included processes
Die Ökobilanzergebnisse umfassen die Lebenszyklusstadien der Herstellung der Vorprodukte bis hin zur Rohstoffgewinnung und Verarbeitungsprozesse von als Input dienenden Sekundärstoffen (z.B. Recyclingprozesse), deren Transporte zum Werk sowie die Produktion selbst, einschließlich der Bereitstellung von allen Hilfs- und Betriebsstoffen, Energie, sowie die vollständige Abfallbehandlung oder die Deponierung der Restabfälle während des Stadiums der Produktion. Die Module A1, A2 und A3 sind hier als ein aggregiertes Modul A1-A3 ausgewiesen. Falls für diesen Datensatz weitere Module berechnet wurden, sind diese separat zu finden und können für eine Betrachtung des gesamten Lebenszyklus zusammengeführt werden.

## Technical purpose
Brandschutzglas kann entweder als Bestandteil einer Außenverglasung oder als innere Raumteilung verwendet werden.

## Reference product
- Glas - Promat GmbH - Promaglas G30 type 1: 1

## Inputs
- Use of net fresh water (FW) [m3]: A1-A3 0.0797, A4 0.00108, A5 0.000703, C2 6.42e-5, C3 0, C4 0.000948, D 0.00156
- Nicht-erneuerbare Primärenergie als Energieträger (PENRE) [MJ]: A1-A3 414, A4 16.6, A5 0.377, C2 0.987, C3 0, C4 3.76, D 8
- Nicht-erneuerbare Primärenergie zur stofflichen Nutzung (PENRM) [MJ]: A1-A3 0.0221, A4 0, A5 -0.0221, C2 0, C3 0, C4 0, D 0
- Use of non renewable secondary fuels (NRSF) [MJ]: A1-A3 0, A4 0, A5 0, C2 0, C3 0, C4 0, D 0
- Erneuerbare Primärenergie als Energieträger (PERE) [MJ]: A1-A3 59.1, A4 0.935, A5 0.132, C2 0.0554, C3 0, C4 0.492, D -1.99
- Erneuerbare Primärenergie zur stofflichen Nutzung (PERM) [MJ]: A1-A3 4.76, A4 0, A5 -4.76, C2 0, C3 0, C4 0, D 0
- Use of renewable secondary fuels (RSF) [MJ]: A1-A3 0, A4 0, A5 0, C2 0, C3 0, C4 0, D 0
- Input of secondary material (SM) [kg]: A1-A3 1.41, A4 0, A5 0, C2 0, C3 0, C4 0, D 0
- Total use of non-renewable primary energy resources (PENRT) [MJ]: A1-A3 414, A4 16.6, A5 0.355, C2 0.987, C3 0, C4 3.76, D 8
- Total use of renewable primary energy resources (PERT) [MJ]: A1-A3 63.9, A4 0.935, A5 -4.63, C2 0.0554, C3 0, C4 0.492, D -1.99

## Outputs
- Components for re-use (CRU) [kg]: A1-A3 0, A4 0, A5 0, C2 0, C3 0, C4 0, D 0
- Exported electrical energy (EEE) [MJ]: A1-A3 0.0878, A4 0, A5 0.342, C2 0, C3 0, C4 0, D 0
- Exported thermal energy (EET) [MJ]: A1-A3 0.198, A4 0, A5 0.597, C2 0, C3 0, C4 0, D 0
- Hazardous waste disposed (HWD) [kg]: A1-A3 9.87e-7, A4 7.75e-7, A5 2.06e-9, C2 4.59e-8, C3 0, C4 5.74e-8, D 1.52e-8
- Material for Energy Recovery (MER) [kg]: A1-A3 0, A4 0, A5 0, C2 0, C3 0, C4 0, D 0
- Materials for Recycling (MFR) [kg]: A1-A3 1.18, A4 0, A5 0.179, C2 0, C3 0, C4 0, D 0
- Non-hazardous waste disposed (NHWD) [kg]: A1-A3 0.572, A4 0.00255, A5 0.0131, C2 0.000151, C3 0, C4 18.9, D 0.03
- Radioactive waste disposed (RWD) [kg]: A1-A3 0.0195, A4 2.06e-5, A5 4.4e-5, C2 1.22e-6, C3 0, C4 4.27e-5, D -7.22e-5

## Impact indicators
- Abiotic depletion potential for non fossil resources (ADPE) [kg Sb eq.]: A1-A3 2.13e-5, A4 8.97e-8, A5 5.47e-9, C2 5.32e-9, C3 0, C4 2.6e-8, D 6.7e-8
- Abiotic depletion potential for fossil resources (ADPF) [MJ]: A1-A3 351, A4 16.6, A5 0.265, C2 0.982, C3 0, C4 3.65, D 6.94
- Acidification potential of soil and water (AP) [kg SO2 eq.]: A1-A3 0.0926, A4 0.00279, A5 7.2e-5, C2 0.000416, C3 0, C4 0.00164, D 0.00157
- Eutrophication potential (EP) [kg (PO4)3- eq.]: A1-A3 0.0143, A4 0.000657, A5 1.59e-5, C2 0.000105, C3 0, C4 0.000184, D 0.000304
- Global warming potential (GWP) [kg CO2 eq.]: A1-A3 27.3, A4 1.23, A5 0.275, C2 0.0716, C3 0, C4 0.258, D 0.97
- Depletion potential of the stratospheric ozone layer (ODP) [kg CFC 11 eq.]: A1-A3 1.86e-8, A4 2e-16, A5 4.93e-16, C2 1.19e-17, C3 0, C4 1.42e-15, D 1.15e-9
- Formation potential of tropospheric ozone (POCP) [kg C2H2 eq.]: A1-A3 0.00582, A4 -0.000962, A5 3.4e-6, C2 -0.000188, C3 0, C4 0.000124, D 0.000122

## Use advice
Dieser Datensatz beinhaltet die Ergebnisse für die Module A1-A3 sowie die Module A4, A5, C2, C3, C4, D gemäß EN 15804.
Ein Vergleich mit anderen Produkten ist nur mit einer vergleichbaren Anwendung im Gebäude zulässig. Grundsätzlich ist eine Gegenüberstellung oder die Bewertung von EPD Daten nur möglich, wenn alle zu vergleichenden Datensätze nach EN 15804 erstellt wurden und der Gebäudekontext, bzw. die produktspezifischen Leistungsmerkmale berücksichtigt werden.

## Review details
Die angewendete LCI Methode ist in Übereinstimmung mit ISO 14040 und 14044. Die Dokumentation enthält alle relevanten Informationen im Hinblick auf die Datenqualität und den Umfang der Anwendung der jeweiligen LCI Ergebnisse bzw. der Datensätze. Der Datensatz repräsentiert den Stand der Technik bezogen auf die funktionelle Einheit.

## Data sources
- GaBi database (general)
