# Schilliger glued laminated timber (Glulam) as per EN 14080:2013

Dataset: ILCD process, EPD, average dataset
Geography: CH
Reference year: 2018
Valid until: 2023
Classification: OEKOBAU.DAT: Holz / Vollholz / Brettschichtholz (BSH)
Classification: IBUCategories: 02 Bauprodukte / Produkte aus Bauholz / Vollholzprodukte
Method details: Vollholzprodukte.pdf
Generated by: Dr. Frank Werner - Umwelt & Entwicklung
Registration number: EPD-SLH-20180066-IBC1-DE
Owner: Schilliger Holz AG
Compliance: DIN EN 15804; ISO 14025
Review: Accredited third party review by Institut Bauen und Umwelt e. V.
Amounts: rows without a unit in brackets have none in this file; such an amount is in the reference unit of its flow, which a separate flow dataset defines
copyright: true
licenseType: Free of charge for all users and uses
accessRestrictions: None

## General comment
Schilliger glued laminated timber (Glulam) is an industrially manufactured wood product for load-bearing structures. It is used in building and bridge construction. Its composition is symmetrical and consists of at least two dried boards of coniferous solid wood glued together parallel to the grain. As a result of the strength grading of the raw material and the homogenisation, it is reinforced through its layered formation and has higher load-bearing capacities than conventional timber. The glued laminated timber (Glulam) and glued solid timber product-groups are defined according to /EN 14080:2013/, (/1359-CPR-0622/).

Glulam is characterised by a lamellae thickness of 40 mm and can be utilised in a wide range of applications, due to its high strength and variable product characteristics. Glued solid timber has either thinner or thicker layers than 40 mm and is produced for special requirements: this includes the company's own products,"Massivholzträger (MHT)", "Lamellenbalken (LAM)", "Rigibalken (RBS)" and "Rahmenbaukanteln (RBK)".

A comprehensive description of Glulam and glued solid timber products can be found on the company website at "www.schilliger.ch".

## Technology and included processes
Technical data:
Schilliger-Glulam fulfils the requirements of /EN 14080:2013/ (/1359-CPR-0622 /).

These are further elaborated in the declarations of performance for Glulam (silver fir/spruce) / SHI / 01-01012016 of 1.1.2016 and for glued solid timber (silver fir/spruce) / SHI / 04-01012016 of 1.1.2016.

Details of the cross-sectional structures and the properties of each product can also be found in the technical data sheets published by the company on its website.
Declared unit:
The declared environmental figures refer to 1 m3 of glued wood in accordance with EN 14080:2013, including Glulam and solid glued timber, with all products having been glued using PUR adhesive. For the statistical modelling of the sawing processes, the production of planks (not beams) was conservatively estimated; however, for the glue consumption, the consumption for Glulam or glued solid timber, weighted according to production volume, was used.

## Technical purpose
The Glulam is used in structural engineering as visible or concealed load-bearing elements, such as in bridges and buildings. "MHT", "LAM" and "RBS" are also used in structural engineering, "Rahmenbaukanteln" are intended as uprights for timber frame construction and as sleepers in prefabricated-building construction.

## Reference product
- Leimholz (424 kg/m³): 1

## Inputs
- Renewable primary energy as energy carrier (PERE) [MJ]: A1-A3 1640.7, A4 0.118, A5 0.00824, C2 0.0392, C3 8.26, C4 0, D -819.1
- Renewable primary energy resources as material utilization (PERM) [MJ]: A1-A3 7155, A4 0, A5 0, C2 0, C3 -7155, C4 0, D 0
- Total use of renewable primary energy resources (PERT) [MJ]: A1-A3 8796, A4 0.12, A5 0.00824, C2 0.0392, C3 -7147, C4 0, D -819.1
- Non renewable primary energy as energy carrier (PENRE) [MJ]: A1-A3 1756, A4 56, A5 83.758, C2 18.6, C3 96.3, C4 0, D -6807
- Non renewable primary energy as material utilization (PENRM) [MJ]: A1-A3 184, A4 0, A5 -83, C2 0, C3 -101, C4 0, D 0
- Total use of non renewable primary energy resources (PENRT) [MJ]: A1-A3 1940, A4 56, A5 0.758, C2 18.6, C3 -4.71, C4 0, D -6807
- Use of secondary material (SM) [kg]: A1-A3 0, A4 0, A5 0, C2 0, C3 0, C4 0, D 0
- Use of renewable secondary fuels (RSF) [MJ]: A1-A3 0, A4 0, A5 0, C2 0, C3 0, C4 0, D 7155
- Use of non renewable secondary fuels (NRSF) [MJ]: A1-A3 0, A4 0, A5 0, C2 0, C3 0, C4 0, D 101
- Use of net fresh water (FW) [m^3]

## Outputs
- Hazardous waste disposed (HWD) [kg]: A1-A3 0.000415, A4 1.51e-6, A5 5.11e-6, C2 5.02e-7, C3 7.43e-5, C4 0, D -0.00136
- Non hazardous waste disposed (NHWD) [kg]: A1-A3 2.72, A4 0.000838, A5 0.0841, C2 0.000278, C3 0.0474, C4 0, D 1.41
- Radioactive waste disposed (RWD) [kg]: A1-A3 0.0167, A4 9.7e-6, A5 5.7e-7, C2 3.23e-6, C3 0.000695, C4 0, D -0.0769
- Components for re-use (CRU) [kg]: A1-A3 0, A4 0, A5 0, C2 0, C3 0, C4 0, D 0
- Materials for recycling (MFR) [kg]: A1-A3 0, A4 0, A5 0, C2 0, C3 0, C4 0, D 0
- Materials for energy recovery (MER) [kg]: A1-A3 0, A4 0, A5 0, C2 0, C3 424, C4 0, D 0
- Exported electrical energy (EEE) [MJ]: A1-A3 0, A4 0, A5 10.8, C2 0, C3 0, C4 0, D 0
- Exported thermal energy (EET) [MJ]: A1-A3 0, A4 0, A5 21.3, C2 0, C3 0, C4 0, D 0

## Impact indicators
- Global warming potential (GWP) [kg CO_(2)-Äq.]: A1-A3 -615, A4 4.12, A5 5.75, C2 1.37, C3 686, C4 0, D -196
- Depletion potential of the stratospheric ozone layer (ODP) [kg CFC11-Äq.]: A1-A3 5.24e-6, A4 1.35e-7, A5 5.22e-9, C2 4.47e-8, C3 1.93e-7, C4 0, D -3.97e-5
- Acidification potential of land and water (AP) [kg SO_(2)-Äq.]: A1-A3 0.394, A4 0.0222, A5 0.000531, C2 0.00736, C3 0.0151, C4 0, D -0.192
- Eutrophication potential (EP) [kg PO_(4)^(3)-Äq.]: A1-A3 0.0893, A4 0.00502, A5 0.00018, C2 0.00167, C3 0.00197, C4 0, D 0.00313
- Formation potential of tropospheric ozone photochemical oxidants (POCP) [kg Ethen-Äq.]: A1-A3 0.123, A4 0.000634, A5 6.48e-6, C2 0.00021, C3 0.00064, C4 0, D -0.0128
- Abiotic depletion potential for non fossil resources (ADPE) [kg Sb-Äq.]: A1-A3 2.2e-5, A4 4.88e-9, A5 2.61e-9, C2 1.62e-9, C3 1.18e-7, C4 0, D -1.037e-5
- Abiotic depletion potential for fossil resources (ADPF) [MJ]: A1-A3 1097, A4 55.5, A5 0.732, C2 18.4, C3 65.4, C4 0, D -3146

## Use advice
Scope:
This declaration concerns Glulam produced by Schilliger Holz AG in accordance with /EN 14080:2013/: glued laminated timber and the following glued solid timber: "Massivholzträger (MHT)", "Lamellenbalken (LAM)", "Rigibalken (RBS)", and"Rahmenbaukanteln (RBK)". The production site is the plant in Küssnacht, Switzerland.
System boundary:
This EPD represents a 'cradle-to-gate' analysis, with options.

The manufacturing process of the Glulam products (modules A1-A3) comprises the forestry processes, the transportation of the round timber to the sawmill, the production of the sawn timber and the related background processes (power generation, extraction of fossil fuels, etc.). Furthermore, the production of the glue, as well as the packaging, is also reflected in the analysis. The infrastructure required for the sawmill and the Glulam plant is estimated.

According to the applicable PCR, the content of biogenic CO2 is accounted for as a negative input to the global warming potential (GWP).

Waste and secondary materials or secondary fuels are not used in production. Bark, wood -chips -shavings and other raw sawdust leave the product scope as co-products.

In module A4, an average transport distance of over 90km for the Glulam to reach the prospective construction site is accounted for.

Module A5 includes the disposal of PE packaging in a waste incineration plant (WIP).The heat and electricity generated in the WIP are offset as exported energy in module D.

Installation material is not reflected in module A5, as the type and quantity of installation material varies depending on the use of the glued wood; installation material must be considered accordingly when assessing a building.

Module C2 comprises the transport of the reclaimed Glulam to a biomass power plant.

Module C3 depicts the chopping of the reclaimed Glulam; in accordance with /EN 16485/, it is assumed that non-pressure-treated waste wood reaches the end of its waste-state when it becomes available as wood chips. The chipped wood, including its content of biogenic C (as CO2 equivalent) and its content of renewable primary energy, leaves the product system as secondary fuel.

In module C4 contains no processes/environmental impacts.

Module D calculates the energy recovery of the wood chips in a biomass power plant. It is assumed that the recovered energy will replace the electricity mix in Germany and heat from industrial natural gas firing. The exported energy recovered from the PE packaging (module A5) is calculated analogically.

## Data sources
- ecoinvent database (all versions)
- ecoinvent 2.2 database
