# Raised Floor System, Type NORTEC

Dataset: ILCD process, EPD, specific dataset
Geography: DE
Reference year: 2021
Valid until: 2026
Classification: OEKOBAU.DAT: Komposite / Systembauteile / Böden
Classification: IBUCategories: 02 Bauprodukte / Systemböden / Systemböden
Method details: Systemböden.pdf
Generated by: Lindner Group
Registration number: EPD-LIN-20210022-IBA1-DE
Owner: Lindner Group
Compliance: DIN EN 15804; ISO 14025
Review: Accredited third party review by Institut Bauen und Umwelt e. V.
Amounts: rows without a unit in brackets have none in this file; such an amount is in the reference unit of its flow, which a separate flow dataset defines
copyright: true
licenseType: Free of charge for all users and uses
accessRestrictions: None

## General comment
NORTEC raised floor systems are prefabricated modular components manufactured in the factory which form an installation space for accommodating all installations as well as supply and disposal lines and providing unhindered access at each point and at all times to this hollow space.

The raised floor system essentially comprises the raised floor panel and the substructure.

The average raised floor system product, type NORTEC, is manufactured from fibre-reinforced calcium sulphate boards. The raised floor systems are manufactured in a format of 600 x 600 mm as standard.

The bulk density can range between 1,280 and 1,680 kg/m³ and board thickness can vary between 20 and 44 mm.

Steel pedestals are used as the substructure which permit various finished floor heights (28– 2,000 mm).

Linking (installation in buildings) the individual components to form a surface area gives rise to the raised floor design. The board models (density and board thickness) and dimensions of the substructure are determined in accordance with the respective requirements.

## Technology and included processes
Manufacturing and processing the calcium sulphate panel: Both of the REA gypsum and cellulose fibre raw materials are combined and after adding water, they are pressed under high pressure to form stable panels, then dried and milled to the requisite sizes. The edge trims are processed in additional manufacturing steps. Manufacturing the pedestals: The pedestals are manufactured through resistance welding or pressing the individual pipe, threaded rod and sheet steel components. The dimensions of the individual components are based on technical specifications. A zinc coating is applied to the supports by means of electroplating (electro-galvanising) in order to protect them from corrosion.
Declared unit:
The declared unit refers to 1 m² raised floor system, type NORTEC, with an average board thickness of 33.17 mm and an average density of 1,467 kg/m³. Four pedestals are required for installing the raised floor.

In the product family, the thickness varies between 20 and 44 mm, while density varies between 1,280 and 1,680 kg/m³.

The declared unit has an overall board weight of 48.66 kg/m² plus 1.34 kg for the respective pedestals. Accordingly, total weight is 50.00 kg.

Average board values are based on a weighted average calculated for an average board height and board thickness in relation to its percentage share of production. The pedestals which are sold most are declared for the steel pedestals: type M1, 120 mm, unit weight 0.33 kg.

Declaration class: 1c) Declaration of an average product from a manufacturer's plant

## Technical purpose
The raised floor system comprising fibre-reinforced calcium sulphate boards and raised floor pedestals referred to in section 2.2 is primarily used in public, commercial and private buildings in order to create cavities / installation space. Raised floor systems can be laid using all standard floor coverings but must be coordinated to the various system variants.

## Reference product
- Doppelbodensystem NORTEC (): 1

## Inputs
- Renewable primary energy as energy carrier (PERE) [MJ]: A1-A3 164, A4 1.18, A5 0.0256, B1 0, B2 0, C1 0, C2 0.229, C3 0, C4 1.17, D -1.56
- Renewable primary energy resources as material utilization (PERM) [MJ]: A1-A3 0.0149, A4 0, A5 0, B1 0, B2 0, C1 0, C2 0, C3 0, C4 -0.0149, D -14.8
- Total use of renewable primary energy resources (PERT) [MJ]: A1-A3 164, A4 1.18, A5 0.0256, B1 0, B2 0, C1 0, C2 0.229, C3 0, C4 1.16, D -16.36
- Non renewable primary energy as energy carrier (PENRE) [MJ]: A1-A3 292, A4 20.2, A5 0.111, B1 0, B2 0, C1 0, C2 3.93, C3 0, C4 8.9, D -23.4
- Non renewable primary energy as material utilization (PENRM) [MJ]: A1-A3 0, A4 0, A5 0, B1 0, B2 0, C1 0, C2 0, C3 0, C4 0, D 0
- Total use of non renewable primary energy resources (PENRT) [MJ]: A1-A3 292, A4 20.2, A5 0.111, B1 0, B2 0, C1 0, C2 3.93, C3 0, C4 8.9, D -23.4
- Use of secondary material (SM) [kg]: A1-A3 6.52, A4 0, A5 0, B1 0, B2 0, C1 0, C2 0, C3 0, C4 0, D 1.01
- Use of renewable secondary fuels (RSF) [MJ]: A1-A3 3.66e-5, A4 0, A5 0, B1 0, B2 0, C1 0, C2 0, C3 0, C4 0, D 0
- Use of non renewable secondary fuels (NRSF) [MJ]: A1-A3 0, A4 0, A5 0, B1 0, B2 0, C1 0, C2 0, C3 0, C4 0, D 0
- Use of net fresh water (FW) [m^3]: A1-A3 6.5, A4 0.271, A5 0.00181, B1 0, B2 0, C1 0, C2 0.0543, C3 0, C4 0.106, D -0.151

## Outputs
- Hazardous waste disposed (HWD) [kg]: A1-A3 2.44e-6, A4 7.54e-7, A5 2.86e-10, B1 0, B2 0, C1 0, C2 1.47e-7, C3 0, C4 1.36e-7, D -1.78e-8
- Non hazardous waste disposed (NHWD) [kg]: A1-A3 1.62, A4 0.00354, A5 0.0164, B1 0, B2 0, C1 0, C2 0.000689, C3 0, C4 44.7, D -0.03
- Radioactive waste disposed (RWD) [kg]: A1-A3 0.00926, A4 2.14e-5, A5 5.02e-6, B1 0, B2 0, C1 0, C2 4.17e-6, C3 0, C4 9.98e-5, D -0.000206
- Components for re-use (CRU) [kg]: A1-A3 0, A4 0, A5 0, B1 0, B2 0, C1 0, C2 0, C3 0, C4 0, D 0
- Materials for recycling (MFR) [kg]: A1-A3 0.143, A4 0, A5 0.0328, B1 0, B2 0, C1 0, C2 0, C3 0, C4 0, D 1.28
- Materials for energy recovery (MER) [kg]: A1-A3 0, A4 0, A5 1.11, B1 0, B2 0, C1 0, C2 0, C3 0, C4 0, D 0
- Exported electrical energy (EEE) [MJ]: A1-A3 0, A4 0, A5 3.31, B1 0, B2 0, C1 0, C2 0, C3 0, C4 0, D 0
- Exported thermal energy (EET) [MJ]: A1-A3 0, A4 0, A5 5.35, B1 0, B2 0, C1 0, C2 0, C3 0, C4 0, D 0

## Impact indicators
- Global warming potential (GWP) [kg CO_(2)-Äq.]: A1-A3 12.6, A4 1.63, A5 0.203, B1 0, B2 0, C1 0, C2 0.318, C3 0, C4 12, D -2.58
- Depletion potential of the stratospheric ozone layer (ODP) [kg CFC11-Äq.]: A1-A3 1.93e-7, A4 5.46e-16, A5 -3.86e-15, B1 0, B2 0, C1 0, C2 1.06e-16, C3 0, C4 3.69e-15, D -2.78e-15
- Acidification potential of land and water (AP) [kg SO_(2)-Äq.]: A1-A3 0.0303, A4 0.00363, A5 0.000114, B1 0, B2 0, C1 0, C2 0.000706, C3 0, C4 0.00462, D -0.00596
- Eutrophication potential (EP) [kg PO_(4)^(3)-Äq.]: A1-A3 0.00558, A4 0.000902, A5 -2.29e-5, B1 0, B2 0, C1 0, C2 0.000176, C3 0, C4 0.00048, D -0.000557
- Formation potential of tropospheric ozone photochemical oxidants (POCP) [kg Ethen-Äq.]: A1-A3 0.00281, A4 -0.00134, A5 -1.22e-5, B1 0, B2 0, C1 0, C2 -1.22e-5, C3 0, C4 0.00032, D -0.000891
- Abiotic depletion potential for non fossil resources (ADPE) [kg Sb-Äq.]: A1-A3 1.14e-5, A4 1.5e-7, A5 1.89e-8, B1 0, B2 0, C1 0, C2 2.61e-8, C3 0, C4 0.00032, D -6.26e-9
- Abiotic depletion potential for fossil resources (ADPF) [MJ]: A1-A3 263, A4 21.9, A5 -2.23, B1 0, B2 0, C1 0, C2 4.26, C3 0, C4 9.42, D -21.6

## Use advice
Scope:
The EPD refers to the raised floor system, type NORTEC. The declared product is an average product of the manufacturer’s whose two components are manufactured in two different Lindner SE plants. The calcium sulphate board is manufactured in the Dettelbach plant (Germany) and the raised floor pedestals are manufactured in the Arnstorf plant (Germany). The production data used is based on 2019. Based on plausible, transparent and comprehensible basic data, the Life Cycle Assessment fully represents the system product referred to.
System boundary:
Type of EPD: cradle-to-gate, with options. This Life Cycle Analysis considers the life cycle of product manufacturing through to landfilling. The product stage comprises Modules A1 (Raw material supply), A2 (Transport) and A3 (Production) (these are considered summarised as a module (A1–A3)), Transport to site and Assembly (A4–A5). During installation in the building, no other materials are considered; Module A5 comprises the environmental loads for the disposal of packaging.

The modules are declared as 0 for the use phase (B1-B2). During the use phase, the product does not cause any environmental pollution. The actual product does not require any maintenance; no repairs or replacements can be anticipated during normal use of the building.

Deconstruction and demolition of the product from the building (C1) and transport to the landfill site are considered for the EoL stage (C2).

At the end of life, the product is segregated into components and the most realistic scenario selected: a waste disposal company is remunerated for the sorted steel from pedestals. The steel pedestals achieve their end-of-waste characteristic in Module C3. The potential benefits and loads are indicated in Module D.

The calcium sulphate board reaches its end-of-waste characteristic in Module C4 and is disposed of in a landfill for construction rubble.

## Data sources
- GaBi Database (all versions)
- GaBi database SP40 2020
