# Facing Bricks, Clay Pavers and Brick Slips

Dataset: ILCD process, EPD, average dataset
Geography: DE
Reference year: 2021
Valid until: 2026
Classification: OEKOBAU.DAT: Mineralische Baustoffe / Steine und Elemente / Ziegel
Classification: IBUCategories: 02 Bauprodukte / Mauerwerk und Mörtel / Ziegel
Method details: Ziegel.pdf
Generated by: Sphera Solutions GmbH
Registration number: EPD-ZWM-20210148-ICG1-DE
Owner: Bundesverband der Deutschen Ziegelindustrie e.V.
Compliance: DIN EN 15804; ISO 14025
Review: Accredited third party review by Institut Bauen und Umwelt e. V.
Amounts: rows without a unit in brackets have none in this file; such an amount is in the reference unit of its flow, which a separate flow dataset defines
copyright: true
licenseType: Free of charge for all users and uses
accessRestrictions: None

## General comment
Facing bricks, clay pavers and brick slips belong to the group of heavy-clay building materials.
Based on mass-related annual production, the shares contributed to overall production by the individual companies were identified and used to calculate the weighted average values.
This EPD presents the LCA results for one tonne [t] each of facing bricks, clay pavers and brick slips.

## Technology and included processes
After quarrying clay in surface mining, the clay is transported to the factory grounds for interim storage. Mechanical preparation of the clay such as crushing and mixing, for example, is performed in the edge runner with perforated bottom and the roller mills. The base materials referred to above are crushed (processed), mixed and moistened at certain optimised ratios. They are then stored in the souring house. After renewed watering, the green bricks are moulded by presses using the corresponding dies and cutter. Water-struck plate presses, hand-operated moulding or moulding plants are also used. The moulded material enters the dryer which is essentially powered by the waste heat of the tunnel kiln. Drying times vary depending on the format and gross density and can take 48 hours, for example. The dried green bricks are then fired at approx. 900 - 1250 °C in the tunnel kiln within approx. 24 - 48 hours. The bricks are stacked and shrink-wrapped in recyclable PE foil. Brick slips are largely packed in boxes. Energy requirements by brick production primarily concern the firing process and drying. Electrical energy is primarily required in processing.
Declared unit:
This Declaration refers to 1 tonne of facing bricks, clay pavers or brick slips.

The LCD results in this EPD are based on averages provided by the participating plants which are, in turn, weighted averages based on the percentage of total annual production accounted for by the individual production facilities.

## Technical purpose
Facing bricks are used as exposed brickwork in double wall constructions in exterior areas not protected from weathering or as exposed brickwork in indoor applications. Clay pavers are used for paving in road construction as well as for interior floorings. Brick slips are used as exterior or interior cladding on wall constructions.

## Scenarios
- S1: Scenario 1
- S2: Scenario 2

## Reference product
- 1 t Vormauerziegel, Pflasterziegel, Riemchen (): 1000

## Inputs
- Renewable primary energy as energy carrier (PERE) [MJ]: A1-A3 229.868, A4 0, A5 0, B1 0, B2 0, B3 0, B4 0, B5 0, B6 0, B7 0, C1 0.498, C2 (S1) 0.97, C2 (S2) 1.6, C3 (S1) 3.84, C3 (S2) 0, C4 (S1) 0, C4 (S2) 24.6, D (S1) -14.4, D (S2) -8.31
- Renewable primary energy resources as material utilization (PERM) [MJ]: A1-A3 61.32, A4 0, A5 0, B1 0, B2 0, B3 0, B4 0, B5 0, B6 0, B7 0, C1 0, C2 (S1) 0, C2 (S2) 0, C3 (S1) 0, C3 (S2) 0, C4 (S1) 0, C4 (S2) 0, D (S1) 0, D (S2) 0
- Total use of renewable primary energy resources (PERT) [MJ]: A1-A3 291.188, A4 0, A5 0, B1 0, B2 0, B3 0, B4 0, B5 0, B6 0, B7 0, C1 0.498, C2 (S1) 0.97, C2 (S2) 1.6, C3 (S1) 3.84, C3 (S2) 0, C4 (S1) 0, C4 (S2) 24.6, D (S1) -14.4, D (S2) -8.31
- Non renewable primary energy as energy carrier (PENRE) [MJ]: A1-A3 3810.82, A4 0, A5 0, B1 0, B2 0, B3 0, B4 0, B5 0, B6 0, B7 0, C1 7.33, C2 (S1) 14.3, C2 (S2) 23.6, C3 (S1) 51.1, C3 (S2) 0, C4 (S1) 0, C4 (S2) 216, D (S1) -95.2, D (S2) -61.5
- Non renewable primary energy as material utilization (PENRM) [MJ]: A1-A3 27.258, A4 0, A5 0, B1 0, B2 0, B3 0, B4 0, B5 0, B6 0, B7 0, C1 0, C2 (S1) 0, C2 (S2) 0, C3 (S1) 0, C3 (S2) 0, C4 (S1) 0, C4 (S2) 0, D (S1) 0, D (S2) 0
- Total use of non renewable primary energy resources (PENRT) [MJ]: A1-A3 3838.08, A4 170, A5 2, B1 0, B2 0, B3 0, B4 0, B5 0, B6 0, B7 0, C1 7.33, C2 (S1) 14.3, C2 (S2) 23.6, C3 (S1) 51.1, C3 (S2) 0, C4 (S1) 0, C4 (S2) 216, D (S1) -95.2, D (S2) -61.5
- Use of secondary material (SM) [kg]: A1-A3 29.5, A4 0, A5 0, B1 0, B2 0, B3 0, B4 0, B5 0, B6 0, B7 0, C1 0, C2 (S1) 0, C2 (S2) 0, C3 (S1) 0, C3 (S2) 0, C4 (S1) 0, C4 (S2) 0, D (S1) 0, D (S2) 970.5
- Use of renewable secondary fuels (RSF) [MJ]: A1-A3 0.02685, A4 0.000669, A5 2.18e-5, B1 0, B2 0, B3 0, B4 0, B5 0, B6 0, B7 0, C1 2.74e-5, C2 (S1) 5.33e-5, C2 (S2) 8.81e-5, C3 (S1) -0.000125, C3 (S2) 0, C4 (S1) 0, C4 (S2) 0.401, D (S1) -0.000498, D (S2) -0.000498
- Use of non renewable secondary fuels (NRSF) [MJ]: A1-A3 0.350578, A4 0.0102, A5 0.000252, B1 0, B2 0, B3 0, B4 0, B5 0, B6 0, B7 0, C1 0.000417, C2 (S1) 0.000812, C2 (S2) 0.00134, C3 (S1) -0.00204, C3 (S2) 0, C4 (S1) 0, C4 (S2) 0.818, D (S1) -0.00755, D (S2) -0.00755
- Use of net fresh water (FW) [m^3]: A1-A3 0.324411, A4 0.0176, A5 0.0219, B1 0, B2 0, B3 0, B4 0, B5 0, B6 0, B7 0, C1 0.000752, C2 (S1) 0.00146, C2 (S2) 0.00242, C3 (S1) 0.0144, C3 (S2) 0, C4 (S1) 0, C4 (S2) 0.044, D (S1) -0.0196, D (S2) -0.0129

## Outputs
- Hazardous waste disposed (HWD) [kg]: A1-A3 0.00013452, A4 2.04e-5, A5 1.58e-8, B1 0, B2 0, B3 0, B4 0, B5 0, B6 0, B7 0, C1 9.43e-7, C2 (S1) 1.84e-6, C2 (S2) 3.04e-6, C3 (S1) 3.65e-6, C3 (S2) 0, C4 (S1) 0, C4 (S2) 4.95e-6, D (S1) -2.44e-5, D (S2) -2.38e-8
- Non hazardous waste disposed (NHWD) [kg]: A1-A3 13.8149, A4 0.0235, A5 0.0189, B1 0, B2 0, B3 0, B4 0, B5 0, B6 0, B7 0, C1 0.000906, C2 (S1) 0.00177, C2 (S2) 0.00292, C3 (S1) 0.0242, C3 (S2) 0, C4 (S1) 0, C4 (S2) 1000, D (S1) -40.5, D (S2) -0.0219
- Radioactive waste disposed (RWD) [kg]: A1-A3 0.0554918, A4 0.000636, A5 0.000116, B1 0, B2 0, B3 0, B4 0, B5 0, B6 0, B7 0, C1 9.93e-6, C2 (S1) 1.93e-5, C2 (S2) 3.19e-5, C3 (S1) 0.000496, C3 (S2) 0, C4 (S1) 0, C4 (S2) 0.00299, D (S1) -0.0062, D (S2) -0.00448
- Components for re-use (CRU) [kg]: A1-A3 0, A4 0, A5 0, B1 0, B2 0, B3 0, B4 0, B5 0, B6 0, B7 0, C1 0, C2 (S1) 0, C2 (S2) 0, C3 (S1) 0, C3 (S2) 0, C4 (S1) 0, C4 (S2) 0, D (S1) 0, D (S2) 0
- Materials for recycling (MFR) [kg]: A1-A3 0, A4 0, A5 0, B1 0, B2 0, B3 0, B4 0, B5 0, B6 0, B7 0, C1 0, C2 (S1) 0, C2 (S2) 0, C3 (S1) 1000, C3 (S2) 0, C4 (S1) 0, C4 (S2) 0, D (S1) 0, D (S2) 0
- Materials for energy recovery (MER) [kg]: A1-A3 0, A4 0, A5 0, B1 0, B2 0, B3 0, B4 0, B5 0, B6 0, B7 0, C1 0, C2 (S1) 0, C2 (S2) 0, C3 (S1) 0, C3 (S2) 0, C4 (S1) 0, C4 (S2) 0, D (S1) 0, D (S2) 0
- Exported electrical energy (EEE) [MJ]: A1-A3 0, A4 0, A5 0, B1 0, B2 0, B3 0, B4 0, B5 0, B6 0, B7 0, C1 0, C2 (S1) 0, C2 (S2) 0, C3 (S1) 0, C3 (S2) 0, C4 (S1) 0, C4 (S2) 0, D (S1) 0, D (S2) 0
- Exported thermal energy (EET) [MJ]: A1-A3 0, A4 0, A5 0, B1 0, B2 0, B3 0, B4 0, B5 0, B6 0, B7 0, C1 0, C2 (S1) 0, C2 (S2) 0, C3 (S1) 0, C3 (S2) 0, C4 (S1) 0, C4 (S2) 0, D (S1) 0, D (S2) 0

## Impact indicators
- Global warming potential (GWP) [kg CO_(2)-Äq.]: A1-A3 255.549, A4 12.5, A5 9.28, B1 0, B2 0, B3 0, B4 0, B5 0, B6 0, B7 0, C1 0.539, C2 (S1) 1.04, C2 (S2) 1.72, C3 (S1) 2.63, C3 (S2) 0, C4 (S1) 0, C4 (S2) 16.1, D (S1) -6.12, D (S2) -3.66
- Depletion potential of the stratospheric ozone layer (ODP) [kg CFC11-Äq.]: A1-A3 3.41093e-9, A4 4.65e-11, A5 3e-11, B1 0, B2 0, B3 0, B4 0, B5 0, B6 0, B7 0, C1 1.11e-12, C2 (S1) 2.17e-12, C2 (S2) 3.58e-12, C3 (S1) 2.73e-11, C3 (S2) 0, C4 (S1) 0, C4 (S2) 1.58e-10, D (S1) -1.33e-9, D (S2) -1.21e-9
- Acidification potential of land and water (AP) [kg SO_(2)-Äq.]: A1-A3 0.887884, A4 0.0455, A5 0.000916, B1 0, B2 0, B3 0, B4 0, B5 0, B6 0, B7 0, C1 0.002, C2 (S1) 0.00242, C2 (S2) 0.004, C3 (S1) 0.0182, C3 (S2) 0, C4 (S1) 0, C4 (S2) 0.0962, D (S1) -0.0175, D (S2) -0.00581
- Eutrophication potential (EP) [kg PO_(4)^(3)-Äq.]: A1-A3 0.0578065, A4 0.00868, A5 0.000191, B1 0, B2 0, B3 0, B4 0, B5 0, B6 0, B7 0, C1 0.00049, C2 (S1) 0.000604, C2 (S2) 0.000998, C3 (S1) 0.00439, C3 (S2) 0, C4 (S1) 0, C4 (S2) 0.0131, D (S1) -0.00299, D (S2) -0.000588
- Formation potential of tropospheric ozone photochemical oxidants (POCP) [kg Ethen-Äq.]: A1-A3 0.0537391, A4 -0.00721, A5 6.48e-5, B1 0, B2 0, B3 0, B4 0, B5 0, B6 0, B7 0, C1 0.000235, C2 (S1) -0.000761, C2 (S2) -0.00126, C3 (S1) 0.00265, C3 (S2) 0, C4 (S1) 0, C4 (S2) 0.00925, D (S1) -0.00197, D (S2) -0.000617
- Abiotic depletion potential for non fossil resources (ADPE) [kg Sb-Äq.]: A1-A3 0.000291592, A4 1.05e-6, A5 7.7e-8, B1 0, B2 0, B3 0, B4 0, B5 0, B6 0, B7 0, C1 4.07e-8, C2 (S1) 7.92e-8, C2 (S2) 1.31e-7, C3 (S1) 4.68e-6, C3 (S2) 0, C4 (S1) 0, C4 (S2) 5.55e-6, D (S1) -1.19e-6, D (S2) -6.25e-7
- Abiotic depletion potential for fossil resources (ADPF) [MJ]: A1-A3 3697.99, A4 168, A5 1.71, B1 0, B2 0, B3 0, B4 0, B5 0, B6 0, B7 0, C1 7.31, C2 (S1) 14.2, C2 (S2) 23.5, C3 (S1) 49.9, C3 (S2) 0, C4 (S1) 0, C4 (S2) 209, D (S1) -79.6, D (S2) -50.3

## Use advice
Scope:
This document refers to facing bricks, clay pavers and brick slips manufactured by “Bauen mit Backstein Zweischalige Wand Marketing e.V.” 12 member companies supplied data from 2014 for this Declaration. The companies involved represent 90% of the member companies merged as manufacturers of facing bricks, clay pavers and brick slips in the Zweischalige Wand association. The production volume of these companies accounts for approx. 95% of the German market.

This EPD is an extension to EPD-ZWM-20160126-ICG1-EN without any new calculations.
System boundary:
EPD type: cradle to grave

The LCD takes consideration of the aquisition of raw materials, raw material transport and actual

product manufacturing, including packaging materials (Modules A1-A3).

Transport to the construction site (Module A4) and treatment of the packaging materials in the waste incineration plants following installation of the product (Module A5) are also part of the study.

After expiry of the use phase, the product is de-constructed (Module C1) and transported for recycling or disposal (C2). Two EoL scenarios are declared in this EPD:

- EoL scenario 1 refers to material utilisation as aggregate in the construction industry (C3).

- EoL scenario 2 outlines disposal at a building rubble landfill (C4).

Both scenarios are declared for 1 tonne bricks (100%).

Credits incurred by recycling clay bricks are declared in Module D. Credits for electricity and thermal energy following thermal utilisation of packaging within Module A5 are also considered in Module D.

The use stage (Modules B1-B5) is taken consideration of in this study. These modules do not incur any negative environmental impacts.

As Modules B6 and B7 refer to operation of the building and use of the product does not have any connection with operational energy or water use in the building, these modules are not of relevance for the declared product and do not therefore have any environmental impact.

## Data sources
- GaBi Database (all versions)
- GaBi database SP28 2015
