# Damp insulation PA; PA

Dataset: ILCD process, EPD, generic dataset
Geography: DE
Reference year: 2018
Valid until: 2022
Classification: oekobau.dat: Kunststoffe / Folien und Vliese / Dampfbremse / Dampfsperre
Owner: thinkstep
Compliance: DIN EN 15804
Review: Dependent internal review by thinkstep, IABP-GaBi, IBP-GaBi; Independent external review by GaBi user forum, GaBi bug forum, GaBi user community
Amounts: rows without a unit in brackets have none in this file; such an amount is in the reference unit of its flow, which a separate flow dataset defines
copyright: true

## General comment
This data set has been modeled according to the European Standard EN 15804 for Sustainable Building. Results are depicted in modules that allow the structured expression of results over the entire life cycle.

## Geography
The data set represents the country specific situation in Germany, focusing on the main technologies, the region specific characteristics and / or import statistics.

## Time period
Annual average

## Technology and included processes
The LCA of the vapour barrier covers the cradle-to-gate phase. The system boundaries are represented by the finished product. 10% of antimony trioxide has been used as flame retardant. Transports from the factory to the point of installation are not considered and must be included according to the system boundaries. Production of PA 6: Nylon 6 is produced from caprolactam which is synthesized from benzene, ammonia, hydrogen and sulphuric acid (oleum). Via the intermediate products cyclohexane and cyclohexanone, the monomer caprolactam is produced. The Nylon 6 is produced by the reaction of caprolactam with water over producing the intermediate product aminocaproic acid. The acid is formed by ring- opening of caprolactam when water is added. Caprolactam and water are therefore heated to 250°C. Nylon 6 is then formed by the copolymerization of caprolactam and aminocaproic acid. The process can be carried out batchwise or continuously.
Background system:
Electricity: Electricity is modelled according to the individual country-specific situations. The country-specific modelling is achieved on multiple levels. Firstly, individual energy carrier specific power plants and plants for renewable energy sources are modelled according to the current national electricity grid mix. Modelling the electricity consumption mix includes transmission / distribution losses and the own use by energy producers (own consumption of power plants and "other" own consumption e.g. due to pumped storage hydro power etc.), as well as imported electricity. Secondly, the national emission and efficiency standards of the power plants are modelled as well as the share of electricity plants and combined heat and power plants (CHP). Thirdly, the country-specific energy carrier supply (share of imports and / or domestic supply) including the country-specific energy carrier properties (e.g. element and energy content) are accounted for. Fourthly, the exploration, mining/production, processing and transport processes of the energy carrier supply chains are modelled according to the specific situation of each electricity producing country. The different production and processing techniques (emissions and efficiencies) in the different energy producing countries are considered, e.g. different crude oil production technologies or different flaring rates at the oil platforms.
Thermal energy, process steam: The thermal energy and process steam supply is modelled according to the individual country-specific situation with regard to emission standards and considered energy carriers. The thermal energy and process steam are produced at heat plants. Efficiencies for thermal energy production are by definition 100% in relation to the corresponding energy carrier input. For process steam the efficiency ranges from 85%, 90% to 95%. The energy carriers used for the generation of thermal energy and process steam are modelled according to the specific import situation (see electricity above).
Transports: All relevant and known transport processes are included. Ocean-going and inland ship transport as well as rail, truck and pipeline transport of bulk commodities are considered.
Energy carriers: The energy carriers are modelled according to the specific supply situation (see electricity above).
Refinery products: Diesel fuel, gasoline, technical gases, fuel oils, lubricants and residues such as bitumen are modelled with a parameterised country-specific refinery model. The refinery model represents the current national standard in refining techniques (e.g. emission level, internal energy consumption, etc.) as well as the individual country-specific product output spectrum, which can be quite different from country to country. The supply of crude oil is modelled, again, according to the country-specific situation with the respective properties of the resources.

## Technical purpose
This product can be used in construction.

## Safety margin
20 %. Product system depicted except for a few missing processes / flows. Technological, temporal and geographic representativeness partly given.

## Reference product
- Damp insulation (PA): 1

## Inputs
- Use of renewable primary energy (PERE) [MJ]: A1-A3 0.632215, C1 0, C2 0.000174336, C3 0.0135358, D -0.399899
- Primary energy resources used as raw materials (PERM) [MJ]: A1-A3 0, C1 0, C2 0, C3 0, D 0
- Total use of renewable primary energy resources (PERT) [MJ]: A1-A3 0.632215, C1 0, C2 0.000174336, C3 0.0135358, D -0.399899
- Use of non-renewable primary energy (PENRE) [MJ]: A1-A3 10.7245, C1 0, C2 0.00299464, C3 2.61293, D -1.26334
- Non-renewable primary energy resources used as raw materials (PENRM) [MJ]: A1-A3 2.496, C1 0, C2 0, C3 -2.496, D 0
- Total use of non-renewable primary energy resources (PENRT) [MJ]: A1-A3 13.2205, C1 0, C2 0.00299464, C3 0.116927, D -1.26334
- Input of secondary material (SM) [kg]: A1-A3 0, C1 0, C2 0, C3 0, D 0
- Use of renewable secondary fuels (RSF) [MJ]: A1-A3 0, C1 0, C2 0, C3 0, D 0
- Use of non renewable secondary fuels (NRSF) [MJ]: A1-A3 0, C1 0, C2 0, C3 0, D 0
- Use of net fresh water (FW) [m3]: A1-A3 0.00168674, C1 0, C2 1.56133e-7, C3 0.000546801, D -0.000186267

## Outputs
- Hazardous waste disposed (HWD) [kg]: A1-A3 5.49774e-9, C1 0, C2 1.11907e-10, C3 6.54824e-11, D -6.83745e-10
- Non-hazardous waste disposed (NHWD) [kg]: A1-A3 0.0112897, C1 0, C2 5.25612e-7, C3 0.00112536, D -0.000625484
- Radioactive waste disposed (RWD) [kg]: A1-A3 0.000141414, C1 0, C2 3.15274e-9, C3 1.95613e-6, D -4.83259e-5
- Components for re-use (CRU) [kg]: A1-A3 0, C1 0, C2 0, C3 0, D 0
- Materials for Recycling (MFR) [kg]: A1-A3 0, C1 0, C2 0, C3 0, D 0
- Material for Energy Recovery (MER) [kg]: A1-A3 0, C1 0.096, C2 0, C3 0, D 0
- Exported electrical energy (EEE) [MJ]: A1-A3 0, C1 0, C2 0, C3 0.38371, D 0
- Exported thermal energy (EET) [MJ]: A1-A3 0, C1 0, C2 0, C3 0.734402, D 0

## Impact indicators
- Global warming potential (GWP) [kg CO2 eq.]: A1-A3 0.707438, C1 0, C2 0.000222805, C3 0.219924, D -0.0874466
- Ozone Depletion Potential (ODP) [kg R11 eq.]: A1-A3 3.27342e-15, C1 0, C2 7.37493e-20, C3 7.63805e-17, D -2.21221e-15
- Acidification potential (AP) [kg SO2 eq.]: A1-A3 0.00264546, C1 0, C2 4.50042e-7, C3 0.00028516, D -7.65049e-5
- Eutrophication potential (EP) [kg Phosphate eq.]: A1-A3 0.000117018, C1 0, C2 1.06987e-7, C3 7.42668e-5, D -1.45839e-5
- Photochemical Ozone Creation Potential (POCP) [kg Ethene eq.]: A1-A3 0.000277617, C1 0, C2 -1.34832e-7, C3 1.64925e-5, D -7.61401e-6
- Abiotic depletion potential for non fossil resources (ADPE) [kg Sb eq.]: A1-A3 0.00287952, C1 0, C2 1.87492e-11, C3 1.01873e-9, D -2.32744e-8
- Abiotic depletion potential for fossil resources (ADPF) [MJ]: A1-A3 12.8515, C1 0, C2 0.00298658, C3 0.111988, D -1.14134

## Use advice
The data set represents a cradle to gate inventory. It can be used to characterise the supply chain situation of the respective commodity in a representative manner. Combination with individual unit processes using this commodity enables the generation of user-specific (product) LCAs.

## Data sources
- EMISSION SCENARIO DOCUMENT ON PLASTICS ADDITIVES, pg. 118 bis 125, 2004
- Plastics Europe Association of Plastics Manufacturers, 2006
- Additive in Kunststoffen, 1990
- GaBi Database Edition 2020, SP40
- GaBi database (all versions)
