# Stainless steel drinking water pipe; Stainless steel pipe

Dataset: ILCD process, EPD, generic dataset
Geography: DE
Reference year: 2018
Valid until: 2022
Classification: oekobau.dat: Metalle / Edelstahl / Edelstahl Trinkwasserrohre
Owner: thinkstep
Compliance: DIN EN 15804
Review: Dependent internal review by thinkstep, IABP-GaBi, IBP-GaBi; Independent external review by GaBi user forum, GaBi bug forum, GaBi user community
Amounts: rows without a unit in brackets have none in this file; such an amount is in the reference unit of its flow, which a separate flow dataset defines
copyright: true

## General comment
This data set has been modeled according to the European Standard EN 15804 for Sustainable Building. Results are depicted in modules that allow the structured expression of results over the entire life cycle.

## Geography
The data set represents the country specific situation in Germany, focusing on the main technologies, the region specific characteristics and / or import statistics.

## Time period
Annual average

## Technology and included processes
The dataset describes the production of a stainless steel drinking water pipe made of stainless steel (cold rolled). In so doing, the process of bending the steel sheet, the production of the welding seam as well as all necessary materials and energy expenditures have been considered. Transports from the factory to the building site are not considered and must be included according to the system boundaries.
The main process step is the melting of stainless steel scrap in the electric arc furnace (EAF), thus the consumed energy is mainly electric power. The major feed stock for the EAF is stainless steel scrap, which may comprise of scrap from inside the steelworks (e.g. cut-offs), cut-offs from steel product manufacturers (e.g. vehicle builders) and post-consumer scrap (e.g. end of life products). As in the integrated steel plant including blast furnaces and converters, a slag is formed from lime to collect undesirable components in the steel. Thus lime is an additive as well as coal (carbon) as reducing agent and alloying elements. Oxygen lances and / or oxy-fuel burners are used to assist in the early stages of melting. For every material fraction the transport is considered in the data set. For the production of carbon steel and low alloyed steels, following main operations are performed: raw material handling and storage, furnace charging with/without scrap preheating, EAF scrap melting, steel and slag tapping, ladle furnace treatments for quality adjustment, slag handling and finally continuous casting. For high alloyed respectively stainless steels, the operation sequence is more complex and tailor-made for the end-products. In addition to the mentioned operations for carbon steels various ladle treatments (secondary metallurgy) are carried out like desulphurisation, degassing for the elimination of dissolved gases like nitrogen and hydrogen, decarburisation (AOD=Argon-Oxygen-Decarburisation or VOD=Vacuum-Oxygen-Decarburisation). The following operations are two rolling processes: the hot strip mill and the cold rolling mill. In the hot rolling mill the slab is reshaped above the recrystallization temperature. The qualities obtained in this process are e.g. strength and surface quality. During the rolling process the material passes through the furnace and the rolling line. In the furnace the metal is preheated by natural gas. There is no need for an additional warming, if the hot slabs are directly charged into the rolling mill. The forming is done in various rolling frames until the final shape is obtained. The steel scrap in this process are directly recycled. In the cold rolling mill the material is reshaped below the recrystallization temperature. Thereby a enhanced surface quality, an improved dimensional accuracy as well as a higher strength are achieved. The different process steps are: pickling, the rolling line and the heat treatment.
Background system:
Electricity: Electricity is modelled according to the individual country-specific situations. The country-specific modelling is achieved on multiple levels. Firstly, individual energy carrier specific power plants and plants for renewable energy sources are modelled according to the current national electricity grid mix. Modelling the electricity consumption mix includes transmission / distribution losses and the own use by energy producers (own consumption of power plants and "other" own consumption e.g. due to pumped storage hydro power etc.), as well as imported electricity. Secondly, the national emission and efficiency standards of the power plants are modelled as well as the share of electricity plants and combined heat and power plants (CHP). Thirdly, the country-specific energy carrier supply (share of imports and / or domestic supply) including the country-specific energy carrier properties (e.g. element and energy content) are accounted for. Fourthly, the exploration, mining/production, processing and transport processes of the energy carrier supply chains are modelled according to the specific situation of each electricity producing country. The different production and processing techniques (emissions and efficiencies) in the different energy producing countries are considered, e.g. different crude oil production technologies or different flaring rates at the oil platforms.
Thermal energy, process steam: The thermal energy and process steam supply is modelled according to the individual country-specific situation with regard to emission standards and considered energy carriers. The thermal energy and process steam are produced at heat plants. Efficiencies for thermal energy production are by definition 100% in relation to the corresponding energy carrier input. For process steam the efficiency ranges from 85%, 90% to 95%. The energy carriers used for the generation of thermal energy and process steam are modelled according to the specific import situation (see electricity above).
Transports: All relevant and known transport processes are included. Ocean-going and inland ship transport as well as rail, truck and pipeline transport of bulk commodities are considered.
Energy carriers: The energy carriers are modelled according to the specific supply situation (see electricity above).
Refinery products: Diesel fuel, gasoline, technical gases, fuel oils, lubricants and residues such as bitumen are modelled with a parameterised country-specific refinery model. The refinery model represents the current national standard in refining techniques (e.g. emission level, internal energy consumption, etc.) as well as the individual country-specific product output spectrum, which can be quite different from country to country. The supply of crude oil is modelled, again, according to the country-specific situation with the respective properties of the resources.

## Technical purpose
This product can be used in construction.

## Safety margin
10 %. Product system almost completely covered. Good technological, temporal and geographic representativeness.

## Reference product
- Steel pipe: 1

## Inputs
- Use of renewable primary energy (PERE) [MJ]: A1-A3 9.48788, C1 0, C2 0.0019976, D -3.09261
- Primary energy resources used as raw materials (PERM) [MJ]: A1-A3 0, C1 0, C2 0, D 0
- Total use of renewable primary energy resources (PERT) [MJ]: A1-A3 9.48788, C1 0, C2 0.0019976, D -3.09261
- Use of non-renewable primary energy (PENRE) [MJ]: A1-A3 45.4959, C1 0, C2 0.0343136, D -15.562
- Non-renewable primary energy resources used as raw materials (PENRM) [MJ]: A1-A3 0, C1 0, C2 0, D 0
- Total use of non-renewable primary energy resources (PENRT) [MJ]: A1-A3 45.4959, C1 0, C2 0.0343136, D -15.562
- Input of secondary material (SM) [kg]: A1-A3 0.854966, C1 0, C2 0, D 0
- Use of renewable secondary fuels (RSF) [MJ]: A1-A3 0, C1 0, C2 0, D 0
- Use of non renewable secondary fuels (NRSF) [MJ]: A1-A3 0, C1 0, C2 0, D 0
- Use of net fresh water (FW) [m3]: A1-A3 0.0213028, C1 0, C2 1.78902e-6, D -0.0199985

## Outputs
- Hazardous waste disposed (HWD) [kg]: A1-A3 1.11485e-7, C1 0, C2 1.28226e-9, D -9.68205e-8
- Non-hazardous waste disposed (NHWD) [kg]: A1-A3 0.489991, C1 0, C2 6.02263e-6, D -0.11192
- Radioactive waste disposed (RWD) [kg]: A1-A3 0.0011273, C1 0, C2 3.61252e-8, D -6.39521e-5
- Components for re-use (CRU) [kg]: A1-A3 0, C1 0, C2 0, D 0
- Materials for Recycling (MFR) [kg]: A1-A3 0, C1 1.1, C2 0, D 0
- Material for Energy Recovery (MER) [kg]: A1-A3 0, C1 0, C2 0, D 0
- Exported electrical energy (EEE) [MJ]: A1-A3 0, C1 0, C2 0, D 0
- Exported thermal energy (EET) [MJ]: A1-A3 0, C1 0, C2 0, D 0

## Impact indicators
- Global warming potential (GWP) [kg CO2 eq.]: A1-A3 3.55922, C1 0, C2 0.00255297, D -1.26901
- Ozone Depletion Potential (ODP) [kg R11 eq.]: A1-A3 4.11151e-14, C1 0, C2 8.45044e-19, D -3.11714e-15
- Acidification potential (AP) [kg SO2 eq.]: A1-A3 0.0209944, C1 0, C2 5.15673e-6, D -0.00480993
- Eutrophication potential (EP) [kg Phosphate eq.]: A1-A3 0.00102931, C1 0, C2 1.2259e-6, D -0.000327479
- Photochemical Ozone Creation Potential (POCP) [kg Ethene eq.]: A1-A3 0.0010557, C1 0, C2 -1.6854e-6, D -0.00030828
- Abiotic depletion potential for non fossil resources (ADPE) [kg Sb eq.]: A1-A3 0.000151819, C1 0, C2 2.14835e-10, D -3.92219e-5
- Abiotic depletion potential for fossil resources (ADPF) [MJ]: A1-A3 42.6357, C1 0, C2 0.0342213, D -15.3927

## Use advice
The data set represents a cradle to gate inventory. It can be used to characterise the supply chain situation of the respective commodity in a representative manner. Combination with individual unit processes using this commodity enables the generation of user-specific (product) LCAs.

## Data sources
- GaBi Database Edition 2020, SP40
- GaBi database (all versions)
