# StoVentec R

Dataset: ILCD process, EPD, average dataset
Geography: RER
Reference year: 2021
Valid until: 2025
Classification: OEKOBAU.DAT: Komposite / Systembauteile / Aussenwände
Classification: IBUCategories: 02 Bauprodukte / Fassaden / Vorhangfassaden
Method details: Vorhangfassaden.pdf
Generated by: Sphera Solutions GmbH
Registration number: EPD-STO-20200207-CBD1-DE
Owner: Sto SE & Co. KGaA
Compliance: DIN EN 15804; ISO 14025
Review: Accredited third party review by Institut Bauen und Umwelt e. V.
Amounts: rows without a unit in brackets have none in this file; such an amount is in the reference unit of its flow, which a separate flow dataset defines
copyright: true
licenseType: Free of charge for all users and uses
accessRestrictions: None

## General comment
StoVentec R is a ventilated rainscreen cladding system with a seamless render finish, allowing walls to breathe and levelling uneven substrates.

StoVentec R can be mounted on different types of substructures. The substructure or the insulation is not included in this declaration. The declaration includes the following components. The specific (Sto-)products of some components can vary:

StoVentec R organic:

- StoVentec Carrier Board / StoVentec Carrier Board A

- Fixing screws for StoVentec Carrier Board
(used for this declaration: StoVentec Screw /
Sto-Façade Screw)

- Basecoat
(used for this declaration: StoArmat Classic Plus)

- Compressed sealing tape made of impregnated flexible foam (used for this declaration:
StoVentec Waterproofing Joint 10/3-7)

- Protective profile for the outer edges of the render carrier board (used for this declaration:
Sto-Edge Protection Profile G)

- Stop profile with drip edge
(used for this declaration: Sto-Rain Guard Profile G)

- Edge profile with integrated glass fibre mesh
(used for this declaration:
Sto-Mesh Angle Bead Standard 11/13 cm)

- Alkali-resistant reinforcing mesh
(used for this declaration: Sto-Glass Fibre Mesh F)

- Finish (used for this declaration: StoLotusan K)

StoVentec R mineralic:

- StoVentec Carrier Board / StoVentec Carrier Board A

- Fixing screws for StoVentec Carrier Board
(used for this declaration: StoVentec Screw)

- Substrate coating
(used for this declaration: Sto Primer)

- Basecoat (used for this declaration: StoLevell Evo)

- Compressed sealing tape made of impregnated flexible foam (used for this declaration:
StoVentec Waterproofing Joint 10/3-7)

- Protective profile for the outer edges of the render carrier board (used for this declaration:
Sto-Edge Protection Profile G)

- Stop profile with drip edge
(used for this declaration: Sto-Rain Guard Profile G)

- Edge profile with integrated glass fibre mesh
(used for this declaration:
Sto-Mesh Angle Bead Standard 11/13 cm)

- Alkali-resistant reinforcing mesh
(used for this declaration: Sto Glass Fibre Mesh)

- Intermediate coat
(used for this declaration: StoPrep Miral)

- Finish (used for this declaration: StoLotusan K)

For the placing of the product on the market in the European Union/European Free Trade Association /EU/EFTA) (with the exception of Switzerland) the Regulation (EU) No. 305/2011 (CPR) applies.

The product needs a declaration of performance taking into consideration ETA no. ETA-17/0406 :date 13/6-2017, title StoVentec R and the CE-marking.

For the application and use the respective national provisions apply.

## Technology and included processes
This dataset represents one squaremeter (1 m²) StoVentec R ventilated facade system (13,287 kg/m²), based on organic plasters. The composition of the system is: Carrier Board (StoVentec Carrier Board): 6,000 kg/m2 (1 pc/m2) Fixing screws (Stainless steel screws): 0,049 kg/m2 (12 pc/m2) Basecoat (StoArmat Classic Plus): 4,500 kg/m2 Compressed sealing tape made of impregnated flexible foam (StoVentec Waterproofing Joint 10/3-7): 0,005 kg/m2 Protective profile for the outer edges of the render carrier board (Sto-Edge Protection Profile G): 0,058 kg/m2 Profile with drip edge (Sto-Rain Guard Profile G): 0,063 kg/m2 Edge profile with integrated glass fibre mesh (Sto-Mesh Angle Bead Standard 11/3 cm): 0,040 kg/m2 Alkali-resistant reinforcing mesh (Glass Reinforcement mesh): 0,174 kg/m2 Finish (StoLotusan K): 2,400 kg/m2 For further details, and LCA results for a mineral based ventilated facade system, see the EPD document and it´s public annexe.
Declared unit:
The declared unit for the StoVentec R (1) facade system is 1 m² with a surface weight of 13,287 kg/m² and a thickness of 16mm.

The declared unit for the StoVentec R (2) facade system (see public annex to the EPD) is 1 m² with a surface weight of 19,504 kg/m² and a thickness of 20mm.

## Technical purpose
The declared product StoVentec R is being used as a seamless plaster system within an RSC (Rainscreen cladding) system. For the application and use national regulations apply. For example, in Germany the “Allgemeine bauaufsichtliche Zulassung Z-10.3-717” issued by the Deutsches Institut für Bautechnik (DiBt), Berlin, applies.

## Reference product
- StoVentec R: 1

## Inputs
- Renewable primary energy as energy carrier (PERE) [MJ]: A1-A3 34.497, A4 0.0694, A5 7.66, C1 0, C2 0.0347, C4 1.13, D -2.95
- Renewable primary energy resources as material utilization (PERM) [MJ]: A1-A3 8.173, A4 0, A5 -7.39, C1 0, C2 0, C4 -0.786, D 0
- Total use of renewable primary energy resources (PERT) [MJ]: A1-A3 42.667, A4 0.0694, A5 0.272, C1 0, C2 0.0347, C4 0.346, D -2.95
- Non renewable primary energy as energy carrier (PENRE) [MJ]: A1-A3 270.1, A4 1.24, A5 9.5, C1 0, C2 0.618, C4 24.1, D -13.5
- Non renewable primary energy as material utilization (PENRM) [MJ]: A1-A3 30.19, A4 0, A5 -8.69, C1 0, C2 0, C4 -21.5, D 0
- Total use of non renewable primary energy resources (PENRT) [MJ]: A1-A3 300.8, A4 1.24, A5 0.809, C1 0, C2 0.618, C4 2.64, D -13.5
- Use of secondary material (SM) [kg]: A1-A3 5.11, A4 0, A5 0, C1 0, C2 0, C4 0, D 0
- Use of renewable secondary fuels (RSF) [MJ]: A1-A3 0, A4 0, A5 0, C1 0, C2 0, C4 0, D 0
- Use of non renewable secondary fuels (NRSF) [MJ]: A1-A3 0, A4 0, A5 0, C1 0, C2 0, C4 0, D 0
- Use of net fresh water (FW) [m^3]: A1-A3 0.05826, A4 8.04e-5, A5 0.00453, C1 0, C2 4.02e-5, C4 0.000665, D -0.0049

## Outputs
- Hazardous waste disposed (HWD) [kg]: A1-A3 1.4385e-6, A4 5.75e-8, A5 4.28e-10, C1 0, C2 2.88e-8, C4 4.02e-8, D -1.21e-5
- Non hazardous waste disposed (NHWD) [kg]: A1-A3 1.00036, A4 0.000189, A5 0.0115, C1 0, C2 9.46e-5, C4 13.3, D -0.0059
- Radioactive waste disposed (RWD) [kg]: A1-A3 0.0055413, A4 1.53e-6, A5 9.1e-5, C1 0, C2 7.65e-7, C4 3e-5, D -0.000927
- Components for re-use (CRU) [kg]: A1-A3 0, A4 0, A5 0, C1 0, C2 0, C4 0, D 0
- Materials for recycling (MFR) [kg]: A1-A3 0, A4 0, A5 0, C1 0.0113, C2 0, C4 0, D 0
- Materials for energy recovery (MER) [kg]: A1-A3 0, A4 0, A5 0, C1 0, C2 0, C4 0, D 0
- Exported electrical energy (EEE) [MJ]: A1-A3 0, A4 0, A5 3.07, C1 0, C2 0, C4 0, D 0
- Exported thermal energy (EET) [MJ]: A1-A3 0, A4 0, A5 5.49, C1 0, C2 0, C4 0, D 0

## Impact indicators
- Global warming potential (GWP) [kg CO_(2)-Äq.]: A1-A3 15.744, A4 0.091, A5 1.86, C1 0, C2 0.0455, C4 0.181, D -0.798
- Depletion potential of the stratospheric ozone layer (ODP) [kg CFC11-Äq.]: A1-A3 2.41272e-11, A4 1.49e-17, A5 1.04e-15, C1 0, C2 7.43e-18, C4 9.94e-16, D -1.02e-14
- Acidification potential of land and water (AP) [kg SO_(2)-Äq.]: A1-A3 0.03094, A4 7.11e-5, A5 0.000201, C1 0, C2 3.55e-5, C4 0.00115, D -0.00134
- Eutrophication potential (EP) [kg PO_(4)^(3)-Äq.]: A1-A3 0.004645, A4 1.31e-5, A5 3.9e-5, C1 0, C2 6.54e-6, C4 0.000129, D -0.00014
- Formation potential of tropospheric ozone photochemical oxidants (POCP) [kg Ethen-Äq.]: A1-A3 0.00282422, A4 -3.22e-7, A5 1.75e-5, C1 0, C2 -1.61e-7, C4 8.71e-5, D -0.000111
- Abiotic depletion potential for non fossil resources (ADPE) [kg Sb-Äq.]: A1-A3 5.48751e-5, A4 6.66e-9, A5 1.14e-8, C1 0, C2 3.33e-9, C4 1.82e-8, D -3.36e-6
- Abiotic depletion potential for fossil resources (ADPF) [MJ]: A1-A3 286.1, A4 1.23, A5 0.58, C1 0, C2 0.616, C4 2.56, D -11.1

## Use advice
Scope:
This declaration covers the StoVentec R ventilated façade systems without subconstruction and insulation. Two specific façade variations are covered:

- StoVentec R (1), based on organic plaster, declared in this document.

- StoVentec R (2), based on mineral plaster, LCA results can be found in the public annexe to this EPD.

Product components are produced by Sto SE & Co. KGaA (site at Stühlingen, Germany), Sto Scandinavia AB (site at Linköping, Sweden), and external suppliers.
System boundary:
Cradle to gate - with options.

Description of the system boundaries:

Module A1 to A3:

This module considers the manufacturing of system components (e.g. carrier board, fastening, plaster etc.), the transport to the site in Sweden and the manufacturing/compiling of the façade system components. The impact for producing packaging materials is included as well.

Module A4:

This module considers 100 km truck transport to site. The transport distance can be modified project-specific.

Module A5:

Treatment and disposal of packaging material. Credits for potential avoided burdens on electricity and thermal energy generation are declared in module D and affects only the rate of virgin material.

An overlap of 10% with glass fibre mesh is considered in A5 (production of overlap within module A1-A3, “kit-approach”).

Electricity consumption for drilling and mortar application is considered.

Installation losses have not been accounted for, since such losses highly depend on the specific building geometry and other site-specific factors. Installation losses may be estimated based on the LCA results for manufacturing and End-Of-Life (EoL), e.g. via scaling.

Module C1 to C4:

C1: Manual dismantling, no environmental burdens.

C2: 50 km transport to waste treatment by truck (may be adapted on building level).

C3: No additional waste processing, no environmental burdens.

C4: European scenario for average landfill emissions is declared.

Module D:

Benefits and loads for metal components and avoided burdens from packaging treatment.

## Data sources
- GaBi Database (all versions)
- GaBi database SP38 2019
