# Automatic Sliding Door ST FLEX Green

Dataset: ILCD process, EPD, representative dataset
Geography: DE
Reference year: 2016
Valid until: 2021
Classification: OEKOBAU.DAT: Komponenten von Fenstern und Vorhangfassaden / Antriebssysteme / elektrisch
Classification: IBUCategories: 02 Bauprodukte / Türen, Fenster, Beschläge und Zubehör / Automatiktüren und -tore, sowie Karusselltüranlagen
Method details: Automatiktüren und -tore, sowie Karusselltüranlagen.pdf
Owner: DORMA Deutschland GmbH
Compliance: DIN EN 15804; ISO 14025
Review: Accredited third party review by IBU
Amounts: rows without a unit in brackets have none in this file; such an amount is in the reference unit of its flow, which a separate flow dataset defines
copyright: true

## General comment
The ST FLEX Green stands for an automatic sliding door system manufactured by DORMA. DORMA underlines its contribution to more energy efficiency and more sustainability with the sliding door ST FLEX Green. The automatic sliding door has a slim, thermal divided profile system on basis of the ST FLEX profile. Therefore, heat insulation is achieved without compromising in the slim profile. ST FLEX Green makes considerable savings of the running energy and heating costs possible, as well as a reduction in CO2-emissions for the entire use phase. To meet all requirements, the ST FLEX Green system is available with different ES 200 operator versions.

## Technology and included processes
The ST FLEX Green stands for an automatic sliding door system manufactured by DORMA. DORMA underlines its contribution to more energy efficiency and more sustainability with the sliding door ST FLEX Green. The automatic sliding door has a slim, thermal divided profile system on basis of the ST FLEX profile. Therefore, heat insulation is achieved without compromising in the slim profile. ST FLEX Green makes considerable savings of the running energy and heating costs possible, as well as a reduction in CO2- emissions for the entire use phase. To meet all requirements, the ST FLEX Green system is available with different ES 200 operator versions. The ST FLEX Green sliding panels and side screens are manufactured in the DORMA plant Zusmarshausen. Electronic components are also manufactured within the DORMA Group. The operators and circuit boards are manufactured in Ennepetal. The certified Quality Management system to /ISO 9001/ safeguards the high quality standard of DORMA products at all locations.
Technical data:
Technical data on the ES 200 operator systems relating to the ST FLEX Green sliding door system:
Technical data of sliding panels and side screens - heat transition coefficient (U-value) in accordance with /ISO 10077-1 /-2/:

· Insulation glass units: 1.0 [W/m²K]

· Heat transition coefficient (U-value) for the automatic sliding door system measuring 6250 x 3305 mm: 1.4 [W/m²K]

· Heat transition coefficient (U-value) for the automatic sliding door system measuring 2100 x 2205 mm: 1.6 [W/m²K]
Declared unit:
The declared unit is one piece (1 pc.) of the ST FLEX Green automatic sliding door system comprising:

- average value of the ES 200 Standard, ES 200 2D, ES 200 EASY and ES 200 EASYplus operators,

- two sliding panels,

- two side screens and

- respective packaging materials.

The side screens are not part of the moving automatic door but rather form a part of the overall automatic door system and have been taken into consideration in the declared unit. The declared unit comprises the following data:

## Technical purpose
The ST FLEX Green automatic sliding door system is used in particular where energy saving enjoys key significance during the reference service life. Each system is manufactured to the individual dimensions of the respective building project. The ES 200 Standard, ES 200 2 D, ES 200 EASY and ES 200 EASYplus operators analysed within the framework of the EPD are designed for the following applications: Details are available in the respective product catalogues.

## Reference product
- ST FLEX Green: 1

## Inputs
- Erneuerbare Primärenergie als Energieträger (PERE) [MJ]: A1-A3 1890, A4 3.91, A5 0.271, B3 389, B6 4880, C2 0.302, C3 19.9, D -2020
- Erneuerbare Primärenergie zur stofflichen Nutzung (PERM) [MJ]: A1-A3 100, A4 6.01e-12, A5 1e-11, B3 13.5, B6 1.61e-7, C2 4.56e-13, C3 0.0801, D -0.0452
- Total erneuerbare Primärenergie (PERT) [MJ]: A1-A3 1990, A4 3.91, A5 0.271, B3 403, B6 4880, C2 0.302, C3 19.9, D -2020
- Nicht-erneuerbare Primärenergie als Energieträger (PENRE) [MJ]: A1-A3 13500, A4 68.9, A5 2.16, B3 2090, B6 17400, C2 5.33, C3 353, D -6710
- Nicht-erneuerbare Primärenergie zur stofflichen Nutzung (PENRM) [MJ]: A1-A3 138, A4 0, A5 0, B3 70.3, B6 0, C2 0, C3 0.0225, D -1.18e-5
- Total nicht erneuerbare Primärenergie (PENRT) [MJ]: A1-A3 13600, A4 68.9, A5 2.16, B3 2160, B6 17400, C2 5.33, C3 353, D -6710
- Einsatz von Sekundärstoffen (SM) [kg]: A1-A3 52.7, A4 0, A5 0, B3 0, B6 0, C2 0, C3 0, D 0
- Erneuerbare Sekundärbrennstoffe (RSF) [MJ]: A1-A3 0.0441, A4 0, A5 0, B3 0.00613, B6 0, C2 0, C3 0, D 0.117
- Nicht erneuerbare Sekundärbrennstoffe (NRSF) [MJ]: A1-A3 0.394, A4 0, A5 0, B3 0.0294, B6 0, C2 0, C3 0, D 1.24
- Einsatz von Süßwasserressourcen (FW) [m^3]: A1-A3 4300, A4 0.31, A5 0.196, B3 782, B6 3440, C2 0.0239, C3 22.2, D -5050

## Outputs
- Gefährlicher Abfall zur Deponie (HWD) [kg]: A1-A3 0.0912, A4 0, A5 0, B3 0.0597, B6 0, C2 0, C3 0.0898, D 0
- Entsorgter nicht gefährlicher Abfall (NHWD) [kg]: A1-A3 1700, A4 0.271, A5 0.443, B3 500, B6 4240, C2 0.0207, C3 47.7, D -1030
- Entsorgter radioaktiver Abfall (RWD) [kg]: A1-A3 0.596, A4 9.84e-5, A5 0.000128, B3 0.109, B6 2.63, C2 7.62e-6, C3 0.0115, D -0.323
- Komponenten für die Wiederverwendung (CRU) [kg]: A1-A3 0, A4 0, A5 0, B3 0, B6 0, C2 0, C3 0, D 0
- Stoffe zum Recycling (MFR) [kg]: A1-A3 12.1, A4 0, A5 0, B3 8.86, B6 0, C2 0, C3 274, D 0
- Stoffe für die Energierückgewinnung (MER) [kg]: A1-A3 2.64, A4 0, A5 4.86, B3 9.32, B6 0, C2 0, C3 13.4, D 0
- Exportierte elektrische Energie (EEE) [MJ]: A1-A3 3.34, A4 0, A5 9.29, B3 10, B6 0, C2 0, C3 39.6, D 0
- Exportierte thermische Energie (EET) [MJ]: A1-A3 8.29, A4 0, A5 21.8, B3 25.7, B6 0, C2 0, C3 98.1, D 0

## Impact indicators
- Globales Erwärmungspotenzial (GWP) [kg CO_(2)-Äq.]: A1-A3 955, A4 5.02, A5 7.11, B3 160, B6 1000, C2 0.389, C3 54.4, D -533
- Abbau Potential der stratosphärischen Ozonschicht (ODP) [kg CFC11-Äq.]: A1-A3 5.18e-6, A4 2.27e-11, A5 3.17e-11, B3 6.18e-7, B6 7.1e-7, C2 1.77e-12, C3 3.73e-7, D -1.12e-5
- Versauerungspotenzial von Boden und Wasser (AP) [kg SO_(2)-Äq.]: A1-A3 4.47, A4 0.0315, A5 0.00139, B3 1.18, B6 2.79, C2 0.00242, C3 0.0683, D -2.67
- Eutrophierungspotenzial (EP) [kg PO_(4)^(3)-Äq.]: A1-A3 0.654, A4 0.00792, A5 0.000262, B3 0.0504, B6 0.249, C2 0.000606, C3 0.0102, D -0.22
- Bildungspotential für troposphärisches Ozon (POCP) [kg Ethen-Äq.]: A1-A3 0.356, A4 -0.0132, A5 0.000104, B3 0.0617, B6 0.192, C2 -0.00101, C3 0.00529, D -0.172
- Potenzial für den abiotischen Abbau nicht fossiler Ressourcen (ADPE) [kg Sb-Äq.]: A1-A3 0.0238, A4 3.32e-7, A5 1.26e-7, B3 0.00869, B6 0.00031, C2 2.56e-8, C3 4.04e-5, D -0.027
- Potenzial für den abiotischen Abbau fossiler Brennstoffe (ADPF) [MJ]: A1-A3 11800, A4 68.6, A5 1.83, B3 1740, B6 10800, C2 5.31, C3 321, D -5920

## Use advice
Scope:
This EPD refers to the entire life cycle of a DORMA ST FLEX GREEN automatic sliding door system. The various technical characteristics are outlined in section 2.3. The production location is DORMA Zusmarshausen, Germany. Product components are also procured from the DORMA facilities in Ennepetal. The material and energy flows were taken into consideration accordingly.
System boundary:
Type of EPD: Cradle-to-Gate with options

Modules A1-3, A4 and A5

The product stage commences with considering production of the requisite raw materials and energies including all of the corresponding upstream chains and the requisite procurement transport. Furthermore, the whole production phase was displayed at two production facilities until reaching the End-of-Waste status (EoW). Transport associated with distribution as well as installation in the building were also taken into consideration.

Module B3

This module includes replacement of wear parts across its entire service life of 10 years. The production of spare parts and the disposal of wear parts until the End-of-Waste belong to this.

Module B6

This module includes the energy consumption for operating the declared drive units including the stand-by modus over the entire operating life time of 10 years.

Modules C2-3

These modules include the environmental impacts of the treatment of waste fractions until reaching the End-of-Waste status (EoW) including transport associated with this at the end of the product life cycle.

Module D The credits resulting from the waste treatment which are resulting from the energetic (MVA-route) or mechanical recycling (recycling-route) of packaging (A5), spare parts (B3) and the product in the End-of-Life status (C3) are indicated here.

## Data sources
- Automatische Schiebetüranlage ST FLEX Green.pdf
- GaBi Database (all versions)
- GaBi database SP28 2015
