# Planed coniferous lumber (German average)

Dataset: ILCD process, EPD, representative dataset
Geography: DE
Reference year: 2021
Valid until: 2026
Classification: OEKOBAU.DAT: Holz / Vollholz / Bau-Schnittholz
Method details: EN 15804; ILCD format
Generated by: Thünen-Institut für Holzforschung
Owner: Thünen-Institut für Holzforschung
Compliance: EN 15804+A2; EN 16485
Review: Independent external review by Dr. Frank Werner - Umwelt & Entwicklung
Amounts: rows without a unit in brackets have none in this file; such an amount is in the reference unit of its flow, which a separate flow dataset defines
copyright: true

## General comment
Further information on the declared unit and the inventory analysis based on manufacturer information (input and output of material and energy flows) are available for download as an Excel file within the section “background info”.
The data set was created in 2021 as an update with identical foreground system. All background data sets are taken from the GaBi Professional Database with content version 2021.1. The modeling and calculation of the life cycle assessment is based on the European standards EN 15804:2012+A2:2019 and EN 16485:2014. For questions, please contact holzundklima@thuenen.de.

## Geography
Für die Ökobilanzierung von Hobelware wurden Daten von 31 Werken berücksichtigt (Rüter & Diederichs 2012). Für alle in Rüter & Diederichs (2012) angeführten Vollholzprodukte wurden von 2009 bis 2011 insgesamt 178 Prozesslinien erfasst. Im Verhältnis zu den vom Statistischen Bundesamt gemeldeten Produktionsmengen im selben Zeitraum entspricht die erreichte Abdeckung von Vollholzprodukten aus Nadelschnittholz 38 %.

## Time period
The data set is based on production data from the years 2009 to 2011 (foreground system).
The background system was updated in 2021.

## Technology and included processes
Zur Herstellung von Hobelware aus Nadelholz wird kammergetrocknetes Nadelschnittholz auf mindestens einer Seite maschinell bearbeitet, wobei in den meisten Fällen von einem vierseitigen Hobelvorgang ausgegangen werden kann. Der Hobelvorgang kann ein Nuten oder Profilieren des eingeschnittenen Holzes beinhalten. Nach dem Hobeln wird das Produkt für den Transport gestapelt und verpackt. Für die Herstellung von Hobelware aus Nadelholz wurden die Rohstoffe durchschnittlich über eine Distanz von 111 km transportiert. Die meisten Werke bezogen dabei Rundholz in Rinde. Etwa 87 % der bezogenen Holzrohstoffe stammen aus Deutschland.
Die Holzfeuchte des Produktes liegt bei 12%

## Technical purpose
Planed coniferous lumber can be used versatilely i.a. as floor covering or wall and ceiling cladding in the form of profiled boards.

## Scenarios
- energetisch (Modul D): therm. Verwertung
- stofflich (Modul D): stoffl. Verwertung
- Entsorgung Verpackung (Modul A5): Das Modul A5 enthält ausschließlich die Entsorgung der Verpackungsmaterialien

## Reference product
- Hobelware (Durchschnitt DE): 1

## Inputs
- Use of renewable primary energy (PERE) [MJ]: A1 183.506, A2 4.66169, A3 2412.1, A1-A3 2600.27, A5 (Entsorgung Verpackung) 0.515595, C2 0.389087, C3 100.439, D (energetisch) 5954.63, D (stofflich) -46.4779
- Use of renewable primary energy resources used as raw materials (PERM) [MJ]: A1 8350.32, A2 0, A3 74.5946, A1-A3 8424.91, A5 (Entsorgung Verpackung) -74.5946, C2 0, C3 -8350.32, D (energetisch) 0, D (stofflich) 0
- Total use of renewable primary energy resources (PERT) [MJ]: A1 8533.82, A2 4.66169, A3 2486.69, A1-A3 11025.2, A5 (Entsorgung Verpackung) -74.079, C2 0.389087, C3 -8249.88, D (energetisch) 5954.63, D (stofflich) -46.4779
- Use of non renewable primary energy (PENRE) [MJ]: A1 218.944, A2 79.903, A3 605.784, A1-A3 904.632, A5 (Entsorgung Verpackung) 2.66452, C2 6.9813, C3 153.986, D (energetisch) -4658.21, D (stofflich) -206.929
- Use of non renewable primary energy resources used as raw materials (PENRM) [MJ]: A1 0, A2 0, A3 24.12, A1-A3 24.12, A5 (Entsorgung Verpackung) -24.12, C2 0, C3 0, D (energetisch) 0, D (stofflich) 0
- Total use of non renewable primary energy resource (PENRT) [MJ]: A1 218.944, A2 79.903, A3 629.904, A1-A3 928.752, A5 (Entsorgung Verpackung) -21.4555, C2 6.9813, C3 153.986, D (energetisch) -4658.21, D (stofflich) -206.929
- Use of secondary material (SM) [kg]: A1 0, A2 0, A3 0, A1-A3 0, A5 (Entsorgung Verpackung) 0, C2 0, C3 0, D (energetisch) 0, D (stofflich) 485.251
- Use of renewable secondary fuels (RSF) [MJ]: A1 11.407, A2 0, A3 66.7806, A1-A3 78.1876, A5 (Entsorgung Verpackung) 0, C2 0, C3 0, D (energetisch) 0, D (stofflich) 0
- Use of non renewable secondary fuels (NRSF) [MJ]: A1 0, A2 0, A3 0, A1-A3 0, A5 (Entsorgung Verpackung) 0, C2 0, C3 0, D (energetisch) 0, D (stofflich) 0
- Use of net fresh water (FW) [m3]: A1 0.0239776, A2 0.00428541, A3 0.142356, A1-A3 0.170619, A5 (Entsorgung Verpackung) 0.0285928, C2 0.000445372, C3 0.0472656, D (energetisch) 0.767993, D (stofflich) -0.0248428

## Outputs
- Hazardous waste disposed (HWD) [kg]: A1 5.5465e-7, A2 3.4672e-9, A3 1.53693e-6, A1-A3 2.09504e-6, A5 (Entsorgung Verpackung) 4.79863e-10, C2 3.51783e-10, C3 5.59893e-8, D (energetisch) -1.59736e-6, D (stofflich) -2.28103e-7
- Non hazardous waste dispose (NHWD) [kg]: A1 0.164927, A2 0.0128016, A3 1.83003, A1-A3 2.00776, A5 (Entsorgung Verpackung) 0.104367, C2 0.00103708, C3 0.11997, D (energetisch) 2.17334, D (stofflich) -0.0384725
- Radioactive waste disposed (RWD) [kg]: A1 0.00375514, A2 8.63833e-5, A3 0.0349558, A1-A3 0.0387973, A5 (Entsorgung Verpackung) 0.000130193, C2 8.44476e-6, C3 0.0123357, D (energetisch) -0.284569, D (stofflich) -0.00509256
- Components for re-use (CRU) [kg]: A1 0, A2 0, A3 0, A1-A3 0, A5 (Entsorgung Verpackung) 0, C2 0, C3 0, D (energetisch) 0, D (stofflich) 0
- Materials for recycling (MFR) [kg]: A1 0, A2 0, A3 0, A1-A3 0, A5 (Entsorgung Verpackung) 0, C2 0, C3 485.251, D (energetisch) 0, D (stofflich) 0
- Materials for energy recovery (MER) [kg]: A1 0, A2 0, A3 0, A1-A3 0, A5 (Entsorgung Verpackung) 3.87082, C2 0, C3 485.251, D (energetisch) 0, D (stofflich) 0
- Exported electrical energy (EEE) [MJ]: A1 0, A2 0, A3 0.208983, A1-A3 0.208983, A5 (Entsorgung Verpackung) 17.9592, C2 0, C3 0, D (energetisch) 0, D (stofflich) 0
- Exported thermal energy (EET) [MJ]: A1 0, A2 0, A3 0.485493, A1-A3 0.485493, A5 (Entsorgung Verpackung) 34.1752, C2 0, C3 0, D (energetisch) 0, D (stofflich) 0

## Impact indicators
- Global Warming Potential - total (GWP-total) [kg CO2-Äqv.]: A1 -776.7, A2 5.98057, A3 42.2031, A1-A3 -728.517, A5 (Entsorgung Verpackung) 9.21699, C2 0.503714, C3 806.54, D (energetisch) -343.021, D (stofflich) -15.5343
- Global Warming Potential - fossil fuels (GWP-fossil) [kg CO2-Äqv.]: A1 17.7013, A2 5.98057, A3 49.2996, A1-A3 72.9814, A5 (Entsorgung Verpackung) 2.12048, C2 0.503714, C3 12.138, D (energetisch) -343.021, D (stofflich) -15.5343
- Global Warming Potential - biogenic (GWP-biogenic) [kg CO2-Äqv.]: A1 -794.402, A2 0, A3 -7.09651, A1-A3 -801.498, A5 (Entsorgung Verpackung) 7.09651, C2 0, C3 794.402, D (energetisch) 0, D (stofflich) 0
- Depletion potential of the stratospheric ozone layer (ODP) [kg CFC 11-Äquiv.]: A1 1.23438e-13, A2 1.65963e-15, A3 2.35802e-12, A1-A3 2.48312e-12, A5 (Entsorgung Verpackung) 1.68016e-15, C2 6.69155e-17, C3 4.15483e-13, D (energetisch) -9.5815e-12, D (stofflich) -1.69822e-13
- Acidification potential, Accumulated Exceedance (AP) [mol H+ eqv.]: A1 0.1392, A2 0.0350439, A3 0.428959, A1-A3 0.603203, A5 (Entsorgung Verpackung) 0.00179579, C2 0.00304102, C3 0.0174679, D (energetisch) -0.312807, D (stofflich) -0.0691433
- Eutrophication potential - freshwater (EP-freshwater) [kg P eqv.]: A1 4.41032e-5, A2 1.31976e-5, A3 0.00018936, A1-A3 0.00024666, A5 (Entsorgung Verpackung) 2.55688e-7, C2 1.55478e-6, C3 5.08852e-5, D (energetisch) -0.00117739, D (stofflich) -3.66278e-5
- Eutrophication potential - marine (EP-marine) [kg N eqv.]: A1 0.0655657, A2 0.0172815, A3 0.182027, A1-A3 0.264874, A5 (Entsorgung Verpackung) 0.000548328, C2 0.00149005, C3 0.00558653, D (energetisch) -0.111611, D (stofflich) -0.0321782
- Eutrophication potential - terrestrial (EP-terrestrial) [mol N eqv.]: A1 0.725898, A2 0.191228, A3 2.05263, A1-A3 2.96976, A5 (Entsorgung Verpackung) 0.00854775, C2 0.0164923, C3 0.0583261, D (energetisch) -0.911955, D (stofflich) -0.353715
- Versauerungspotenzial, kumulierte Überschreitung (AP) [kg NMVOC eqv.]: A1 0.18498, A2 0.0324287, A3 0.533005, A1-A3 0.750414, A5 (Entsorgung Verpackung) 0.00146973, C2 0.00281015, C3 0.0138795, D (energetisch) -0.27933, D (stofflich) -0.0834323
- Abiotic depletion potential - non-fossil resources (ADPE) [kg Sb-Äqv.]: A1 3.92189e-6, A2 5.16683e-7, A3 2.85082e-5, A1-A3 3.29468e-5, A5 (Entsorgung Verpackung) 2.57896e-8, C2 3.98735e-8, C3 4.98206e-6, D (energetisch) -0.00011993, D (stofflich) -2.86137e-6
- Abiotic depletion potential - fossil resources (ADPF) [MJ]: A1 218.918, A2 79.8847, A3 605.587, A1-A3 904.389, A5 (Entsorgung Verpackung) 2.66325, C2 6.97199, C3 153.938, D (energetisch) -4657.1, D (stofflich) -206.874
- Water (user) deprivation potential (WDP) [m3 world eqv.]: A1 0.0239776, A2 0.00428541, A3 0.142356, A1-A3 0.170619, A5 (Entsorgung Verpackung) 0.0285928, C2 0.000445372, C3 0.0472656, D (energetisch) 0.767993, D (stofflich) -0.0248428
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
## Use advice
Aufgrund der hohen Abdeckung bildet der Datensatz die durchschnittlichen Produktionsverhältnisse und die damit verbundenen Umweltwirkungen repräsentativ für Deutschland ab. Liegen keine herstellerspezifischen Ökobilanzergebnisse des verwendeten Produkts vor, empfiehlt sich die Verwendung dieses Durchschnittsdatensatzes.

## Data sources
- Rüter S, Diederichs S (2012) Ökobilanz Basisdaten für Bauprodukte aus Holz, Hamburg, Johann Heinrich von Thünen Institut, Institut für Holztechnologie und Holzbiologie, Abschlussbericht
- GaBi database (general)
