# Holzfaserdämmstoff Trockenverfahren (Durchschnitt DE)

Dataset: ILCD process, EPD, representative dataset
Geography: DE
Reference year: 2020
Valid until: 2025
Classification: OEKOBAU.DAT: Dämmstoffe / Holzfasern / Holzfaserdämmplatte
Method details: EN 15804; EN 16485; ILCD format
Owner: Thünen-Institut für Holzforschung
Compliance: EN 15804; EN 16485
Review: Dependent internal review by Thünen-Institut für Holzforschung
Amounts: rows without a unit in brackets have none in this file; such an amount is in the reference unit of its flow, which a separate flow dataset defines
copyright: true

## General comment
Weitere Informationen zur deklarierten Einheit (Zusammensetzung) und die auf Herstellerangaben beruhende Sachbilanz (In- und Output der Stoff- und Energieströme) stehen als Excel-Datei unter dem Unterpunkt Hintergrundbericht zum Download bereit.
Der Datensatz wurde 2020 erstellt. Alle Hintergrunddaten entstammen der GaBi Professional Datenbank 2020 im Service Pack 40. Die Modellierung und Berechnung der Ökobilanz basiert auf den europäischen Normen EN 15804:2012+A1:2013 und EN 16485:2014. Bei Rückfragen wenden Sie sich bitte an holzundklima@thuenen.de.

## Geography
Für die Ökobilanzierung von Holzfaserdämmstoffen im Trockenverfahren in Deutschland wurden Daten von zwei Werken berücksichtigt (Möller et al. 2020). Produktionszahlen für die gesamte Produktion von Holzfaserdämmstoffen im Trockenverfahren in Deutschland in 2018 liegen nicht vor, und können nur grob abgeschätzt werden. Der Anteil der erhobenen Produktionsmenge für das Jahr 2018 entspricht etwa zwei Drittel (67 %) der abgeschätzten Gesamt-Produktionsmenge.

## Time period
Der Datensatz basiert auf Produktionsdaten für das Kalenderjahr 2018 (Vordergrundsystem).
Alle Hintergrunddaten entstammen der GaBi Professional Datenbank 2020 im Service Pack 40.

## Technology and included processes
Zur Herstellung von Holzfaserdämmstoffen im Trockenverfahren werden zunächst Hackschnitzel aus Nadelholz zerkleinert. Die zerkleinerten Fraktionen werden anschließend unter Einwirkung von Wasserdampf mechanisch zerfasert. Die Fasern werden anschließend im Stromrohrtrockner getrocknet und nach Beimischung von Zusätzen wie Bi-Komponentenfasern oder Polyurethan-Klebstoffen auf eine Formstraße gestreut und dort durch Wärmezufuhr ausgehärtet. Im Nachgang werden die Platten auf Format gesägt und auf Paletten gelagert. Feste Platten können je nach gewünschter Anwendungsdicke schichtweise verklebt werden. Ein Sonderfall sind Einblasdämmstoffe aus Holzfasern. Die losen Fasern werden nach der Zugabe von Flammschutzmitteln direkt in Säcken verpackt und palettiert. Hackschnitzel zur Herstellung von Holzfaserdämmstoffen wurden durchschnittlich über eine Distanz von 84 km per LKW transportiert, Zusatzstoffe 332 km per LKW und 350 km per Zug. Die Holzfeuchte des Produktes liegt bei 10 %, der Wasseranteil bei 13 %.

## Technical purpose
Der Anwendungsbereich variiert je nach Ausführungsart des Dämmstoffes. Die Einblasdämmung ist eine raumfüllende Wärmedämmung, die in geschlossene Hohlräume eingeblasen werden kann. Die Anwendung ist bei Innen- und Außenwänden, sowie im Deckenbereich möglich. Für flexible Dämmmatten reicht der Anwendungsbereich von der Zwischensparrendämmung über die Gefachdämmung von Wänden in Holzrahmen- und Holzständerbauweise, Dämmung von Holzbalkendecken, Dämmung der obersten Geschossdecke bis zur Dämmung von Installationsebenen.

## Scenarios
- energetisch: thermische Verwertung

## Reference product
- Holzfaserdämmstoff Trockenverfahren (Durchschnitt DE): 1

## Inputs
- Use of renewable primary energy (PERE) [MJ]: A1 53.8769, A2 1.34204, A3 760.525, A1-A3 815.744, A5 0.885953, C2 0.340174, C3 0.875666, D (energetisch) 1917.72
- Use of renewable primary energy resources used as raw materials (PERM) [MJ]: A1 2491.51, A2 0, A3 116.689, A1-A3 2608.19, A5 -116.689, C2 0, C3 -2491.51, D (energetisch) 0
- Total use of renewable primary energy resources (PERT) [MJ]: A1 2545.38, A2 1.34204, A3 877.214, A1-A3 3423.94, A5 -115.803, C2 0.340174, C3 -2490.63, D (energetisch) 1917.72
- Use of non renewable primary energy (PENRE) [MJ]: A1 631.515, A2 17.8323, A3 960.314, A1-A3 1609.66, A5 19.9872, C2 6.0577, C3 15.0421, D (energetisch) -2003.05
- Use of non renewable primary energy resources used as raw materials (PENRM) [MJ]: A1 85.5781, A2 0, A3 15.6909, A1-A3 101.269, A5 -15.6909, C2 0, C3 -85.5781, D (energetisch) 0
- Total use of non renewable primary energy resource (PENRT) [MJ]: A1 717.093, A2 17.8323, A3 976.005, A1-A3 1710.93, A5 4.29632, C2 6.0577, C3 15.0421, D (energetisch) -2088.62
- Use of secondary material (SM) [kg]: A1 0, A2 0, A3 0, A1-A3 0, A5 0, C2 0, C3 0, D (energetisch) 0
- Use of renewable secondary fuels (RSF) [MJ]: A1 0, A2 0, A3 0, A1-A3 0, A5 0, C2 0, C3 0, D (energetisch) 0
- Use of non renewable secondary fuels (NRSF) [MJ]: A1 0, A2 0, A3 0, A1-A3 0, A5 0, C2 0, C3 0, D (energetisch) 0
- Use of net fresh water (FW) [m3]: A1 0.28186, A2 0.00155333, A3 0.574863, A1-A3 0.858277, A5 0.0400457, C2 0.000393898, C3 0.000784421, D (energetisch) 0.356057

## Outputs
- Hazardous waste disposed (HWD) [kg]: A1 1.81717e-5, A2 7.89258e-7, A3 2.5047e-6, A1-A3 2.14657e-5, A5 1.36654e-8, C2 2.81906e-7, C3 5.62226e-7, D (energetisch) -1.07728e-6
- Non hazardous waste dispose (NHWD) [kg]: A1 0.239154, A2 0.00321878, A3 0.687614, A1-A3 0.929987, A5 0.211971, C2 0.000927061, C3 0.00263987, D (energetisch) 2.77235
- Radioactive waste disposed (RWD) [kg]: A1 0.00794565, A2 0.000154551, A3 0.00561762, A1-A3 0.0137178, A5 0.000132051, C2 7.49784e-6, C3 1.58386e-5, D (energetisch) -0.0831467
- Components for re-use (CRU) [kg]: A1 0, A2 0, A3 0, A1-A3 0, A5 0, C2 0, C3 0, D (energetisch) 0
- Materials for recycling (MFR) [kg]: A1 0, A2 0, A3 0, A1-A3 0, A5 0, C2 0, C3 0, D (energetisch) 0
- Materials for energy recovery (MER) [kg]: A1 0, A2 0, A3 0, A1-A3 0, A5 0, C2 0, C3 150.759, D (energetisch) 0
- Exported electrical energy (EEE) [MJ]: A1 0, A2 0, A3 0, A1-A3 0, A5 21.2308, C2 0, C3 0, D (energetisch) 0
- Exported thermal energy (EET) [MJ]: A1 0, A2 0, A3 0, A1-A3 0, A5 48.4651, C2 0, C3 0, D (energetisch) 0

## Impact indicators
- Global warming potential (GWP) [kg CO2-Äqv.]: A1 -206.265, A2 1.27355, A3 48.7076, A1-A3 -156.284, A5 12.4723, C2 0.437466, C3 238.178, D (energetisch) -123.993
- Depletion potential of the stratospheric ozone layer (ODP) [kg R11-Äqv.]: A1 2.77766e-13, A2 1.67212e-15, A3 6.17561e-13, A1-A3 8.96999e-13, A5 4.89205e-15, C2 7.28214e-17, C3 3.70283e-16, D (energetisch) -3.2683e-12
- Acidification potential of soil and water (AP) [kg SO2-Äqv.]: A1 0.0628473, A2 0.00523242, A3 0.0827237, A1-A3 0.150803, A5 0.00214291, C2 0.00183295, C3 0.0101434, D (energetisch) -0.111926
- Eutrophication potential (EP) [kg Phosphat-Äqv.]: A1 0.012785, A2 0.00130179, A3 0.0162798, A1-A3 0.0303666, A5 0.000442894, C2 0.000461111, C3 0.00219025, D (energetisch) -0.0190744
- Formation potential of tropospheric ozone (POCP) [kg Ethen-Äqv.]: A1 0.00516858, A2 -0.00214975, A3 0.041597, A1-A3 0.0446158, A5 0.000108123, C2 -0.000770823, C3 0.000991432, D (energetisch) -0.0107393
- Abiotic depletion potential for non fossil resources (ADPE) [kg Sb-Äqv.]: A1 6.05927e-5, A2 1.19482e-7, A3 1.45256e-5, A1-A3 7.52378e-5, A5 2.63334e-7, C2 3.68366e-8, C3 1.03257e-7, D (energetisch) -3.29651e-5
- Abiotic depletion potential for fossil resources (ADPF) [MJ]: A1 697.034, A2 17.4425, A3 961.789, A1-A3 1676.27, A5 3.96304, C2 6.03856, C3 15.0016, D (energetisch) -1878.74

## Use advice
Aufgrund der hohen Abdeckung bildet der Datensatz die durchschnittlichen Produktionsverhältnisse und die damit verbundenen Umweltwirkungen repräsentativ für Deutschland ab. Liegen keine herstellerspezifischen Ökobilanzergebnisse des verwendeten Produkts vor, empfiehlt sich die Verwendung dieses Durchschnittsdatensatzes.

## Review details
Der repräsentative Datensatz setzt sich aus herstellerspezifischen Daten einzelner Werke zusammen, welche zum überwiegenden Teil auch separat als EPD bei einem in der Ökobaudat vertretenen Programmhalter verifiziert und veröffentlicht wurden.

## Data sources
- Möller et al. (2020) Mehr als nur Dämmung - Zusatznutzen von Dämmstoffen aus nachwachsenden Rohstoffen - Arbeitsbereich Nachhaltigkeitsbetrachtung, Hamburg, Thünen-Institut für Holzforschung, Abschlussbericht
- GaBi database SP40 2020
- GaBi database (general)
