# Homogeneous and heterogeneous smooth rubber floor coverings according to EN 1817

Dataset: ILCD process, EPD, average dataset
Geography: RER
Reference year: 2019
Valid until: 2024
Classification: OEKOBAU.DAT: Kunststoffe / Bodenbeläge / Gummi-/Kautschuk-Bodenbeläge
Classification: IBUCategories: 02 Building products / Floor coverings / Floor coverings
Method details: Floor coverings.pdf
Registration number: EPD-ERF-20180182-CCI1-EN
Owner: ERFMI vzw, European Resilient Flooring Manufacturers' Institute
Compliance: DIN EN 15804; ISO 14025
Review: Accredited third party review by Institut Bauen und Umwelt e. V.
Amounts: rows without a unit in brackets have none in this file; such an amount is in the reference unit of its flow, which a separate flow dataset defines
copyright: true

## General comment
Resilient floor coverings are an entire product family of flexible flooring solutions available in sheet, tiles and planks. It is classified in heterogeneous or homogeneous composition based on plastics, linoleum, cork or rubber. Resilient floor coverings can provide different functionalities (acoustic, static control, slip resistance, easy maintenance etc.) to match a wide range of domestic, commercial and industrial applications. It is available in an enormous range of patterns and colours fitting with inspiration and decorative needs. Homogeneous and heterogeneous smooth rubber floor coverings are produced mainly of rubber polymers, mineral charges and colour pigments. Raw materials are mixed, blended, and then vulcanized on production lines under temperature and pressure to become rubber floor covering in sheets or tiles. The surface of the floor covering can be smooth or slightly textured; available in several patterns and designs.

## Technology and included processes
Resilient floor coverings are an entire product family of flexible flooring solutions available in sheet, tiles and planks. It is classified in heterogeneous or homogeneous composition based on plastics, linoleum, cork or rubber. Resilient floor coverings can provide different functionalities (acoustic, static control, slip resistance, easy maintenance etc.) to match a wide range of domestic, commercial and industrial applications. It is available in an enormous range of patterns and colours fitting with inspiration and decorative needs. Homogeneous and heterogeneous smooth rubber floor coverings are produced mainly of rubber polymers, mineral charges and colour pigments. Raw materials are mixed, blended, and then vulcanized on production lines under temperature and pressure to become rubber floor covering in sheets or tiles. The surface of the floor covering can be smooth or slightly textured; available in several patterns and designs.
Technical data:
The following table contains the construction data of the declared product group:
Declared unit:
1m² of floor covering.

## Technical purpose
According to /EN ISO 10874/ the area of application for resilient floor coverings is indicated by use classes. The declared product group covers the use classes 23, 34 and 42.

## Scenarios
- S1: 100% incineration
- S2: 100% landfilling

## Reference product
- homogeneous and heterogeneous smooth rubber floor covering (3.2 kg/m²): 1

## Inputs
- Renewable primary energy as energy carrier (PERE) [MJ]: A1-A3 26.5557, A4 0.232083, A5 6.41372, B2 1.59, C1 0.0854, C2 0.0223, C3 9.184, C4 0.252, D (S1) -4.98, D (S2) -0.397
- Renewable primary energy resources as material utilization (PERM) [MJ]: A1-A3 8.9, A4 0, A5 -1.7076, B2 0, C1 0, C2 0, C3 -8.9, C4 0, D (S1) 0, D (S2) 0
- Total use of renewable primary energy resources (PERT) [MJ]: A1-A3 35.4557, A4 0.232083, A5 4.70612, B2 1.59, C1 0.0854, C2 0.0223, C3 0.284, C4 0.252, D (S1) -4.98, D (S2) -0.397
- Non renewable primary energy as energy carrier (PENRE) [MJ]: A1-A3 120.604, A4 4.20777, A5 19.1111, B2 5.13, C1 0.227, C2 0.404, C3 25.61, C4 3.38, D (S1) -29.8, D (S2) -2.28
- Non renewable primary energy as material utilization (PENRM) [MJ]: A1-A3 23.8, A4 0, A5 -0.126202, B2 0, C1 0, C2 0, C3 -23.8, C4 0, D (S1) 0, D (S2) 0
- Total use of non renewable primary energy resources (PENRT) [MJ]: A1-A3 144.404, A4 4.20777, A5 18.9849, B2 5.13, C1 0.227, C2 0.404, C3 1.81, C4 3.38, D (S1) -29.8, D (S2) -2.28
- Use of secondary material (SM) [kg]: A1-A3 0, A4 0, A5 0, B2 0, C1 0, C2 0, C3 0, C4 0, D (S1) 0, D (S2) 0
- Use of renewable secondary fuels (RSF) [MJ]
- Use of non renewable secondary fuels (NRSF) [MJ]
- Use of net fresh water (FW) [m^3]: A1-A3 0.952332, A4 0.000427682, A5 0.063413, B2 0.00247, C1 0.000116, C2 4.11e-5, C3 0.0133, C4 -8.7e-6, D (S1) -0.00679, D (S2) -0.000541

## Outputs
- Hazardous waste disposed (HWD) [kg]: A1-A3 3.83262e-7, A4 2.43297e-7, A5 6.50571e-8, B2 2.43e-9, C1 1.07e-10, C2 2.34e-8, C3 1.48e-8, C4 1.44e-8, D (S1) -1.19e-8, D (S2) -9.15e-10
- Non hazardous waste disposed (NHWD) [kg]: A1-A3 1.3407, A4 0.000352485, A5 0.150064, B2 0.00838, C1 0.00016, C2 3.38e-5, C3 0.988, C4 3.19, D (S1) -0.0116, D (S2) -0.000913
- Radioactive waste disposed (RWD) [kg]: A1-A3 0.00322676, A4 5.75867e-6, A5 0.000314334, B2 0.000702, C1 3.77e-5, C2 5.53e-7, C3 9.62e-5, C4 4.8e-5, D (S1) -0.00219, D (S2) -0.000174
- Components for re-use (CRU) [kg]
- Materials for recycling (MFR) [kg]
- Materials for energy recovery (MER) [kg]: D (S1) 3.2
- Exported electrical energy (EEE) [MJ]: A5 0.465791, C3 5.76
- Exported thermal energy (EET) [MJ]: A5 1.12193, C3 13.9

## Impact indicators
- Global warming potential (GWP) [kg CO_(2)-Äq.]: A1-A3 7.20406, A4 0.309021, A5 1.09411, B2 0.284, C1 0.0124, C2 0.0297, C3 3.62, C4 0.225, D (S1) -1.71, D (S2) -0.131
- Depletion potential of the stratospheric ozone layer (ODP) [kg CFC11-Äq.]: A1-A3 8.67259e-12, A4 8.41835e-15, A5 1.47826e-12, B2 1.03e-12, C1 5.53e-14, C2 8.08e-16, C3 1.31e-12, C4 6.07e-14, D (S1) -3.21e-12, D (S2) -2.56e-13
- Acidification potential of land and water (AP) [kg SO_(2)-Äq.]: A1-A3 0.0448463, A4 0.000672709, A5 0.00352364, B2 0.000728, C1 3.53e-5, C2 6.46e-5, C3 0.000605, C4 0.000614, D (S1) -0.00262, D (S2) -0.000205
- Eutrophication potential (EP) [kg PO_(4)^(3)-Äq.]: A1-A3 0.00881832, A4 0.0001701, A5 0.000716238, B2 9.38e-5, C1 3.31e-6, C2 1.63e-5, C3 0.000124, C4 0.000627, D (S1) -0.000292, D (S2) -2.27e-5
- Formation potential of tropospheric ozone photochemical oxidants (POCP) [kg Ethen-Äq.]: A1-A3 0.0148471, A4 -0.000220045, A5 0.00102311, B2 5.93e-5, C1 2.21e-6, C2 -2.11e-5, C3 5.45e-5, C4 6.71e-5, D (S1) -0.000215, D (S2) -1.67e-5
- Abiotic depletion potential for non fossil resources (ADPE) [kg Sb-Äq.]: A1-A3 0.000152995, A4 2.52972e-8, A5 9.90076e-6, B2 1.64e-7, C1 6.61e-9, C2 2.43e-9, C3 2.19e-7, C4 4.92e-8, D (S1) -4.28e-7, D (S2) -3.39e-8
- Abiotic depletion potential for fossil resources (ADPF) [MJ]: A1-A3 136.188, A4 4.19299, A5 18.1855, B2 3.36, C1 0.133, C2 0.403, C3 1.57, C4 3.26, D (S1) -24.3, D (S2) -1.84

## Use advice
Scope:
In this EPD homogeneous and heterogeneous smooth rubber floor coverings are declared. The application of this EPD is restricted to homogeneous and heterogeneous smooth rubber floor coverings produced by the members of the European Resilient Flooring Manufacturers’ Institute (ERFMI). Data are based upon production during 2017 in Europe. Data have been provided by 2 companies of ERFMI which represent 100% of ERFMI members.
System boundary:
Type of EPD: cradle to grave

Modules A1-A3 include processes that provide materials and energy input for the system, manufacturing and transport processes up to the factory gate, as well as waste processing.

Module A4 includes transport of the floor covering to the place of installation.

Module A5 includes the production of offcuts and adhesive for the installation of the floor covering, and incineration of offcuts and packaging material.

Module B2 is including provision of cleaning agent, energy and water consumption for the cleaning of the floor covering incl. waste water treatment. The LCA results in this EPD are declared for a one year usage.

Module C1 considers electricity supply for the deconstruction of the flooring.

Module C2 includes transportation of the postconsumer waste to waste processing.

End of life scenarios are declared for:
- 100% incineration in a waste incineration plant (WIP) (Scenario 1, C3/1)
- 100% landfilling (Scenario 2, C4/2)

Module D declares potential benefits from all net flows given in module A5 and C3 (for incineration and related energy substitution) that leave the product boundary system after having passed the end-of-waste state.
Module D is declared for each scenario separately.

## Data sources
- Homogeneous and heterogeneous smooth rubber floor coverings according to EN 1817.pdf
- GaBi Database (all versions)
- GaBi database SP33 2017
