# PROMATECT®-L / PROMATECT®-L500 / PROMATECT®-AD / VERMICULUX-S

Dataset: ILCD process, EPD, average dataset
Geography: GLO
Reference year: 2021
Valid until: 2026
Classification: OEKOBAU.DAT: Komposite / Systembauteile / Innenwände
Classification: IBUCategories: 02 Building products / Thermal insulation products / Calcium silicate insulating materials
Method details: Calcium silicate insulating materials.pdf
Generated by: Peggy Van De Velde
Registration number: EPD-PMT-20210153-IBC1-EN
Owner: Etex Building Performance International
Compliance: DIN EN 15804+A2; ISO 14025
Review: Accredited third party review by Institut Bauen und Umwelt e. V.
Amounts: rows without a unit in brackets have none in this file; such an amount is in the reference unit of its flow, which a separate flow dataset defines
copyright: true
licenseType: Free of charge for all users and uses
accessRestrictions: None

## General comment
PROMATECT®-L/-L500/-AD and VERMICULUX-S are lightweight, non-combustible, fire-resisting calcium silicate boards, not sensitive to moisture.

All boards are manufactured in the same plant, using the same production technology and similar raw materials though in different quantities.

The functional unit refers to a weighted average product based on the ratio of tons produced of the products in the reference year 2019.

## Technology and included processes
Sand, water and lime are mixed and blended in a reactor to form calcium silicate. This is combined in a mixer with the other raw materials to form a thick slurry. The slurry is formed to a board in a filter press. Boards are dried, edges are trimmed and the upper surface is sanded to the specific thickness. All material which is cut off or sanded away is fully recycled within the process. The quality management system of the company and the production facility are certified according to ISO 9001:2015.
Declared unit:
The functional unit is 1 m² of PROMATECT®-L/-L500/-AD and VERMICULUX-S with a thickness of 30mm.

The results for other thicknesses can be obtained by multiplying the presented results by the corresponding adjustment factor as included in the table.

This unit refers to a weighted average product based on the ratio of tons produced of all products in the reference year 2019.

## Technical purpose
PROMATECT®-L/-L500/-AD and VERMICULUX-S are primarily used in interior building applications where normal to high levels of fire resistance are required.

The boards are intended to protect elements or to be used in technical services assemblies.

Main application areas are the fire protection of ducts such as cable, ventilation and smoke extraction ducts, fire protection to structural steel and fire protection of mechanical and electrical service enclosures.

## Reference product
- 30mm PROMATECT®-L/-L500/-AD and VERMICULUX S: 1

## Inputs
- Renewable primary energy as energy carrier (PERE) [MJ]: A1 17.2165, A2 0.0499766, A3 15.4225, A4 0.0777708, A5 13.5442, B1 0, B2 0, B6 0, B7 0, C1 0, C2 0.0744294, C3 0, C4 2.64619, D -1.61993
- Renewable primary energy resources as material utilization (PERM) [MJ]: A1 3.05736, A2 0, A3 10.991, A4 0, A5 -11.13, B1 0, B2 0, B6 0, B7 0, C1 0, C2 0, C3 0, C4 -2.2491, D 0
- Total use of renewable primary energy resources (PERT) [MJ]: A1 20.2739, A2 0.0499766, A3 26.4135, A4 0.0777708, A5 2.41426, B1 0, B2 0, B6 0, B7 0, C1 0, C2 0.0744294, C3 0, C4 0.397094, D -1.61993
- Non renewable primary energy as energy carrier (PENRE) [MJ]: A1 65.1332, A2 1.4877, A3 198.266, A4 1.35646, A5 13.8398, B1 0, B2 0, B6 0, B7 0, C1 0, C2 1.29818, C3 0, C4 2.95042, D -7.1442
- Non renewable primary energy as material utilization (PENRM) [MJ]: A1 0, A2 0, A3 0.09744, A4 0, A5 -0.09744, B1 0, B2 0, B6 0, B7 0, C1 0, C2 0, C3 0, C4 0, D 0
- Total use of non renewable primary energy resources (PENRT) [MJ]: A1 65.1332, A2 1.4877, A3 198.363, A4 1.35646, A5 13.7424, B1 0, B2 0, B6 0, B7 0, C1 0, C2 1.29818, C3 0, C4 2.95042, D -7.1442
- Use of secondary material (SM) [kg]: A1 1.92806, A2 0, A3 0, A4 0, A5 0.0964032, B1 0, B2 0, B6 0, B7 0, C1 0, C2 0, C3 0, C4 0, D 0
- Use of renewable secondary fuels (RSF) [MJ]: A1 0, A2 0, A3 0, A4 0, A5 0, B1 0, B2 0, B6 0, B7 0, C1 0, C2 0, C3 0, C4 0, D 0
- Use of non renewable secondary fuels (NRSF) [MJ]: A1 0, A2 0, A3 0, A4 0, A5 0, B1 0, B2 0, B6 0, B7 0, C1 0, C2 0, C3 0, C4 0, D 0
- Use of net fresh water (FW) [m^3]: A1 0.0136849, A2 5.83247e-5, A3 0.0712228, A4 8.90728e-5, A5 0.00731734, B1 0, B2 0, B6 0, B7 0, C1 0, C2 8.52458e-5, C3 0, C4 0.000727698, D -0.00158094

## Outputs
- Hazardous waste disposed (HWD) [kg]: A1 0.00112, A2 4.89e-11, A3 4.76e-8, A4 7.15e-11, A5 5.6e-5, B1 0, B2 0, B6 0, B7 0, C1 0, C2 6.84e-11, C3 0, C4 3.13e-10, D -1.61e-9
- Non hazardous waste disposed (NHWD) [kg]: A1 0.35, A2 0.000196, A3 1.07, A4 0.000213, A5 0.819, B1 0, B2 0, B6 0, B7 0, C1 0, C2 0.000204, C3 0, C4 14.7, D -0.00336
- Radioactive waste disposed (RWD) [kg]: A1 0.00233, A2 2.24e-6, A3 0.00114, A4 2.46e-6, A5 0.00019, B1 0, B2 0, B6 0, B7 0, C1 0, C2 2.35e-6, C3 0, C4 3.09e-5, D -0.000521
- Components for re-use (CRU) [kg]: A1 0, A2 0, A3 0, A4 0, A5 0, B1 0, B2 0, B6 0, B7 0, C1 0, C2 0, C3 0, C4 0, D 0
- Materials for recycling (MFR) [kg]: A1 0, A2 0, A3 0.144, A4 0, A5 0.0072, B1 0, B2 0, B6 0, B7 0, C1 0, C2 0, C3 0, C4 0, D 0
- Materials for energy recovery (MER) [kg]: A1 0, A2 0, A3 0, A4 0, A5 0, B1 0, B2 0, B6 0, B7 0, C1 0, C2 0, C3 0, C4 0, D 0
- Exported electrical energy (EEE) [MJ]: A1 0, A2 0, A3 0.000211, A4 0, A5 1.77, B1 0, B2 0, B6 0, B7 0, C1 0, C2 0, C3 0, C4 0, D 0
- Exported thermal energy (EET) [MJ]: A1 0, A2 0, A3 0.000487, A4 0, A5 3.2, B1 0, B2 0, B6 0, B7 0, C1 0, C2 0, C3 0, C4 0, D 0

## Impact indicators
- Global Warming Potential total (GWP-total) [kg CO_(2)-Äq.]: A1 9.58692, A2 0.116842, A3 11.0204, A4 0.102278, A5 2.27899, B1 0, B2 0, B6 0, B7 0, C1 0, C2 0.0978838, C3 0, C4 0.216472, D -0.414083
- Global Warming Potential fossil fuels (GWP-fossil) [kg CO_(2)-Äq.]: A1 9.77999, A2 0.116335, A3 12.0146, A4 0.10157, A5 1.13985, B1 0, B2 0, B6 0, B7 0, C1 0, C2 0.0972057, C3 0, C4 0.222278, D -0.411756
- Global Warming Potential biogenic (GWP-biogenic) [kg CO_(2)-Äq.]: A1 -0.197864, A2 -3.12416e-6, A3 -0.995812, A4 -0.000120857, A5 1.13871, B1 0, B2 0, B6 0, B7 0, C1 0, C2 -0.000115664, C3 0, C4 -0.00645938, D -0.0020383
- Global Warming Potential luluc (GWP-luluc) [kg CO_(2)-Äq.]: A1 0.0047913, A2 0.000510122, A3 0.00157162, A4 0.000829389, A5 0.000430206, B1 0, B2 0, B6 0, B7 0, C1 0, C2 0.000793754, C3 0, C4 0.000653151, D -0.000287848
- Depletion potential of the stratospheric ozone layer (ODP) [kg CFC11-Äq.]: A1 8.65467e-9, A2 1.78494e-17, A3 1.03636e-12, A4 2.00329e-17, A5 4.32785e-10, B1 0, B2 0, B6 0, B7 0, C1 0, C2 1.91722e-17, C3 0, C4 8.63323e-16, D -4.71568e-15
- Acidification potential of land and water (AP) [mol H^(+)-Äq.]: A1 0.019425, A2 0.00212055, A3 0.0087937, A4 0.000107904, A5 0.00179217, B1 0, B2 0, B6 0, B7 0, C1 0, C2 0.000103268, C3 0, C4 0.00158337, D -0.000542874
- Eutrophication potential aquatic freshwater (EP-freshwater) [kg PO_(4)-Äq.]: A1 0.000102021, A2 1.97132e-7, A3 5.6252e-5, A4 3.01454e-7, A5 7.98111e-6, B1 0, B2 0, B6 0, B7 0, C1 0, C2 2.88502e-7, C3 0, C4 3.73131e-7, D -5.4382e-7
- Eutrophication potential aquatic marine (EP-marine) [kg N-Äq.]: A1 0.00498941, A2 0.000582131, A3 0.00396661, A4 3.44402e-5, A5 0.000562852, B1 0, B2 0, B6 0, B7 0, C1 0, C2 3.29605e-5, C3 0, C4 0.00041099, D -0.000155299
- Eutrophication potential terrestrial (EP-terrestrial) [mol N-Äq.]: A1 0.0541458, A2 0.00639463, A3 0.0415919, A4 0.000409246, A5 0.00625322, B1 0, B2 0, B6 0, B7 0, C1 0, C2 0.000391663, C3 0, C4 0.00451547, D -0.00166429
- Formation potential of tropospheric ozone photochemical oxidants (POCP) [kg NMVOC-Äq.]: A1 0.0164582, A2 0.00163014, A3 0.0111137, A4 9.36565e-5, A5 0.00169914, B1 0, B2 0, B6 0, B7 0, C1 0, C2 8.96325e-5, C3 0, C4 0.00124542, D -0.000435841
- Abiotic depletion potential for non fossil resources (ADPE) [kg Sb-Äq.]: A1 1.00163e-6, A2 7.13877e-9, A3 1.42636e-6, A4 8.99375e-9, A5 1.2581e-7, B1 0, B2 0, B6 0, B7 0, C1 0, C2 8.60733e-9, C3 0, C4 2.09732e-8, D -6.86425e-8
- Abiotic depletion potential for fossil resources (ADPF) [MJ]: A1 65.1128, A2 1.48382, A3 198.357, A4 1.35154, A5 13.7404, B1 0, B2 0, B6 0, B7 0, C1 0, C2 1.29347, C3 0, C4 2.94886, D -7.14333
- Water use (WDP) [m^(3) world-Äq. deprived]: A1 0.401755, A2 0.000660663, A3 2.84285, A4 0.000941605, A5 0.292266, B1 0, B2 0, B6 0, B7 0, C1 0, C2 0.000901149, C3 0, C4 0.0238552, D -0.0315912
- Incidence of disease due to PM emissions (PM) [Disease incidence]: A1 2.56e-7, A2 3.68e-8, A3 2.16e-7, A4 7.4e-10, A5 2.74e-8, B1 0, B2 0, B6 0, B7 0, C1 0, C2 7.08e-10, C3 0, C4 1.97e-8, D -5.82e-9
- Human exposure efficiency relative to U235 (IR) [kBq U235-Äq.]: A1 0.328, A2 0.000325, A3 0.133, A4 0.00036, A5 0.0257, B1 0, B2 0, B6 0, B7 0, C1 0, C2 0.000344, C3 0, C4 0.00325, D -0.0854
- Comparative toxic unit for ecosystems (ETP-fw) [CTUe]: A1 28.1, A2 1.09, A3 13.8, A4 1, A5 2.4, B1 0, B2 0, B6 0, B7 0, C1 0, C2 0.96, C3 0, C4 1.68, D -1.5
- Comparative toxic unit for humans (carcinogenic) (HTP-c) [CTUh]: A1 6.2e-9, A2 2.13e-11, A3 1.84e-9, A4 2.03e-11, A5 4.24e-10, B1 0, B2 0, B6 0, B7 0, C1 0, C2 1.94e-11, C3 0, C4 2.48e-10, D -6.82e-11
- Comparative toxic unit for humans (noncarcinogenic) (HTP-nc) [CTUh]: A1 1.01e-7, A2 1.08e-9, A3 4.06e-8, A4 1.05e-9, A5 8.82e-9, B1 0, B2 0, B6 0, B7 0, C1 0, C2 1.01e-9, C3 0, C4 2.74e-8, D -2.7e-9
- Soil quality index (SQP) [SQP]: A1 99.6, A2 0.287, A3 217, A4 0.465, A5 16, B1 0, B2 0, B6 0, B7 0, C1 0, C2 0.445, C3 0, C4 0.595, D -1.11

## Use advice
Scope:
The life cycle assessment is based on production data of PROMATECT®-L/-L500/-AD and VERMICULUX-S of the year 2019 at the production site Tisselt, Belgium.
System boundary:
Type of the EPD: cradle to grave.

The following life cycle stages and modules are included:

Production stage (A1-A3):

pre-chains of the raw materials and their transportation to the manufacturing site
energy consumption during production
recycling and disposal of production wastes
production of packaging

Construction stage (A4-A5):

transportation of product to the construction site
disposal of installation wastes
incineration of packaging materials (potential benefits from energy substitution within the incineration process are declared in module D)

Use stage (B1-B7):

efforts for the use of the product, maintenance and operational efforts
modules B3, B4, B5 are declared as MNR (module not relevant) according to the IBU requirement. These modules are defined on building level in general

End-of-life stage (C1-C4):
transport to disposal of the material
landfill end-of-life scenario was considered

Loads and benefits beyond system boundary (D):

loads and benefits from the recycling of production waste and incineration of packaging waste

## Data sources
- GaBi Database (all versions)
- GaBi Database Edition 2021, CUP 2021.01
