# EGGER Laminate Flooring

Dataset: ILCD process, EPD, average dataset
Geography: DE
Reference year: 2019
Valid until: 2024
Classification: OEKOBAU.DAT: Holz / Holzböden / Laminat
Classification: IBUCategories: 02 Bauprodukte / Bodenbeläge / Bodenbeläge
Method details: Bodenbeläge.pdf
Generated by: Daxner & Merl GmbH
Registration number: EPD-EGG-20180194-IBC1-DE
Owner: Fritz EGGER GmbH & Co. OG
Compliance: DIN EN 15804; ISO 14025
Review: Accredited third party review by Institut Bauen und Umwelt e. V.
Amounts: rows without a unit in brackets have none in this file; such an amount is in the reference unit of its flow, which a separate flow dataset defines
copyright: true
licenseType: Free of charge for all users and uses
accessRestrictions: None

## General comment
Egger Laminate Flooring marketed under the dealer's brands Egger Pro (EPL), Egger Home (EHL) and Egger Basic (EBL) are hard floor elements with a highly abrasion-resistant surface layer, which are installed using a click connection glueless and floating on the floor. Laminate flooring is categorised in various application classes – a description of the classes is found in the requirements of /DIN EN 13329/.

## Technology and included processes
Structure of the production process: Production of HDF rawboards: 1. Peeling logs 2. Chipping the wood to produce chips 3. Cooking the chips 4. Defibration in the refiner 5. Application of resin to the fibres 6. Drying the fibres to approximately 9 – 10 % residual moisture 7. After resin application and drying, spreading the fibres onto a forming belt 8. Compression of the fibre mat in a continuously operating hot press 9. Cutting and trimming the fibre strand into rawboard formats 10. Cooling the rawboards in star coolers 11. Piling into large stacks 12. Sanding the upper and lower sides after the climatisation phase. Production of the impregnated papers: 1. Applying impregnation resin (MF/UF) to the paper in the line 2. Drying the impregnated paper in heated dryers 3. Formatting the endless paper by means of a cross-cutter, followed by stacking on pallets. Production of the laminated half formats: 1. Laying the impregnated papers onto the upper and lower sides of the HDF board 2. Pressing the impregnated papers with the HDF board in the Conti or short-cycle press, which is fitted with pressing strips and sheets 3. Sorting by quality and stacking, including climatisation. Production of laminate flooring boards: 1. Cutting the laminated half formats into raw floor boards using a circular saw with multiple blades 2. Profiling the long and short sides of the raw floor board formats 3. Application of underlay to dampen impact sound to the reverse side if applicable / coating the bevels if applicable 4. Quality control and packaging in cartons, stacking and wrapping in film.
Declared unit:
This environmental product declaration is based on a declared unit of 1 m2 EGGER Laminate Flooring with an average surface weight of 6.93 kg/m² and a delivery moisture of approximately 7 %.

## Technical purpose
Laminate flooring is used for interior applications in new construction or renovations, with floating installation on screed or other sub floors such as wood, tiles or PVC. Installation must be performed according to the installation instructions and state-of-the-art technology.

Download installation instructions, e-Learning modules, and installation videos from www.egger.com

## Reference product
- Laminat-Fussboden (6,93 kg/m²): 1

## Inputs
- Renewable primary energy as energy carrier (PERE) [MJ]: A1-A3 80.7943, C3 0, D -19.9
- Renewable primary energy resources as material utilization (PERM) [MJ]: A1-A3 103.206, C3 -103.206, D 0
- Total use of renewable primary energy resources (PERT) [MJ]: A1-A3 184, C3 0.417, D -19.9
- Non renewable primary energy as energy carrier (PENRE) [MJ]: A1-A3 73.65, C3 0, D -85.9
- Non renewable primary energy as material utilization (PENRM) [MJ]: A1-A3 17.75, C3 -17.75, D 0
- Total use of non renewable primary energy resources (PENRT) [MJ]: A1-A3 91.4, C3 1.11, D -85.9
- Use of secondary material (SM) [kg]: A1-A3 0.04, C3 0, D 0
- Use of renewable secondary fuels (RSF) [MJ]: A1-A3 31.45, C3 0, D 101.366
- Use of non renewable secondary fuels (NRSF) [MJ]: A1-A3 0, C3 0, D 17.4137
- Use of net fresh water (FW) [m^3]: A1-A3 0.00995, C3 0.000568, D -0.0201

## Outputs
- Hazardous waste disposed (HWD) [kg]: A1-A3 1.77e-5, C3 5.21e-10, D -3.1e-8
- Non hazardous waste disposed (NHWD) [kg]: A1-A3 0.0272, C3 0.000782, D 0.002
- Radioactive waste disposed (RWD) [kg]: A1-A3 0.00105, C3 0.000184, D -0.00874
- Components for re-use (CRU) [kg]: A1-A3 0, C3 0, D 0
- Materials for recycling (MFR) [kg]: A1-A3 0, C3 0, D 0
- Materials for energy recovery (MER) [kg]: A1-A3 0, C3 6.93, D 0
- Exported electrical energy (EEE) [MJ]: A1-A3 0, C3 0, D 0
- Exported thermal energy (EET) [MJ]: A1-A3 0, C3 0, D 0

## Impact indicators
- Global warming potential (GWP) [kg CO_(2)-Äq.]: A1-A3 -6.01, C3 10.2, D -4.86
- Depletion potential of the stratospheric ozone layer (ODP) [kg CFC11-Äq.]: A1-A3 7.73e-12, C3 2.7e-13, D -1.28e-11
- Acidification potential of land and water (AP) [kg SO_(2)-Äq.]: A1-A3 0.00889, C3 0.000158, D -0.000342
- Eutrophication potential (EP) [kg PO_(4)^(3)-Äq.]: A1-A3 0.00262, C3 1.57e-5, D 2.14e-5
- Formation potential of tropospheric ozone photochemical oxidants (POCP) [kg Ethen-Äq.]: A1-A3 0.00141, C3 1.08e-5, D 0.000965
- Abiotic depletion potential for non fossil resources (ADPE) [kg Sb-Äq.]: A1-A3 8.29e-7, C3 3.09e-8, D -1.55e-6
- Abiotic depletion potential for fossil resources (ADPF) [MJ]: A1-A3 88.7, C3 0.648, D -63.9

## Use advice
Scope:
This document applies to the average Laminate Flooring manufactured by Egger Holzwerkstoffe Wismar GmbH & Co. KG at the plant in Wismar (Germany).
System boundary:
The LCA of the average EGGER Laminate Flooring includes a cradle-to-gate consideration of environmental impact with options. The following life cycle phases are taken into account in the analysis:

Module A1-A3 | Product stage

The product stage includes the upstream burdens of raw material procurement (roundwood, production of the glue system, additives, etc.), as well as related transport to the production plant in Wismar. Within the plant boundaries, the HDF board production, the preparation of the adhesive system used, and the processing of impregnation resins, the production of impregnation, the lamination, as well as the finishing and packaging are considered. The provision of thermal and electric energy takes place in the Wismar plant via its own biomass power plant. Both internal wood waste and scrap wood sourced externally are used there. The system boundary for the scrap wood used in the production is set after sorting and chopping. It is assumed that the end of the waste status has been reached.

The system boundary for secondary raw materials according to /EN 15804/ applies.

Module C3 | Waste processing

Module C3 declares the biogenic carbon dioxide emissions from energetic treatment at the end of the product life. Furthermore, chopping after product disassembly is also considered.

Module D | Credits and charges outside the

System boundaries

The energetic treatment of the product at the end of its life cycle is described in Module D, including energetic substitution potential as a European average scenario.

## Data sources
- GaBi Database (all versions)
- GaBi database SP33 2017
