# Bitumen sheets PYE-PV 200 S5 ns (slated); 6,2 kg/m2

Dataset: ILCD process, EPD, generic dataset
Geography: DE
Reference year: 2021
Valid until: 2022
Classification: oekobau.dat: Kunststoffe / Dachbahnen / Bitumen-Dachbahnen
Owner: Sphera Solutions GmbH
Compliance: EN 15804+A2
Review: Dependent internal review by Sphera Solutions GmbH; Independent external review by GaBi user forum
Amounts: rows without a unit in brackets have none in this file; such an amount is in the reference unit of its flow, which a separate flow dataset defines
copyright: true
licenseType: Free of charge for all users and uses
accessRestrictions: The license conditions as stated on https://www.oekobaudat.de/ apply.
accessRestrictions: Es gelten die Lizenzbedingungen wie sie auf https://www.oekobaudat.de/ genannt sind.

## General comment
This data set has been modeled according to the European Standard EN 15804+A2 for Sustainable Building. Results are depicted in modules that allow the structured expression of results over the entire life cycle.

## Geography
The data set represents the country specific situation in Germany, focusing on the main technologies, the region specific characteristics and / or import statistics.

## Time period
Annual average

## Technology and included processes
The LCA of bitumen sheets covers the cradle-to-gate phase. The system boundaries are represented by the ready-for-sales product. Transports from the factory to the point of installation are not considered and must be included according to the system boundaries. Bitumen is the retentate of the vacuum distillation in an oil refinery. For making bitumen sheets for construction purposes, air blowing is an important process step. In this process, air is blown over heated bitumen (ca. 250°C) leading to partial oxidation. Due to the oxidation, viscosity, softening point and melting point of the bitumen increase. After blowing, the bitumen is pressed into a mat suitable for roofing.

In module C1, a manual dismantling (no loads) is assumed, collecting losses are neglected.
The transport in module C2 to the recycling plant takes place with a truck (50km).
Module C3 takes into account the grinding and thermal treatment (combustion) of the material. When calculating combustion emissions and credits, the specific calorific value of each material and the material composition are taken into account.
In module D credits for the substitution of electricity (German electricity mix) and thermal energy (from natural gas) are given.

## Technical purpose
This product can be used in construction.

## Safety margin
20 %. Product system depicted except for a few missing processes / flows. Technological, temporal and geographic representativeness partly given.

## Reference product
- Bitumen sheets PYE-PV 200 S5 ns (slated): 1

## Inputs
- Use of renewable primary energy as energy carrier (PERE) [MJ]: A1-A3 8.08361, C2 0.0169329, C4 0.564139
- Use of renewable primary energy resources used as raw materials (PERM) [MJ]: A1-A3 0, C2 0, C4 0
- Total use of renewable primary energy (PERT) [MJ]: A1-A3 8.08361, C2 0.0169329, C4 0.564139
- Use of non renewable primary energy as energy carrier (PENRE) [MJ]: A1-A3 257.912, C2 0.291755, C4 7.77473
- Use of non renewable primary energy resources used as raw materials (PENRM) [MJ]: A1-A3 0, C2 0, C4 0
- Total use of non renewable primary energy resource (PENRT) [MJ]: A1-A3 257.912, C2 0.291755, C4 7.77473
- Use of secondary material (SM) [kg]: A1-A3 0, C2 0, C4 0
- Use of renewable secondary fuels (SF) [MJ]: A1-A3 0, C2 0, C4 0
- Use of non renewable secondary fuels (NRSF) [MJ]: A1-A3 0, C2 0, C4 0
- Net use of fresh water (FW) [m3]: A1-A3 0.011777, C2 1.50491e-5, C4 7.16617e-5

## Outputs
- Hazardous waste disposed (HWD) [kg]: A1-A3 1.66357e-8, C2 1.21944e-11, C4 1.39811e-9
- Non harzardous waste disposed (NHWD) [kg]: A1-A3 0.0696125, C2 4.70959e-5, C4 7.41035
- Radioactive waste disposed (RWD) [kg]: A1-A3 0.00133914, C2 2.79977e-7, C4 9.02705e-5
- Components for re-use (CRU) [kg]: A1-A3 0, C2 0, C4 0
- Materials for recycling (MFR) [kg]: A1-A3 0, C2 0, C4 0
- Materials for energy recovery (MER) [kg]: A1-A3 0, C2 0, C4 0
- Exported electrical energy (EEE) [MJ]: A1-A3 0, C2 0, C4 0
- Exported thermal energy (EET) [MJ]: A1-A3 0, C2 0, C4 0

## Impact indicators
- Global Warming Potential - total (GWP-total) [kg CO2 eq.]: A1-A3 5.4112, C2 0.0222043, C4 0.528818
- Global Warming Potential - fossil fuels (GWP-fossil) [kg CO2 eq.]: A1-A3 5.36566, C2 0.0220539, C4 0.533009
- Global Warming Potential - biogenic (GWP-biogenic) [kg CO2 eq.]: A1-A3 0.042429, C2 9.11767e-6, C4 -0.00463647
- Global Warming Potential - land use and land use change (GWP-luluc) [kg CO2 eq.]: A1-A3 0.00310656, C2 0.000141358, C4 0.000445721
- Depletion potenzial of the stratospheric ozone layer (ODP) [kg CFC-11 eq.]: A1-A3 3.08516e-14, C2 5.63195e-18, C4 1.28587e-15
- Acidifcation potential, Accumulated Exceedance (AP) [Mole of H+ eq.]: A1-A3 0.00974698, C2 6.91522e-5, C4 0.00159722
- Eutrophication potential - freshwater (EP-freshwater) [kg P eq.]: A1-A3 1.43379e-5, C2 4.52674e-8, C4 9.84335e-5
- Eutrophication potential - marine (EP-marine) [kg N eq.]: A1-A3 0.00254645, C2 3.22824e-5, C4 0.000362208
- Eutrophication potential - terrestrial (EP-terrestrial) [Mole of N eq.]: A1-A3 0.0274124, C2 0.00036046, C4 0.00397207
- Photochemical Ozone Creation Potential (POCP) [kg NMVOC eq.]: A1-A3 0.0116543, C2 6.22546e-5, C4 0.00115862
- Abiotic depletion potential - non-fossil resources (ADPE) [kg Sb eq.]: A1-A3 1.07129e-6, C2 1.91462e-9, C4 3.66814e-8
- Abiotic depletion potential - fossil resources (ADPF) [MJ]: A1-A3 257.898, C2 0.291743, C4 7.77333
- Water (user) deprivation potential (WDP) [m³ world equiv.]: A1-A3 0.121727, C2 8.55629e-5, C4 -0.00455896

## Use advice
The data set represents a cradle to gate inventory. It can be used to characterise the supply chain situation of the respective commodity in a representative manner. Combination with individual unit processes using this commodity enables the generation of user-specific (product) LCAs.

## Data sources
- The Bitumen Roofing Industry A Global Perspective
- Documentation of data quality management
- GaBi Database Edition 2021, CUP2021.01
- GaBi database (all versions)
