# XPS mit halogenfreien Treibmitteln

Dataset: ILCD process, EPD, average dataset
Geography: DE
Reference year: 2019
Valid until: 2024
Classification: OEKOBAU.DAT: Dämmstoffe / Extrudiertes Polystyrol (XPS) / XPS weiß
Classification: IBUCategories: 02 Bauprodukte / Wärmedämmungsprodukte / Dämmstoffe aus Schaumkunststoffen
Method details: Dämmstoffe aus Schaumkunststoffen.pdf
Registration number: EPD-FPX-20190111-IBE1-DE
Owner: FPX - Fachvereinigung Polystyrol-Extruderschaumstoff
Compliance: DIN EN 15804; ISO 14025
Review: Accredited third party review by Institut Bauen und Umwelt e. V.
Amounts: rows without a unit in brackets have none in this file; such an amount is in the reference unit of its flow, which a separate flow dataset defines
copyright: true

## General comment
Extrudierter Polystyrolhartschaum (XPS) ist ein Kunststoffschaumdämmstoff entsprechend der /EN 13164/ (Wärmedämmstoffe für Gebäude) /EN 14307 (technische Gebäudeausrüstung) /EN 14934 (Füllprodukte für die Anwendungen im Tiefbau), der in Form von Platten im Rohdichtenbereich von 20 bis 50 kg/m³ produziert wird.

Die Platten werden in unterschiedlichen Druckfestigkeitsstufen von 150 bis 700 kPa im Dickenbereich 20 bis 200 mm geliefert, Produkte mit Dicken bis 400 mm werden als werksseitige Mehrschichtplatten geliefert. Für die unterschiedlichen Anwendungsbereiche können die Platten unterschiedliche Oberflächen (mit Extrusionshaut, gefräst, gerillt oder thermisch geprägt) aufweisen. XPS-Platten werden mit Glattkanten-, Stufenfalz- und Nut- & -Feder-Kantenausprägung geliefert. Die vorliegende Umweltproduktdeklaration bezieht sich ausschließlich auf unverkleidete und nicht gesondert weiter verarbeitete XPS-Platten. Das Heißlaminieren mehrerer XPS-Schichten ist enthalten.
Die Grundlage für die Ermittlung des Durchschnittsproduktes bildet der mengenmäßige Marktanteil der an der Datenerhebung beteiligten Hersteller in Deutschland.

## Technology and included processes
XPS wird in einem kontinuierlichen Extrusionsprozess mit Strom als Hauptenergieträger hergestellt. Polystyrol-Granulat wird zusammen mit den Hilfsstoffen im Extruder unter hohem Druck aufgeschmolzen. Das Treibmittel wird der Schmelze hinzugegeben und in ihr gelöst. Die Schmelze wird durch eine Breitschlitzdüse ausgetragen. Durch den dabei abfallenden Gegendruck schäumt das Treibmittel die Schmelze auf, kühlt diese dabei ab und das Polystyrol verfestigt sich. Es entsteht ein endloser Strang aus homogenem und geschlossenzelligem Polystyrolhartschaum. Dieser wird weiter abgekühlt und anschließend dimensioniert, besäumtund eventuell in der Oberfläche modifiziert. Durch die Verwendung von unterschiedlichen Düsen können Plattenstärken von 20 bis 200 mm produziert werden. XPS aus Produktionsabschnitten und Produktionsausschuss wird direkt in den Produktionen recycliert und wieder zur Produktion von XPS eingesetzt. Polystyrol ist ein thermoplastisches Material und deshalb kann Abfall vor Gebrauch (industrieller Abfall) einfach und kostengünstig durch Aufschmelzen recycliert werden. Die meisten XPS-Abfälle, die bei der Herstellung anfallen, werden gemahlen und in einer separaten Linie extrudiert. Das daraus resultierende Recyclat wird dann im Produktionsprozess von XPS verwendet. Ein Großteil der Produktionsstandorte ist nach der /ISO 9001/ zertifiziert.
Deklarierte Einheit:
Diese Deklaration bezieht sich auf 1 m² XPS-Platte mit einer Stärke von 100 mm, d.h. 0,1 m3 mit einer Dichte von 34,2 kg/m3.

## Technical purpose
Anwendungsgebiete sind nach der /DIN 4108-10/ Wärmedämmung von Dach, Decke, Wand, Boden und Perimeter mit dort festgelegten Anforderungen an die physikalischen Eigenschaften: Perimeterdämmung der Bodenplatte, Perimeterdämmung der Kelleraußenwände, Flachdachdämmung nach dem Umkehrdachprinzip, Wärmedämmung von Fußböden, z. B. hochbelasteter Industriefußböden, Außenwanddämmung, insbesondere Wärmebrückendämmung von Betonbauteilen und als Kerndämmung in zweischaligem Mauerwerk, Wärmedämmverbundsysteme (WDVS), Wärmedämmung von Decken in landwirtschaftlichen Bauten, Innendämmung von Wänden, Innendämmung von Decken, Wärme-dämmung von Steildächern oberhalb und unterhalb der Sparren, Kernmaterial für Sandwichelemente, technische Anlagen (z. B. Rohrisolierungen).

## Reference product
- 1 m² XPS-Platte mit 100 mm Dicke: 1

## Inputs
- Erneuerbare Primärenergie als Energieträger (PERE) [MJ]: A1-A3 0.123, A4 0.185, C2 0.0212, C3 0.246, D -17.5
- Erneuerbare Primärenergie zur stofflichen Nutzung (PERM) [MJ]: A1-A3 0, A4 0, C2 0, C3 0, D 0
- Total erneuerbare Primärenergie (PERT) [MJ]: A1-A3 13.1, A4 0.185, C2 0.0212, C3 0.246, D -17.5
- Nicht-erneuerbare Primärenergie als Energieträger (PENRE) [MJ]: A1-A3 144.851, A4 3.19, C2 0.366, C3 137.828, D -86.3
- Nicht-erneuerbare Primärenergie zur stofflichen Nutzung (PENRM) [MJ]: A1-A3 139.149, A4 0, C2 0, C3 -136.458, D 0
- Total nicht erneuerbare Primärenergie (PENRT) [MJ]: A1-A3 284, A4 3.19, C2 0.366, C3 1.37, D -86.3
- Einsatz von Sekundärstoffen (SM) [kg]: A1-A3 0, A4 0, C2 0, C3 0, D 0
- Erneuerbare Sekundärbrennstoffe (RSF) [MJ]: A1-A3 0, A4 0, C2 0, C3 0, D 0
- Nicht erneuerbare Sekundärbrennstoffe (NRSF) [MJ]: A1-A3 0, A4 0, C2 0, C3 0, D 0
- Einsatz von Süßwasserressourcen (FW) [m^3]: A1-A3 0.0483, A4 0.000313, C2 3.59e-5, C3 0.0219, D -0.0207

## Outputs
- Gefährlicher Abfall zur Deponie (HWD) [kg]: A1-A3 1.18e-7, A4 1.78e-7, C2 2.04e-8, C3 1.42e-9, D -3.55e-8
- Entsorgter nicht gefährlicher Abfall (NHWD) [kg]: A1-A3 0.0587, A4 0.00026, C2 2.97e-5, C3 0.0659, D -0.0374
- Entsorgter radioaktiver Abfall (RWD) [kg]: A1-A3 0.0041, A4 4.33e-6, C2 4.97e-7, C3 8.74e-5, D -0.00699
- Komponenten für die Wiederverwendung (CRU) [kg]: A1-A3 0, A4 0, C2 0, C3 0, D 0
- Stoffe zum Recycling (MFR) [kg]: A1-A3 0, A4 0, C2 0, C3 0, D 0
- Stoffe für die Energierückgewinnung (MER) [kg]: A1-A3 0, A4 0, C2 0, C3 0, D 0
- Exportierte elektrische Energie (EEE) [MJ]: A1-A3 0, A4 0, C2 0, C3 17.7, D 0
- Exportierte thermische Energie (EET) [MJ]: A1-A3 0, A4 0, C2 0, C3 40.8, D 0

## Impact indicators
- Globales Erwärmungspotenzial (GWP) [kg CO_(2)-Äq.]: A1-A3 9.38, A4 0.234, C2 0.0268, C3 11.5, D -4.87
- Abbau Potential der stratosphärischen Ozonschicht (ODP) [kg CFC11-Äq.]: A1-A3 6.48e-14, A4 3.88e-17, C2 4.44e-18, C3 1.04e-15, D -6.74e-14
- Versauerungspotenzial von Boden und Wasser (AP) [kg SO_(2)-Äq.]: A1-A3 0.0152, A4 0.000544, C2 6.23e-5, C3 0.000679, D -0.00825
- Eutrophierungspotenzial (EP) [kg PO_(4)^(3)-Äq.]: A1-A3 0.0019, A4 0.000135, C2 1.54e-5, C3 0.00014, D -0.000892
- Bildungspotential für troposphärisches Ozon (POCP) [kg Ethen-Äq.]: A1-A3 0.0125, A4 -0.000181, C2 -2.07e-5, C3 6.69e-5, D -0.000653
- Potenzial für den abiotischen Abbau nicht fossiler Ressourcen (ADPE) [kg Sb-Äq.]: A1-A3 2.53e-6, A4 1.81e-8, C2 2.07e-9, C3 7.45e-8, D -8.81e-7
- Potenzial für den abiotischen Abbau fossiler Brennstoffe (ADPF) [MJ]: A1-A3 274, A4 3.18, C2 0.365, C3 1.15, D -68.7

## Use advice
Gültigkeitsbereich:
Die an der Datenerhebung beteiligen Firmen produzieren ca. 100 % der XPS-Platten in Deutschland. Es wurden die Daten von 15 Standorten von fünf Unternehmen (Austrotherm, Bachl, Jackon, Ravago Building Solutions, Ursa) aus dem Jahr 2017 verwendet.

Der Deklarationsinhaber haftet für die zugrunde liegenden Angaben und Nachweise.
Systemgrenze:
Typ der EPD: Wiege bis Werktor (A1-A3) – mit Optionen.

Die Ökobilanz betrachtet die folgenden Punkte des Lebenszyklus:
Extraktion und Aufbereitung von Rohstoffen (A1)
Transport zur Herstellung (A2)
Herstellung der XPS-Platte (A3)
Herstellung der Verpackung (A3)
Transporte zur Nutzung (A4)
Transport zum End-of-Life (C2)

Abfallbehandlung: Thermische Verwertung (C3)

Rückgewinnungs- und Recyclingpotentiale (D) - außerhalb der Systemgrenzen

## Data sources
- XPS mit halogenfreien Treibmitteln.pdf
- GaBi Database (all versions)
- GaBi database SP35 2018
