# Punching shear reinforcement system

Dataset: ILCD process, EPD, average dataset
Geography: RER
Reference year: 2021
Valid until: 2026
Classification: OEKOBAU.DAT: Metalle / Stahl und Eisen / Befestigungsmittel
Classification: IBUCategories: 02 Bauprodukte / Metallbauprodukte und Zubehör / Dünnwandige Profile und Profiltafeln aus Metall
Method details: Dünnwandige Profile und Profiltafeln aus Metall.pdf
Generated by: myclimate Deutschland gGmbH
Registration number: EPD-JDL-20200261-IBB1-DE
Owner: Jordahl GmbH
Compliance: DIN EN 15804; ISO 14025
Review: Accredited third party review by Institut Bauen und Umwelt e. V.
Amounts: rows without a unit in brackets have none in this file; such an amount is in the reference unit of its flow, which a separate flow dataset defines
copyright: true
licenseType: Free of charge for all users and uses
accessRestrictions: None

## General comment
The product portfolio of JORDAHL® reinforcement systems includes punching shear reinforcement of the type JDA, JDA-FT-KL, JDA-S.

JORDAHL® punching shear reinforcement is a system consisting of a flat steel bar with at least two (welded or clicked) double-headed anchors in ribbed design fixed to the bar (see Fig.1).

Figure 1: Punching shear reinforcement JDA in ribbed design

JORDAHL® punching shear reinforcements are designed in accordance with:

Punching shear reinforcement: EOTA TR 060 or EN 1992-1-1 and
European Technical Approval ETA-13/0136
Shear reinforcement: General construction supervision approval Z-15.1-268 of the German Institute for Building Technology (DIBt)

## Technology and included processes
The bars, double-headed anchors as well as the spacers and patented plastic locks (plastic or fibre concrete) of the punching and shear reinforcements are produced or purchased from qualified suppliers as ribbed reinforcing steel. After delivery, JORDAHL punching shear reinforcements are produced. The individual double-headed anchors are turned into reinforcement elements with at least two anchors each, attached to the steel bars by tack welding. For exclusive use in precast elements, the anchors are attached to the steel bars by means of patented plastic locks. The accumulated metal scrap and filter dust are stored in containers and disposed of by a certified waste disposal company in accordance with legal requirements. The click system or the spacers made of plastic / fiber-reinforced concrete are added in the JORDAHL factory before packing.
Technical data:
The following technical data apply to punching shear reinforcement JDA. The test standard is dimensioned according to the European Technical Assessment (ETA) ETA-13/0136.

The test standard for the JDA-S is dimensioned in accordance with the national technical building approval Z-15.1-268.

All geometrical dimensions, product-specific parameters and static load capacities of the different shear, punching shear reinforcement JDA, JDA-FT-KL and JDA-S are given in the following technical specifications:

JDA und JDA-FT-KL System:

ETA-13/0136

JDA-S system:

Z-15.1-268
Declared unit:
The declaration refers to the production of 1 m punching shear reinforcement JDA with five double-headed anchor Ø16 mm and a height of 295 mm.

## Technical purpose
The JORDAHL® punching shear reinforcement is used for the transfer of high shear forces in flat slabs with low reinforcement requirements. This means that floor heights can be used optimally. It can be used both in foundations and in-situ concrete as well as in element ceilings (except shear reinforcement for element ceilings) and can be integrated into the reinforcement from above and below. Through its use, the punching resistance and the load-bearing capacity can be increased by up to 96 %.

JORDAHL® punching shear reinforcements are available in various designs, depending on the static requirements of a project.

Examples are:

JDA for flat slabs, reinforced concrete slabs, footings, ground slabs
JDA-FT-KL for Element slabs
JDA-S for heavy-duty line supports (shear reinforcement)

## Reference product
- Durchstanz- bzw. Schubbewehrung JDA: 1

## Inputs
- Renewable primary energy as energy carrier (PERE) [MJ]: A1-A3 1.06582, C2 0.000993638, C3 0, C4 3.49625e-5, D 0.00591105
- Renewable primary energy resources as material utilization (PERM) [MJ]: A1-A3 0, C2 0, C3 0, C4 0, D 0
- Total use of renewable primary energy resources (PERT) [MJ]: A1-A3 1.06582, C2 0.000993638, C3 0, C4 3.49625e-5, D 0.00591105
- Non renewable primary energy as energy carrier (PENRE) [MJ]: A1-A3 41.5227, C2 2.68326, C3 0, C4 0.0136884, D 3.37735
- Non renewable primary energy as material utilization (PENRM) [MJ]: A1-A3 0, C2 0, C3 0, C4 0, D 0
- Total use of non renewable primary energy resources (PENRT) [MJ]: A1-A3 41.5227, C2 2.68326, C3 0, C4 0.0136884, D 3.37735
- Use of secondary material (SM) [kg]: A1-A3 3.8369, C2 0, C3 0, C4 0, D -0.201
- Use of renewable secondary fuels (RSF) [MJ]: A1-A3 0, C2 0, C3 0, C4 0, D 0
- Use of non renewable secondary fuels (NRSF) [MJ]: A1-A3 0, C2 0, C3 0, C4 0, D 0
- Use of net fresh water (FW) [m^3]: A1-A3 2.19276, C2 -0.000557624, C3 0, C4 -1.67789e-5, D -0.00752501

## Outputs
- Hazardous waste disposed (HWD) [kg]: A1-A3 6.21546e-5, C2 6.70422e-6, C3 0, C4 3.27506e-8, D 3.34004e-5
- Non hazardous waste disposed (NHWD) [kg]: A1-A3 0.680983, C2 0.000105192, C3 0, C4 0.191213, D 0.0181112
- Radioactive waste disposed (RWD) [kg]: A1-A3 0.00024205, C2 1.83518e-5, C3 0, C4 9.32013e-8, D 3.52608e-6
- Components for re-use (CRU) [kg]: A1-A3 0, C2 0, C3 0, C4 0, D 0
- Materials for recycling (MFR) [kg]: A1-A3 0, C2 0, C3 3.6594, C4 0, D 0
- Materials for energy recovery (MER) [kg]: A1-A3 0, C2 0, C3 0, C4 0, D 0
- Exported electrical energy (EEE) [MJ]: A1-A3 0, C2 0, C3 0, C4 0, D 0
- Exported thermal energy (EET) [MJ]: A1-A3 0, C2 0, C3 0, C4 0, D 0

## Impact indicators
- Global warming potential (GWP) [kg CO_(2)-Äq.]: A1-A3 2.95996, C2 0.18035, C3 0, C4 0.000933066, D 0.306086
- Depletion potential of the stratospheric ozone layer (ODP) [kg CFC11-Äq.]: A1-A3 3.09502e-7, C2 3.27754e-8, C3 0, C4 1.62773e-10, D 1.60283e-8
- Acidification potential of land and water (AP) [kg SO_(2)-Äq.]: A1-A3 0.0104288, C2 0.000468066, C3 0, C4 5.61196e-6, D 0.00116327
- Eutrophication potential (EP) [kg PO_(4)^(3)-Äq.]: A1-A3 0.00169278, C2 7.98284e-5, C3 0, C4 1.17332e-6, D 0.000153448
- Formation potential of tropospheric ozone photochemical oxidants (POCP) [kg Ethen-Äq.]: A1-A3 0.000897477, C2 1.71748e-5, C3 0, C4 1.95989e-7, D 0.000235522
- Abiotic depletion potential for non fossil resources (ADPE) [kg Sb-Äq.]: A1-A3 6.43078e-6, C2 1.05536e-8, C3 0, C4 2.5576e-10, D 2.99114e-7
- Abiotic depletion potential for fossil resources (ADPF) [MJ]: A1-A3 38.0851, C2 2.52713, C3 0, C4 0.0128836, D 3.19787

## Use advice
Scope:
This document refers to the JORDAHL GmbH punching shear reinforcement, manufactured in Trebbin, Germany. The declared unit refers to 1 meter of JDA punching shear reinforcement as specific product. The data collection was collected on a plant-specific basis with current annual data from 2019. The declaration holder is responsible for the underlying data and its verification.
System boundary:
The Life Cycle Assessment considers the system boundaries "cradle to gate - with options" and follows the modular construction system described by EN 15804. The LCA takes into account the following modules:

A1: Raw material supply: extraction of raw material, production of precursors, processing of secondary material

A2: Transport: transport of raw materials to manufacturing plant
A3: Manufacturing: Production of punching shear reinforcement
C2: Transportation towards disposal: transport of discarded product as part of waste processing

C3: Waste processing: Waste management for reuse, recovery and/or recycling

C4: Disposal
D: Reuse, recovery or recycling potential as net flows and credits (benefits) for steel & structural steel

## Data sources
- ecoinvent database (all versions)
- ecoinvent 3.6 database
