# Flooring Elements

Dataset: ILCD process, EPD, average dataset
Geography: DE
Reference year: 2016
Valid until: 2021
Classification: OEKOBAU.DAT: Mineralische Baustoffe / Mörtel und Beton / Estrich trocken
Classification: IBUCategories: 02 Bauprodukte / Gipsprodukte / Gipsplatten
Method details: Gipsplatten.pdf
Owner: Fermacell
Compliance: DIN EN 15804; ISO 14025
Review: Accredited third party review by IBU
Amounts: rows without a unit in brackets have none in this file; such an amount is in the reference unit of its flow, which a separate flow dataset defines
copyright: true

## General comment
FERMACELL flooring elements comprise FERMACELL gypsum fibreboards glued to each other; special structural panels made of plaster and cellulose fibres. Directive (EU) No. 305/2011 (CPR) applies for placing the product on the market in the EU/EFTA (with the exception of Switzerland). The product requires a Declaration of Performance taking consideration of the European Technical Approval /ETA-03/006/ and CE marking.

## Technology and included processes
950/5000 Plaster Production: The main raw material of the plasterboard is gypsum. Gypsum contains about 21% of water. In the processing plant, this substance is first loosened in a grinding-drying plant, comminuted and heated to about 170 ° C. along the calcining path. A part of the crystal water escapes and a multi-phase gypsum is formed, In a subsequent cyclone the air is separated from the material stream and cleaned in a filter. The material flow is passed over an aging route and cooled to below 80 ° C. Gypsum fiber boards: The two natural raw materials gypsum and paper fibers are mixed and, after the addition of water, without further binders, are pressed under high pressure to form stable plates, dried, both sides, calibrated and surface hydrophobicized and subsequently cut to the required formats. 2 gypsum fiber boards are subsequently glued to each other to form an screed element.
Technical data:
The product’s performance values correspond with the Declaration of Performance in terms of its essential properties in accordance with /ETA -03/006/.
Declared unit:
This core EPD refers to the manufacture of 1 m² FERMACELL flooring element.

## Technical purpose
FERMACELL flooring elements are suitable for practical production of dry construction flooring structures. Use is governed by the respective national regulations.

## Reference product
- 1 m2 fermacell Estrichelement: 1

## Inputs
- Erneuerbare Primärenergie als Energieträger (PERE) [MJ]: A1-A3 7.82
- Erneuerbare Primärenergie zur stofflichen Nutzung (PERM) [MJ]: A1-A3 0.0372
- Total erneuerbare Primärenergie (PERT) [MJ]: A1-A3 7.85
- Nicht-erneuerbare Primärenergie als Energieträger (PENRE) [MJ]: A1-A3 38.7
- Nicht-erneuerbare Primärenergie zur stofflichen Nutzung (PENRM) [MJ]: A1-A3 0.00549
- Total nicht erneuerbare Primärenergie (PENRT) [MJ]: A1-A3 38.7
- Einsatz von Sekundärstoffen (SM) [kg]: A1-A3 7.03
- Erneuerbare Sekundärbrennstoffe (RSF) [MJ]: A1-A3 0
- Nicht erneuerbare Sekundärbrennstoffe (NRSF) [MJ]: A1-A3 0
- Einsatz von Süßwasserressourcen (FW) [m^3]: A1-A3 0.0132

## Outputs
- Gefährlicher Abfall zur Deponie (HWD) [kg]: A1-A3 3.47e-7
- Entsorgter nicht gefährlicher Abfall (NHWD) [kg]: A1-A3 0.0534
- Entsorgter radioaktiver Abfall (RWD) [kg]: A1-A3 0.000897
- Komponenten für die Wiederverwendung (CRU) [kg]: A1-A3 0
- Stoffe zum Recycling (MFR) [kg]: A1-A3 0
- Stoffe für die Energierückgewinnung (MER) [kg]: A1-A3 0
- Exportierte elektrische Energie (EEE) [MJ]: A1-A3 0
- Exportierte thermische Energie (EET) [MJ]: A1-A3 0

## Impact indicators
- Globales Erwärmungspotenzial (GWP) [kg CO_(2)-Äq.]: A1-A3 2.5
- Abbau Potential der stratosphärischen Ozonschicht (ODP) [kg CFC11-Äq.]: A1-A3 4.8e-11
- Versauerungspotenzial von Boden und Wasser (AP) [kg SO_(2)-Äq.]: A1-A3 0.00396
- Eutrophierungspotenzial (EP) [kg PO_(4)^(3)-Äq.]: A1-A3 0.000695
- Bildungspotential für troposphärisches Ozon (POCP) [kg Ethen-Äq.]: A1-A3 0.000138
- Potenzial für den abiotischen Abbau nicht fossiler Ressourcen (ADPE) [kg Sb-Äq.]: A1-A3 0.000169
- Potenzial für den abiotischen Abbau fossiler Brennstoffe (ADPF) [MJ]: A1-A3 36.4

## Use advice
Scope:
This Environmental Product Declaration refers to coated flooring elements comprising 2 Fermacell gypsum fibreboards glued to each other in an offset arrangement.
Specific data was averaged from 3 Fermacell plants (Münchehof, Sieglingen and Wijchen) as a data basis. The LCA comprises the recovery of raw materials and energy, raw material transport and the actual manufacturing phase for coated flooring elements. The analysis involves 1 m² of an average flooring element (coated) with an average density of 1.18 t/m³. As the flooring elements can be sheathed, the LCA parameters for specific calculation of sheathed product variants are outlined in the Annex to this EPD.
System boundary:
The selected system boundaries comprise manufacture of the product, including

the extraction of raw materials through to the ready-packaged product at the plant gate (cradle-to-gate).

The review framework comprises the following details:

· Raw material supply

· Energy supply

· Transporting and packaging the raw materials and primary products

· Manufacture (energy, waste, emissions)

Use is not included in the calculation on account of the multiple application and construction possibilities. Disposal of the product under review is not sufficiently quantifiable on account of its long service life and is therefore not included in the analysis.

On the input side, all material flows integrated in the system and greater than 1% of its entire mass or contributing more than 1% to the primary energy consumption are taken into consideration. On the output side, all material flows are recorded which leave the system and whose environmental effects are greater than 1% of all effects in a category taken into consideration.

## Data sources
- Estrichelemente.pdf
- GaBi Database (all versions)
- GaBi database SP26 2014
