# Bitumen cold adhesive (60% bitumen, 23% solvent, 17% water); 60% bitumen, 23% solvent, 17% water

Dataset: ILCD process, EPD, generic dataset
Geography: DE
Reference year: 2021
Valid until: 2022
Classification: oekobau.dat: Kunststoffe / Dichtmassen / Bitumen
Owner: Sphera Solutions GmbH
Compliance: EN 15804+A2
Review: Dependent internal review by Sphera Solutions GmbH; Independent external review by GaBi user forum
Amounts: rows without a unit in brackets have none in this file; such an amount is in the reference unit of its flow, which a separate flow dataset defines
copyright: true
licenseType: Free of charge for all users and uses
accessRestrictions: The license conditions as stated on https://www.oekobaudat.de/ apply.
accessRestrictions: Es gelten die Lizenzbedingungen wie sie auf https://www.oekobaudat.de/ genannt sind.

## General comment
This data set has been modeled according to the European Standard EN 15804+A2 for Sustainable Building. Results are depicted in modules that allow the structured expression of results over the entire life cycle.

## Geography
The data set represents the country specific situation in Germany, focusing on the main technologies, the region specific characteristics and / or import statistics.

## Time period
Annual average

## Technology and included processes
The LCA of the bitumen cold adhesive covers the cradle-to-gate phase and the processing, particularly the production of the refinery products bitumen (60%) and petrol containing solvent (23%). Furthermore, a water addition of 17% is assumed. The system boundaries are represented by the finished product. Transports from the factory to the point of installation are not considered and, if necessary, must be included according to the system boundaries.

In the disposal phase, a manual dismantling (no loads) is assumed in module C1. The transport in module C2 to the landfill site takes place with a truck (50km). In C3, if relevant, a packaging with PE foil is taken into account (for example, for mineral fiber products. 0.0125 kg foil per kg of discarded material). In module C4 the average landfill emissions corresponding to the product (reference country Germany) are shown. The use of landfill gas is not taken into account.

## Technical purpose
This product can be used in construction.

## Safety margin
30 %. Processes / flows can be missing or estimated. Strongly restricted technological, temporal or geographical representativeness.

## Reference product
- Bitumen cold adhesive (60% bitumen, 23% solvent, 17% water): 1

## Inputs
- Use of renewable primary energy as energy carrier (PERE) [MJ]: A1-A3 2.95876, C2 0.00295871, C3 0, C4 0.0985726
- Use of renewable primary energy resources used as raw materials (PERM) [MJ]: A1-A3 0, C2 0, C3 0, C4 0
- Total use of renewable primary energy (PERT) [MJ]: A1-A3 2.95876, C2 0.00295871, C3 0, C4 0.0985726
- Use of non renewable primary energy as energy carrier (PENRE) [MJ]: A1-A3 19.3037, C2 0.0509787, C3 31.2, C4 1.35849
- Use of non renewable primary energy resources used as raw materials (PENRM) [MJ]: A1-A3 24, C2 0, C3 -24, C4 0
- Total use of non renewable primary energy resource (PENRT) [MJ]: A1-A3 43.3037, C2 0.0509787, C3 7.2, C4 1.35849
- Use of secondary material (SM) [kg]: A1-A3 0, C2 0, C3 0, C4 0
- Use of renewable secondary fuels (SF) [MJ]: A1-A3 0, C2 0, C3 0, C4 0
- Use of non renewable secondary fuels (NRSF) [MJ]: A1-A3 0, C2 0, C3 0, C4 0
- Net use of fresh water (FW) [m3]: A1-A3 0.00405316, C2 2.62955e-6, C3 0, C4 1.25215e-5

## Outputs
- Hazardous waste disposed (HWD) [kg]: A1-A3 6.19816e-6, C2 2.13074e-12, C3 0, C4 2.44293e-10
- Non harzardous waste disposed (NHWD) [kg]: A1-A3 0.0110598, C2 8.22912e-6, C3 0, C4 1.29482
- Radioactive waste disposed (RWD) [kg]: A1-A3 0.00026116, C2 4.89207e-8, C3 0, C4 1.57731e-5
- Components for re-use (CRU) [kg]: A1-A3 0, C2 0, C3 0, C4 0
- Materials for recycling (MFR) [kg]: A1-A3 0, C2 0, C3 0, C4 0
- Materials for energy recovery (MER) [kg]: A1-A3 0, C2 0, C3 0, C4 0
- Exported electrical energy (EEE) [MJ]: A1-A3 0, C2 0, C3 0, C4 0
- Exported thermal energy (EET) [MJ]: A1-A3 0, C2 0, C3 0, C4 0

## Impact indicators
- Global Warming Potential - total (GWP-total) [kg CO2 eq.]: A1-A3 0.682438, C2 0.00387967, C3 0, C4 0.0924634
- Global Warming Potential - fossil fuels (GWP-fossil) [kg CO2 eq.]: A1-A3 0.70351, C2 0.0038535, C3 0, C4 0.0931333
- Global Warming Potential - biogenic (GWP-biogenic) [kg CO2 eq.]: A1-A3 -0.0235255, C2 1.47059e-6, C3 0, C4 -0.000747817
- Global Warming Potential - land use and land use change (GWP-luluc) [kg CO2 eq.]: A1-A3 0.00245397, C2 2.46997e-5, C3 0, C4 7.78813e-5
- Depletion potenzial of the stratospheric ozone layer (ODP) [kg CFC-11 eq.]: A1-A3 9.59119e-15, C2 9.84077e-19, C3 0, C4 2.24681e-16
- Acidifcation potential, Accumulated Exceedance (AP) [Mole of H+ eq.]: A1-A3 0.00198074, C2 1.20831e-5, C3 0, C4 0.000279084
- Eutrophication potential - freshwater (EP-freshwater) [kg P eq.]: A1-A3 6.53609e-6, C2 7.90963e-9, C3 0, C4 1.71994e-5
- Eutrophication potential - marine (EP-marine) [kg N eq.]: A1-A3 0.000514082, C2 5.64074e-6, C3 0, C4 6.3289e-5
- Eutrophication potential - terrestrial (EP-terrestrial) [Mole of N eq.]: A1-A3 0.00498868, C2 6.29836e-5, C3 0, C4 0.000694044
- Photochemical Ozone Creation Potential (POCP) [kg NMVOC eq.]: A1-A3 0.300765, C2 1.08778e-5, C3 0, C4 0.000202448
- Abiotic depletion potential - non-fossil resources (ADPE) [kg Sb eq.]: A1-A3 2.86398e-7, C2 3.34543e-10, C3 0, C4 6.40939e-9
- Abiotic depletion potential - fossil resources (ADPF) [MJ]: A1-A3 50.4996, C2 0.0509765, C3 0, C4 1.35824
- Water (user) deprivation potential (WDP) [m³ world equiv.]: A1-A3 0.0506577, C2 1.49505e-5, C3 0, C4 -0.000678754

## Use advice
The data set represents a cradle to gate inventory. It can be used to characterise the supply chain situation of the respective commodity in a representative manner. Combination with individual unit processes using this commodity enables the generation of user-specific (product) LCAs.

## Data sources
- Documentation of data quality management
- GaBi Database Edition 2021, CUP2021.01
- GaBi database (all versions)
