# PVC roofing membrane; PVC

Dataset: ILCD process, EPD, generic dataset
Geography: DE
Reference year: 2021
Valid until: 2022
Classification: oekobau.dat: Kunststoffe / Dachbahnen / PVC-Dachbahnen
Owner: Sphera Solutions GmbH
Compliance: EN 15804+A2
Review: Dependent internal review by Sphera Solutions GmbH; Independent external review by GaBi user forum
Amounts: rows without a unit in brackets have none in this file; such an amount is in the reference unit of its flow, which a separate flow dataset defines
copyright: true
licenseType: Free of charge for all users and uses
accessRestrictions: The license conditions as stated on https://www.oekobaudat.de/ apply.
accessRestrictions: Es gelten die Lizenzbedingungen wie sie auf https://www.oekobaudat.de/ genannt sind.

## General comment
This data set has been modeled according to the European Standard EN 15804+A2 for Sustainable Building. Results are depicted in modules that allow the structured expression of results over the entire life cycle.

## Geography
The data set represents the country specific situation in Germany, focusing on the main technologies, the region specific characteristics and / or import statistics.

## Time period
Annual average

## Technology and included processes
The LCA of PVC roof sheets covers the cradle-to-gate phase. The system boundaries are represented by the ready-for-sales product. Transports from the factory to the point of installation are not considered and must be included according to the system boundaries. Production of PVC: PVC is produced by polymerisation of vinyl chloride monomer to polyvinyl chloride PVC. It can be produced by bulk, emulsion and suspension polymerisation. In this balance the presently dominating suspension polymerisation is considered. In general the polymerisation reaction is initiated by free radicals and runs under temperatures of 40 to 70 °C. Today the suspension polymerisation is preferred, which takes place in an aqueous solution. After polymerising monomers are expelled as far as economically possible, the PVC is further manufactured by centrifugation and dried in an air flow of 80°C.

In module C1, a manual dismantling (no loads) is assumed, collecting losses are neglected.
The transport in module C2 to the recycling plant takes place with a truck (50km).
Module C3 takes into account the grinding and thermal treatment (combustion) of the material. When calculating combustion emissions and credits, the specific calorific value of each material and the material composition are taken into account.
In module D credits for the substitution of electricity (German electricity mix) and thermal energy (from natural gas) are given.

## Technical purpose
This product can be used in construction.

## Safety margin
20 %. Product system depicted except for a few missing processes / flows. Technological, temporal and geographic representativeness partly given.

## Reference product
- PVC roofing membrane: 1

## Inputs
- Use of renewable primary energy as energy carrier (PERE) [MJ]: A1-A3 17.4475, C2 0.00327925, C3 3.22019, D -4.12474
- Use of renewable primary energy resources used as raw materials (PERM) [MJ]: A1-A3 0, C2 0, C3 0, D 0
- Total use of renewable primary energy (PERT) [MJ]: A1-A3 17.4475, C2 0.00327925, C3 3.22019, D -4.12474
- Use of non renewable primary energy as energy carrier (PENRE) [MJ]: A1-A3 97.6243, C2 0.0565015, C3 46.4216, D -12.4178
- Use of non renewable primary energy resources used as raw materials (PENRM) [MJ]: A1-A3 30, C2 0, C3 -30, D 0
- Total use of non renewable primary energy resource (PENRT) [MJ]: A1-A3 127.624, C2 0.0565015, C3 16.4216, D -12.4178
- Use of secondary material (SM) [kg]: A1-A3 0, C2 0, C3 0, D 0
- Use of renewable secondary fuels (SF) [MJ]: A1-A3 0, C2 0, C3 0, D 0
- Use of non renewable secondary fuels (NRSF) [MJ]: A1-A3 0, C2 0, C3 0, D 0
- Net use of fresh water (FW) [m3]: A1-A3 0.0715318, C2 2.91443e-6, C3 0.0100101, D -0.00153493

## Outputs
- Hazardous waste disposed (HWD) [kg]: A1-A3 8.3213e-7, C2 2.36158e-12, C3 2.22527e-9, D -4.2972e-9
- Non harzardous waste disposed (NHWD) [kg]: A1-A3 0.3138, C2 9.12064e-6, C3 3.23131, D -0.0065028
- Radioactive waste disposed (RWD) [kg]: A1-A3 0.00271495, C2 5.42206e-8, C3 0.000387575, D -0.000443617
- Components for re-use (CRU) [kg]: A1-A3 0, C2 0, C3 0, D 0
- Materials for recycling (MFR) [kg]: A1-A3 0, C2 0, C3 0, D 0
- Materials for energy recovery (MER) [kg]: A1-A3 0, C2 0, C3 1.5, D 0
- Exported electrical energy (EEE) [MJ]: A1-A3 0, C2 0, C3 3.30388, D 0
- Exported thermal energy (EET) [MJ]: A1-A3 0, C2 0, C3 7.80614, D 0

## Impact indicators
- Global Warming Potential - total (GWP-total) [kg CO2 eq.]: A1-A3 6.19979, C2 0.00429174, C3 5.08594, D -0.797532
- Global Warming Potential - fossil fuels (GWP-fossil) [kg CO2 eq.]: A1-A3 6.16288, C2 0.0042626, C3 5.08279, D -0.787984
- Global Warming Potential - biogenic (GWP-biogenic) [kg CO2 eq.]: A1-A3 0.0273831, C2 1.76574e-6, C3 0.00151811, D -0.00840756
- Global Warming Potential - land use and land use change (GWP-luluc) [kg CO2 eq.]: A1-A3 0.00953389, C2 2.73756e-5, C3 0.00163196, D -0.00113988
- Depletion potenzial of the stratospheric ozone layer (ODP) [kg CFC-11 eq.]: A1-A3 1.02997e-10, C2 1.09069e-18, C3 1.29832e-14, D -1.80057e-14
- Acidifcation potential, Accumulated Exceedance (AP) [Mole of H+ eq.]: A1-A3 0.0170934, C2 1.20854e-5, C3 0.00144991, D -0.000803571
- Eutrophication potential - freshwater (EP-freshwater) [kg P eq.]: A1-A3 4.66983e-5, C2 8.76653e-9, C3 1.87382e-6, D -1.89675e-6
- Eutrophication potential - marine (EP-marine) [kg N eq.]: A1-A3 0.00429288, C2 5.56751e-6, C3 0.000472109, D -0.000296256
- Eutrophication potential - terrestrial (EP-terrestrial) [Mole of N eq.]: A1-A3 0.047019, C2 6.22903e-5, C3 0.00627101, D -0.00315759
- Photochemical Ozone Creation Potential (POCP) [kg NMVOC eq.]: A1-A3 0.0163317, C2 1.08568e-5, C3 0.00139977, D -0.000776753
- Abiotic depletion potential - non-fossil resources (ADPE) [kg Sb eq.]: A1-A3 7.66257e-6, C2 3.70787e-10, C3 1.73886e-7, D -2.44226e-7
- Abiotic depletion potential - fossil resources (ADPF) [MJ]: A1-A3 133.591, C2 0.0564992, C3 10.4195, D -12.4161
- Water (user) deprivation potential (WDP) [m³ world equiv.]: A1-A3 1.58767, C2 1.65702e-5, C3 0.36303, D -0.00932129

## Use advice
The data set represents a cradle to gate inventory. It can be used to characterise the supply chain situation of the respective commodity in a representative manner. Combination with individual unit processes using this commodity enables the generation of user-specific (product) LCAs.

## Data sources
- Homepage Bärlocher, 2006
- Plastics Europe Association of Plastics Manufacturers, 2006
- ULLMANN'S Encyclopedia of Industrial Chemistry
- Documentation of data quality management
- GaBi Database Edition 2021, CUP2021.01
- GaBi database (all versions)
