# Coniferous lumber - fresh (German average)

Dataset: ILCD process, EPD, representative dataset
Geography: DE
Reference year: 2021
Valid until: 2026
Classification: OEKOBAU.DAT: Holz / Vollholz / Bau-Schnittholz
Method details: EN 15804; ILCD format
Generated by: Thünen-Institut für Holzforschung
Owner: Thünen-Institut für Holzforschung
Compliance: EN 15804+A2; EN 16485
Review: Independent external review by Dr. Frank Werner - Umwelt & Entwicklung
Amounts: rows without a unit in brackets have none in this file; such an amount is in the reference unit of its flow, which a separate flow dataset defines
copyright: true

## General comment
Further information on the declared unit and the inventory analysis based on manufacturer information (input and output of material and energy flows) are available for download as an Excel file within the section “background info”.
The data set was created in 2021 as an update with identical foreground system. All background data sets are taken from the GaBi Professional Database with content version 2021.1. The modeling and calculation of the life cycle assessment is based on the European standards EN 15804:2012+A2:2019 and EN 16485:2014. For questions, please contact holzundklima@thuenen.de.

## Geography
Für die Ökobilanzierung von frischem Nadelschnittholz wurden Daten von 31 Werken berücksichtigt (Rüter & Diederichs 2012). Im Rahmen der den Daten zugrunde liegenden Ökobilanzstudie wurden insgesamt 178 Prozesslinien für Vollholzprodukte erfasst. Im Verhältnis zu den vom Statistischen Bundesamt gemeldeten Produktionsmengen im selben Zeitraum entspricht die erreichte Abdeckung von Vollholzprodukten aus Nadelschnittholz 38 %.

## Time period
The data set is based on production data from the years 2009 to 2011 (foreground system).
The background system was updated in 2021.

## Technology and included processes
Das dem Forst entnommene Stammholz wird teilweise bereits im Wald entrindet, auf Rundholz-LKW an die Sägewerke geliefert und visuell geprüft. Die Stämme werden, sofern noch nicht geschehen, entrindet, je nach Lieferlänge (teilweise bis 22 m), den Maschinenbedingungen und den Auftragsvorgaben gekappt und nach Durchmessern und Holzart sortiert zwischengelagert. Der Einschnitt erfolgt je nach verwendeter Technologie mittels Profilzerspaner, Kreissäge oder Bandsäge. Dabei können mehrere Maschinentypen in Reihe geschaltet sein oder der Stamm bzw. dessen Teile mehrmals durch die gleiche Maschine gefahren werden. Die Technologien bzw. die Auslegungen der einzelnen Technologien innerhalb eines Sägewerkes unterscheiden sich hauptsächlich in der möglichen Bearbeitungsgeschwindigkeit, der minimal und maximal möglichen Bearbeitungsdurchmesser der Menge an anfallenden Reststoffen, der Reststoffformen, der möglichen Dimensionsvariabilität der Produkte sowie der möglichen Ausbeute an Hauptware (Schnittholz) bei schwankender Qualität (z.B. bei Krummschaftigkeit) des Stammholzes. Die Produkte werden verpackt und liegen bereit am Werkstor der Fertigung zur weiteren Verwendung.
Die Holzfeuchte des Produktes liegt bei 55%

## Technical purpose
Coniferous lumber is used in the construction sector and for furniture manufacturing. In the construction sector, timber houses, roof trusses, windows and doors as well as floors (floorboards, parquet or laminate) are made from coniferous lumber.

## Scenarios
- energetisch (Modul D): thermische Verwertung
- stofflich (Modul D): stoffliche Verwertung
- Entsorgung Verpackung (Modul A5): Das Modul A5 enthält ausschließlich die Entsorgung der Verpackungsmaterialien

## Reference product
- Nadelschnittholz - frisch (Durchschnitt DE): 1

## Inputs
- Use of renewable primary energy (PERE) [MJ]: A1 23.5093, A2 4.65694, A3 109.206, A1-A3 137.372, A5 (Entsorgung Verpackung) 0.167075, C2 0.390883, C3 100.439, D (energetisch) 6054.21, D (stofflich) -31.3232
- Use of renewable primary energy resources used as raw materials (PERM) [MJ]: A1 8388.86, A2 0, A3 28.3434, A1-A3 8417.2, A5 (Entsorgung Verpackung) -28.3434, C2 0, C3 -8388.86, D (energetisch) 0, D (stofflich) 0
- Total use of renewable primary energy resources (PERT) [MJ]: A1 8412.37, A2 4.65694, A3 137.55, A1-A3 8554.57, A5 (Entsorgung Verpackung) -28.1763, C2 0.390883, C3 -8288.42, D (energetisch) 6054.21, D (stofflich) -31.3232
- Use of non renewable primary energy (PENRE) [MJ]: A1 182.128, A2 77.2049, A3 170.769, A1-A3 430.102, A5 (Entsorgung Verpackung) 0.874352, C2 7.01352, C3 153.986, D (energetisch) -4668.46, D (stofflich) -153.111
- Use of non renewable primary energy resources used as raw materials (PENRM) [MJ]: A1 0, A2 0, A3 1.008, A1-A3 1.008, A5 (Entsorgung Verpackung) -1.008, C2 0, C3 0, D (energetisch) 0, D (stofflich) 0
- Total use of non renewable primary energy resource (PENRT) [MJ]: A1 182.128, A2 77.2049, A3 171.777, A1-A3 431.11, A5 (Entsorgung Verpackung) -0.133648, C2 7.01352, C3 153.986, D (energetisch) -4668.46, D (stofflich) -153.111
- Use of secondary material (SM) [kg]: A1 0, A2 0, A3 0, A1-A3 0, A5 (Entsorgung Verpackung) 0, C2 0, C3 0, D (energetisch) 0, D (stofflich) 674.732
- Use of renewable secondary fuels (RSF) [MJ]: A1 0, A2 0, A3 0, A1-A3 0, A5 (Entsorgung Verpackung) 0, C2 0, C3 0, D (energetisch) 0, D (stofflich) 0
- Use of non renewable secondary fuels (NRSF) [MJ]: A1 0, A2 0, A3 0, A1-A3 0, A5 (Entsorgung Verpackung) 0, C2 0, C3 0, D (energetisch) 0, D (stofflich) 0
- Use of net fresh water (FW) [m3]: A1 0.0150926, A2 0.00405802, A3 0.0404568, A1-A3 0.0596074, A5 (Entsorgung Verpackung) 0.00921286, C2 0.000447427, C3 0.0472656, D (energetisch) 0.786477, D (stofflich) -0.0174197

## Outputs
- Hazardous waste disposed (HWD) [kg]: A1 5.18662e-7, A2 3.32229e-9, A3 1.96382e-7, A1-A3 7.18367e-7, A5 (Entsorgung Verpackung) 1.54148e-10, C2 3.53407e-10, C3 5.59893e-8, D (energetisch) -1.61991e-6, D (stofflich) -2.29156e-7
- Non hazardous waste dispose (NHWD) [kg]: A1 0.043074, A2 0.0126457, A3 0.123648, A1-A3 0.179368, A5 (Entsorgung Verpackung) 0.033684, C2 0.00104187, C3 0.11997, D (energetisch) 2.20402, D (stofflich) -0.0386501
- Radioactive waste disposed (RWD) [kg]: A1 0.00191341, A2 9.75448e-5, A3 0.00969224, A1-A3 0.0117032, A5 (Entsorgung Verpackung) 4.59584e-5, C2 8.48373e-6, C3 0.0123357, D (energetisch) -0.286676, D (stofflich) -0.00323114
- Components for re-use (CRU) [kg]: A1 0, A2 0, A3 0, A1-A3 0, A5 (Entsorgung Verpackung) 0, C2 0, C3 0, D (energetisch) 0, D (stofflich) 0
- Materials for recycling (MFR) [kg]: A1 0, A2 0, A3 0, A1-A3 0, A5 (Entsorgung Verpackung) 0, C2 0, C3 674.732, D (energetisch) 0, D (stofflich) 0
- Materials for energy recovery (MER) [kg]: A1 0, A2 0, A3 0, A1-A3 0, A5 (Entsorgung Verpackung) 1.47078, C2 0, C3 674.732, D (energetisch) 0, D (stofflich) 0
- Exported electrical energy (EEE) [MJ]: A1 0, A2 0, A3 0.124386, A1-A3 0.124386, A5 (Entsorgung Verpackung) 5.50041, C2 0, C3 0, D (energetisch) 0, D (stofflich) 0
- Exported thermal energy (EET) [MJ]: A1 0, A2 0, A3 0.288964, A1-A3 0.288964, A5 (Entsorgung Verpackung) 9.93535, C2 0, C3 0, D (energetisch) 0, D (stofflich) 0

## Impact indicators
- Global Warming Potential - total (GWP-total) [kg CO2-Äqv.]: A1 -783.511, A2 5.80031, A3 10.5309, A1-A3 -767.179, A5 (Entsorgung Verpackung) 2.81324, C2 0.506039, C3 810.206, D (energetisch) -344.04, D (stofflich) -11.8333
- Global Warming Potential - fossil fuels (GWP-fossil) [kg CO2-Äqv.]: A1 14.5577, A2 5.80031, A3 13.2273, A1-A3 33.5853, A5 (Entsorgung Verpackung) 0.116815, C2 0.506039, C3 12.138, D (energetisch) -344.04, D (stofflich) -11.8333
- Global Warming Potential - biogenic (GWP-biogenic) [kg CO2-Äqv.]: A1 -798.068, A2 0, A3 -2.69643, A1-A3 -800.765, A5 (Entsorgung Verpackung) 2.69643, C2 0, C3 798.068, D (energetisch) 0, D (stofflich) 0
- Depletion potential of the stratospheric ozone layer (ODP) [kg CFC 11-Äquiv.]: A1 6.22782e-14, A2 2.28425e-15, A3 3.24267e-13, A1-A3 3.8883e-13, A5 (Entsorgung Verpackung) 5.21164e-16, C2 6.72244e-17, C3 4.15483e-13, D (energetisch) -9.65267e-12, D (stofflich) -1.07357e-13
- Acidification potential, Accumulated Exceedance (AP) [mol H+ eqv.]: A1 0.109839, A2 0.0339463, A3 0.0531946, A1-A3 0.19698, A5 (Entsorgung Verpackung) 0.000555672, C2 0.00305505, C3 0.0174679, D (energetisch) -0.312816, D (stofflich) -0.0651155
- Eutrophication potential - freshwater (EP-freshwater) [kg P eqv.]: A1 3.2228e-5, A2 1.20307e-5, A3 4.85174e-5, A1-A3 9.27761e-5, A5 (Entsorgung Verpackung) 7.94942e-8, C2 1.56195e-6, C3 5.08852e-5, D (energetisch) -0.00118584, D (stofflich) -2.87369e-5
- Eutrophication potential - marine (EP-marine) [kg N eqv.]: A1 0.0528848, A2 0.016758, A3 0.0219513, A1-A3 0.0915941, A5 (Entsorgung Verpackung) 0.000183901, C2 0.00149693, C3 0.00558653, D (energetisch) -0.111699, D (stofflich) -0.0308593
- Eutrophication potential - terrestrial (EP-terrestrial) [mol N eqv.]: A1 0.582643, A2 0.185416, A3 0.238983, A1-A3 1.00704, A5 (Entsorgung Verpackung) 0.00265693, C2 0.0165684, C3 0.0583261, D (energetisch) -0.908957, D (stofflich) -0.339689
- Versauerungspotenzial, kumulierte Überschreitung (AP) [kg NMVOC eqv.]: A1 0.148598, A2 0.0314365, A3 0.0619573, A1-A3 0.241992, A5 (Entsorgung Verpackung) 0.000493522, C2 0.00282312, C3 0.0138795, D (energetisch) -0.27929, D (stofflich) -0.0798872
- Abiotic depletion potential - non-fossil resources (ADPE) [kg Sb-Äqv.]: A1 1.7499e-6, A2 5.14295e-7, A3 9.09169e-6, A1-A3 1.13559e-5, A5 (Entsorgung Verpackung) 8.08929e-9, C2 4.00576e-8, C3 4.98206e-6, D (energetisch) -0.000120715, D (stofflich) -1.97837e-6
- Abiotic depletion potential - fossil resources (ADPF) [MJ]: A1 182.112, A2 77.2016, A3 170.711, A1-A3 430.025, A5 (Entsorgung Verpackung) 0.873917, C2 7.00418, C3 153.938, D (energetisch) -4667.36, D (stofflich) -153.082
- Water (user) deprivation potential (WDP) [m3 world eqv.]: A1 0.0150926, A2 0.00405802, A3 0.0404568, A1-A3 0.0596074, A5 (Entsorgung Verpackung) 0.00921286, C2 0.000447427, C3 0.0472656, D (energetisch) 0.786477, D (stofflich) -0.0174197
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
## Use advice
Aufgrund der hohen Abdeckung bildet der Datensatz die durchschnittlichen Produktionsverhältnisse und die damit verbundenen Umweltwirkungen repräsentativ für Deutschland ab. Liegen keine herstellerspezifischen Ökobilanzergebnisse des verwendeten Produkts vor, empfiehlt sich die Verwendung dieses Durchschnittsdatensatzes.

## Data sources
- Rüter S, Diederichs S (2012) Ökobilanz Basisdaten für Bauprodukte aus Holz, Hamburg, Johann Heinrich von Thünen Institut, Institut für Holztechnologie und Holzbiologie, Abschlussbericht
- GaBi database (general)
