# STEICO Holzfaserdämmplatten aus dem Trockenverfahren

Dataset: ILCD process, EPD, specific dataset
Geography: RER
Reference year: 2020
Valid until: 2025
Classification: OEKOBAU.DAT: Dämmstoffe / Holzfasern / Holzfaserdämmplatte
Classification: IBUCategories: 02 Bauprodukte / Holzwerkstoffe / Holzwerkstoffe
Method details: Holzwerkstoffe.pdf
Registration number: EPD-STE-20200173-IBA1-DE
Owner: STEICO SE
Compliance: DIN EN 15804; ISO 14025
Review: Accredited third party review by Institut Bauen und Umwelt e. V.
Amounts: rows without a unit in brackets have none in this file; such an amount is in the reference unit of its flow, which a separate flow dataset defines
copyright: true

## General comment
Die vorliegende Deklaration beschreibt einen produktionsmassengewichteten Durchschnitt der im Trockenverfahren produzierten Holzfaserdämmstoffe STEICOduo dry, STEICOétanche, STEICOinstall, STEICOintégral, STEICOprotect H dry, STEICOprotect L dry, STEICOprotect M dry, STECOprotect S dry, STEICOroof dry, STEICOsafe, STEICOspecial dry, STEICOtherm dry, STEICOtop, STEICOuniversal dry.

## Technology and included processes
Das Trockenverfahren zur Herstellung der STEICO Holzfaserdämmplatten beinhaltet folgende Prozessschritte: Verarbeitung des Rohholzes zu Hackschnitzeln Erhitzen der Hackschnitzel unter Dampfdruck Zerfaserung der Hackschnitzel im Refiner Trocknung der Fasern im Stromrohrtrockner Beleimung der Fasern Aufgabe des Gemenges auf die Produktionslinie Pressen und Aushärten des Gemenges zur Dämmplatte Zuschnitt der Holzfaserdämmung Abstapelung, Verpackung Alle während der Produktion anfallenden Reststoffe werden entweder erneut der Produktion oder intern einer energetischen Verwertung zugeführt. Systeme zur Gütesicherung: Qualitätsmanagementsystem nach /DIN EN ISO 9001:2015/ Umweltmanagementsystem nach /DIN EN ISO 14001:2015/ CE-Kennzeichnung nach /DIN EN 13171/MPA Nordrhein-Westfalen, D FSC Zertifikat /CU-COC-841217/ PEFC Zertifikat /CU-PEFC-841217/
Technische Daten:
Die folgenden Angaben beziehen sich auf die
Produktlinie STEICOspecial dry im Auslieferungszustand. Angaben zu weiteren im Gültigkeitsbereich dieser EPD genannten Produkte
sind unter www.steico.com einsehbar.
Deklarierte Einheit:
Die deklarierte Einheit ist 1 m³ Holzfaserdämmstoff mit einer mittleren Rohdichte von 140,00 kg bei einer Holzfeuchte von 5,81 %, was einem Wasseranteil von 5 % entspricht. Der Anteil der Zusatzstoffe liegt bei 8,98 %.

Die STEICOspecial dry wurde als repräsentatives Produkt der druckfesten Holzfaserdämmstoffe aus dem Trockenverfahren ausgewählt. Die anderen Produkte aus dem Gültigkeitsbereich dieser EPD können über eine Skalierung der Rohdichten erklärt werden. Es handelt sich gemäß des Punktes 5.2.1c der PCR Teil A um eine „Deklaration eines durchschnittlichen Produkts aus einem Werk eines Herstellers“.

## Technical purpose
STEICO Holzfaserdämmstoffe können vielseitig für
Wand-, Dach-, und Bodensysteme verwendet werden.
Die Anwendung reicht von Unterdeckungen und Aufsparrendämmung im Dachbereich bis hin zu allen Dämmanwendungen im Wandbereich, Dämmung von Installationsebenen und ebenso im Bereich Decken und Dämmung der oberen Geschossdecke. Ferner sind sie als direkt verputzbares Dämmelement für Wärmedämmverbundsysteme einsetzbar.

## Reference product
- Holzfaserdämmstoff aus dem Trockenverfahren (): 1

## Inputs
- Erneuerbare Primärenergie als Energieträger (PERE) [MJ]: A1 64.1867, A2 1.88926, A3 267.099, A5 1.19452, C2 0.315898, C3 0.867462, D -536.887
- Erneuerbare Primärenergie zur stofflichen Nutzung (PERM) [MJ]: A1 2320.77, A2 0, A3 164.064, A5 -164.064, C2 0, C3 -2320.77, D 0
- Total erneuerbare Primärenergie (PERT) [MJ]: A1 2384.95, A2 1.88926, A3 431.163, A5 -162.869, C2 0.315898, C3 -2319.9, D -536.887
- Nicht-erneuerbare Primärenergie als Energieträger (PENRE) [MJ]: A1 996.16, A2 33.6432, A3 1310.53, A5 5.78826, C2 5.62541, C3 14.9012, D -1951.76
- Nicht-erneuerbare Primärenergie zur stofflichen Nutzung (PENRM) [MJ]: A1 452.592, A2 0, A3 13.86, A5 -13.86, C2 0, C3 -452.592, D 0
- Total nicht erneuerbare Primärenergie (PENRT) [MJ]: A1 1448.75, A2 33.6432, A3 1324.39, A5 -8.07174, C2 5.62541, C3 -437.691, D -1951.76
- Einsatz von Sekundärstoffen (SM) [kg]: A1 0, A2 0, A3 0, A5 0, C2 0, C3 0, D 0
- Erneuerbare Sekundärbrennstoffe (RSF) [MJ]: A1 0, A2 0, A3 292.49, A5 0, C2 0, C3 0, D 2320.77
- Nicht erneuerbare Sekundärbrennstoffe (NRSF) [MJ]: A1 0, A2 0, A3 0, A5 0, C2 0, C3 0, D 452.592
- Einsatz von Süßwasserressourcen (FW) [m^3]: A1 0.346714, A2 0.00218763, A3 0.392521, A5 0.054678, C2 0.000365788, C3 0.000777071, D 0.293675

## Outputs
- Gefährlicher Abfall zur Deponie (HWD) [kg]: A1 0.00180819, A2 1.56565e-6, A3 1.77215e-6, A5 1.82116e-8, C2 2.61789e-7, C3 5.56958e-7, D -9.96197e-7
- Entsorgter nicht gefährlicher Abfall (NHWD) [kg]: A1 0.329942, A2 0.0051487, A3 0.90486, A5 0.241263, C2 0.000860902, C3 0.00261513, D 3.50438
- Entsorgter radioaktiver Abfall (RWD) [kg]: A1 0.00865209, A2 4.16414e-5, A3 0.00651736, A5 0.000175721, C2 6.96277e-6, C3 1.56902e-5, D -0.0777485
- Komponenten für die Wiederverwendung (CRU) [kg]: A1 0, A2 0, A3 0, A5 0, C2 0, C3 0, D 0
- Stoffe zum Recycling (MFR) [kg]: A1 0, A2 0, A3 0, A5 0, C2 0, C3 0, D 0
- Stoffe für die Energierückgewinnung (MER) [kg]: A1 0, A2 0, A3 0, A5 0, C2 0, C3 140, D 0
- Exportierte elektrische Energie (EEE) [MJ]: A1 0, A2 0, A3 0, A5 28.4967, C2 0, C3 0, D 456.398
- Exportierte thermische Energie (EET) [MJ]: A1 0, A2 0, A3 0, A5 65.6531, C2 0, C3 0, D 906.736

## Impact indicators
- Globales Erwärmungspotenzial (GWP) [kg CO_(2)-Äq.]: A1 -184.505, A2 2.42959, A3 101.392, A5 16.9628, C2 0.406246, C3 221.924, D -104.812
- Abbau Potential der stratosphärischen Ozonschicht (ODP) [kg CFC11-Äq.]: A1 1.4115e-7, A2 4.04435e-16, A3 3.24906e-13, A5 6.62444e-15, C2 6.76246e-17, C3 3.66813e-16, D -3.05881e-12
- Versauerungspotenzial von Boden und Wasser (AP) [kg SO_(2)-Äq.]: A1 0.0721743, A2 0.0101798, A3 0.203945, A5 0.00286142, C2 0.00170215, C3 0.0100484, D -0.105185
- Eutrophierungspotenzial (EP) [kg PO_(4)^(3)-Äq.]: A1 0.0133784, A2 0.00256091, A3 0.0241188, A5 0.000608272, C2 0.000428205, C3 0.00216973, D -0.0183393
- Bildungspotential für troposphärisches Ozon (POCP) [kg Ethen-Äq.]: A1 0.0114712, A2 -0.00428099, A3 0.0406105, A5 0.000146557, C2 -0.000715815, C3 0.000982143, D -0.0101505
- Potenzial für den abiotischen Abbau nicht fossiler Ressourcen (ADPE) [kg Sb-Äq.]: A1 8.12604e-5, A2 2.04583e-7, A3 1.06469e-5, A5 3.28539e-7, C2 3.42078e-8, C3 1.02289e-7, D -3.03593e-5
- Potenzial für den abiotischen Abbau fossiler Brennstoffe (ADPF) [MJ]: A1 974.336, A2 33.5369, A3 1294.23, A5 5.34473, C2 5.60763, C3 14.8611, D -1755.5

## Use advice
Gültigkeitsbereich:
Diese Deklaration ist eine EPD, die ein Durchschnittsprodukt verschiedener Produktlinien

abbildet, welche in folgendem Werk hergestellt werden:

STEICO Sp. z o.o.

ul. Przemysłowa 2

64-700 Czarnków

Die Berechnung der Ökobilanz bezieht sich auf ein Produkt mit einer Rohdichte von 140 kg/m3.

Folgende Dämmstoffplatten aus dem Trockenverfahren sind in die Durchschnittsbildung eingeflossen:

STEICOprotect L dry (110 kg/m3)
STEICOsafe 120-160 (110 kg/m3)
STEICOtherm dry (110 kg/m3)
STEICOétanche (140 kg/m³)

STEICOinstall (140 kg/m3)
STEICOintégral (140 kg/m³)
STEICOprotect M dry (140 kg/m3)
STEICOroof dry (140 kg/m3)
STEICOspecial dry (140 kg/m3)
STEICOsafe 60-100 (140 kg/m3)
STEICOtop (140 kg/m3)
STEICOduo dry (180 kg/m3)
STEICOprotect H dry (180 kg/m3)
STEICOuniversal dry 52-100 (180 kg/m3)
STECOprotect S dry (210 kg/m3)
STEICOsafe 40 (210 kg/m3)
STEICOuniversal dry 35-40 (210 kg/m3)
Systemgrenze:
Der Deklarationstyp entspricht einer EPD „Wiege bis Werkstor – mit Optionen“. Inhalte sind das Stadium der Produktion, d. h. von der Bereitstellung der Rohstoffe bis zum Werkstor der Produktion (cradle-to-gate, Module A1 bis A3), sowie das Modul A5 und Teile des Endes des Lebensweges (Modul C2 und C3). Darüber hinaus erfolgt eine Betrachtung der potenziellen Nutzen und Lasten über den Lebensweg des Produktes hinaus (Modul D).

Das Modul A1 umfasst die Bereitstellung des Holzes aus dem Forst sowie die Bereitstellung der Additive. Die Transporte dieser Stoffe werden in Modul A2 berücksichtigt. Modul A3 beinhaltet die Aufwendungen der Herstellung des Produktes, wie die Bereitstellung der Brennstoffe, Betriebsmittel und Energie, sowie die Verpackung des Produktes.

In Modul A5 wird ausschließlich die Entsorgung der Produktverpackung abgedeckt, welche den Ausgang des enthaltenen biogenen Kohlenstoffs sowie der enthaltenen Primärenergie (PERM und PENRM) einschließt.

Modul C2 berücksichtigt den Transport zum Entsorger und Modul C3 die Aufbereitung und Sortierung des Altholzes. Zudem werden in Modul C3 gemäß EN 16485 die CO2-Äquivalente des im Produkt befindlichen holzinhärenten Kohlenstoffs sowie die im Produkt enthaltene erneuerbare und nicht erneuerbare Primärenergie (PERM und PENRM) als Abgänge verbucht.

In Modul D werden die thermische Verwertung des Produktes am Ende seines Lebenswegs sowie die daraus resultierenden potenziellen Nutzen und Lasten in Form einer Systemerweiterung bilanziert.

## Data sources
- STEICO Holzfaserdämmplatten aus dem Trockenverfahren.pdf
- GaBi Database (all versions)
- GaBi database SP40 2020
