# EGGER DHF

Dataset: ILCD process, EPD, specific dataset
Geography: DE
Reference year: 2021
Valid until: 2026
Classification: OEKOBAU.DAT: Holz / Holzwerkstoffe / Holzfaserplatten
Classification: IBUCategories: 02 Bauprodukte / Holzwerkstoffe / Holzwerkstoffe
Method details: Holzwerkstoffe.pdf
Generated by: Daxner & Merl GmbH
Registration number: EPD-EGG-20200247-IBD1-DE
Owner: Fritz EGGER GmbH & Co. OG
Compliance: DIN EN 15804+A2; ISO 14025
Review: Accredited third party review by Institut Bauen und Umwelt e. V.
Amounts: rows without a unit in brackets have none in this file; such an amount is in the reference unit of its flow, which a separate flow dataset defines
copyright: false
licenseType: Free of charge for all users and uses
accessRestrictions: None

## General comment
EGGER DHF boards are synthetic resin-bonded medium-density wood fibre boards according to EN 622-5 (board type MDF.RWH), which are manufactured in a dry process. They are mainly based on fibres from softwood. The wood-based panels are fitted with tongue and groove profiles in the edge area. The average data reflects the specific production situation for DHF boards for a density of 615 kg/m³.

## Technology and included processes
Sawmill residues or debarked logs are crushed to a defined size and then cooked in a high pressure cooker and turned into wood fibres with grinding discs. These wood fibres are coated with glue and strewn in a continuously working dispersing station to form a continuous fibre cake. This cake is then continuously transported through a continuous hot press, and thus constantly compressed to the desired final thickness. After the press, the continuous board strand is cut to the required raw board size and cooled in large star coolers to room temperature. The boards are then cut to final size during finishing and fitted with tongue and groove profiles, packaged, and stored for shipping. The production includes the following process stages: 1. Peeling logs 2. Chipping the wood to produce chips and wood chips 3. Cooking the chips and wood chips 4. Defibration in the refiner 5. Drying the fibres to approximately 2 – 3 % residual moisture 6. Application of resin to the fibres 7. Spreading the glue-coated fibres onto a forming belt 8. Compression of the fibre mat in a hot press that works continuously 9. Cutting and trimming the fibre strand into rawboard formats 10. Cooling the rawboards in star coolers 11. Piling into large stacks 12. Finishing / tongue and groove line All waste generated in the course of production (trimming and milling waste) is used thermally with no exceptions. The Wismar plant is certified with a quality management system according to ISO 9001.
Technical data:
A declaration of performance (DoP) with relevant data for EGGER DHF boards with CE marking according to EN 13986:2004+A1:2015 and EN 14964:2006 are available at www.egger.com.
Declared unit:
This environmental product declaration is based on a declared unit of 1 m³ EGGER DHF board with an average raw density of 615 kg/m³ and a delivery moisture of approximately 7.5 %.

## Technical purpose
EGGER DHF boards are mainly used as vapour permeable, heat-insulating and partly load-bearing cladding in roofs and walls. They meet the requirements as sub-roofing of type UDP-A according to the guideline of the Central Association of German Roofers (ZVDH).

DHF boards can be used as load-bearing external cladding for walls and roofs in service classes 1 and 2 according to EN 1995-1-1, taking into account DIN 68800-2.

In addition to the aforementioned application regulations, the respective national regulations must be observed.

## Reference product
- DHF-Platte: 1

## Inputs
- Renewable primary energy as energy carrier (PERE) [MJ]: A1-A3 31916.6, C1 0, C2 1.47154, C3 10130.7, C4 0, D -1767.64
- Renewable primary energy resources as material utilization (PERM) [MJ]: A1-A3 10090.5, C1 0, C2 0, C3 -10090.5, C4 0, D 0
- Total use of renewable primary energy resources (PERT) [MJ]: A1-A3 42007.1, C1 0, C2 1.47154, C3 40.1968, C4 0, D -1767.64
- Non renewable primary energy as energy carrier (PENRE) [MJ]: A1-A3 5253.45, C1 0, C2 25.5521, C3 494.04, C4 0, D -7020.95
- Non renewable primary energy as material utilization (PENRM) [MJ]: A1-A3 403.267, C1 0, C2 0, C3 -403.267, C4 0, D 0
- Total use of non renewable primary energy resources (PENRT) [MJ]: A1-A3 5656.72, C1 0, C2 25.5521, C3 90.7727, C4 0, D -7020.95
- Use of secondary material (SM) [kg]: A1-A3 0.253809, C1 0, C2 0, C3 0, C4 0, D 0
- Use of renewable secondary fuels (RSF) [MJ]: A1-A3 3388.04, C1 0, C2 0, C3 0, C4 0, D 7695.03
- Use of non renewable secondary fuels (NRSF) [MJ]: A1-A3 0, C1 0, C2 0, C3 0, C4 0, D 307.532
- Use of net fresh water (FW) [m^3]: A1-A3 1.17181, C1 0, C2 0.00171484, C3 0.0464778, C4 0, D -1.42959

## Outputs
- Hazardous waste disposed (HWD) [kg]: A1-A3 1.78903e-5, C1 0, C2 1.18157e-6, C3 3.75519e-8, C4 0, D -2.37614e-6
- Non hazardous waste disposed (NHWD) [kg]: A1-A3 10.0514, C1 0, C2 0.00404981, C3 0.0643558, C4 0, D 0.256678
- Radioactive waste disposed (RWD) [kg]: A1-A3 0.160544, C1 0, C2 4.70949e-5, C3 0.0137636, C4 0, D -0.604347
- Components for re-use (CRU) [kg]: A1-A3 0, C1 0, C2 0, C3 0, C4 0, D 0
- Materials for recycling (MFR) [kg]: A1-A3 0, C1 0, C2 0, C3 0, C4 0, D 0
- Materials for energy recovery (MER) [kg]: A1-A3 0, C1 0, C2 0, C3 640.744, C4 0, D 0
- Exported electrical energy (EEE) [MJ]: A1-A3 0, C1 0, C2 0, C3 0, C4 0, D 0
- Exported thermal energy (EET) [MJ]: A1-A3 0, C1 0, C2 0, C3 0, C4 0, D 0

## Impact indicators
- Global Warming Potential total (GWP-total) [kg CO_(2)-Äq.]: A1-A3 -583.691, C1 0, C2 1.93069, C3 998.338, C4 0, D -351.893
- Global Warming Potential fossil fuels (GWP-fossil) [kg CO_(2)-Äq.]: A1-A3 398.328, C1 0, C2 1.91846, C3 5.16013, C4 0, D -350.537
- Global Warming Potential biogenic (GWP-biogenic) [kg CO_(2)-Äq.]: A1-A3 -982.563, C1 0, C2 -0.00320218, C3 993.171, C4 0, D -1.02406
- Global Warming Potential luluc (GWP-luluc) [kg CO_(2)-Äq.]: A1-A3 0.54343, C1 0, C2 0.0154399, C3 0.00747616, C4 0, D -0.331881
- Depletion potential of the stratospheric ozone layer (ODP) [kg CFC11-Äq.]: A1-A3 1.6013e-11, C1 0, C2 3.50086e-16, C3 1.13479e-13, C4 0, D -4.97884e-12
- Acidification potential of land and water (AP) [mol H^(+)-Äq.]: A1-A3 0.873188, C1 0, C2 0.00648291, C3 0.0113928, C4 0, D 0.273432
- Eutrophication potential aquatic freshwater (EP-freshwater) [kg PO_(4)-Äq.]: A1-A3 0.00115696, C1 0, C2 5.80995e-6, C3 1.37827e-5, C4 0, D -0.000609804
- Eutrophication potential aquatic marine (EP-marine) [kg N-Äq.]: A1-A3 0.342499, C1 0, C2 0.00292466, C3 0.00253031, C4 0, D 0.0693454
- Eutrophication potential terrestrial (EP-terrestrial) [mol N-Äq.]: A1-A3 3.68729, C1 0, C2 0.0326703, C3 0.0265841, C4 0, D 0.824154
- Formation potential of tropospheric ozone photochemical oxidants (POCP) [kg NMVOC-Äq.]: A1-A3 0.988203, C1 0, C2 0.00574604, C3 0.00693432, C4 0, D 0.292901
- Abiotic depletion potential for non fossil resources (ADPE) [kg Sb-Äq.]: A1-A3 0.000270614, C1 0, C2 1.54242e-7, C3 1.4933e-6, C4 0, D -7.4858e-5
- Abiotic depletion potential for fossil resources (ADPF) [MJ]: A1-A3 5655.27, C1 0, C2 25.4501, C3 90.7543, C4 0, D -7020.12
- Water use (WDP) [m^(3) Welt-Äq. entzogen]: A1-A3 2.78568, C1 0, C2 0.0185999, C3 1.12445, C4 0, D -22.9757
- Incidence of disease due to PM emissions (PM) [Krankheitsfälle]: A1-A3 0.00200452, C1 0, C2 3.66302e-8, C3 9.55523e-8, C4 0, D -1.47889e-6
- Human exposure efficiency relative to U235 (IR) [kBq U235-Äq.]: A1-A3 14.5678, C1 0, C2 0.00694767, C3 2.25814, C4 0, D -99.1487
- Comparative toxic unit for ecosystems (ETP-fw) [CTUe]: A1-A3 2904.21, C1 0, C2 19.0416, C3 38.8398, C4 0, D -1719.45
- Comparative toxic unit for humans (carcinogenic) (HTP-c) [CTUh]: A1-A3 4.48308e-7, C1 0, C2 3.93563e-10, C3 1.07251e-9, C4 0, D -6.80029e-9
- Comparative toxic unit for humans (noncarcinogenic) (HTP-nc) [CTUh]: A1-A3 3.81575e-6, C1 0, C2 2.26773e-8, C3 3.95156e-8, C4 0, D 1.98759e-6
- Soil quality index (SQP) [SQP]: A1-A3 80368.4, C1 0, C2 8.93326, C3 28.8839, C4 0, D -1291.07

## Use advice
Scope:
This document refers to DHF boards, which are manufactured in the following plant:

Egger Holzwerkstoffe Wismar GmbH & Co. KG

Am Haffeld 1, 23970 Wismar, Germany
System boundary:
The LCA of the EGGER DHF includes a cradle-to-gate consideration of the occurring environmental impact with the modules C1-C4 and module D (A1-A3, +C, +D). The following life cycle phases are taken into account in the analysis:

Module A1– A3 | Production stage

The production stage includes the cost of raw material procurement (roundwood, producing the glue system, the emulsion and the separating agent, etc.), as well as related transport relative to the production plant in Wismar. Within the plant boundaries, DHF board production, finishing and the outgoing warehouse including the packaging of the product are taken into account. The majority of the electrical energy used is obtained from the German power grid. Both internal wood waste and scrap wood sourced externally are used in the in-house biomass power plant. The system boundary for the scrap wood used in the production is set after sorting and chopping. It is assumed that the end of the waste status has been reached. The system boundary for secondary raw materials according to EN 15804 applies.

Module C1 | Dismantling / Demolition

Manual removal was assumed for the DHF boards. The associated efforts are negligible, which means that no environmental impact from the dismantling of the products is declared.

Module C2 | Transport to waste treatment
Module C2 includes transport to waste treatment. For this purpose, transport by lorry over a distance of 50 km is used as a representative scenario.

Module C3 | Waste processing

The wood product and with it the material-inherent properties leave the product system as secondary fuel in module C3. Furthermore, chopping after product disassembly is also considered.

Module C4 | Disposal
The scenario used declares the energy recovery of the wood products, which means that no environmental impact from the waste treatment of the products in C4 are to be expected.

Module D | Credits and charges outside the system limits

The energy utilisation of the product at the end of its life cycle is described in Module D, including energetic substitution potential as a European average scenario.

## Data sources
- GaBi Database (all versions)
- GaBi database SP40 2020
