# Rockpanel Durable & FS-Xtra

Dataset: ILCD process, EPD, average dataset
Geography: NL
Reference year: 2019
Valid until: 2024
Classification: OEKOBAU.DAT: Dämmstoffe / Mineralwolle / Steinwolle
Classification: IBUCategories: 02 Building products / Thermal insulation products / Mineral insulating materials
Method details: Mineral insulating materials.pdf
Generated by: ROCKWOOL International A/S
Registration number: EPD-RWI-20190158-CCC1-EN
Owner: ROCKWOOL International A/S
Compliance: DIN EN 15804; ISO 14025
Review: Accredited third party review by Institut Bauen und Umwelt e. V.
Amounts: rows without a unit in brackets have none in this file; such an amount is in the reference unit of its flow, which a separate flow dataset defines
copyright: true
licenseType: Free of charge for all users and uses
accessRestrictions: None

## General comment
Rockpanel stone wool facade panels are prefabricated compressed mineral wool products with thermosetting binders.

They are traditionally made from volcanic rock (typically basalt or dolomite), and of recycled material and finished with a cured (waterborne) coating. The unfaced and coated synthetic resin-bonded stone wool products described in this declaration are produced in the form of panels in densities of 1050 kg/m3 for the Durable and 1250 kg/m3 for the A2 (FS-Xtra) panel.

## Technology and included processes
Rockpanel stone wool facade panels are prefabricated compressed mineral wool products with thermosetting binders, traditionally made from volcanic rock (typically basalt or dolomite), and of recycled material and finished with a cured (waterborne) coating. The specific product referred to in the declared unit is 1 m2 of Rockpanel Durable cladding panel with a thickness of 8 mm and a density of 1050 kg/m3. During the manufacturing process stone raw materials are melted in a furnace at high temperatures of approx. 1,400-1,500°C and frayed out by means of roller spinning. The added binder is a phenol formaldehyde resin which is polymerized into solid resin during the production of the final stone wool product. The coating is a waterborne acrylic coating and an additional (optional) PU coating. The product is manufactured in Roermond factory (Netherlands). The LCA results cover all relevant life cycle stages from cradle to grave. Production stage, including the provisioning processes of raw materials and intermediates as well as the processing of secondary materials used as inputs, their transport to the factory and the production including all ancillary materials, energy inputs as well as the waste treatment and disposal of residual wastes accruing during production. Further, the modules A4 (transport to the building site), A5 (assembly), B1 (maintenance), C1 (deconstruction), C2 (transport), C3 (waste processing), C4 (disposal) and D (benefit) are declared. Landfill is assumed for the end of life scenario.
Technical data:
For the products where the above declared properties apply, the performance data are in accordance with the declaration of performance with respect to its essential characteristics according to European Assessment Document (EAD) no. EAD 090001-00-0404 for Prefabricated compressed mineral wool boards with organic or inorganic finish and with specified fastening system, edition May 2014.

The technical specifications for the products described in the EPD are given by the range below based on the reference standards. For the product specific characteristics please refer to the manufacturer's specifications, available online in http://www.rockpanel.com/.
Declared unit:
The specific product referred to in the declared unit is 1 m2 of Rockpanel Durable cladding panel. The reference product has a thickness of 8 mm and a density of 1050 kg/m3.

## Technical purpose
The Rockpanel Durable and A2 (FS-Xtra), which are contained in this EPD, are cladding panels for facade applications. The Rockpanel Durable is offered with a density of 1050 kg/m3 and thicknesses of 6, 8 and 10 mm. A2 (FS-Xtra) has a density of 1250 kg/m3 and thicknesses of 9 mm and 11 mm.

Product-specific environmental impacts are compiled by applying the relevant scaling factor (listed in the Scaling Factor table) in the Product Specific Scaling formula.

Product Specific Scaling Formula: Environmental Impact per m2 = Environmental Impact reference product * scaling factor

Please note that the scaling factors give a good indication of the impacts but they are not an exact measure as such.

## Reference product
- Rockpanel Durable 8 mm: 1

## Inputs
- Renewable primary energy as energy carrier (PERE) [MJ]: A1-A3 92.7439, A4 0.167, A5 8.59411, B2 5.1, B6 0, B7 0, C1 0, C2 0.0249, C3 0, C4 0.239, D -2.81
- Renewable primary energy resources as material utilization (PERM) [MJ]: A1-A3 4.25611, A4 0, A5 -3.54411, B2 0, B6 0, B7 0, C1 0, C2 0, C3 0, C4 0, D 0
- Total use of renewable primary energy resources (PERT) [MJ]: A1-A3 97, A4 0.167, A5 5.05, B2 5.1, B6 0, B7 0, C1 0, C2 0.0249, C3 0, C4 0.239, D -2.81
- Non renewable primary energy as energy carrier (PENRE) [MJ]: A1-A3 140.834, A4 2.87, A5 10.1615, B2 50.2, B6 0, B7 0, C1 0, C2 0.429, C3 0, C4 1.94, D -9.34
- Non renewable primary energy as material utilization (PENRM) [MJ]: A1-A3 37.1661, A4 0, A5 -0.161507, B2 0, B6 0, B7 0, C1 0, C2 0, C3 0, C4 0, D 0
- Total use of non renewable primary energy resources (PENRT) [MJ]: A1-A3 178, A4 2.87, A5 10, B2 50.2, B6 0, B7 0, C1 0, C2 0.429, C3 0, C4 1.94, D -9.34
- Use of secondary material (SM) [kg]: A1-A3 5.49, A4 0, A5 0.274, B2 0, B6 0, B7 0, C1 0, C2 0, C3 0, C4 0, D -5.49
- Use of renewable secondary fuels (RSF) [MJ]: A1-A3 0, A4 0, A5 0, B2 0, B6 0, B7 0, C1 0, C2 0, C3 0, C4 0, D 0
- Use of non renewable secondary fuels (NRSF) [MJ]: A1-A3 15.1, A4 0, A5 0.753, B2 0, B6 0, B7 0, C1 0, C2 0, C3 0, C4 0, D 0
- Use of net fresh water (FW) [m^3]: A1-A3 0.0157, A4 0.000258, A5 0.00176, B2 0.0136, B6 0, B7 0, C1 0, C2 4.21e-5, C3 0, C4 0.000476, D -0.00397

## Outputs
- Hazardous waste disposed (HWD) [kg]: A1-A3 5.58e-7, A4 1.6e-7, A5 3.94e-8, B2 7.49e-8, B6 0, B7 0, C1 0, C2 2.4e-8, C3 0, C4 3.16e-8, D 4.21e-9
- Non hazardous waste disposed (NHWD) [kg]: A1-A3 0.769, A4 0.000234, A5 0.513, B2 0.679, B6 0, B7 0, C1 0, C2 3.49e-5, C3 0, C4 8.55, D 0.562
- Radioactive waste disposed (RWD) [kg]: A1-A3 0.00133, A4 3.9e-6, A5 0.000136, B2 0.00158, B6 0, B7 0, C1 0, C2 5.82e-7, C3 0, C4 2.6e-5, D -1.71e-5
- Components for re-use (CRU) [kg]: A1-A3 0, A4 0, A5 0, B2 0, B6 0, B7 0, C1 0, C2 0, C3 0, C4 0, D 0
- Materials for recycling (MFR) [kg]: A1-A3 0, A4 0, A5 0.165, B2 0, B6 0, B7 0, C1 0, C2 0, C3 0, C4 0, D 0
- Materials for energy recovery (MER) [kg]: A1-A3 0, A4 0, A5 0, B2 0, B6 0, B7 0, C1 0, C2 0, C3 0, C4 0, D 0
- Exported electrical energy (EEE) [MJ]: A1-A3 0, A4 0, A5 0.699, B2 0, B6 0, B7 0, C1 0, C2 0, C3 0, C4 0.0441, D 0
- Exported thermal energy (EET) [MJ]: A1-A3 0, A4 0, A5 2.08, B2 0, B6 0, B7 0, C1 0, C2 0, C3 0, C4 0, D 0

## Impact indicators
- Global warming potential (GWP) [kg CO_(2)-Äq.]: A1-A3 14.3, A4 0.21, A5 1.46, B2 2.47, B6 0, B7 0, C1 0, C2 0.0315, C3 0, C4 0.246, D -0.332
- Depletion potential of the stratospheric ozone layer (ODP) [kg CFC11-Äq.]: A1-A3 8.15e-8, A4 3.49e-17, A5 5e-9, B2 2.21e-14, B6 0, B7 0, C1 0, C2 5.21e-18, C3 0, C4 7.57e-16, D 2.49e-13
- Acidification potential of land and water (AP) [kg SO_(2)-Äq.]: A1-A3 0.0646, A4 0.000178, A5 0.00347, B2 0.0102, B6 0, B7 0, C1 0, C2 2.87e-5, C3 0, C4 0.000786, D -0.00114
- Eutrophication potential (EP) [kg PO_(4)^(3)-Äq.]: A1-A3 0.0223, A4 3.93e-5, A5 0.0012, B2 0.000781, B6 0, B7 0, C1 0, C2 6.47e-6, C3 0, C4 0.000127, D -0.000101
- Formation potential of tropospheric ozone photochemical oxidants (POCP) [kg Ethen-Äq.]: A1-A3 0.00434, A4 6.68e-7, A5 0.000254, B2 0.000937, B6 0, B7 0, C1 0, C2 -7.88e-7, C3 0, C4 8.77e-5, D -0.000142
- Abiotic depletion potential for non fossil resources (ADPE) [kg Sb-Äq.]: A1-A3 1.03e-5, A4 1.63e-8, A5 5.16e-7, B2 2.96e-6, B6 0, B7 0, C1 0, C2 2.43e-9, C3 0, C4 4.77e-8, D -4.07e-8
- Abiotic depletion potential for fossil resources (ADPF) [MJ]: A1-A3 172, A4 2.86, A5 9.52, B2 46.2, B6 0, B7 0, C1 0, C2 0.427, C3 0, C4 1.87, D -8.84

## Use advice
Scope:
This declaration refers to Durable and A2 (FS-Xtra) cladding panels, produced by Rockpanel, a member of ROCKWOOL Group. The declared reference product in this EPD is 1m2 Rockpanel Durable Cladding Panel for facade cladding, roof detailing, soffits and fascias.

The Rockpanel products presented in this declaration are produced in Roermond (Netherlands). For the Rockpanel A2 (FS-Xtra) cladding panel, the environmental impacts and indicators are determined by applying the appropriate scaling factor (please refer to section "Technical Data" for guidance).

The production data correspond to the full year 2017.
System boundary:
EPD type: Cradle to gate with options, modules C1–C4, and module D. The modules considered in the life cycle assessment as per system boundaries are described as follows:

Production

The product stage A1-A3 includes:

Provision of preliminary products and energy and relevant upstream processes;

Transporting the raw materials and preliminary materials to ROCKWOOL production facilities;
Production process in the ROCKWOOL production facilities including energy inputs and emissions;
Electricity consumption, from purchased Renewable Energy Certificates (REC);
Waste processing up to the end-of-waste state or disposal of waste residues, during the production stage;
Production of packaging material;
Manufacturing of products and co-product.

The environmental impact of co-products from the steel and coal fired electricity production (slags, alumina and ashes entering the system as inputs to the manufacturing) is accounted for and economic allocation is applied. Recycled stone wool comes free of environmental burden, as it enters the product system as waste. Their transport to the factory is accounted for. Modules A1, A2 and A3 are declared as an aggregated module A1-A3.

Construction/Installation

The Construction Stage A4-A5 includes:

A4 transport to the building site
A5 installation to the building

The transport in A4 is modelled based on the amount of panels that fit in the truck.The values are based on annual average delivery data. In A5 the default installation is assumed to be manual, therefore no energy consumption or ancillary equipment is needed. The product waste from installation is assumed to be 5% and according to the modularity principle of EN 15804, its impacts are fully allocated to A5.

The A5 stage, according to EN 15804 includes also waste processing up to the end-of-waste state or disposal of final residues during the construction process stage and impacts and aspects related to product losses during installation.

Finally, the A5 module includes also the corresponding end-of-life considerations for packaging. The default assumption here for installation waste is 100% landfill.

Building Use

The use-stage B1-B7, related to the building fabric

includes:

B1 use or application of the installed product- not part of this EPD;
B2 maintenance;
B3 repair;
B4 replacement;
B5 refurbishment;
B6 – Operational energy use:
B7 – Operational water use:

Rockpanel Stone wool cladding panel is installed permanently in the structure and does not require maintenance, repair, replacement or refurbishment under normal use conditions. Similarly, Rockpanel has no operational energy or water use. Rockpanel Durable waterborne coating used on the Rockpanel Durable panel requires re-coating after 15 years. ProtectPlus coating requires maintenance intervals every 25 years. The conservative scenario, in which both coatings are applied, is considered here, even though in reality we have application of only one of them.

End of Life

The End-of-life stage C1-C4 includes:

C1 de-construction, demolition;
C2 transport to waste processing;
C3 waste processing for reuse, recovery
and/or recycling;
C4 disposal.

These stages also include provision and all transport, provision of all materials, products and related energy and water use. Manual deconstruction is assumed for C1 and no impacts are assigned. The benefits from disposal (heat or electricity recovery) are assigned to module D.

Module D includes reuse, recovery and/or recycling potentials expressed as net loads and benefits. Here the loads from the packaging disposal in A5 and from electricity generation on landfill are considered.

The product system with the system boundaries is presented in the graph below:

figure: product system with system boundaries

## Data sources
- GaBi Database (all versions)
- GaBi database SP33 2017
