# Photovoltaic system 1000 kWh/m²*a

Dataset: ILCD process, EPD, generic dataset
Geography: DE
Reference year: 2021
Valid until: 2022
Classification: oekobau.dat: Sonstige / Energieträger - Bereitstellung frei Verbraucher / Strom
Owner: Sphera Solutions GmbH
Compliance: EN 15804+A2
Review: Dependent internal review by Sphera Solutions GmbH; Independent external review by GaBi user forum
Amounts: rows without a unit in brackets have none in this file; such an amount is in the reference unit of its flow, which a separate flow dataset defines
copyright: true
licenseType: Free of charge for all users and uses
accessRestrictions: The license conditions as stated on https://www.oekobaudat.de/ apply.
accessRestrictions: Es gelten die Lizenzbedingungen wie sie auf https://www.oekobaudat.de/ genannt sind.

## General comment
This data set has been modeled according to the European Standard EN 15804+A2 for Sustainable Building. Results are depicted in modules that allow the structured expression of results over the entire life cycle.

## Geography
The data set represents the country specific situation in Germany, focusing on the main technologies, the region specific characteristics and / or import statistics.

## Time period
Annual average

## Technology and included processes
This dataset covers the life cycle of a phovoltaic system (PV module, cabling, fasteners and inverters), based on an area of 1 m². The photovoltaic model is based on the mix of different photovoltaic technologies installed:
Monocrystalline silicon cells 47.7%, polycrystalline silicon cells 38.3%, cadmium telluride (CdTe) 6.4%, amorphous silicon 5.1%, ribbon silicon 1.5% and copper-indium-gallium diselenide 1.0%. The following average efficiencies per technology are used: Mono-Silicon 14.0 %, Multi-Silicon 13.2%, Cadmium-Telluride (CdTe) 9.0%, Amorphous-Silicon 5.5 %, Ribbon-Silicon 11.2 %, Copper-Indium-Gallium-Diselenide 11.0 %. The weighted average efficiency is about 13.3%. The output of the plant is 165 kWp on a weighted average.
The system efficiency of the system has been assumed to be 75%. Operational life times of the panels are modelled with 20 years.
For the inverter, a lifetime of 10 years was assumed as a worst-case estimate. In the production and the end of life of this data set, 2 inverters have been incorporated. The degradation of the module efficiency of the PV modules was neglected.
The data set includes the costs of production and an estimate of the loads and benefits at the end of life based on the division between the following materials and their subsequent treatment: - aluminum, steel, copper (material recycling) - plastic and printed circuit board (thermal utilization in MWI) - glass, PV cell (landfilling). Solar radiation energy was assumed to be 1000 kWh / m² * a, which corresponds to an unfavorable location in Germany (for rather favorable sites the dataset with 1200 kWh / m² * a should be used). This results in a production volume of 7249 MJ for 1 m² of photovoltaic installation over the lifetime of 20 years.
The savings by substitution are declared after deduction of the grid losses of 5% in the module D (the regeneratively produced electricity quantity replaces electricity from conventional production). Thus, module D is composed of the end of life of the materials and the substitution of conventional electricity generation, whereby the savings made by the substitution of the conventional electricity account for the main part of the resulting credits, while the proportion from the end of life of the materials is rather low.

Background system:
Electricity: Electricity is modelled according to the individual country-specific situations. The country-specific modelling is achieved on multiple levels. Firstly, individual energy carrier specific power plants and plants for renewable energy sources are modelled according to the current national electricity grid mix. Modelling the electricity consumption mix includes transmission / distribution losses and the own use by energy producers (own consumption of power plants and "other" own consumption e.g. due to pumped storage hydro power etc.), as well as imported electricity. Secondly, the national emission and efficiency standards of the power plants are modelled as well as the share of electricity plants and combined heat and power plants (CHP). Thirdly, the country-specific energy carrier supply (share of imports and / or domestic supply) including the country-specific energy carrier properties (e.g. element and energy content) are accounted for. Fourthly, the exploration, mining/production, processing and transport processes of the energy carrier supply chains are modelled according to the specific situation of each electricity producing country. The different production and processing techniques (emissions and efficiencies) in the different energy producing countries are considered, e.g. different crude oil production technologies or different flaring rates at the oil platforms.
Thermal energy, process steam: The thermal energy and process steam supply is modelled according to the individual country-specific situation with regard to emission standards and considered energy carriers. The thermal energy and process steam are produced at heat plants. Efficiencies for thermal energy production are by definition 100% in relation to the corresponding energy carrier input. For process steam the efficiency ranges from 85%, 90% to 95%. The energy carriers used for the generation of thermal energy and process steam are modelled according to the specific import situation (see electricity above).
Transports: All relevant and known transport processes are included. Ocean-going and inland ship transport as well as rail, truck and pipeline transport of bulk commodities are considered.
Energy carriers: The energy carriers are modelled according to the specific supply situation (see electricity above).
Refinery products: Diesel fuel, gasoline, technical gases, fuel oils, lubricants and residues such as bitumen are modelled with a parameterised country-specific refinery model. The refinery model represents the current national standard in refining techniques (e.g. emission level, internal energy consumption, etc.) as well as the individual country-specific product output spectrum, which can be quite different from country to country. The supply of crude oil is modelled, again, according to the country-specific situation with the respective properties of the resources.

## Technical purpose
This product can be used in construction.

## Safety margin
10 %. Product system almost completely covered. Good technological, temporal and geographic representativeness.

## Reference product
- Photovoltaic system 1000 kWh/m²*a: 1

## Inputs
- Use of renewable primary energy as energy carrier (PERE) [MJ]: A1-A3 1046.31, B6 79200, C3 0, C4 23.3978, D -9898.69
- Use of renewable primary energy resources used as raw materials (PERM) [MJ]: A1-A3 0, B6 0, C3 0, C4 0, D 0
- Total use of renewable primary energy (PERT) [MJ]: A1-A3 1046.31, B6 79200, C3 0, C4 23.3978, D -9898.69
- Use of non renewable primary energy as energy carrier (PENRE) [MJ]: A1-A3 3884.82, B6 0, C3 0, C4 71.9942, D -11477.4
- Use of non renewable primary energy resources used as raw materials (PENRM) [MJ]: A1-A3 0, B6 0, C3 0, C4 0, D 0
- Total use of non renewable primary energy resource (PENRT) [MJ]: A1-A3 3884.82, B6 0, C3 0, C4 71.9942, D -11477.4
- Use of secondary material (SM) [kg]: A1-A3 0, B6 0, C3 0, C4 0, D 0
- Use of renewable secondary fuels (SF) [MJ]: A1-A3 0, B6 0, C3 0, C4 0, D 0
- Use of non renewable secondary fuels (NRSF) [MJ]: A1-A3 0, B6 0, C3 0, C4 0, D 0
- Net use of fresh water (FW) [m3]: A1-A3 2.1369, B6 0, C3 0, C4 0.0320918, D -3.82737

## Outputs
- Hazardous waste disposed (HWD) [kg]: A1-A3 3.51257e-5, B6 0, C3 0, C4 1.71582e-8, D -5.03069e-6
- Non harzardous waste disposed (NHWD) [kg]: A1-A3 22.7757, B6 0, C3 0, C4 15.9068, D -8.02228
- Radioactive waste disposed (RWD) [kg]: A1-A3 0.190648, B6 0, C3 0, C4 0.00260371, D -1.06943
- Components for re-use (CRU) [kg]: A1-A3 0, B6 0, C3 0, C4 0, D 0
- Materials for recycling (MFR) [kg]: A1-A3 0, B6 0, C3 14.3, C4 0, D 0
- Materials for energy recovery (MER) [kg]: A1-A3 0, B6 0, C3 0, C4 0, D 0
- Exported electrical energy (EEE) [MJ]: A1-A3 0, B6 7248.74, C3 0, C4 9.44102, D 0
- Exported thermal energy (EET) [MJ]: A1-A3 0, B6 0, C3 0, C4 21.6922, D 0

## Impact indicators
- Global Warming Potential - total (GWP-total) [kg CO2 eq.]: A1-A3 302.303, B6 0, C3 0, C4 12.2062, D -876.973
- Global Warming Potential - fossil fuels (GWP-fossil) [kg CO2 eq.]: A1-A3 301.871, B6 0, C3 0, C4 12.1722, D -859.903
- Global Warming Potential - biogenic (GWP-biogenic) [kg CO2 eq.]: A1-A3 0.168417, B6 0, C3 0, C4 0.0255153, D -14.3419
- Global Warming Potential - land use and land use change (GWP-luluc) [kg CO2 eq.]: A1-A3 0.263564, B6 0, C3 0, C4 0.00846052, D -2.72757
- Depletion potenzial of the stratospheric ozone layer (ODP) [kg CFC-11 eq.]: A1-A3 1.64703e-9, B6 0, C3 0, C4 9.87229e-14, D -4.30536e-11
- Acidifcation potential, Accumulated Exceedance (AP) [Mole of H+ eq.]: A1-A3 1.25434, B6 0, C3 0, C4 0.0367571, D -1.4846
- Eutrophication potential - freshwater (EP-freshwater) [kg P eq.]: A1-A3 0.000489936, B6 0, C3 0, C4 1.32016e-5, D -0.00445725
- Eutrophication potential - marine (EP-marine) [kg N eq.]: A1-A3 0.219283, B6 0, C3 0, C4 0.0146664, D -0.427625
- Eutrophication potential - terrestrial (EP-terrestrial) [Mole of N eq.]: A1-A3 2.38223, B6 0, C3 0, C4 0.162194, D -4.44026
- Photochemical Ozone Creation Potential (POCP) [kg NMVOC eq.]: A1-A3 0.830984, B6 0, C3 0, C4 0.0390452, D -1.06489
- Abiotic depletion potential - non-fossil resources (ADPE) [kg Sb eq.]: A1-A3 0.0124503, B6 0, C3 0, C4 1.32995e-6, D -0.00713957
- Abiotic depletion potential - fossil resources (ADPF) [MJ]: A1-A3 3880.56, B6 0, C3 0, C4 71.9058, D -11472.4
- Water (user) deprivation potential (WDP) [m³ world equiv.]: A1-A3 63.1698, B6 0, C3 0, C4 0.898642, D -27.5049

## Use advice
The data set represents a cradle to gate inventory. It can be used to characterise the supply chain situation of the respective commodity in a representative manner. Combination with individual unit processes using this commodity enables the generation of user-specific (product) LCAs.

## Data sources
- Documentation of data quality management
- GaBi Database Edition 2021, CUP2021.01
- GaBi database (all versions)
