# Hot-formed press-hardened steel components ("phs-ultraform")

Dataset: ILCD process, EPD, average dataset
Geography: GLO
Reference year: 2021
Valid until: 2026
Classification: OEKOBAU.DAT: Metalle / Stahl und Eisen / Stahlbleche
Classification: IBUCategories: 02 Bauprodukte / Metallbauprodukte und Zubehör / Dünnwandige Profile und Profiltafeln aus Metall
Method details: Dünnwandige Profile und Profiltafeln aus Metall.pdf
Generated by: Daxner & Merl GmbH
Registration number: EPD-VOE-20210174-IBB1-DE
Owner: voestalpine AG
Compliance: DIN EN 15804+A2; ISO 14025
Review: Accredited third party review by Institut Bauen und Umwelt e. V.
Amounts: rows without a unit in brackets have none in this file; such an amount is in the reference unit of its flow, which a separate flow dataset defines
copyright: true
licenseType: Free of charge for all users and uses
accessRestrictions: None

## General comment
The “phs components” product group (phs = press-hardened steel) consists of high-strength finished components. The specific characteristics of this product group are exceptional forming possibilities combined with high strength. This declaration summarizes the different processing variants at various voestalpine Metal Forming Division production sites.

“phs-ultraform” is a registered trademark of voestalpine Stahl GmbH.

phs-ultraform (EUIPO registration numbers 013290044 and 005772165): cold-formed components are heated and then formed in a hot state. The material is hardened in the press with the help of cooled dies (press-hardened).

voestalpine trademarks

/phs-ultraform 2000

/phs-ultraform 1500

/phs-ultraform 490

## Technology and included processes
The starting material for the production of hot-dip galvanized strip at voestalpine is crude steel made in the integrated route (blast furnace, LD steelmaking plant) at the Linz site. The liquid crude steel is cast into slabs using a continuous casting method. After cooling, the slabs are reheated in pusher-type or walking beam furnaces to a temperature ranging between 1100 and 1250 °C and rolled in several rolling steps to strips in thicknesses ranging between 1.2 and 4 mm. A mill scale layer forms on the hot-rolled strip and is removed before further processing in the cold-rolling mill (scale removal). This production step first features a mechanical loosening of the scale layer (leveling line). The steel strip is subsequently pickled with hydrochloric and sulfuric acid. “phs” (press hardened steel) consists of hot forming galvanized flat steel. This meets the objective of achieving maximum formability combined with maximum strength. The indirect method, “phs-ultraform”: Starting with a steel strip or a laser-welded steel blank, parts are cold-formed in a hydraulic or mechanical press (high dimensional accuracy). The formed parts are then heated to roughly 900 °C and immediately press-hardened again while they are hot. The cooled dies harden the component, and the low degree of forming prevents the zinc layer from being damaged. The component is then cleaned.
Technical data:
The data in the Declaration of Performance apply.

Structural data:

Thickness of the sheet: 0.7 to 3.0 mm

Mass of the component: 2 to 20 kg

Component dimensions:

Component dimensions are defined in a CAD model.

Dimensions of typical phs components for automotive applications:

Width: 70 to 2000 mm

Height: 20 to 400 mm

Length: 200 to 3500 mm
Declared unit:
This environmental product declaration for voestalpine phs-components refers to a declared unit of 1 t press-hardened steel components.

## Technical purpose
phs components are used primarily in the automotive industry. They can also be used in other industries where a high degree of formability, low weight, and high strength are required. The analysis presented here was carried out exclusively for phs components in the automotive sector. phs components are predominantly used for structural chassis components:
Front and rear side members
Bumper supports
Sills
Crossmembers
A pillars
B pillars
Roof frames

Component groups such as side members usually consist of several individual components that are joined together using appropriate joining technologies (welding, bonding, riveting). This makes it possible to optimize applications for load situation in the finished component.

Tailored-property parts (TPP) are used to customize component properties. Very specific characteristics with respect to crash behavior, deformability, occupant protection and energy absorption can be achieved by joining flat steels with different thicknesses and steel grades (“laser-welded blanks”) and by hardening and strengthening sections of component segments.

Use of press-hardened steel (phs) and TPP parts

Variants of tailored-property parts

## Reference product
- phs-Bauteile: 1000

## Inputs
- Renewable primary energy as energy carrier (PERE) [MJ]: A1-A3 4336.64, C1 0, C2 2.29163, C3 0, C4 2.56803, D 1851.85
- Renewable primary energy resources as material utilization (PERM) [MJ]: A1-A3 0, C1 0, C2 0, C3 0, C4 0, D 0
- Total use of renewable primary energy resources (PERT) [MJ]: A1-A3 4336.64, C1 0, C2 2.29163, C3 0, C4 2.56803, D 1851.85
- Non renewable primary energy as energy carrier (PENRE) [MJ]: A1-A3 48958.2, C1 0, C2 39.97, C3 0, C4 35.5601, D -20141.2
- Non renewable primary energy as material utilization (PENRM) [MJ]: A1-A3 0, C1 0, C2 0, C3 0, C4 0, D 0
- Total use of non renewable primary energy resources (PENRT) [MJ]: A1-A3 48958.2, C1 0, C2 39.97, C3 0, C4 35.5601, D -20141.2
- Use of secondary material (SM) [kg]: A1-A3 221.512, C1 0, C2 0, C3 0, C4 0, D 1364.39
- Use of renewable secondary fuels (RSF) [MJ]: A1-A3 0, C1 0, C2 0, C3 0, C4 0, D 0
- Use of non renewable secondary fuels (NRSF) [MJ]: A1-A3 0, C1 0, C2 0, C3 0, C4 0, D 0
- Use of net fresh water (FW) [m^3]: A1-A3 11.4968, C1 0, C2 0.00262466, C3 0, C4 0.000367451, D -10.1947

## Outputs
- Hazardous waste disposed (HWD) [kg]: A1-A3 1.22578e-5, C1 0, C2 2.1061e-9, C3 0, C4 6.30055e-9, D 5.61631e-6
- Non hazardous waste disposed (NHWD) [kg]: A1-A3 51.6285, C1 0, C2 0.00627081, C3 0, C4 50.0682, D 242.107
- Radioactive waste disposed (RWD) [kg]: A1-A3 0.714947, C1 0, C2 7.25026e-5, C3 0, C4 0.000405317, D 0.000729027
- Components for re-use (CRU) [kg]: A1-A3 0, C1 0, C2 0, C3 0, C4 0, D 0
- Materials for recycling (MFR) [kg]: A1-A3 633, C1 0, C2 0, C3 950, C4 0, D 0
- Materials for energy recovery (MER) [kg]: A1-A3 0, C1 0, C2 0, C3 0, C4 0, D 0
- Exported electrical energy (EEE) [MJ]: A1-A3 0, C1 0, C2 0, C3 0, C4 0, D 0
- Exported thermal energy (EET) [MJ]: A1-A3 0, C1 0, C2 0, C3 0, C4 0, D 0

## Impact indicators
- Global Warming Potential total (GWP-total) [kg CO_(2)-Äq.]: A1-A3 4889.42, C1 0, C2 3.02407, C3 0, C4 2.41918, D -2314.48
- Global Warming Potential fossil fuels (GWP-fossil) [kg CO_(2)-Äq.]: A1-A3 4874.85, C1 0, C2 3.00319, C3 0, C4 2.44175, D -2313.32
- Global Warming Potential biogenic (GWP-biogenic) [kg CO_(2)-Äq.]: A1-A3 12.0944, C1 0, C2 -0.00356122, C3 0, C4 -0.0250097, D -1.4986
- Global Warming Potential luluc (GWP-luluc) [kg CO_(2)-Äq.]: A1-A3 2.47422, C1 0, C2 0.0244391, C3 0, C4 0.00244365, D 0.334787
- Depletion potential of the stratospheric ozone layer (ODP) [kg CFC11-Äq.]: A1-A3 8.01668e-11, C1 0, C2 5.90297e-16, C3 0, C4 5.76801e-15, D -3.85713e-12
- Acidification potential of land and water (AP) [mol H^(+)-Äq.]: A1-A3 13.6488, C1 0, C2 0.00991632, C3 0, C4 0.00777562, D -4.15265
- Eutrophication potential aquatic freshwater (EP-freshwater) [kg PO_(4)-Äq.]: A1-A3 0.006263, C1 0, C2 8.88276e-6, C3 0, C4 1.85847e-6, D -0.000473035
- Eutrophication potential aquatic marine (EP-marine) [kg N-Äq.]: A1-A3 3.23124, C1 0, C2 0.00455498, C3 0, C4 0.00193046, D -0.61888
- Eutrophication potential terrestrial (EP-terrestrial) [mol N-Äq.]: A1-A3 35.1374, C1 0, C2 0.0508449, C3 0, C4 0.0211802, D -6.03351
- Formation potential of tropospheric ozone photochemical oxidants (POCP) [kg NMVOC-Äq.]: A1-A3 10.137, C1 0, C2 0.00894108, C3 0, C4 0.00608284, D -3.16845
- Abiotic depletion potential for non fossil resources (ADPE) [kg Sb-Äq.]: A1-A3 0.106797, C1 0, C2 2.65014e-7, C3 0, C4 1.68496e-7, D -0.00503343
- Abiotic depletion potential for fossil resources (ADPF) [MJ]: A1-A3 48745, C1 0, C2 39.8249, C3 0, C4 35.5529, D -20135.1
- Water use (WDP) [m^(3) Welt-Äq. entzogen]: A1-A3 226.718, C1 0, C2 0.0277457, C3 0, C4 -0.028939, D -453.949
- Incidence of disease due to PM emissions (PM) [Krankheitsfälle]
- Human exposure efficiency relative to U235 (IR) [kBq U235-Äq.]
- Comparative toxic unit for ecosystems (ETP-fw) [CTUe]
- Comparative toxic unit for humans (carcinogenic) (HTP-c) [CTUh]
- Comparative toxic unit for humans (noncarcinogenic) (HTP-nc) [CTUh]
- Soil quality index (SQP) [SQP]

## Use advice
Scope:
This EPD applies to voestalpine phs-ultraform components. It is based on the average annual production of the sites considered and relates to 1 t average phs-components.

The results are representative for the following sites:

voestalpine Automotive Components Schmölln GmbH (DE),
voestalpine Automotive Components Schwäbisch Gmünd GmbH & Co. KG (DE)
voestalpine Automotive Components Cartersville Inc. (USA)
voestalpine Automotive Components Shenyang Co., Ltd. (CN)
System boundary:
The life cycle assessment of phs-components produced by voestalpine refers to a cradle-to-gate analysis with modules C1-C4 and D (A1-A3 + C + D). The following life cycle phases are taken into consideration in the analysis:

Module A1-A3 | Production stage

The production stage includes the manufacturing process of the phs- components at the sites in Schwäbisch-Gmünd, Schmölln, Shenyang and Cartersville. Indirect press-hardening for the production of highly corrosion-resistant lightweight components is assessed based on data collected for the Group's plants. The raw material is delivered from the integrated steelworks of voestalpine Linz and voestalpine Automotive Components Linz. Electrical energy is provided by the national power grid and thermal energy provision is based on natural gas.

Load carriers vary according to customer requirements and is not included in the declaration.

Module C1 | Deconstruction and demolition

phs-components are used in the automotive sector. The phs-components are disposed of by the waste management company.

Module C2 | Transport

The transport to the disposal of the material is estimated declaring a 50 km radius to waste processing.

Module C3 | Waste treatment

The vehicle is dismantled into its basic components at the disposal company and shredded. After shredding and sorting, the scrap reaches the end-of-waste status in C3 and reaches module D for recycling. Environmental impacts from shredding and sorting of the steel scrap are not included due to the insignificance of the expected impact.

Module C4 | Disposal
Module C4 refers to the emissions from the disposal of the losses from waste processing. The chosen scenario, therefore, includes the environmental burdens of landfilling of 5 % of the material.

Module D | Credits and loads beyond the system boundary

Module D declares the recycling of the recovered steel (95 % of the product). It includes the potential for substituting primary steel.

## Data sources
- GaBi Database (all versions)
- GaBi Database Edition 2021, CUP 2021.01
