# Usage - electric heat pump air-water 14kW (2/35); (2/35)

Dataset: ILCD process, EPD, generic dataset
Geography: DE
Reference year: 2018
Valid until: 2022
Classification: oekobau.dat: Gebäudetechnik / Nutzung / Nutzung Wärmeerzeuger
Owner: thinkstep
Compliance: DIN EN 15804
Review: Dependent internal review by thinkstep, IABP-GaBi, IBP-GaBi; Independent external review by GaBi user forum, GaBi bug forum, GaBi user community
Amounts: rows without a unit in brackets have none in this file; such an amount is in the reference unit of its flow, which a separate flow dataset defines
copyright: true

## General comment
This data set has been modeled according to the European Standard EN 15804 for Sustainable Building. Results are depicted in modules that allow the structured expression of results over the entire life cycle.

## Geography
The data set represents the country specific situation in Germany, focusing on the main technologies, the region specific characteristics and / or import statistics.

## Time period
Annual average

## Technology and included processes
Heat pumps are at the moment mainly operated with cold steam compression processing. In the process heated refrigerant is compressed by the heat source and added to the liquefier. By releasing heat it is converted again to liquid and then reheated by the heat source (soil, ground water). The liquifaction heat released by a heat exchanger is supplied to a customer, e.g. a heating circuit. The energy needed for the compression is added to the system by electricity. The demand for natural gas and additional energy (electricity) mainly depends on the temperature of the environment in the heating period. The coefficient of performance indicates the relation of heat given off and electric power received and maily depends on the relation between the temperature of the heating source and the flow temperature of the heating circuit. With a brine temperature of 2°C and a flow temperature of 35°C the coefficient is 3.1 (for 3.1 kWh thermal power one kWh of electric power has to be applied).
According to VDI guideline 2067 for electric instantaneous water heaters an average life span of 20 years can be assumed.

Background system:
Electricity: Electricity is modelled according to the individual country-specific situations. The country-specific modelling is achieved on multiple levels. Firstly, individual energy carrier specific power plants and plants for renewable energy sources are modelled according to the current national electricity grid mix. Modelling the electricity consumption mix includes transmission / distribution losses and the own use by energy producers (own consumption of power plants and "other" own consumption e.g. due to pumped storage hydro power etc.), as well as imported electricity. Secondly, the national emission and efficiency standards of the power plants are modelled as well as the share of electricity plants and combined heat and power plants (CHP). Thirdly, the country-specific energy carrier supply (share of imports and / or domestic supply) including the country-specific energy carrier properties (e.g. element and energy content) are accounted for. Fourthly, the exploration, mining/production, processing and transport processes of the energy carrier supply chains are modelled according to the specific situation of each electricity producing country. The different production and processing techniques (emissions and efficiencies) in the different energy producing countries are considered, e.g. different crude oil production technologies or different flaring rates at the oil platforms.
Thermal energy, process steam: The thermal energy and process steam supply is modelled according to the individual country-specific situation with regard to emission standards and considered energy carriers. The thermal energy and process steam are produced at heat plants. Efficiencies for thermal energy production are by definition 100% in relation to the corresponding energy carrier input. For process steam the efficiency ranges from 85%, 90% to 95%. The energy carriers used for the generation of thermal energy and process steam are modelled according to the specific import situation (see electricity above).
Transports: All relevant and known transport processes are included. Ocean-going and inland ship transport as well as rail, truck and pipeline transport of bulk commodities are considered.
Energy carriers: The energy carriers are modelled according to the specific supply situation (see electricity above).
Refinery products: Diesel fuel, gasoline, technical gases, fuel oils, lubricants and residues such as bitumen are modelled with a parameterised country-specific refinery model. The refinery model represents the current national standard in refining techniques (e.g. emission level, internal energy consumption, etc.) as well as the individual country-specific product output spectrum, which can be quite different from country to country. The supply of crude oil is modelled, again, according to the country-specific situation with the respective properties of the resources.

## Technical purpose
This product can be used in construction.

## Safety margin
0 %.

## Reference product
- Thermal energy (MJ): 3.6

## Inputs
- Use of renewable primary energy (PERE) [MJ]: B6 4.95516
- Primary energy resources used as raw materials (PERM) [MJ]: B6 0
- Total use of renewable primary energy resources (PERT) [MJ]: B6 4.95516
- Use of non-renewable primary energy (PENRE) [MJ]: B6 2.02396
- Non-renewable primary energy resources used as raw materials (PENRM) [MJ]: B6 0
- Total use of non-renewable primary energy resources (PENRT) [MJ]: B6 2.02396
- Input of secondary material (SM) [kg]: B6 0
- Use of renewable secondary fuels (RSF) [MJ]: B6 0
- Use of non renewable secondary fuels (NRSF) [MJ]: B6 0
- Use of net fresh water (FW) [m3]: B6 0.000626736

## Outputs
- Hazardous waste disposed (HWD) [kg]: B6 1.38815e-9
- Non-hazardous waste disposed (NHWD) [kg]: B6 0.00157558
- Radioactive waste disposed (RWD) [kg]: B6 0.000163965
- Components for re-use (CRU) [kg]: B6 0
- Materials for Recycling (MFR) [kg]: B6 0
- Material for Energy Recovery (MER) [kg]: B6 0
- Exported electrical energy (EEE) [MJ]: B6 0
- Exported thermal energy (EET) [MJ]: B6 0

## Impact indicators
- Global warming potential (GWP) [kg CO2 eq.]: B6 0.166646
- Ozone Depletion Potential (ODP) [kg R11 eq.]: B6 7.51249e-15
- Acidification potential (AP) [kg SO2 eq.]: B6 0.000189611
- Eutrophication potential (EP) [kg Phosphate eq.]: B6 3.76541e-5
- Photochemical Ozone Creation Potential (POCP) [kg Ethene eq.]: B6 1.57144e-5
- Abiotic depletion potential for non fossil resources (ADPE) [kg Sb eq.]: B6 7.29483e-8
- Abiotic depletion potential for fossil resources (ADPF) [MJ]: B6 1.61005

## Use advice
The data set represents a cradle to gate inventory. It can be used to characterise the supply chain situation of the respective commodity in a representative manner. Combination with individual unit processes using this commodity enables the generation of user-specific (product) LCAs.

## Data sources
- KUNZ 2008
- BUDERUS 2008
- GaBi Database Edition 2020, SP40
- GaBi database (all versions)
