# Glas - Guardian Europe S.à r.l. - Verbundsicherheitsglas

Dataset: ILCD process, EPD, specific dataset
Geography: GLO
Reference year: 2018
Valid until: 2026
Classification: OEKOBAU.DAT: Komponenten von Fenstern und Vorhangfassaden / Füllungen / Transparente Füllungen
Synonyms: VSG; LamiGlass® ExtraClear, UltraClear (Standard), Akustik; Farbig, Strukturell (XT), Transwhite; UltraClear® LamiGlass™ Neutral; AntiReflektierendes Lami; Dielektrisch spiegelnd Lami; ClimaGuard®; SunGuard® HP, SN, SNX; Guardian Sun SunGuard® HD, Solar; Flachglas
Method details: EPD Unbeschichtetes Flachglas, Verbundsicherheitsglas und beschichtetes Flachglas (2021); Produktkategorieregeln Teil A; Produktkategorieregeln Teil B – für Flachglas im Bauwesen
Owner: Guardian Europe S.à r.l.
Compliance: EN 15804+A2
Review: Independent external review by Patrick Wortner
Amounts: rows without a unit in brackets have none in this file; such an amount is in the reference unit of its flow, which a separate flow dataset defines
copyright: true

## General comment
A1-A3 sowie Module C1, C2, C3, C4, D. Das Umweltprofil beinhaltet die Aufwendungen für die Lebenszyklus-Stadien cradle to gate mit Optionen (Modul A1-A3). Die Herstellung der Verpackung wurde innerhalb der Module A1-A3 berücksichtigt.

## Geography
Dieser Datensatz repräsentiert die Situation des Unternehmens Guardian Glass in L-8070 Bertrange, im Hinblick auf die wichtigsten Technologien und die gesetzlichen Rahmenbedingungen.

## Time period
jährlicher Durchschnitt

## Technology and included processes
Die Ökobilanzergebnisse umfassen die Lebenszyklusstadien der Herstellung der Vorprodukte bis hin zur Rohstoffgewinnung und Verarbeitungsprozesse von als Input dienenden Sekundärstoffen (z.B. Recyclingprozesse), deren Transporte zum Werk sowie die Produktion selbst, einschließlich der Bereitstellung von allen Hilfs- und Betriebsstoffen, Energie, sowie die vollständige Abfallbehandlung oder die Deponierung der Restabfälle während des Stadiums der Produktion. Die Module A1, A2 und A3 sind hier als ein aggregiertes Modul A1-A3 ausgewiesen. Falls für diesen Datensatz weitere Module berechnet wurden, sind diese separat zu finden und können für eine Betrachtung des gesamten Lebenszyklus zusammengeführt werden.

## Technical purpose
Verbundsicherheitsglas für die Weiterverarbeitung zu Mehrscheiben-Isolierglas (MIGs) sowie zur Verwendung als Glas für das Bauwesen und anderen Einsatzzwecke (Buskabinen, Schallschutzpanele usw.).

## Reference product
- Glas - Guardian Europe S.à r.l. - Verbundsicherheitsglas: 1

## Inputs
- Use of net fresh water (FW) [m3]: A1 0.00573, A2 3.82e-6, A3 0.000243, C1 0, C2 1.42e-5, C3 1.63e-5, C4 8.66e-5, D -0.000701
- Nicht-erneuerbare Primärenergie als Energieträger (PENRE) [MJ]: A1 53.04, A2 0.06, A3 1.51, C1 0, C2 0.22, C3 1.35, C4 3.41, D -5.53
- Nicht-erneuerbare Primärenergie zur stofflichen Nutzung (PENRM) [MJ]: A1 4.36, A2 0, A3 0, C1 0, C2 0, C3 -1.31, C4 -3.05, D 0
- Use of non renewable secondary fuels (NRSF) [MJ]: A1 0, A2 0, A3 0, C1 0, C2 0, C3 0, C4 0, D 0
- Erneuerbare Primärenergie als Energieträger (PERE) [MJ]: A1 1.39, A2 0.00333, A3 0.54, C1 0, C2 0.0124, C3 0.0167, C4 0.0473, D -0.44
- Erneuerbare Primärenergie zur stofflichen Nutzung (PERM) [MJ]: A1 0.0166, A2 0, A3 0, C1 0, C2 0, C3 0, C4 0, D 0
- Use of renewable secondary fuels (RSF) [MJ]: A1 0, A2 0, A3 0, C1 0, C2 0, C3 0, C4 0, D 0
- Input of secondary material (SM) [kg]: A1 0.53, A2 0, A3 0, C1 0, C2 0, C3 0, C4 0, D 0
- Total use of non-renewable primary energy resources (PENRT) [MJ]: A1 57.4, A2 0.0598, A3 1.51, C1 0, C2 0.22, C3 0.0363, C4 0.35, D -5.53
- Total use of renewable primary energy resources (PERT) [MJ]: A1 1.41, A2 0.00333, A3 0.54, C1 0, C2 0.0124, C3 0.0167, C4 0.0473, D -0.44

## Outputs
- Components for re-use (CRU) [kg]: A1 0, A2 0, A3 0, C1 0, C2 0, C3 0, C4 0, D 0
- Exported electrical energy (EEE) [MJ]: A1 0.0069, A2 0, A3 8.94e-5, C1 0, C2 0, C3 0, C4 0, D 0
- Exported thermal energy (EET) [MJ]: A1 0.0102, A2 0, A3 0, C1 0, C2 0, C3 0, C4 0, D 0
- Hazardous waste disposed (HWD) [kg]: A1 0.000212, A2 3.01e-12, A3 0.000257, C1 0, C2 1.12e-11, C3 9.6e-12, C4 3.73e-11, D -9.95e-10
- Material for Energy Recovery (MER) [kg]: A1 0, A2 0, A3 0, C1 0, C2 0, C3 0, C4 0, D 0
- Materials for Recycling (MFR) [kg]: A1 0.00339, A2 0, A3 0.000128, C1 0, C2 0, C3 0.75, C4 0, D 0
- Non-hazardous waste disposed (NHWD) [kg]: A1 0.1, A2 8.88e-6, A3 0.0013, C1 0, C2 3.31e-5, C3 2.57e-5, C4 1.75, D -0.048
- Radioactive waste disposed (RWD) [kg]: A1 0.000671, A2 7.23e-8, A3 0.000173, C1 0, C2 2.69e-7, C3 5.4e-6, C4 3.68e-6, D -0.000132

## Impact indicators
- Abiotic depletion potential - non-fossil resources (ADPE) [kg Sb-Äqv.]: A1 57.4, A2 0.0597, A3 1.51, C1 0, C2 0.22, C3 0.0363, C4 0.35, D -5.53
- Abiotic depletion potential - fossil resources (ADPF) [MJ]: A1 2.09e-7, A2 3.42e-10, A3 2.02e-8, C1 0, C2 1.27e-9, C3 6e-10, C4 2.5e-9, D -2.88e-8
- Acidification potential, Accumulated Exceedance (AP) [mol H+ eqv.]: A1 0.0102, A2 8.37e-6, A3 0.000148, C1 0, C2 3.44e-5, C3 4.24e-6, C4 0.000188, D -0.00248
- Eutrophication potential - freshwater (EP-freshwater) [kg P eqv.]: A1 1.72e-6, A2 1.33e-8, A3 3.54e-7, C1 0, C2 4.96e-8, C3 0, C4 4.44e-8, D -2.04e-7
- Eutrophication potential - marine (EP-marine) [kg N eqv.]: A1 0.00187, A2 3.48e-6, A3 3.82e-5, C1 0, C2 1.46e-5, C3 1.01e-6, C4 4.89e-5, D -0.000711
- Eutrophication potential - terrestrial (EP-terrestrial) [mol N eqv.]: A1 0.0248, A2 3.95e-5, A3 0.000397, C1 0, C2 0.000166, C3 1.06e-5, C4 0.000538, D -0.00809
- Global Warming Potential - total (GWP-total) [kg CO2-Äqv.]: A1 3.88, A2 0.00451, A3 0.59, C1 0, C2 0.0168, C3 0.00206, C4 0.0258, D -0.37
- Global Warming Potential - fossil fuels (GWP-fossil) [kg CO2-Äqv.]: A1 3.85, A2 0.00448, A3 0.58, C1 0, C2 0.0167, C3 0.00204, C4 0.0265, D -0.37
- Global Warming Potential - biogenic (GWP-biogenic) [kg CO2-Äqv.]: A1 0.0105, A2 -5.72e-6, A3 0.00103, C1 0, C2 -2.13e-5, C3 1.73e-5, C4 -0.000769, D -0.000879
- Global Warming Potential - land use and land use change (GWP-luluc) [kg CO2-Äqv.]: A1 0.000994, A2 3.67e-5, A3 9.29e-5, C1 0, C2 0.000137, C3 2.89e-6, C4 7.78e-5, D -0.000123
- Depletion potential of the stratospheric ozone layer (ODP) [kg CFC 11-Äquiv.]: A1 1.64e-8, A2 5.73e-19, A3 1.56e-15, C1 0, C2 2.13e-18, C3 4.88e-17, C4 1.03e-16, D -1.27e-15
- Versauerungspotenzial, kumulierte Überschreitung (AP) [kg NMVOC eqv.]: A1 0.00638, A2 7.46e-6, A3 0.000103, C1 0, C2 3.08e-5, C3 2.74e-6, C4 0.000148, D -0.00143
- Water (user) deprivation potential (WDP) [m3 world eqv.]: A1 0.19, A2 3.9e-5, A3 -0.00149, C1 0, C2 0.000145, C3 0.000327, C4 0.00284, D -0.0199
- Potential incidence of disease due to PM emissions (PM) [disease incidence]: A1 2.07e-7, A2 4.71e-11, A3 1.25e-9, C1 0, C2 1.87e-10, C3 3.58e-11, C4 2.34e-9, D -1.46e-8
- Potential Human exposure efficiency relative to U235 (IRP) [kBq U235 eqv.]: A1 0.0861, A2 1.04e-5, A3 0.0283, C1 0, C2 3.85e-5, C3 0.000887, C4 0.000387, D -0.0213
- Potential Comparative Toxic Unit for ecosystems (ETP-fw) [CTUe]: A1 89.6, A2 0.0432, A3 0.51, C1 0, C2 0.16, C3 0.0153, C4 0.2, D -6.65
- Potential Comparative Toxic Unit for humans - cancer effects (HTP-c) [CTUh]: A1 3.48e-10, A2 8.71e-13, A3 1.67e-11, C1 0, C2 3.24e-12, C3 4.32e-13, C4 2.95e-11, D -3.65e-11
- Potential Comparative Toxic Unit for humans - non-cancer effects (HTP-nc) [CTUh]: A1 2.48e-8, A2 4.72e-11, A3 7.12e-10, C1 0, C2 1.77e-10, C3 1.63e-11, C4 3.26e-9, D -3.61e-9
- Potential Soil quality index (SQP) [dimensionless]: A1 1.34, A2 0.0205, A3 0.37, C1 0, C2 0.0763, C3 0.0115, C4 0.0709, D -0.33

## Use advice
Dieser Datensatz beinhaltet die Ergebnisse für die Module A1-A3 sowie die Module C1, C2, C3, C4, D gemäß EN 15804.
Ein Vergleich mit anderen Produkten ist nur mit einer vergleichbaren Anwendung im Gebäude zulässig. Grundsätzlich ist eine Gegenüberstellung oder die Bewertung von EPD Daten nur möglich, wenn alle zu vergleichenden Datensätze nach EN 15804 erstellt wurden und der Gebäudekontext, bzw. die produktspezifischen Leistungsmerkmale berücksichtigt werden.

Der Aufbau des unbeschichteten Flachglases bezieht sich auf eine Glasdicke von 7,78 mm und einen Flächengewicht von 19,46 kg/m².

## Review details
Die angewendete LCI Methode ist in Übereinstimmung mit ISO 14040 und 14044. Die Dokumentation enthält alle relevanten Informationen im Hinblick auf die Datenqualität und den Umfang der Anwendung der jeweiligen LCI Ergebnisse bzw. der Datensätze. Der Datensatz repräsentiert den Stand der Technik bezogen auf die funktionelle Einheit.

## Data sources
- GaBi database (general)
