# Gas Combined heat and power unit (500 kW); 1 piece

Dataset: ILCD process, EPD, generic dataset
Geography: DE
Reference year: 2021
Valid until: 2022
Classification: oekobau.dat: Gebäudetechnik / Heizung / Wärmeerzeuger
Owner: Sphera Solutions GmbH
Compliance: EN 15804+A2
Review: Dependent internal review by Sphera Solutions GmbH; Independent external review by GaBi user forum
Amounts: rows without a unit in brackets have none in this file; such an amount is in the reference unit of its flow, which a separate flow dataset defines
copyright: true
licenseType: Free of charge for all users and uses
accessRestrictions: The license conditions as stated on https://www.oekobaudat.de/ apply.
accessRestrictions: Es gelten die Lizenzbedingungen wie sie auf https://www.oekobaudat.de/ genannt sind.

## General comment
This data set has been modeled according to the European Standard EN 15804+A2 for Sustainable Building. Results are depicted in modules that allow the structured expression of results over the entire life cycle.

## Geography
The data set represents the country specific situation in Germany, focusing on the main technologies, the region specific characteristics and / or import statistics.

## Time period
Annual average

## Technology and included processes
The data set only includes the manufacture and disposal of the combined heat and power unit, not its operation. The main raw materials of the plant are steel (approx. 47 m.%), stainless steel (approx. 19 m.%), aluminum (approx. 17 m.%) and copper (approx. 5 m.%).
For these metals (steel, stainless steel, aluminum and copper), the primary upstream chains were used in the sense of a coservative approach (e.g. the blast furnace route in the case of steel). The life cycle assessment is dominated by steel production. Stainless steel, aluminum and copper also make relevant contributions.

In module C1, a dismantling with machinery is assumed, collecting losses are neglected.
The transport in module C2 to the recycling plant takes place with a truck (50km).

Tratment of metal components:
Collecting losses are neglected. It is assumed that all metals reach the end of the waste status immediately after dismantling. This means that the loads for processing and the credits for the substitution of primary material are shown in Module D.
Module D includes loads for sorting, remelting, slag treatment, landfill, filtration of dusts and dross treatment. Credits are given for the net scrap amount (amount returned minus secondary material content, minus processing losses) for the average material mix (from different alloys).

Treatment of plastic components:
Module C3 takes into account the grinding and thermal treatment (combustion) of the material. When calculating combustion emissions and credits, the specific calorific value of each material and the material composition are taken into account.
In module D credits for the substitution of electricity (German electricity mix) and thermal energy (from natural gas) are given.

## Technical purpose
Combined heat and power plants are used to generate electrical and thermal energy.

## Safety margin
20 %. Product system depicted except for a few missing processes / flows. Technological, temporal and geographic representativeness partly given.

## Reference product
- Gas Combined heat and power unit (500 kW): 1

## Inputs
- Use of renewable primary energy as energy carrier (PERE) [MJ]: A1-A3 112254, C1 0.918882, C2 16.4268, C3 62.9541, D -55220.3
- Use of renewable primary energy resources used as raw materials (PERM) [MJ]: A1-A3 0, C1 0, C2 0, C3 0, D 0
- Total use of renewable primary energy (PERT) [MJ]: A1-A3 112254, C1 0.918882, C2 16.4268, C3 62.9541, D -55220.3
- Use of non renewable primary energy as energy carrier (PENRE) [MJ]: A1-A3 511538, C1 15.8324, C2 283.035, C3 285.434, D -250714
- Use of non renewable primary energy resources used as raw materials (PENRM) [MJ]: A1-A3 0, C1 0, C2 0, C3 0, D 0
- Total use of non renewable primary energy resource (PENRT) [MJ]: A1-A3 511538, C1 15.8324, C2 283.035, C3 285.434, D -250714
- Use of secondary material (SM) [kg]: A1-A3 1098.95, C1 0, C2 0, C3 0, D 0
- Use of renewable secondary fuels (SF) [MJ]: A1-A3 0, C1 0, C2 0, C3 0, D 0
- Use of non renewable secondary fuels (NRSF) [MJ]: A1-A3 0, C1 0, C2 0, C3 0, D 0
- Net use of fresh water (FW) [m3]: A1-A3 288.954, C1 0.000816657, C2 0.0145994, C3 3.75915, D -201.591

## Outputs
- Hazardous waste disposed (HWD) [kg]: A1-A3 5.28318e-5, C1 6.61742e-10, C2 1.18299e-8, C3 6.0076e-8, D 2.38574e-6
- Non harzardous waste disposed (NHWD) [kg]: A1-A3 5673.52, C1 0.00255571, C2 0.0456883, C3 7.06853, D -3090.3
- Radioactive waste disposed (RWD) [kg]: A1-A3 18.2092, C1 1.51932e-5, C2 0.000271609, C3 0.00772949, D -8.8824
- Components for re-use (CRU) [kg]: A1-A3 0, C1 0, C2 0, C3 0, D 0
- Materials for recycling (MFR) [kg]: A1-A3 0, C1 7050, C2 0, C3 0, D 0
- Materials for energy recovery (MER) [kg]: A1-A3 0, C1 0, C2 0, C3 464, D 0
- Exported electrical energy (EEE) [MJ]: A1-A3 0, C1 0, C2 0, C3 2646.47, D 0
- Exported thermal energy (EET) [MJ]: A1-A3 0, C1 0, C2 0, C3 6095.22, D 0

## Impact indicators
- Global Warming Potential - total (GWP-total) [kg CO2 eq.]: A1-A3 41496.6, C1 1.18447, C2 21.4988, C3 1749.11, D -22135
- Global Warming Potential - fossil fuels (GWP-fossil) [kg CO2 eq.]: A1-A3 41444.2, C1 1.17655, C2 21.3528, C3 1748.99, D -22139.8
- Global Warming Potential - biogenic (GWP-biogenic) [kg CO2 eq.]: A1-A3 11.6565, C1 0.000254943, C2 0.00884516, C3 0.0937526, D 27.1935
- Global Warming Potential - land use and land use change (GWP-luluc) [kg CO2 eq.]: A1-A3 40.7775, C1 0.00767095, C2 0.137133, C3 0.0209545, D -22.3547
- Depletion potenzial of the stratospheric ozone layer (ODP) [kg CFC-11 eq.]: A1-A3 1.73773e-10, C1 3.05623e-16, C2 5.46362e-15, C3 2.58596e-13, D 2.81756e-9
- Acidifcation potential, Accumulated Exceedance (AP) [Mole of H+ eq.]: A1-A3 184.438, C1 0.0158408, C2 0.06054, C3 0.269902, D -96.9987
- Eutrophication potential - freshwater (EP-freshwater) [kg P eq.]: A1-A3 0.0387401, C1 2.45648e-6, C2 4.39145e-5, C3 3.52857e-5, D -0.0132429
- Eutrophication potential - marine (EP-marine) [kg N eq.]: A1-A3 26.3696, C1 0.00720656, C2 0.0278895, C3 0.0434473, D -13.6757
- Eutrophication potential - terrestrial (EP-terrestrial) [Mole of N eq.]: A1-A3 285.361, C1 0.079237, C2 0.312033, C3 1.2566, D -147.755
- Photochemical Ozone Creation Potential (POCP) [kg NMVOC eq.]: A1-A3 82.3812, C1 0.0215828, C2 0.0543852, C3 0.117744, D -42.5282
- Abiotic depletion potential - non-fossil resources (ADPE) [kg Sb eq.]: A1-A3 2.04348, C1 1.03899e-7, C2 1.85739e-6, C3 3.67716e-6, D -1.15733
- Abiotic depletion potential - fossil resources (ADPF) [MJ]: A1-A3 510536, C1 15.8317, C2 283.023, C3 285.333, D -250067
- Water (user) deprivation potential (WDP) [m³ world equiv.]: A1-A3 5498.52, C1 0.00464315, C2 0.0830056, C3 160.2, D -3940.27

## Use advice
This data set refers to the production of a combined heat and power (CHP) unit with an electrical output of 500 kW. The total weight of the system is 7,500 kg. The data set can be used to estimate other unit weights between 5,000 and 10,000 kg.

## Data sources
- VDI 2067
- HUTTER 2001
- MEEUP 2005
- BUDERUS 2008
- BRÖNTJE 2006
- EVA 2003
- Documentation of data quality management
- GaBi Database Edition 2021, CUP2021.01
- GaBi database (all versions)
