# Mastic asphalt screed

Dataset: ILCD process, EPD, generic dataset
Geography: DE
Reference year: 2018
Valid until: 2022
Classification: oekobau.dat: Mineralische Baustoffe / Asphalt / Gussassphalt
Owner: thinkstep
Compliance: DIN EN 15804
Review: Dependent internal review by thinkstep, IABP-GaBi, IBP-GaBi; Independent external review by GaBi user forum, GaBi bug forum, GaBi user community
Amounts: rows without a unit in brackets have none in this file; such an amount is in the reference unit of its flow, which a separate flow dataset defines
copyright: true

## General comment
This data set has been modeled according to the European Standard EN 15804 for Sustainable Building. Results are depicted in modules that allow the structured expression of results over the entire life cycle.

## Geography
The data set represents the country specific situation in Germany, focusing on the main technologies, the region specific characteristics and / or import statistics.

## Time period
annual average

## Technology and included processes
For the production of mastic asphalt screed, rock (grit, sand, rock flour) is mixed with bitumen and heated to 220 - 250 ° C. The use of bitumen, minerals and thermal energy have a roughly equal, relevant impact on the life cycle assessment (in terms of GWP). The thermal energy for maintaining the temperature during delivery to the construction site was neglected.

Background system:
Electricity: Electricity from renewable and non- renewable powerplants is modelled so that it represents a countrys specific consumption mix including transmission / distribution losses, own consumption, imports, emissions and efficiency standards, and energy carrier properties. Several factors are taken into account. (1) Energy carrier production - The exploration, mining / production, processing, and transportation of energy carrier supply chains are modelled for each country. The models account for differences among countries in production and processing, including crude oil production technologies, flaring rates, production efficiencies, emissions, etc. (2) Energy carrier supply - Each countrys specific energy carrier supply is modelled, taking into account domestic supply versus imports from abroad. Energy carrier properties (e.g. carbon and energy content), which can vary depending from where an energy carrier is sourced, are adjusted accordingly. (3) Power plants - Models are created to represent energy carrier-specific power plants and electricity generation facilities specific to different renewable energy resources. Energy carrier production and supply models are used to represent power plant inputs. Combined heat and power (CHP) plants are also considered. (4) Electricity grid - Models representing the electricity generation facilities are combined into a larger model that reflects a countrys consumption mix. The larger model accounts for a countrys production mix, internal consumption (e.g. pumped storage for hydro power), transmission / distribution losses, and imported electricity. The country model is also adjusted according to national power plant emission and efficiency standards, as well as the countrys share of electricity plants versus CHP facilities.
Thermal energy, process steam: The thermal energy and process steam supply is modelled to reflect each countrys emission standards and typical energy carriers (e.g., coal, natural gas, etc.) Both thermal energy and process steam are assumed to be produced at heat plants. Thermal energy datasets assume energy carrier inputs are converted to thermal energy with 100% efficiency; process steam datasets assume conversion efficiencies of 85%, 90% to 95%. The energy carriers used for the generation of thermal energy and process steam are modelled according to each countrys import situation (see electricity above).
Transportation: All relevant and known transportation processes are included. Ocean-going and inland ship transport as well as rail, truck and pipeline transport of bulk commodities are considered.
Energy carriers: The energy carriers and their respective properties are modelled according to the specific supply situation (see electricity above).
Refinery products: Diesel fuel, gasoline, technical gases, fuel oils, lubricants and residues such as bitumen are modelled with a parameterised country-specific refinery model. The refinery model aims to represent each countrys refining processes (e.g. emissions levels, internal energy consumption, etc.), as well as the countrys product output spectrum, which can vary significantly among countries. The supply of crude oil is likewise modelled according to the country-specific situation and accounts for differences in resource properties (e.g., crude oil energy content).

## Technical purpose
Mastic asphalt screed is used as a leveling and base layer in the floor structure. Characteristics: fast readiness for covering (after a few hours), high internal damping (sound insulation), waterproof (against rising damp). Mastic asphalt is theoretically materially reusable (recycling).

## Safety margin
20 %. Product system depicted except for a few missing processes / flows. Technological, temporal and geographic representativeness partly given.

## Reference product
- Mastic asphalt screed: 1

## Inputs
- Use of renewable primary energy (PERE) [MJ]: A1-A3 0.0924054, C2 0.00272242, C3 0, C4 0.0875008
- Primary energy resources used as raw materials (PERM) [MJ]: A1-A3 0, C2 0, C3 0, C4 0
- Total use of renewable primary energy resources (PERT) [MJ]: A1-A3 0.0924054, C2 0.00272242, C3 0, C4 0.0875008
- Use of non-renewable primary energy (PENRE) [MJ]: A1-A3 1.74045, C2 0.0467641, C3 4.644, C4 1.24515
- Non-renewable primary energy resources used as raw materials (PENRM) [MJ]: A1-A3 4.644, C2 0, C3 -4.644, C4 0
- Total use of non-renewable primary energy resources (PENRT) [MJ]: A1-A3 6.38445, C2 0.0467641, C3 0, C4 1.24515
- Input of secondary material (SM) [kg]: A1-A3 0, C2 0, C3 0, C4 0
- Use of renewable secondary fuels (RSF) [MJ]: A1-A3 0, C2 0, C3 0, C4 0
- Use of non renewable secondary fuels (NRSF) [MJ]: A1-A3 0, C2 0, C3 0, C4 0
- Use of net fresh water (FW) [m3]: A1-A3 0.000401098, C2 2.43815e-6, C3 0, C4 1.5282e-5

## Outputs
- Hazardous waste disposed (HWD) [kg]: A1-A3 2.47432e-9, C2 1.74752e-9, C3 0, C4 4.54465e-9
- Non-hazardous waste disposed (NHWD) [kg]: A1-A3 0.00854585, C2 8.20791e-6, C3 0, C4 1.1952
- Radioactive waste disposed (RWD) [kg]: A1-A3 1.42591e-5, C2 4.92329e-8, C3 0, C4 1.50224e-5
- Components for re-use (CRU) [kg]: A1-A3 0, C2 0, C3 0, C4 0
- Materials for Recycling (MFR) [kg]: A1-A3 0, C2 0, C3 0, C4 0
- Material for Energy Recovery (MER) [kg]: A1-A3 0, C2 0, C3 0, C4 0
- Exported electrical energy (EEE) [MJ]: A1-A3 0, C2 0, C3 0, C4 0
- Exported thermal energy (EET) [MJ]: A1-A3 0, C2 0, C3 0, C4 0

## Impact indicators
- Global warming potential (GWP) [kg CO2 eq.]: A1-A3 0.11688, C2 0.00348574, C3 0, C4 0.0793276
- Ozone Depletion Potential (ODP) [kg R11 eq.]: A1-A3 4.90115e-16, C2 1.15166e-18, C3 0, C4 2.62353e-16
- Acidification potential (AP) [kg SO2 eq.]: A1-A3 0.000193409, C2 7.75654e-6, C3 0, C4 0.000213627
- Eutrophication potential (EP) [kg Phosphate eq.]: A1-A3 2.55876e-5, C2 1.86229e-6, C3 0, C4 0.000228984
- Photochemical Ozone Creation Potential (POCP) [kg Ethene eq.]: A1-A3 2.0941e-5, C2 -2.42006e-6, C3 0, C4 2.4775e-5
- Abiotic depletion potential for non fossil resources (ADPE) [kg Sb eq.]: A1-A3 2.10807e-8, C2 2.92786e-10, C3 0, C4 5.95583e-9
- Abiotic depletion potential for fossil resources (ADPF) [MJ]: A1-A3 6.34842, C2 0.0466382, C3 0, C4 1.20692

## Use advice
This dataset refers to the production of 1 kg mastic asphalt screed. The bulk density is 2400 kg/m³. Thermal conductivity 0.9 W/mK, the compressive strength depends on the specific construction. The dataset can be used approximately for the estimation of bulk densities of 2200 - 2600 kg. Cold bitumen can not be estimated with this data set.

The data set represents a cradle to gate inventory. It can be used to characterise the supply chain situation of the respective commodity in a representative manner. Combination with individual unit processes using this commodity enables the generation of user-specific (product) LCAs.

## Data sources
- GaBi databases
- GaBi Database Edition 2020, SP40
- GaBi database (all versions)
