# Mineral wool pipe jacket; Rock wool

Dataset: ILCD process, EPD, generic dataset
Geography: DE
Reference year: 2018
Valid until: 2022
Classification: oekobau.dat: Gebäudetechnik / Heizung / Wärmeverteilung und Abgabe
Owner: thinkstep
Compliance: DIN EN 15804
Review: Dependent internal review by thinkstep, IABP-GaBi, IBP-GaBi; Independent external review by GaBi user forum, GaBi bug forum, GaBi user community
Amounts: rows without a unit in brackets have none in this file; such an amount is in the reference unit of its flow, which a separate flow dataset defines
copyright: true

## General comment
This data set has been modeled according to the European Standard EN 15804 for Sustainable Building. Results are depicted in modules that allow the structured expression of results over the entire life cycle.

## Geography
The data set represents the country specific situation in Germany, focusing on the main technologies, the region specific characteristics and / or import statistics.

## Time period
Annual average

## Technology and included processes
Rockwool is made out of sediment or magmatic rocks, essentially basalts, and different secondary raw materials. The material is melted in cupola melting furnaces with temperatures between 1.400 and 1.500°C and grinded over fast-rotating wheels. The fibres are being impregnated and made into plates or fleeces from urea formaldehyde resin. The resin bakes afterwards in a continuous tunnel furnace. Insulation board: The board is built of 2 layers. It consists of a base layer and a so called "cover" layer. The average density is between 140 kg/mm3 (total thickness of 180 mm) and 162 kg/m3 (thickness = 60 mm). This board is used for insulation of non ventilated roofing. The data sets are created per m3 of product for the different thicknesses. Insulation felt: The insulation felt has an average density of 28 kg/ m3. It is used for insulation between the rafters of a pitched roof. The data sets are created per kg and can be used for different thicknesses. Heating tube shell: The heating tube shell consists of concentric rolled rockwool to insulate heating- and hot water pipes. The heating tube shell is concealed with a gridded reinforced aluminium sandwich foil. The data sets are representing 1 m of heating tube shell. The reference flow is given in mass unit. Rock wool netting wire mat: The rock wool netting wire mat is an elastic mat made of rockwool and with a wire netting on one side for insulation of pipes and boilers. The data sets are created per m2 of product for the different ticknesses.
Background system:
Electricity: Electricity is modelled according to the individual country-specific situations. The country-specific modelling is achieved on multiple levels. Firstly, individual energy carrier specific power plants and plants for renewable energy sources are modelled according to the current national electricity grid mix. Modelling the electricity consumption mix includes transmission / distribution losses and the own use by energy producers (own consumption of power plants and "other" own consumption e.g. due to pumped storage hydro power etc.), as well as imported electricity. Secondly, the national emission and efficiency standards of the power plants are modelled as well as the share of electricity plants and combined heat and power plants (CHP). Thirdly, the country-specific energy carrier supply (share of imports and / or domestic supply) including the country-specific energy carrier properties (e.g. element and energy content) are accounted for. Fourthly, the exploration, mining/production, processing and transport processes of the energy carrier supply chains are modelled according to the specific situation of each electricity producing country. The different production and processing techniques (emissions and efficiencies) in the different energy producing countries are considered, e.g. different crude oil production technologies or different flaring rates at the oil platforms.
Thermal energy, process steam: The thermal energy and process steam supply is modelled according to the individual country-specific situation with regard to emission standards and considered energy carriers. The thermal energy and process steam are produced at heat plants. Efficiencies for thermal energy production are by definition 100% in relation to the corresponding energy carrier input. For process steam the efficiency ranges from 85%, 90% to 95%. The energy carriers used for the generation of thermal energy and process steam are modelled according to the specific import situation (see electricity above).
Transports: All relevant and known transport processes are included. Ocean-going and inland ship transport as well as rail, truck and pipeline transport of bulk commodities are considered.
Energy carriers: The energy carriers are modelled according to the specific supply situation (see electricity above).
Refinery products: Diesel fuel, gasoline, technical gases, fuel oils, lubricants and residues such as bitumen are modelled with a parameterised country-specific refinery model. The refinery model represents the current national standard in refining techniques (e.g. emission level, internal energy consumption, etc.) as well as the individual country-specific product output spectrum, which can be quite different from country to country. The supply of crude oil is modelled, again, according to the country-specific situation with the respective properties of the resources.

## Technical purpose
This product can be used in construction.

## Safety margin
20 %. Product system depicted except for a few missing processes / flows. Technological, temporal and geographic representativeness partly given.

## Reference product
- Rock wool heating tube shell m3: 1

## Inputs
- Use of renewable primary energy (PERE) [MJ]: A1-A3 632.974, C2 0.00521269, C3 0.0313608
- Primary energy resources used as raw materials (PERM) [MJ]: A1-A3 0, C2 0, C3 0
- Total use of renewable primary energy resources (PERT) [MJ]: A1-A3 632.974, C2 0.00521269, C3 0.0313608
- Use of non-renewable primary energy (PENRE) [MJ]: A1-A3 3885.15, C2 0.0895404, C3 0.238938
- Non-renewable primary energy resources used as raw materials (PENRM) [MJ]: A1-A3 0, C2 0, C3 0
- Total use of non-renewable primary energy resources (PENRT) [MJ]: A1-A3 3885.15, C2 0.0895404, C3 0.238938
- Input of secondary material (SM) [kg]: A1-A3 0, C2 0, C3 0
- Use of renewable secondary fuels (RSF) [MJ]: A1-A3 0, C2 0, C3 0
- Use of non renewable secondary fuels (NRSF) [MJ]: A1-A3 0, C2 0, C3 0
- Use of net fresh water (FW) [m3]: A1-A3 1.12852, C2 4.6684e-6, C3 6.01178e-5

## Outputs
- Hazardous waste disposed (HWD) [kg]: A1-A3 5.85944e-6, C2 3.34603e-9, C3 3.64176e-9
- Non-hazardous waste disposed (NHWD) [kg]: A1-A3 181.773, C2 1.57159e-5, C3 1.20119
- Radioactive waste disposed (RWD) [kg]: A1-A3 0.0881997, C2 9.42676e-8, C3 2.67912e-6
- Components for re-use (CRU) [kg]: A1-A3 0, C2 0, C3 0
- Materials for Recycling (MFR) [kg]: A1-A3 0, C2 0, C3 0
- Material for Energy Recovery (MER) [kg]: A1-A3 0, C2 0, C3 0
- Exported electrical energy (EEE) [MJ]: A1-A3 0, C2 0, C3 0
- Exported thermal energy (EET) [MJ]: A1-A3 0, C2 0, C3 0

## Impact indicators
- Global warming potential (GWP) [kg CO2 eq.]: A1-A3 317.952, C2 0.00656887, C3 0.0163697
- Ozone Depletion Potential (ODP) [kg R11 eq.]: A1-A3 2.37688e-12, C2 2.20512e-18, C3 9.09391e-17
- Acidification potential (AP) [kg SO2 eq.]: A1-A3 1.47659, C2 3.75381e-5, C3 0.000103991
- Eutrophication potential (EP) [kg Phosphate eq.]: A1-A3 0.158389, C2 9.53188e-6, C3 1.17002e-5
- Photochemical Ozone Creation Potential (POCP) [kg Ethene eq.]: A1-A3 0.0947017, C2 -1.4438e-5, C3 7.88519e-6
- Abiotic depletion potential for non fossil resources (ADPE) [kg Sb eq.]: A1-A3 3.70206e-5, C2 5.60606e-10, C3 1.65926e-9
- Abiotic depletion potential for fossil resources (ADPF) [MJ]: A1-A3 3662.21, C2 0.0892995, C3 0.232173

## Use advice
The data set represents a cradle to gate inventory. It can be used to characterise the supply chain situation of the respective commodity in a representative manner. Combination with individual unit processes using this commodity enables the generation of user-specific (product) LCAs.

## Data sources
- Ökologische Bilanzierung von Baustoffen und Gebäuden, 2000
- AUB-Deklaration Rockwool: Unkaschierte bzw. unbeschichtete kunstharzgebundene Steinwolle-Dämmstoffe
- GaBi Database Edition 2020, SP40
- GaBi database (all versions)
