# Electricity from biomass (1 kWh)

Dataset: ILCD process, EPD, generic dataset
Geography: DE
Reference year: 2021
Valid until: 2022
Classification: oekobau.dat: Sonstige / Energieträger - Bereitstellung frei Verbraucher / Strom
Owner: Sphera Solutions GmbH
Compliance: EN 15804+A2
Review: Dependent internal review by Sphera Solutions GmbH; Independent external review by GaBi user forum
Amounts: rows without a unit in brackets have none in this file; such an amount is in the reference unit of its flow, which a separate flow dataset defines
copyright: true
licenseType: Free of charge for all users and uses
accessRestrictions: The license conditions as stated on https://www.oekobaudat.de/ apply.
accessRestrictions: Es gelten die Lizenzbedingungen wie sie auf https://www.oekobaudat.de/ genannt sind.

## General comment
This data set has been modeled according to the European Standard EN 15804+A2 for Sustainable Building. Results are depicted in modules that allow the structured expression of results over the entire life cycle.

## Geography
The data set represents the country specific situation in Germany, focusing on the main technologies, the region specific characteristics and / or import statistics.

## Time period
Annual average

## Technology and included processes
The electricity is generated either in biomass (solid fuel) power plants and / or combined heat and power plants (CHP). The national and regional specific technology standards of the power plants with regard to efficiency, combustion technology, flue gas desulphurisation, NOx removal and dedusting are also taken into account.

The supply of biomass (solid) is considered and takes the entire supply chain of the energy source from production, processing and transport of the fuels to the power plants into account. The supply chain is modeled in a specific national / regional consumption mix of biomass (solid) (i.e. domestic production and imports) and takes into account the national / regional average properties of biomass (solid) (e.g. elemental composition and energy content).

The data set contains the self-consumption of energy producers (self-consumption of power plants). It does not include imported electricity from neighboring countries, transmission and distribution losses.

## Technical purpose
Electrical energy is required for the operation of various technical systems and installations in the building context.

## Safety margin
0 %.

## Reference product
- Electricity from biomass (1 kWh): 3.6

## Inputs
- Use of renewable primary energy as energy carrier (PERE) [MJ]: B6 11.0314
- Use of renewable primary energy resources used as raw materials (PERM) [MJ]: B6 0
- Total use of renewable primary energy (PERT) [MJ]: B6 11.0314
- Use of non renewable primary energy as energy carrier (PENRE) [MJ]: B6 0.420723
- Use of non renewable primary energy resources used as raw materials (PENRM) [MJ]: B6 0
- Total use of non renewable primary energy resource (PENRT) [MJ]: B6 0.420723
- Use of secondary material (SM) [kg]: B6 0
- Use of renewable secondary fuels (SF) [MJ]: B6 0
- Use of non renewable secondary fuels (NRSF) [MJ]: B6 0
- Net use of fresh water (FW) [m3]: B6 0.0037058

## Outputs
- Hazardous waste disposed (HWD) [kg]: B6 4.11755e-8
- Non harzardous waste disposed (NHWD) [kg]: B6 0.00556249
- Radioactive waste disposed (RWD) [kg]: B6 8.31789e-6
- Components for re-use (CRU) [kg]: B6 0
- Materials for recycling (MFR) [kg]: B6 0
- Materials for energy recovery (MER) [kg]: B6 0
- Exported electrical energy (EEE) [MJ]: B6 0
- Exported thermal energy (EET) [MJ]: B6 0

## Impact indicators
- Global Warming Potential - total (GWP-total) [kg CO2 eq.]: B6 0.0466244
- Global Warming Potential - fossil fuels (GWP-fossil) [kg CO2 eq.]: B6 0.0413171
- Global Warming Potential - biogenic (GWP-biogenic) [kg CO2 eq.]: B6 0.004012
- Global Warming Potential - land use and land use change (GWP-luluc) [kg CO2 eq.]: B6 0.00129524
- Depletion potenzial of the stratospheric ozone layer (ODP) [kg CFC-11 eq.]: B6 9.76157e-17
- Acidifcation potential, Accumulated Exceedance (AP) [Mole of H+ eq.]: B6 0.00145724
- Eutrophication potential - freshwater (EP-freshwater) [kg P eq.]: B6 1.11191e-5
- Eutrophication potential - marine (EP-marine) [kg N eq.]: B6 0.000540185
- Eutrophication potential - terrestrial (EP-terrestrial) [Mole of N eq.]: B6 0.00453901
- Photochemical Ozone Creation Potential (POCP) [kg NMVOC eq.]: B6 0.00118095
- Abiotic depletion potential - non-fossil resources (ADPE) [kg Sb eq.]: B6 6.01723e-8
- Abiotic depletion potential - fossil resources (ADPF) [MJ]: B6 0.418437
- Water (user) deprivation potential (WDP) [m³ world equiv.]: B6 0.0677131

## Use advice
This data set relates to the production of 1 kWh (3.6 MJ) of electrical energy from biomass. The data set can be used to balance the potential environmental effects of electricity consumption from biomass during the building use phase.

## Data sources
- Documentation of data quality management
- GaBi Database Edition 2021, CUP2021.01
- GaBi database (all versions)
