# Structural Steel: Sections and Plates

Dataset: ILCD process, EPD, average dataset
Geography: EU-27
Reference year: 2018
Valid until: 2023
Classification: OEKOBAU.DAT: Metalle / Stahl und Eisen / Stahlprofile
Classification: IBUCategories: 02 Bauprodukte / Metallbauprodukte und Zubehör / Baustähle
Method details: Baustähle.pdf
Registration number: EPD-BFS-20180116-IBG2-DE
Owner: bauforumstahl e.V.
Compliance: DIN EN 15804; ISO 14025
Review: Accredited third party review by Institut Bauen und Umwelt e. V.
Amounts: rows without a unit in brackets have none in this file; such an amount is in the reference unit of its flow, which a separate flow dataset defines
copyright: true

## General comment
This EPD applies to 1 t of structural steel (sections and plates). It covers steel products of the grades S235 to S960 rolled out to structural sections, merchant bars and heavy plates.

## Technology and included processes
In the integrated steel production route iron ore, (typical mix based on ferro-oxides Fe2O3) coke breeze, circulating components and other additives are mixed and sintered in preparation for being fed into the blast furnace together with coking coke, which is the reducing agent. Also pellets and /or lump may be used. The pig iron produced in the blast furnace is transferred into the basic oxygen furnace. In this vessel, the iron is converted into steel by lowering the carbon content of the iron by blowing oxygen into the melt (exothermic reaction). For temperature control, scrap (up to 35%) is added to the melt. In the electric steel production route scrap is molten in an electric arc furnace to obtain liquid steel. Refining (lowering of sulphur, phosphorous and other tramp elements) and alloying (e.g. about 1% Mn, 0.2% Si) and / or micro-alloying (e.g. about 0.01% V) is applied to give the requested characteristics to the steel. At the end of the steelmaking process, the liquid steel is transformed into a semi-finished product in a continuous casting machine, or in special cases, poured into ingot molds to form blocks. The semi-product (slab, beam-blank, bloom or billet) is hot-rolled into the final product dimensions (heavy plate, wide flats, H-shape, I-shape, U-shape, L- shape and other merchant bars). Quality control: /ISO 9001/ Monitoring according to the product standards, e.g. /EN 10025, Part 1/.
Technical data:
This EPD is valid for plates and sections of varied grades and different forms of delivery. Specific information on dimension tolerances, constructional data as well as mechanical and chemical properties can be found in the relevant literature and/or the standards.
Declared unit:
The declaration refers to the functional unit of 1 ton of Structural Steel: Sections and plates.

The LCA is calculated based on averaged volume production data of the contributing plants.

## Technical purpose
Structural steels are intended for bolted, welded or otherwise connected constructions of buildings, bridges and other structures, or in composite steel and concrete structures. Examples are:

single storey buildings (industrial and storage halls, etc.)
multi-storey buildings (offices, residential buildings, shops, car parks, high rise, etc.)
bridges (railway bridge, road bridge, pedestrian bridge, etc.)
other structures (power plants, stadiums, convention centers, airports, stations, etc.)

## Reference product
- 1 Tonne Baustahl: 1000

## Inputs
- Renewable primary energy as energy carrier (PERE) [MJ]: A1-A3 1516, C3 10.92, D 19.75
- Renewable primary energy resources as material utilization (PERM) [MJ]: A1-A3 0, C3 0, D 0
- Total use of renewable primary energy resources (PERT) [MJ]: A1-A3 1516, C3 10.92, D 19.75
- Non renewable primary energy as energy carrier (PENRE) [MJ]: A1-A3 11470, C3 32.19, D -3973
- Non renewable primary energy as material utilization (PENRM) [MJ]: A1-A3 0, C3 0, D 0
- Total use of non renewable primary energy resources (PENRT) [MJ]: A1-A3 11470, C3 32.19, D -3973
- Use of secondary material (SM) [kg]: A1-A3 786, C3 0, D 0
- Use of renewable secondary fuels (RSF) [MJ]: A1-A3 0, C3 0, D 0
- Use of non renewable secondary fuels (NRSF) [MJ]: A1-A3 0, C3 0, D 0
- Use of net fresh water (FW) [m^3]: A1-A3 4.186, C3 0.0149, D -0.07153

## Outputs
- Hazardous waste disposed (HWD) [kg]: A1-A3 1.058e-5, C3 1.812e-7, D -0.0001907
- Non hazardous waste disposed (NHWD) [kg]: A1-A3 8.106, C3 10.04, D 30.25
- Radioactive waste disposed (RWD) [kg]: A1-A3 0.5013, C3 0.004671, D -0.05505
- Components for re-use (CRU) [kg]: A1-A3 0, C3 110, D 0
- Materials for recycling (MFR) [kg]: A1-A3 0, C3 880, D 0
- Materials for energy recovery (MER) [kg]: A1-A3 0, C3 0, D 0
- Exported electrical energy (EEE) [MJ]: A1-A3 0, C3 0, D 0
- Exported thermal energy (EET) [MJ]: A1-A3 0, C3 0, D 0

## Impact indicators
- Global warming potential (GWP) [kg CO_(2)-Äq.]: A1-A3 1125, C3 1.844, D -413.4
- Depletion potential of the stratospheric ozone layer (ODP) [kg CFC11-Äq.]: A1-A3 1.958e-9, C3 6.854e-12, D 1.617e-6
- Acidification potential of land and water (AP) [kg SO_(2)-Äq.]: A1-A3 2.164, C3 0.005837, D -0.8072
- Eutrophication potential (EP) [kg PO_(4)^(3)-Äq.]: A1-A3 0.219, C3 0.0006692, D -0.0666
- Formation potential of tropospheric ozone photochemical oxidants (POCP) [kg Ethen-Äq.]: A1-A3 0.4018, C3 0.0004008, D -0.1781
- Abiotic depletion potential for non fossil resources (ADPE) [kg Sb-Äq.]: A1-A3 0.0004922, C3 8.915e-7, D -0.0008922
- Abiotic depletion potential for fossil resources (ADPF) [MJ]: A1-A3 10200, C3 20.42, D -3936

## Use advice
Scope:
This environmental product declaration covers steel products rolled out to structural sections, merchant bars and heavy plates, intended for bolted, welded or otherwise connected constructions of buildings, bridges and other structures.

This environmental product declaration is valid for the following products:

Heavy Plates produced by:
- Dillinger with the sites in Dillingen (Germany) and Dunkirk (France)
Hot rolled sections produced by:

- ArcelorMittal on the sites Differdange (Luxembourg), Dabrowa (Poland), Esch-Belval (Luxembourg), Bergara (Spain), Hunedoara (Romania), Olaberria (Spain), Warszawa (Poland) and Rodange (Luxembourg)

- Peiner Träger (Germany)

- Stahlwerk Thüringen (Germany)

The production shares in this EPD are 26% Basic Oxygen Furnace route (primary steel production) and 74% Electric Arc Furnace route (secondary steel production) based on the total yearly production volume. The data used represent >95% of the annual production of sections and plates from all BauforumStahl member companies.
System boundary:
Type of the EPD: cradle-to-gate - with options.

Module A1-A3, Module C3 and module D were considered.

Modules A1-A3 of the structural steel production include the following:
The provision of resources, additives, and energy
Transport of resources and additives to the production site
Production processes on-site including energy, production of additives, disposal of production residues, and consideration of related emissions
Recycling of production/manufacturing scrap. Steel scrap is assumed to reach the end-of-waste status once it is shredded and sorted, thus becomes input to the product system in the inventory.

Module C3 takes into account the sorting and shredding of after-use steel that is recycled, as well as the non-recovered scrap due to sorting efficiency which is landfilled. A conservative value of 1% landfill is considered.

Module D refers to the end of life of the structural steel sections and merchant bars, including reuse and recycling.

## Data sources
- Baustähle: Offene Walzprofile und Grobbleche.pdf
- GaBi Database (all versions)
- GaBi database SP35 2018
