# Facade clinker

Dataset: ILCD process, EPD, generic dataset
Geography: DE
Reference year: 2021
Valid until: 2022
Classification: oekobau.dat: Mineralische Baustoffe / Steine und Elemente / Ziegel
Owner: Sphera Solutions GmbH
Compliance: EN 15804+A2
Review: Dependent internal review by Sphera Solutions GmbH; Independent external review by GaBi user forum
Amounts: rows without a unit in brackets have none in this file; such an amount is in the reference unit of its flow, which a separate flow dataset defines
copyright: true
licenseType: Free of charge for all users and uses
accessRestrictions: The license conditions as stated on https://www.oekobaudat.de/ apply.
accessRestrictions: Es gelten die Lizenzbedingungen wie sie auf https://www.oekobaudat.de/ genannt sind.

## General comment
This data set has been modeled according to the European Standard EN 15804+A2 for Sustainable Building. Results are depicted in modules that allow the structured expression of results over the entire life cycle.

## Geography
The data set represents the country specific situation in Germany, focusing on the main technologies, the region specific characteristics and / or import statistics.

## Time period
Annual average

## Technology and included processes
For the production of facade clinkers, the raw materials clay, sand and water are mixed and shaped. Subsequently, the burning takes place at very high temperatures (about 1100 - 1300 ° C), initiating a sintering process. The use of thermal energy (here natural gas) dominates the life cycle assessment.

In the disposal phase, a mechanical dismantling (excavator) is assumed in module C1. The transport in module C2 to the treatment plant takes place with a truck (50km). In module C3, the material is processed, any reinforcement is fed to a sink (no loads, no credits). A treatment loss of 25% was assumed. This loss is fed to an inert material landfill within Module C3 (average landfill emissions). In Module D, a credit for the net amount of material (excluding reinforcement and treatment losses) for the substitution of natural gravel as backfill material is given.

## Technical purpose
Facade clinkers are generally used as the outermost layer in the wall construction using normal masonry mortar. An indoor application is also possible and recommended for heavy use (for example, schools). Clinkers are characterized by a very low water absorption, a high resistance to natural environmental influences (including frost) and a long shelf life.

## Safety margin
10 %. Product system almost completely covered. Good technological, temporal and geographic representativeness.

## Reference product
- Facade clinker: 1

## Inputs
- Use of renewable primary energy as energy carrier (PERE) [MJ]: A1-A3 581.644, C1 0.458399, C2 4.00797, C3 24.2498, D -11.2997
- Use of renewable primary energy resources used as raw materials (PERM) [MJ]: A1-A3 0, C1 0, C2 0, C3 0, D 0
- Total use of renewable primary energy (PERT) [MJ]: A1-A3 581.644, C1 0.458399, C2 4.00797, C3 24.2498, D -11.2997
- Use of non renewable primary energy as energy carrier (PENRE) [MJ]: A1-A3 8913.21, C1 7.89823, C2 69.0574, C3 217.854, D -41.4978
- Use of non renewable primary energy resources used as raw materials (PENRM) [MJ]: A1-A3 0, C1 0, C2 0, C3 0, D 0
- Total use of non renewable primary energy resource (PENRT) [MJ]: A1-A3 8913.21, C1 7.89823, C2 69.0574, C3 217.854, D -41.4978
- Use of secondary material (SM) [kg]: A1-A3 0, C1 0, C2 0, C3 0, D 0
- Use of renewable secondary fuels (SF) [MJ]: A1-A3 0, C1 0, C2 0, C3 0, D 0
- Use of non renewable secondary fuels (NRSF) [MJ]: A1-A3 0, C1 0, C2 0, C3 0, D 0
- Net use of fresh water (FW) [m3]: A1-A3 0.523604, C1 0.000407402, C2 0.00356208, C3 0.0551013, D -0.0068499

## Outputs
- Hazardous waste disposed (HWD) [kg]: A1-A3 2.27586e-6, C1 3.30121e-10, C2 2.88638e-9, C3 1.78267e-8, D -6.68594e-9
- Non harzardous waste disposed (NHWD) [kg]: A1-A3 4.44668, C1 0.00127496, C2 0.0111474, C3 534.057, D -27.5571
- Radioactive waste disposed (RWD) [kg]: A1-A3 0.0691748, C1 7.57939e-6, C2 6.62696e-5, C3 0.00192097, D -0.00122385
- Components for re-use (CRU) [kg]: A1-A3 0, C1 0, C2 0, C3 0, D 0
- Materials for recycling (MFR) [kg]: A1-A3 0, C1 0, C2 0, C3 1455, D 0
- Materials for energy recovery (MER) [kg]: A1-A3 0, C1 0, C2 0, C3 0, D 0
- Exported electrical energy (EEE) [MJ]: A1-A3 0, C1 0, C2 0, C3 0, D 0
- Exported thermal energy (EET) [MJ]: A1-A3 0, C1 0, C2 0, C3 0, D 0

## Impact indicators
- Global Warming Potential - total (GWP-total) [kg CO2 eq.]: A1-A3 558.362, C1 0.590905, C2 5.24566, C3 13.8015, D -3.16164
- Global Warming Potential - fossil fuels (GWP-fossil) [kg CO2 eq.]: A1-A3 555.917, C1 0.586939, C2 5.20984, C3 13.9449, D -3.1447
- Global Warming Potential - biogenic (GWP-biogenic) [kg CO2 eq.]: A1-A3 2.07934, C1 0.000138744, C2 0.00235432, C3 -0.199295, D -0.00257079
- Global Warming Potential - land use and land use change (GWP-luluc) [kg CO2 eq.]: A1-A3 0.365371, C1 0.00382678, C2 0.033459, C3 0.0558961, D -0.0143659
- Depletion potenzial of the stratospheric ozone layer (ODP) [kg CFC-11 eq.]: A1-A3 2.29177e-12, C1 1.52465e-16, C2 1.33306e-15, C3 5.78605e-14, D -4.06042e-14
- Acidifcation potential, Accumulated Exceedance (AP) [Mole of H+ eq.]: A1-A3 0.59947, C1 0.00790245, C2 0.0147711, C3 0.112186, D -0.0104152
- Eutrophication potential - freshwater (EP-freshwater) [kg P eq.]: A1-A3 0.000387535, C1 1.22546e-6, C2 1.07146e-5, C3 2.69591e-5, D -8.75029e-6
- Eutrophication potential - marine (EP-marine) [kg N eq.]: A1-A3 0.249769, C1 0.00359511, C2 0.00680473, C3 0.0419878, D -0.00405073
- Eutrophication potential - terrestrial (EP-terrestrial) [Mole of N eq.]: A1-A3 2.73799, C1 0.0395287, C2 0.0761326, C3 0.461389, D -0.0445935
- Photochemical Ozone Creation Potential (POCP) [kg NMVOC eq.]: A1-A3 0.86537, C1 0.0107669, C2 0.0132694, C3 0.123886, D -0.00958088
- Abiotic depletion potential - non-fossil resources (ADPE) [kg Sb eq.]: A1-A3 6.22415e-5, C1 5.18315e-8, C2 4.53184e-7, C3 7.23599e-6, D -6.42252e-7
- Abiotic depletion potential - fossil resources (ADPF) [MJ]: A1-A3 8912.78, C1 7.8979, C2 69.0545, C3 217.791, D -41.4895
- Water (user) deprivation potential (WDP) [m³ world equiv.]: A1-A3 11.4339, C1 0.00231631, C2 0.0202524, C3 1.85012, D -0.0766559

## Use advice
This data set refers to the production of 1 m³ facade clinker (solid clinker, high-pile clinker). The density is 2000 kg/m³. The thermal conductivity is 0.9 - 1.0 W/mK. The data set can be used approximately for the estimation of facade clinkers with a density of 1900 - 2100 kg/m³.

The data set represents a cradle to gate inventory. It can be used to characterise the supply chain situation of the respective commodity in a representative manner. Combination with individual unit processes using this commodity enables the generation of user-specific (product) LCAs.

## Data sources
- GaBi databases
- Documentation of data quality management
- GaBi Database Edition 2021, CUP2021.01
- GaBi database (all versions)
