# Sikaplan U

Dataset: ILCD process, EPD, specific dataset
Geography: DE
Reference year: 2017
Valid until: 2022
Classification: OEKOBAU.DAT: Kunststoffe / Dachbahnen / PVC-Dachbahnen
Classification: IBUCategories: 02 Bauprodukte / Abdichtungen / Dach- und Dichtungsbahnsysteme aus Kunststoffen und Elastomeren
Method details: Dach- und Dichtungsbahnsysteme aus Kunststoffen und Elastomeren.pdf
Generated by: Sika Services AG
Registration number: EPD-SIK-20170120-IBA1-DE
Owner: Sika Deutschland GmbH
Compliance: DIN EN 15804; ISO 14025
Review: Accredited third party review by Institut Bauen und Umwelt e. V.
Amounts: rows without a unit in brackets have none in this file; such an amount is in the reference unit of its flow, which a separate flow dataset defines
copyright: true
licenseType: Free of charge for all users and uses
accessRestrictions: None

## General comment
Sikaplan U is a multi-layer polymeric waterproofing sheet based on polyvinyl chloride (PVC) with an embedded fleece layer and polyester scrim (DE/E1 PVC-P-NB-V-PG-GV-1.5).
Sikaplan U polymeric waterproofing sheets are available in the following thicknesses: 1.5 mm (U-15), 1.8 mm (U-18) and 2.0 mm (U-20).
An average value of the various thicknesses of Sikaplan U waterproofing membrane was not used for the calculation of the life cycle assessment. Rather, all values given apply to Sikaplan U-15, and a formula for individually calculating values for the other thicknesses is given in Chapter 5.

## Technology and included processes
Sikaplan U polymeric waterproofing sheets are manufactured in the following steps: Dosing of the various raw materials and plasticisation of the mixture in an extruder Rolling the melt into sheets by calender pressing Cooling and reeling the sheets Heat fusing of two sheets (top and bottom layers), embedding a glass fleece / polyester scrim composite layer, on a lamination machine Trimming the sheets and winding them onto cardboard spools made of recycled paper Wrapping the roles in PE stretch film, palletisingProduction waste such as scrap is recycled by feeding it directly back into the manufacturing process. Sika maintains a quality management system certified in accordance with /ISO 9001/.
Technical data:
Performance values of the product in accordance with the Declaration of Performance regarding its significant characteristics as per /EN 13956:2012/ Flexible sheets for waterproofing.
Declared unit:
This declaration applies to 1 m² of Sikaplan U polymeric waterproofing membrane, thickness 1.5 mm. A formula is given for independent calculation of the values for other thicknesses.

## Technical purpose
Sikaplan U waterproofing sheets are used mainly for waterproofing flat roofs. They sheets are either loose laid and mechanically fastened for non-ballasted roofs with slope < 20° or loose laid for extensive green roofs and ballasted roofs. The ballast is to be applied immediately after the membrane is laid. Flashings and connections are to be executed with Sikaplan U; details are to be executed with moulded pieces or Sikaplan S.

## Scenarios
- S1: 100% recycling
- S2: 100% thermal energy recovery

## Reference product
- 1 m² Dachbahn: 1

## Inputs
- Renewable primary energy as energy carrier (PERE) [MJ]: A1-A3 11.6, A4 0, A5 0.928, C1 0, C2 (S1) 0, C2 (S2) 0, C3 (S1) 0, C3 (S2) 0, C4 (S1) 0, C4 (S2) 1.69, D (S1) 0, D (S2) 0
- Renewable primary energy resources as material utilization (PERM) [MJ]: A1-A3 1.92, A4 0, A5 0.153, C1 0, C2 (S1) 0, C2 (S2) 0, C3 (S1) 0, C3 (S2) 0, C4 (S1) 0, C4 (S2) 0, D (S1) 0, D (S2) 0
- Total use of renewable primary energy resources (PERT) [MJ]: A1-A3 13.5, A4 0.0416, A5 1.16, C1 0, C2 (S1) 0.02, C2 (S2) 0.004, C3 (S1) 0.628, C3 (S2) 0, C4 (S1) 0.00852, C4 (S2) 1.69, D (S1) -9.42, D (S2) -3.37
- Non renewable primary energy as energy carrier (PENRE) [MJ]: A1-A3 92.1, A4 0, A5 7.37, C1 0, C2 (S1) 0, C2 (S2) 0, C3 (S1) 0, C3 (S2) 0, C4 (S1) 0, C4 (S2) 9.99, D (S1) 0, D (S2) 0
- Non renewable primary energy as material utilization (PENRM) [MJ]: A1-A3 45.1, A4 0, A5 3.49, C1 0, C2 (S1) 0, C2 (S2) 0, C3 (S1) -46.1, C3 (S2) 0, C4 (S1) 0, C4 (S2) -46.1, D (S1) 0, D (S2) 0
- Total use of non renewable primary energy resources (PENRT) [MJ]: A1-A3 137, A4 0.63, A5 11.4, C1 0, C2 (S1) 0.399, C2 (S2) 0.0798, C3 (S1) 1.46, C3 (S2) 0, C4 (S1) 0.0607, C4 (S2) 9.99, D (S1) -107, D (S2) -24
- Use of secondary material (SM) [kg]: A1-A3 0, A4 0, A5 0, C1 0, C2 (S1) 0, C2 (S2) 0, C3 (S1) 0, C3 (S2) 0, C4 (S1) 0, C4 (S2) 0, D (S1) 2.05, D (S2) 0
- Use of renewable secondary fuels (RSF) [MJ]: A1-A3 0, A4 0, A5 0, C1 0, C2 (S1) 0, C2 (S2) 0, C3 (S1) 0, C3 (S2) 0, C4 (S1) 0, C4 (S2) 0, D (S1) 0, D (S2) 0
- Use of non renewable secondary fuels (NRSF) [MJ]: A1-A3 0, A4 0, A5 0, C1 0, C2 (S1) 0, C2 (S2) 0, C3 (S1) 0, C3 (S2) 0, C4 (S1) 0, C4 (S2) 0, D (S1) 0, D (S2) 0
- Use of net fresh water (FW) [m^3]: A1-A3 0.0269, A4 4.84e-5, A5 0.00275, C1 0, C2 (S1) 3.71e-5, C2 (S2) 7.42e-6, C3 (S1) 0.000427, C3 (S2) 0, C4 (S1) 0.000382, C4 (S2) 0.0108, D (S1) -0.0186, D (S2) -0.0034

## Outputs
- Hazardous waste disposed (HWD) [kg]: A1-A3 8.08e-6, A4 3.97e-8, A5 6.52e-7, C1 0, C2 (S1) 2.1e-8, C2 (S2) 4.19e-9, C3 (S1) 9.57e-10, C3 (S2) 0, C4 (S1) 2.71e-10, C4 (S2) 6.25e-8, D (S1) -2.2e-6, D (S2) -4.57e-9
- Non hazardous waste disposed (NHWD) [kg]: A1-A3 0.33, A4 4.59e-5, A5 0.0901, C1 0, C2 (S1) 3.05e-5, C2 (S2) 6.1e-6, C3 (S1) 0.00138, C3 (S2) 0, C4 (S1) 0.0168, C4 (S2) 3.24, D (S1) -0.0425, D (S2) -0.00929
- Radioactive waste disposed (RWD) [kg]: A1-A3 0.00291, A4 7.23e-7, A5 0.000264, C1 0, C2 (S1) 5.44e-7, C2 (S2) 1.09e-7, C3 (S1) 0.000134, C3 (S2) 0, C4 (S1) 3.04e-6, C4 (S2) 0.000372, D (S1) -0.0031, D (S2) -0.0013
- Components for re-use (CRU) [kg]: A1-A3 0, A4 0, A5 0, C1 0, C2 (S1) 0, C2 (S2) 0, C3 (S1) 0, C3 (S2) 0, C4 (S1) 0, C4 (S2) 0, D (S1) 0, D (S2) 0
- Materials for recycling (MFR) [kg]: A1-A3 0, A4 0, A5 0, C1 0, C2 (S1) 0, C2 (S2) 0, C3 (S1) 1.94, C3 (S2) 0, C4 (S1) 0, C4 (S2) 0, D (S1) 0, D (S2) 0
- Materials for energy recovery (MER) [kg]: A1-A3 0, A4 0, A5 0, C1 0, C2 (S1) 0, C2 (S2) 0, C3 (S1) 0, C3 (S2) 0, C4 (S1) 0, C4 (S2) 0, D (S1) 0, D (S2) 0
- Exported electrical energy (EEE) [MJ]: A1-A3 0, A4 0, A5 0.183, C1 0, C2 (S1) 0, C2 (S2) 0, C3 (S1) 0, C3 (S2) 0, C4 (S1) 0.123, C4 (S2) 4.63, D (S1) 0, D (S2) 0
- Exported thermal energy (EET) [MJ]: A1-A3 0, A4 0, A5 0.516, C1 0, C2 (S1) 0, C2 (S2) 0, C3 (S1) 0, C3 (S2) 0, C4 (S1) 0.304, C4 (S2) 10.9, D (S1) 0, D (S2) 0

## Impact indicators
- Global warming potential (GWP) [kg CO_(2)-Äq.]: A1-A3 5.4, A4 0.0463, A5 0.659, C1 0, C2 (S1) 0.0288, C2 (S2) 0.00575, C3 (S1) 0.115, C3 (S2) 0, C4 (S1) 0.129, C4 (S2) 5.23, D (S1) -4.19, D (S2) -1.32
- Depletion potential of the stratospheric ozone layer (ODP) [kg CFC11-Äq.]: A1-A3 5.12e-9, A4 5.87e-15, A5 4.1e-10, C1 0, C2 (S1) 9.66e-15, C2 (S2) 1.93e-15, C3 (S1) 4.33e-13, C3 (S2) 0, C4 (S1) 4.04e-14, C4 (S2) 2.19e-12, D (S1) -2.28e-9, D (S2) -1.91e-9
- Acidification potential of land and water (AP) [kg SO_(2)-Äq.]: A1-A3 0.014, A4 0.000102, A5 0.0013, C1 0, C2 (S1) 6.44e-5, C2 (S2) 1.29e-5, C3 (S1) 0.000171, C3 (S2) 0, C4 (S1) 5.26e-5, C4 (S2) 0.00698, D (S1) -0.00671, D (S2) -0.0028
- Eutrophication potential (EP) [kg PO_(4)^(3)-Äq.]: A1-A3 0.00239, A4 2.38e-5, A5 0.000204, C1 0, C2 (S1) 1.53e-5, C2 (S2) 3.06e-6, C3 (S1) 2.73e-5, C3 (S2) 0, C4 (S1) 9.67e-6, C4 (S2) 0.00024, D (S1) -0.00182, D (S2) -0.00108
- Formation potential of tropospheric ozone photochemical oxidants (POCP) [kg Ethen-Äq.]: A1-A3 0.00271, A4 -3.25e-5, A5 0.000219, C1 0, C2 (S1) -2.03e-5, C2 (S2) -4.06e-6, C3 (S1) 1.18e-5, C3 (S2) 0, C4 (S1) 3.14e-6, C4 (S2) 0.000133, D (S1) -0.00158, D (S2) -0.000191
- Abiotic depletion potential for non fossil resources (ADPE) [kg Sb-Äq.]: A1-A3 2.48e-5, A4 4.81e-9, A5 2.03e-6, C1 0, C2 (S1) 2.32e-9, C2 (S2) 4.63e-10, C3 (S1) 5.79e-8, C3 (S2) 0, C4 (S1) 5.74e-9, C4 (S2) 2.3e-6, D (S1) -1.76e-5, D (S2) -1.79e-7
- Abiotic depletion potential for fossil resources (ADPF) [MJ]: A1-A3 130, A4 0.628, A5 10.7, C1 0, C2 (S1) 0.398, C2 (S2) 0.0795, C3 (S1) 1.12, C3 (S2) 0, C4 (S1) 0.053, C4 (S2) 9.05, D (S1) -99, D (S2) -20.8

## Use advice
Scope:
This document applies to Sikaplan U polymeric waterproofing membrane manufactured by Sika Trocal GmbH in 53840 Troisdorf, Germany. The lifecycle assessment data are based on production data from 2016 and 2017 collected by Sika Services AG.
The owner of the declaration shall be liable for the underlying information and evidence; the IBU shall not be liable with respect to manufacturer information, life cycle assessment data and evidences.
This document is translated from the German Environmental Product Declaration into English. It is based on the German original version EPD-SIK-20170120-IBA1-DE. The verifier has no influence on the quality of the translation.
System boundary:
Type of EPD: Cradle to gate with options

The system boundaries of the EPD follow the modular structuring system described by /EN 15804/. The LCA takes into account the following modules:

A1-A3: Manufacturing of pre-products, packaging, ancillary materials, transport to the factory, production including energy supply and waste handling
A4: Transport to the building site
A5: Installation into the building (welding energy, disposal of packaging and scrap membrane)
C1: Deconstruction and demolition
C2: Transport to waste-processing facility
C3: Waste processing for reuse, recovery and/or recycling
C4: Disposal (waste incineration)
D: Potential for reuse, recovery and/or recycling as net flows and benefits

## Data sources
- GaBi Database (all versions)
- GaBi database SP29 2016
