# Channel systems

Dataset: ILCD process, EPD, average dataset
Geography: DE
Reference year: 2021
Valid until: 2026
Classification: OEKOBAU.DAT: Metalle / Edelstahl / Befestigungsmittel
Classification: IBUCategories: 02 Bauprodukte / Metallbauprodukte und Zubehör / Dünnwandige Profile und Profiltafeln aus Metall
Method details: Dünnwandige Profile und Profiltafeln aus Metall.pdf
Generated by: myclimate Deutschland gGmbH
Registration number: EPD-JDL-20200260-IBB1-DE
Owner: Jordahl GmbH
Compliance: DIN EN 15804; ISO 14025
Review: Accredited third party review by Institut Bauen und Umwelt e. V.
Amounts: rows without a unit in brackets have none in this file; such an amount is in the reference unit of its flow, which a separate flow dataset defines
copyright: true
licenseType: Free of charge for all users and uses
accessRestrictions: None

## General comment
The product portfolio of JORDAHL channel systems includes cast-in anchor channels of the type JTA, JXA and JZA, as well as weldable or screwable mounting channels of the type JM, JML and JXM, in hot-rolled and cold-formed design, including the corresponding hammer-head, hook-head and toothed bolts. The JORDAHL cast-in anchor and mounting channels consist of a C-shaped profile made of steel or stainless steel and matching special bolts. The JORDAHL cast-in anchor channels additionally consist of at least two anchors permanently mounted on the back of the profile. These anchors are formed as round anchors or I-anchors. Cast-in anchor channels are set in concrete flush with the surface. Mounting rails are directly welded onto the substrate. JORDAHL special bolts are mounted in the profiles with corresponding hexagon nuts and washers.

The mounting channels as declared are available in bright-rolled and galvanized steel as well as stainless steel. The cast-in anchor channel as declared product is available in galvanized or stainless steel. A distinction is made between mounting or cast-in anchor channels with smooth profile lips (JM, JML, JTA) and serrated profile lips (JXM, JXA, JXA-PC, JZA). They transfer high loads from tensile and transverse or longitudinal tension.

For application and use the respective national regulations apply.

JORDAHL mounting and cast-in anchor channel systems (exclude Profile 41/27) are designed in accordance with:

EOTA TR 047, Design of anchor channels or
EOTA TR 050, Calculation Method for the Performance of Anchor Cannels under fatigue loading or
EN 1992-4, Eurocode 2: Design of concrete structures – Part 4: Design of fastenings for use in concrete and
European Technical Approval ETA 15/0386 or
European Technical Approval ETA 09/0338 or
ICC-ES ESR 2854 or
Chinese technical building approval CABR-01-(2019)-003-02 or
National technical building approvals Z-21.4-741 and Z-21.4-1690 from German Institute for Building Technology (DIBt)

## Technology and included processes
The C-profiles are purchased from qualified vendors as bright-rolled steel or stainless steel. After delivery, JORDAHL mounting and cast-in anchor channels are further processed or manufactured from cold-formed or hot-rolled channel profiles. The anchors are attached to the C-profiles or backs of the channels by punching or riveting or channel backs are perforated. Afterwards the channels are galvanized. The accumulated metal scrap and filter dust are stored in containers, collected by a scrap dealer and disposed of in accordance with regulations. The finished channels are packed in cardboard boxes and loaded on pallets.
Technical data:
The following technical data apply to JORDAHL mounting and cast-in anchor channels. The test standard is dimensioned for the JTA according to the European Technical Assessment (ETA) ETA 09/0338, 18.June 2018, JORDAHL cast-in anchor channel JTA.

The test standard is dimensioned for the JM according to the European Technical Assessment (ETA)

ETA 15/0386, 13.January 2017, JORDAHL mounting channel JM. The test standard for the JXA is dimensioned in accordance with the national technical building approval Z-21.4-1690 and for the JZA in accordance with the national technical building approval

Z-21.4-741.

All geometrical dimensions, product-specific parameters and the static load capacities of the different channel systems JM, JTA, JXA and JZA are given in the following technical specifications:

JM, JTA system:

ETA 15/0386
ETA 09/0338
CABR-01-(2019)-003-02
ICC-ES ESR 2854

JXA and JZA system:
Z-21.4-741
Z-21.4-1690
Declared unit:
The declaration refers to the production of 1 m cast-in anchor channel with an average weight of 2.668 kg/m.

## Technical purpose
JORDAHL mounting or cast-in anchor channels ensure the transfer of high loads to steel structures or into reinforced and unreinforced concrete components.

Mounting channels can be welded or screwed directly to components.

Cast-in anchor channels are positioned in the component before the concrete is poured and mounted to the formwork, reinforcement or with the aid of a suitable auxiliary construction.

JORDAHL channel systems are used for reliable and non-destructive fixing of attachments to various components. In addition, the JORDAHL mounting and cast-in anchor channel are durable products which allows recurring applications using JORDAHL special bolts. JORDAHL mounting and cast-in anchor channel profiles are available in different types of cross-sections and differ in their dimensions and areas of application.

Examples are:

JTA W for glass facades, elevator guide rails and doors, signal and ventilation systems in tunnels, heavy steel structures and connections with load changes (wind, traffic, vibration)
JTA K for precast connections, railings, lighting systems, building equipment and stadium seats
JM W for medium-heavy to heavy constructions e.g. supporting frames or highly loaded screw connections with high tightening torques. Subsequent installation possible
JM K for fastening supply and disposal lines, electric cables, cable trays or air conditioning ducts
JML K can be screwed on directly, for fastening pipes, electric cables and subordinate fastenings
JXA W for dynamic load connection in tunnels, crane track system anchorages, facade connections and highly stressed precast element connections
JXA-PC to bridge high expected crack widths for safety relevant areas like power plants
JZA for the transmission of forces in the longitudinal direction of channels, especially in cable support systems and other technical building equipment fixings
JXM W guarantees flexibility in planning through subsequent installation. For power transmission in longitudinal direction of the channel

## Reference product
- Montage- bzw. Ankerschiene: 1

## Inputs
- Renewable primary energy as energy carrier (PERE) [MJ]: A1-A3 1.50539, C2 6.28806e-5, C3 0, C4 2.4216e-5, D -0.124184
- Renewable primary energy resources as material utilization (PERM) [MJ]: A1-A3 0, C2 0, C3 0, C4 0, D 0
- Total use of renewable primary energy resources (PERT) [MJ]: A1-A3 1.50539, C2 6.28806e-5, C3 0, C4 2.4216e-5, D -0.124184
- Non renewable primary energy as energy carrier (PENRE) [MJ]: A1-A3 44.0277, C2 0.169806, C3 0, C4 0.00948095, D -0.923927
- Non renewable primary energy as material utilization (PENRM) [MJ]: A1-A3 0, C2 0, C3 0, C4 0, D 0
- Total use of non renewable primary energy resources (PENRT) [MJ]: A1-A3 44.0277, C2 0.169806, C3 0, C4 0.00948095, D -0.923927
- Use of secondary material (SM) [kg]: A1-A3 2.7401, C2 0, C3 0, C4 0, D -0.2055
- Use of renewable secondary fuels (RSF) [MJ]: A1-A3 0, C2 0, C3 0, C4 0, D 0
- Use of non renewable secondary fuels (NRSF) [MJ]: A1-A3 0, C2 0, C3 0, C4 0, D 0
- Use of net fresh water (FW) [m^3]: A1-A3 1.86577, C2 -3.52883e-5, C3 0, C4 -1.16215e-5, D -0.0360447

## Outputs
- Hazardous waste disposed (HWD) [kg]: A1-A3 0.00172021, C2 4.24265e-7, C3 0, C4 2.26839e-8, D 2.10249e-5
- Non hazardous waste disposed (NHWD) [kg]: A1-A3 1.19639, C2 6.65687e-6, C3 0, C4 0.132439, D -0.456834
- Radioactive waste disposed (RWD) [kg]: A1-A3 0.00023905, C2 1.16136e-6, C3 0, C4 6.45537e-8, D -4.27052e-6
- Components for re-use (CRU) [kg]: A1-A3 0, C2 0, C3 0, C4 0, D 0
- Materials for recycling (MFR) [kg]: A1-A3 0, C2 0, C3 2.5346, C4 0, D 0
- Materials for energy recovery (MER) [kg]: A1-A3 0, C2 0, C3 0, C4 0, D 0
- Exported electrical energy (EEE) [MJ]: A1-A3 0, C2 0, C3 0, C4 0, D 0
- Exported thermal energy (EET) [MJ]: A1-A3 0, C2 0, C3 0, C4 0, D 0

## Impact indicators
- Global warming potential (GWP) [kg CO_(2)-Äq.]: A1-A3 3.28013, C2 0.0114132, C3 0, C4 0.000646267, D -0.0922774
- Depletion potential of the stratospheric ozone layer (ODP) [kg CFC11-Äq.]: A1-A3 3.38817e-7, C2 2.07414e-9, C3 0, C4 1.12741e-10, D -1.48368e-9
- Acidification potential of land and water (AP) [kg SO_(2)-Äq.]: A1-A3 0.0155621, C2 2.96207e-5, C3 0, C4 3.88699e-6, D -0.000949126
- Eutrophication potential (EP) [kg PO_(4)^(3)-Äq.]: A1-A3 0.00205674, C2 5.0518e-6, C3 0, C4 8.12674e-7, D -5.26567e-5
- Formation potential of tropospheric ozone photochemical oxidants (POCP) [kg Ethen-Äq.]: A1-A3 0.000912992, C2 1.08688e-6, C3 0, C4 1.35747e-7, D 8.58147e-5
- Abiotic depletion potential for non fossil resources (ADPE) [kg Sb-Äq.]: A1-A3 0.013172, C2 6.67868e-10, C3 0, C4 1.77146e-10, D -1.2875e-5
- Abiotic depletion potential for fossil resources (ADPF) [MJ]: A1-A3 40.4812, C2 0.159925, C3 0, C4 0.00892352, D -0.824499

## Use advice
Scope:
This document refers to the JORDAHL GmbH mounting and cast-in anchor channels, manufactured in Trebbin, Germany. The declared unit refers to 1 meter cast-in anchor channel. The product is made of stainless steel or steel and is declared as an average product. The data collection was collected on a plant-specific basis with current annual data from 2019. The declaration holder is responsible for the underlying data and its verification.
System boundary:
The Life Cycle Assessment considers the system boundaries "cradle to gate - with options" and follows the modular construction system described by EN 15804. The LCA takes into account the following modules:

A1: Raw material supply: extraction of raw material, production of precursors, processing of secondary material

A2: Transport: transport of raw materials to manufacturing plant
A3: Manufacturing: production of cast-in anchor channels

C2: Transportation towards disposal: transport of discarded product as part of waste processing

C3: Waste processing: Waste management for reuse, recovery and/or recycling

C4: Disposal
D: Reuse, recovery or recycling potential as net flows and credits (benefits) for stainless steel

## Data sources
- ecoinvent database (all versions)
- ecoinvent 3.6 database
