# EVA roof sheets; EVA

Dataset: ILCD process, EPD, generic dataset
Geography: DE
Reference year: 2021
Valid until: 2022
Classification: oekobau.dat: Kunststoffe / Dachbahnen / EVA-Dachbahnen (Etylen-Vinylacetat)
Owner: Sphera Solutions GmbH
Compliance: EN 15804+A2
Review: Dependent internal review by Sphera Solutions GmbH; Independent external review by GaBi user forum
Amounts: rows without a unit in brackets have none in this file; such an amount is in the reference unit of its flow, which a separate flow dataset defines
copyright: true
licenseType: Free of charge for all users and uses
accessRestrictions: The license conditions as stated on https://www.oekobaudat.de/ apply.
accessRestrictions: Es gelten die Lizenzbedingungen wie sie auf https://www.oekobaudat.de/ genannt sind.

## General comment
This data set has been modeled according to the European Standard EN 15804+A2 for Sustainable Building. Results are depicted in modules that allow the structured expression of results over the entire life cycle.

## Geography
The data set represents the country specific situation in Germany, focusing on the main technologies, the region specific characteristics and / or import statistics.

## Time period
Annual average

## Technology and included processes
The life cycle analysis of the EVA roof sheet (ethylene -vinyl acetate copolymer) includes the life cycle phases cradle to gate. The system boundary is the product (ready for sale). Transports from the factory to the mounting location are not taken into account and have to be incorporated in a system approach if necessary. EVA production: EVA is produced by the copolymerization of ethylene and vinyl acetate. The reaction takes place in the solution, catalyst and initiator are used. The reaction temperature is between 40 and 80°C, the temperature shouldn`t get to high because of the strongly exothermal reaction.

In module C1, a manual dismantling (no loads) is assumed, collecting losses are neglected.
The transport in module C2 to the recycling plant takes place with a truck (50km).
Module C3 takes into account the grinding and thermal treatment (combustion) of the material. When calculating combustion emissions and credits, the specific calorific value of each material and the material composition are taken into account.
In module D credits for the substitution of electricity (German electricity mix) and thermal energy (from natural gas) are given.

## Technical purpose
This product can be used in construction.

## Safety margin
20 %. Product system depicted except for a few missing processes / flows. Technological, temporal and geographic representativeness partly given.

## Reference product
- EVA roof sheets: 1

## Inputs
- Use of renewable primary energy as energy carrier (PERE) [MJ]: A1-A3 21.0258, C2 0.00437233, C3 0.285305, D -15.0582
- Use of renewable primary energy resources used as raw materials (PERM) [MJ]: A1-A3 0, C2 0, C3 0, D 0
- Total use of renewable primary energy (PERT) [MJ]: A1-A3 21.0258, C2 0.00437233, C3 0.285305, D -15.0582
- Use of non renewable primary energy as energy carrier (PENRE) [MJ]: A1-A3 72.4181, C2 0.0753354, C3 111.699, D -44.6228
- Use of non renewable primary energy resources used as raw materials (PENRM) [MJ]: A1-A3 92, C2 0, C3 -92, D 0
- Total use of non renewable primary energy resource (PENRT) [MJ]: A1-A3 164.418, C2 0.0753354, C3 19.6985, D -44.6228
- Use of secondary material (SM) [kg]: A1-A3 0, C2 0, C3 0, D 0
- Use of renewable secondary fuels (SF) [MJ]: A1-A3 0, C2 0, C3 0, D 0
- Use of non renewable secondary fuels (NRSF) [MJ]: A1-A3 0, C2 0, C3 0, D 0
- Net use of fresh water (FW) [m3]: A1-A3 0.0483289, C2 3.88591e-6, C3 0.0171337, D -0.00560185

## Outputs
- Hazardous waste disposed (HWD) [kg]: A1-A3 3.11339e-8, C2 3.14877e-12, C3 2.72914e-10, D -1.54861e-8
- Non harzardous waste disposed (NHWD) [kg]: A1-A3 0.0929098, C2 1.21608e-5, C3 0.0322169, D -0.0235169
- Radioactive waste disposed (RWD) [kg]: A1-A3 0.00251289, C2 7.22941e-8, C3 3.50296e-5, D -0.00161952
- Components for re-use (CRU) [kg]: A1-A3 0, C2 0, C3 0, D 0
- Materials for recycling (MFR) [kg]: A1-A3 0, C2 0, C3 0, D 0
- Materials for energy recovery (MER) [kg]: A1-A3 0, C2 0, C3 2, D 0
- Exported electrical energy (EEE) [MJ]: A1-A3 0, C2 0, C3 12.0628, D 0
- Exported thermal energy (EET) [MJ]: A1-A3 0, C2 0, C3 27.7824, D 0

## Impact indicators
- Global Warming Potential - total (GWP-total) [kg CO2 eq.]: A1-A3 5.90861, C2 0.00572232, C3 7.97235, D -2.87095
- Global Warming Potential - fossil fuels (GWP-fossil) [kg CO2 eq.]: A1-A3 5.82307, C2 0.00568347, C3 7.97183, D -2.83626
- Global Warming Potential - biogenic (GWP-biogenic) [kg CO2 eq.]: A1-A3 0.0789904, C2 2.35432e-6, C3 0.000425287, D -0.0305262
- Global Warming Potential - land use and land use change (GWP-luluc) [kg CO2 eq.]: A1-A3 0.00654863, C2 3.65008e-5, C3 9.50051e-5, D -0.00415992
- Depletion potenzial of the stratospheric ozone layer (ODP) [kg CFC-11 eq.]: A1-A3 8.77468e-14, C2 1.45425e-18, C3 1.1719e-15, D -6.57372e-14
- Acidifcation potential, Accumulated Exceedance (AP) [Mole of H+ eq.]: A1-A3 0.00801449, C2 1.61139e-5, C3 0.00122994, D -0.00290833
- Eutrophication potential - freshwater (EP-freshwater) [kg P eq.]: A1-A3 1.48277e-5, C2 1.16887e-8, C3 1.60002e-7, D -6.92113e-6
- Eutrophication potential - marine (EP-marine) [kg N eq.]: A1-A3 0.00248627, C2 7.42335e-6, C3 0.000197944, D -0.00106996
- Eutrophication potential - terrestrial (EP-terrestrial) [Mole of N eq.]: A1-A3 0.0260414, C2 8.30537e-5, C3 0.00572672, D -0.0113995
- Photochemical Ozone Creation Potential (POCP) [kg NMVOC eq.]: A1-A3 0.00924747, C2 1.44757e-5, C3 0.000536457, D -0.00280261
- Abiotic depletion potential - non-fossil resources (ADPE) [kg Sb eq.]: A1-A3 1.57985e-6, C2 4.94382e-10, C3 1.66792e-8, D -8.88485e-7
- Abiotic depletion potential - fossil resources (ADPF) [MJ]: A1-A3 182.806, C2 0.0753322, C3 1.29805, D -44.6165
- Water (user) deprivation potential (WDP) [m³ world equiv.]: A1-A3 0.0678653, C2 2.20936e-5, C3 0.730198, D -0.0340092

## Use advice
The data set represents a cradle to gate inventory. It can be used to characterise the supply chain situation of the respective commodity in a representative manner. Combination with individual unit processes using this commodity enables the generation of user-specific (product) LCAs.

## Data sources
- IBU-Declaration Deutsche Bauchemie e.V.; Sealants based on silicone (EPD-DBC-2014-BDSB-IBM1-DE),2014
- Documentation of data quality management
- GaBi Database Edition 2021, CUP2021.01
- GaBi database (all versions)
