# Use - 1 kWh of final energy from gas calorific value (according to EnEV)

Dataset: ILCD process, EPD, generic dataset
Geography: DE
Reference year: 2018
Valid until: 2022
Classification: oekobau.dat: Gebäudetechnik / Nutzung / Nutzung Wärmeerzeuger (EnEV)
Owner: thinkstep
Compliance: DIN EN 15804
Review: Dependent internal review by thinkstep, IABP-GaBi, IBP-GaBi; Independent external review by GaBi user forum, GaBi bug forum, GaBi user community
Amounts: rows without a unit in brackets have none in this file; such an amount is in the reference unit of its flow, which a separate flow dataset defines
copyright: true

## General comment
This data set has been modeled according to the European Standard EN 15804 for Sustainable Building. Results are depicted in modules that allow the structured expression of results over the entire life cycle.

## Geography
The data set represents the country specific situation in Germany, focusing on the main technologies, the region specific characteristics and / or import statistics.

## Time period
Annual average

## Technology and included processes
This dataset includes natural gas production, transportation and combustion. Since final energy gem. EnEV is provided as a reference, a boiler efficiency of 100% was modelled. Usually occurring system losses, as well as power supply and power consumption in relation to boiler operation are not included in this data set. The life cycle assessment is dominated by the combustion process.

## Technical purpose
Thermal energy from natural gas is used for heating a building or technical processes (e.g. drying).

## Safety margin
0 %.

## Reference product
- Thermal energy (MJ): 3.6

## Inputs
- Use of renewable primary energy (PERE) [MJ]: B6 0.00684328
- Primary energy resources used as raw materials (PERM) [MJ]: B6 0
- Total use of renewable primary energy resources (PERT) [MJ]: B6 0.00684328
- Use of non-renewable primary energy (PENRE) [MJ]: B6 3.92559
- Non-renewable primary energy resources used as raw materials (PENRM) [MJ]: B6 0
- Total use of non-renewable primary energy resources (PENRT) [MJ]: B6 3.92559
- Input of secondary material (SM) [kg]: B6 0
- Use of renewable secondary fuels (RSF) [MJ]: B6 0
- Use of non renewable secondary fuels (NRSF) [MJ]: B6 0
- Use of net fresh water (FW) [m3]: B6 1.07633e-5

## Outputs
- Hazardous waste disposed (HWD) [kg]: B6 1.61427e-9
- Non-hazardous waste disposed (NHWD) [kg]: B6 0.000468903
- Radioactive waste disposed (RWD) [kg]: B6 4.6586e-7
- Components for re-use (CRU) [kg]: B6 0
- Materials for Recycling (MFR) [kg]: B6 0
- Material for Energy Recovery (MER) [kg]: B6 0
- Exported electrical energy (EEE) [MJ]: B6 0
- Exported thermal energy (EET) [MJ]: B6 0

## Impact indicators
- Global warming potential (GWP) [kg CO2 eq.]: B6 0.234805
- Ozone Depletion Potential (ODP) [kg R11 eq.]: B6 1.04121e-17
- Acidification potential (AP) [kg SO2 eq.]: B6 7.57295e-5
- Eutrophication potential (EP) [kg Phosphate eq.]: B6 8.53669e-6
- Photochemical Ozone Creation Potential (POCP) [kg Ethene eq.]: B6 1.28045e-5
- Abiotic depletion potential for non fossil resources (ADPE) [kg Sb eq.]: B6 1.38665e-8
- Abiotic depletion potential for fossil resources (ADPF) [MJ]: B6 3.92439

## Use advice
This dataset refers to the production of 1 kWh of thermal energy from natural gas calorific value. The data set is intended for the use of final energy acc. EnEV as reference. The final energy acc. EnEV already takes into account system losses and system efficiency as well as power supply and power consumption, which is why this is not included in this data set. Therefore, the combustion process is calculated with 100% efficiency. To calculate the life cycle assessment results at building level, the indicator results have to be multiplied with the final energy demand acc. EnEV.
Note: the calorific value technology has higher methane emissions than the low temperature technology. With the same efficiency, this results in a slightly lower global warming potential for low-temperature technology compared to calorific value technology.

## Data sources
- DIN 2003
- DIN 2007
- PFEIFFER 2000
- GaBi Database Edition 2020, SP40
- GaBi database (all versions)
