# Usage - elevator low usage (100.000 rides/a); 100000 rides/a

Dataset: ILCD process, EPD, generic dataset
Geography: DE
Reference year: 2018
Valid until: 2022
Classification: oekobau.dat: Gebäudetechnik / Nutzung / Nutzung Beförderungstechnik
Owner: thinkstep
Compliance: DIN EN 15804
Review: Dependent internal review by thinkstep, IABP-GaBi, IBP-GaBi; Independent external review by GaBi user forum, GaBi bug forum, GaBi user community
Amounts: rows without a unit in brackets have none in this file; such an amount is in the reference unit of its flow, which a separate flow dataset defines
copyright: true

## General comment
This data set has been modeled according to the European Standard EN 15804 for Sustainable Building. Results are depicted in modules that allow the structured expression of results over the entire life cycle.

## Geography
The data set represents the country specific situation in Germany, focusing on the main technologies, the region specific characteristics and / or import statistics.

## Time period
Annual average

## Technology and included processes
The power consumption of an elevator can be divided into stand-by consumption and the actual consumption for the ride. The average power consumption per ride is 0.013 Wh. Stand-by consumption is approx. 600 kWh/a, if cabin lighting and guard locking are not permanently active. This was assumed for the modelled data set, as it represents the state of the art of new systems. On average it is assumed that an elevator in an office building with a carrying capacity of 1000 kg performs approx. 200.000 rides. For 220 working days this amounts to 900 rides per day. This data set is scaled to 100.000 rides per year and therefor modelled with a lower utilization.
Background system:
Electricity: Electricity is modelled according to the individual country-specific situations. The country-specific modelling is achieved on multiple levels. Firstly, individual energy carrier specific power plants and plants for renewable energy sources are modelled according to the current national electricity grid mix. Modelling the electricity consumption mix includes transmission / distribution losses and the own use by energy producers (own consumption of power plants and "other" own consumption e.g. due to pumped storage hydro power etc.), as well as imported electricity. Secondly, the national emission and efficiency standards of the power plants are modelled as well as the share of electricity plants and combined heat and power plants (CHP). Thirdly, the country-specific energy carrier supply (share of imports and / or domestic supply) including the country-specific energy carrier properties (e.g. element and energy content) are accounted for. Fourthly, the exploration, mining/production, processing and transport processes of the energy carrier supply chains are modelled according to the specific situation of each electricity producing country. The different production and processing techniques (emissions and efficiencies) in the different energy producing countries are considered, e.g. different crude oil production technologies or different flaring rates at the oil platforms.

## Technical purpose
This product can be used in construction.

## Safety margin
0 %.

## Reference product
- Elevator utilization: 8765.78

## Inputs
- Use of renewable primary energy (PERE) [MJ]: B6 8527.4
- Primary energy resources used as raw materials (PERM) [MJ]: B6 0
- Total use of renewable primary energy resources (PERT) [MJ]: B6 8527.4
- Use of non-renewable primary energy (PENRE) [MJ]: B6 12733.9
- Non-renewable primary energy resources used as raw materials (PENRM) [MJ]: B6 0
- Total use of non-renewable primary energy resources (PENRT) [MJ]: B6 12733.9
- Input of secondary material (SM) [kg]: B6 0
- Use of renewable secondary fuels (RSF) [MJ]: B6 0
- Use of non renewable secondary fuels (NRSF) [MJ]: B6 0
- Use of net fresh water (FW) [m3]: B6 3.94289

## Outputs
- Hazardous waste disposed (HWD) [kg]: B6 8.73293e-6
- Non-hazardous waste disposed (NHWD) [kg]: B6 9.91363
- Radioactive waste disposed (RWD) [kg]: B6 1.03175
- Components for re-use (CRU) [kg]: B6 0
- Materials for Recycling (MFR) [kg]: B6 0
- Material for Energy Recovery (MER) [kg]: B6 0
- Exported electrical energy (EEE) [MJ]: B6 0
- Exported thermal energy (EET) [MJ]: B6 0

## Impact indicators
- Global warming potential (GWP) [kg CO2 eq.]: B6 1010.86
- Ozone Depletion Potential (ODP) [kg R11 eq.]: B6 4.72725e-11
- Acidification potential (AP) [kg SO2 eq.]: B6 1.19268
- Eutrophication potential (EP) [kg Phosphate eq.]: B6 0.236917
- Photochemical Ozone Creation Potential (POCP) [kg Ethene eq.]: B6 0.0988553
- Abiotic depletion potential for non fossil resources (ADPE) [kg Sb eq.]: B6 0.000447289
- Abiotic depletion potential for fossil resources (ADPF) [MJ]: B6 10129.4

## Use advice
The data set represents a cradle to gate inventory. It can be used to characterise the supply chain situation of the respective commodity in a representative manner. Combination with individual unit processes using this commodity enables the generation of user-specific (product) LCAs.

## Data sources
- NIPKOW 2006
- GaBi Database Edition 2020, SP40
- GaBi database (all versions)
