# Lightweight concrete block from 100% natural pumice

Dataset: ILCD process, EPD, generic dataset
Geography: DE
Reference year: 2018
Valid until: 2022
Classification: oekobau.dat: Mineralische Baustoffe / Steine und Elemente / Leichtbeton
Owner: thinkstep
Compliance: DIN EN 15804
Review: Dependent internal review by thinkstep, IABP-GaBi, IBP-GaBi; Independent external review by GaBi user forum, GaBi bug forum, GaBi user community
Amounts: rows without a unit in brackets have none in this file; such an amount is in the reference unit of its flow, which a separate flow dataset defines
copyright: true

## General comment
This data set has been modeled according to the European Standard EN 15804 for Sustainable Building. Results are depicted in modules that allow the structured expression of results over the entire life cycle.

## Geography
The data set represents the country specific situation in Germany, focusing on the main technologies, the region specific characteristics and / or import statistics.

## Time period
annual average

## Technology and included processes
Main raw materials are natural pumice and cement. Blast furnace slag is a by-product of steel production and enters the system to be balanced without load. Only the efforts for granulation and transport are taken into account. The main raw materials are mixed in the production with water, introduced into molds, compacted and then cured or stored. The LCA results are dominated by the use of cement.

Background system:
Electricity: Electricity from renewable and non- renewable powerplants is modelled so that it represents a countrys specific consumption mix including transmission / distribution losses, own consumption, imports, emissions and efficiency standards, and energy carrier properties. Several factors are taken into account. (1) Energy carrier production - The exploration, mining / production, processing, and transportation of energy carrier supply chains are modelled for each country. The models account for differences among countries in production and processing, including crude oil production technologies, flaring rates, production efficiencies, emissions, etc. (2) Energy carrier supply - Each countrys specific energy carrier supply is modelled, taking into account domestic supply versus imports from abroad. Energy carrier properties (e.g. carbon and energy content), which can vary depending from where an energy carrier is sourced, are adjusted accordingly. (3) Power plants - Models are created to represent energy carrier-specific power plants and electricity generation facilities specific to different renewable energy resources. Energy carrier production and supply models are used to represent power plant inputs. Combined heat and power (CHP) plants are also considered. (4) Electricity grid - Models representing the electricity generation facilities are combined into a larger model that reflects a countrys consumption mix. The larger model accounts for a countrys production mix, internal consumption (e.g. pumped storage for hydro power), transmission / distribution losses, and imported electricity. The country model is also adjusted according to national power plant emission and efficiency standards, as well as the countrys share of electricity plants versus CHP facilities.
Thermal energy, process steam: The thermal energy and process steam supply is modelled to reflect each countrys emission standards and typical energy carriers (e.g., coal, natural gas, etc.) Both thermal energy and process steam are assumed to be produced at heat plants. Thermal energy datasets assume energy carrier inputs are converted to thermal energy with 100% efficiency; process steam datasets assume conversion efficiencies of 85%, 90% to 95%. The energy carriers used for the generation of thermal energy and process steam are modelled according to each countrys import situation (see electricity above).
Transportation: All relevant and known transportation processes are included. Ocean-going and inland ship transport as well as rail, truck and pipeline transport of bulk commodities are considered.
Energy carriers: The energy carriers and their respective properties are modelled according to the specific supply situation (see electricity above).
Refinery products: Diesel fuel, gasoline, technical gases, fuel oils, lubricants and residues such as bitumen are modelled with a parameterised country-specific refinery model. The refinery model aims to represent each countrys refining processes (e.g. emissions levels, internal energy consumption, etc.), as well as the countrys product output spectrum, which can vary significantly among countries. The supply of crude oil is likewise modelled according to the country-specific situation and accounts for differences in resource properties (e.g., crude oil energy content).

## Technical purpose
Lightweight concrete blocks made of 100% natural pumice are generally used for exterior walls using mortar (indoor use is also possible). The masonry must be protected from weather conditions by additional layers (such as plaster and paint).

## Safety margin
20 %. Product system depicted except for a few missing processes / flows. Technological, temporal and geographic representativeness partly given.

## Reference product
- Lightweight concrete block from 100% natural pumice [m3]: 1

## Inputs
- Erneuerbare Primärenergie als Energieträger (PERE) [MJ]: A1-A3 63.8378, C1 0.283227, C2 1.0896, C3 6.57539, D -3.90881
- Erneuerbare Primärenergie zur stofflichen Nutzung (PERM) [MJ]: A1-A3 0, C1 0, C2 0, C3 0, D 0
- Total use of renewable primary energy resources (PERT) [MJ]: A1-A3 63.8378, C1 0.283227, C2 1.0896, C3 6.57539, D -3.90881
- Nicht-erneuerbare Primärenergie als Energieträger (PENRE) [MJ]: A1-A3 260.353, C1 4.8651, C2 18.7165, C3 60.9168, D -13.7047
- Nicht-erneuerbare Primärenergie zur stofflichen Nutzung (PENRM) [MJ]: A1-A3 0, C1 0, C2 0, C3 0, D 0
- Total use of non-renewable primary energy resources (PENRT) [MJ]: A1-A3 260.353, C1 4.8651, C2 18.7165, C3 60.9168, D -13.7047
- Input of secondary material (SM) [kg]: A1-A3 0, C1 0, C2 0, C3 0, D 0
- Use of renewable secondary fuels (RSF) [MJ]: A1-A3 0.191503, C1 0, C2 0, C3 0, D 0
- Use of non renewable secondary fuels (NRSF) [MJ]: A1-A3 2.01447, C1 0, C2 0, C3 0, D 0
- Use of net fresh water (FW) [m3]: A1-A3 0.0623459, C1 0.000253653, C2 0.000975828, C3 0.0156295, D -0.00253487

## Outputs
- Hazardous waste disposed (HWD) [kg]: A1-A3 3.65504e-6, C1 1.81804e-7, C2 6.99416e-7, C3 1.10343e-6, D -2.58311e-7
- Non-hazardous waste disposed (NHWD) [kg]: A1-A3 0.339011, C1 0.00085391, C2 0.00328507, C3 154.801, D -8.05555
- Radioactive waste disposed (RWD) [kg]: A1-A3 0.00497962, C1 5.12195e-6, C2 1.97046e-5, C3 0.000587084, D -0.000510276
- Components for re-use (CRU) [kg]: A1-A3 0, C1 0, C2 0, C3 0, D 0
- Materials for Recycling (MFR) [kg]: A1-A3 0, C1 0, C2 0, C3 463.918, D 0
- Material for Energy Recovery (MER) [kg]: A1-A3 0, C1 0, C2 0, C3 0, D 0
- Exported electrical energy (EEE) [MJ]: A1-A3 0, C1 0, C2 0, C3 0, D 0
- Exported thermal energy (EET) [MJ]: A1-A3 0, C1 0, C2 0, C3 0, D 0

## Impact indicators
- Global warming potential (GWP) [kg CO2 eq.]: A1-A3 42.969, C1 0.359435, C2 1.39253, C3 3.66861, D -1.02699
- Ozone Depletion Potential (ODP) [kg R11 eq.]: A1-A3 2.07662e-13, C1 1.19813e-16, C2 4.60933e-16, C3 2.07816e-14, D -1.98209e-14
- Acidification potential (AP) [kg SO2 eq.]: A1-A3 0.04439, C1 0.00125369, C2 0.00281276, C3 0.0237251, D -0.00242521
- Eutrophication potential (EP) [kg Phosphate eq.]: A1-A3 0.00834291, C1 0.000295802, C2 0.000668671, C3 0.00403691, D -0.000471907
- Photochemical Ozone Creation Potential (POCP) [kg Ethene eq.]: A1-A3 0.000943841, C1 0.000123878, C2 -0.000842702, C3 0.00215308, D 0.000222936
- Abiotic depletion potential for non fossil resources (ADPE) [kg Sb eq.]: A1-A3 3.75959e-6, C1 3.046e-8, C2 1.17183e-7, C3 1.9713e-6, D -2.28249e-7
- Abiotic depletion potential for fossil resources (ADPF) [MJ]: A1-A3 247.779, C1 4.85201, C2 18.6661, C3 59.4338, D -12.4165

## Use advice
This dataset refers to 1 m³ of lightweight concrete blocks made of 100% natural pumice for the production of masonry. Bulk density 500 kg/m³, thermal conductivity 0.2 - 0.32 W/mK. The data set can be used for the approximate estimation of other stone bulk densities of 400 - 800 kg/m³.

The data set represents a cradle to gate inventory. It can be used to characterise the supply chain situation of the respective commodity in a representative manner. Combination with individual unit processes using this commodity enables the generation of user-specific (product) LCAs.

## Data sources
- GaBi databases
- GaBi Database Edition 2020, SP40
- GaBi database (all versions)
