# Windows - heroal-Johann Henkenjohann GmbH & Co. KG - Aluminium sliding doors

Dataset: ILCD process, EPD, template dataset
Geography: DE
Reference year: 2019
Valid until: 2026
Classification: OEKOBAU.DAT: Komponenten von Fenstern und Vorhangfassaden / Fenster / Metallfenster
Synonyms: Aluminium window systems; sliding door system; S42, S42 HF; S65
Method details: Produktkategorieregeln Teil A; EPD heroal Windows and Lifting-Sliding Elements; Produktkategorieregeln Teil B – für Fenster, Flachdachfenster, Lichtkuppeln und Lichtbänder
Owner: heroal-Johann Henkenjohann GmbH & Co. KG
Compliance: EN 15804
Review: Independent external review by Patrick Wortner
Amounts: rows without a unit in brackets have none in this file; such an amount is in the reference unit of its flow, which a separate flow dataset defines
copyright: true

## General comment
aluminium profiles with installation depths from 77 mm to 202 mm. Face widths from 35 mm to 52 mm.

A1-A3 as well as modules A4, A5, B2, B3, B4, B5, B6, B7, C1, C2, C3, C4, D. The environmental profile includes the expenditures for the life cycle stages cradle to gate with options (module A1-A3). The production of the packaging was taken into account within modules A1-A3.

## Geography
This data set represents the situation of companies producing products according to the systems of heroal-Johann Henkenjohann GmbH & Co. KG, with regard to the most important technologies and the legal framework.

## Time period
anual average

## Technology and included processes
The LCA results include the life cycle stages of the pre-products manufacture to the point of the raw material extraction and processing of secondary material input (e.g. recycling processes), their transport to the manufacturer as well as the maufacturing itself, including provision of all operating supplies, energy and the complete waste treatment or the landfill of residual waste during the stage of manufacture.
The modules A1, A2 and A3 are shown here as an aggregated module A1-A3. If further modules have been calculated for this dataset, these can be found separately and can be merged for consideration of the entire life cycle.

## Technical purpose
Aluminium lifting-sliding door systems for all building classes

## Reference product
- Windows - heroal-Johann Henkenjohann GmbH & Co. KG - Aluminium sliding doors: 1

## Inputs
- Use of net fresh water (FW) [m3]: A1-A3 0.78, A4 0.00221, A5 0.00158, B2 0.28, B3 0.0613, B4 0, B5 0, B6 0, B7 0, C1 0, C2 0.000365, C3 0.0111, C4 0.000313, D -0.29
- Nicht-erneuerbare Primärenergie als Energieträger (PENRE) [MJ]: A1-A3 1170, A4 34.6, A5 3.18, B2 1480, B3 269, B4 0, B5 950.44, B6 0, B7 0, C1 0, C2 5.73, C3 33.95, C4 2.97, D -381
- Nicht-erneuerbare Primärenergie zur stofflichen Nutzung (PENRM) [MJ]: A1-A3 37.1, A4 0, A5 -3.06, B2 0, B3 0, B4 0, B5 0, B6 0, B7 0, C1 0, C2 0, C3 -32.36, C4 -1.7, D 0
- Use of non renewable secondary fuels (NRSF) [MJ]: A1-A3 0, A4 0, A5 0, B2 0, B3 0, B4 0, B5 0, B6 0, B7 0, C1 0, C2 0, C3 0, C4 0, D 0
- Erneuerbare Primärenergie als Energieträger (PERE) [MJ]: A1-A3 346, A4 1.93, A5 2.23, B2 21.1, B3 17, B4 0, B5 236.22, B6 0, B7 0, C1 0, C2 0.32, C3 0.57, C4 0.17, D -123
- Erneuerbare Primärenergie zur stofflichen Nutzung (PERM) [MJ]: A1-A3 2.21, A4 0, A5 -2.21, B2 0, B3 0, B4 0, B5 0.00404, B6 0, B7 0, C1 0, C2 0, C3 0, C4 0, D 0
- Use of renewable secondary fuels (RSF) [MJ]: A1-A3 0, A4 0, A5 0, B2 0, B3 0, B4 0, B5 0, B6 0, B7 0, C1 0, C2 0, C3 0, C4 0, D 0
- Input of secondary material (SM) [kg]: A1-A3 0.82, A4 0, A5 0, B2 0, B3 0.38, B4 0, B5 0.82, B6 0, B7 0, C1 0, C2 0, C3 0, C4 0, D 0
- Total use of non-renewable primary energy resources (PENRT) [MJ]: A1-A3 1210, A4 34.6, A5 0.12, B2 1480, B3 269, B4 0, B5 953.31, B6 0, B7 0, C1 0, C2 5.73, C3 1.59, C4 1.27, D -381
- Total use of renewable primary energy resources (PERT) [MJ]: A1-A3 348, A4 1.93, A5 0.0231, B2 21.1, B3 17, B4 0, B5 236.02, B6 0, B7 0, C1 0, C2 0.32, C3 0.57, C4 0.17, D -123

## Outputs
- Components for re-use (CRU) [kg]: A1-A3 0, A4 0, A5 0, B2 0, B3 0, B4 0, B5 0, B6 0, B7 0, C1 0, C2 0, C3 0, C4 0, D 0
- Exported electrical energy (EEE) [MJ]: A1-A3 0.85, A4 0, A5 1.29, B2 0, B3 3.35, B4 0, B5 12.64, B6 0, B7 0, C1 0, C2 0, C3 10.5, C4 0, D 0
- Exported thermal energy (EET) [MJ]: A1-A3 1.86, A4 0, A5 2.31, B2 0, B3 5.96, B4 0, B5 22.97, B6 0, B7 0, C1 0, C2 0, C3 18.8, C4 0, D 0
- Hazardous waste disposed (HWD) [kg]: A1-A3 0.00127, A4 1.74e-9, A5 2.18e-11, B2 2.02e-7, B3 0.00126, B4 0, B5 0.00127, B6 0, B7 0, C1 0, C2 2.88e-10, C3 3.67e-10, C4 1.35e-10, D -5.43e-8
- Material for Energy Recovery (MER) [kg]: A1-A3 0, A4 0, A5 0, B2 0, B3 0, B4 0, B5 0, B6 0, B7 0, C1 0, C2 0, C3 0, C4 0, D 0
- Materials for Recycling (MFR) [kg]: A1-A3 1.08, A4 0, A5 0, B2 0, B3 9.82, B4 0, B5 8.01, B6 0, B7 0, C1 0, C2 0, C3 6.93, C4 0, D 0
- Non-hazardous waste disposed (NHWD) [kg]: A1-A3 20.7, A4 0.00514, A5 0.00795, B2 0.45, B3 9.87, B4 0, B5 21.55, B6 0, B7 0, C1 0, C2 0.00085, C3 0.0203, C4 6.33, D -6.09
- Radioactive waste disposed (RWD) [kg]: A1-A3 0.049, A4 4.18e-5, A5 6.4e-6, B2 0.00331, B3 0.00535, B4 0, B5 0.0318, B6 0, B7 0, C1 0, C2 6.93e-6, C3 0.000181, C4 1.33e-5, D -0.0199

## Impact indicators
- Abiotic depletion potential for non fossil resources (ADPE) [kg Sb-Äqv.]: A1-A3 0.000366, A4 2.21e-7, A5 6.44e-9, B2 1.05e-5, B3 0.000309, B4 0, B5 0.000354, B6 0, B7 0, C1 0, C2 3.66e-8, C3 4.57e-8, C4 3.34e-8, D -2.34e-5
- Abiotic depletion potential for fossil resources (ADPF) [MJ]: A1-A3 1080, A4 34.5, A5 0.1, B2 1470, B3 255, B4 0, B5 867.68, B6 0, B7 0, C1 0, C2 5.71, C3 1.13, C4 1.24, D -331
- Acidification potential of soil and water (AP) [kg SO2-Äqv.]: A1-A3 0.32, A4 0.00586, A5 6.76e-5, B2 0.0474, B3 0.13, B4 0, B5 0.24, B6 0, B7 0, C1 0, C2 0.000809, C3 0.000408, C4 0.000546, D -0.11
- Eutrophication potential (EP) [kg Phosphat-Äqv.]: A1-A3 0.0311, A4 0.00146, A5 1.39e-5, B2 0.00787, B3 0.0104, B4 0, B5 0.0271, B6 0, B7 0, C1 0, C2 0.0002, C3 7.92e-5, C4 6.21e-5, D -0.00903
- Global warming potential (GWP) [kg CO2-Äqv.]: A1-A3 78.9, A4 2.53, A5 0.66, B2 48.2, B3 15.3, B4 0, B5 65.5, B6 0, B7 0, C1 0, C2 0.42, C3 5, C4 0.0907, D -27.6
- Depletion potential of the stratospheric ozone layer (ODP) [kg R11 eq.]: A1-A3 3.52e-8, A4 4.42e-16, A5 9.71e-17, B2 1.04e-13, B3 4.15e-9, B4 0, B5 3.52e-8, B6 0, B7 0, C1 0, C2 7.32e-17, C3 2.26e-15, C4 4.96e-16, D -1.19e-13
- Formation potential of tropospheric ozone (POCP) [kg Ethen-Äqv.]: A1-A3 0.0193, A4 -0.00208, A5 5.64e-6, B2 0.0129, B3 0.00737, B4 0, B5 0.0133, B6 0, B7 0, C1 0, C2 -0.000263, C3 3.96e-5, C4 4.16e-5, D -0.000581

## Use advice
This dataset is modelled according to the European Standard EN 15804 for Sustainable Construction. Results are declared in modules, which allow the structured expression of results throughout the life cycle. It contains the modules A1-A3, A4, A5, B2, B3, B4, B5, B6, B7, C1, C2, C3, C4, D.
The comparison with other products is only permissible if the application in the building is comparable. A comparison or the evaluation of EPD data is only possible, if the datasets have been created according to EN 15804. The building context or the product-specific performance characteristics must be considered.

The model EPD obtains validity through the transfer to the manufacturer by the ift. Currently valid EPDs are to be taken from the list below and are published on www.ift-service.de/epd.
EPD number and declaration holder:
There are currently no valid EPDs available.

## Review details
The LCI method applied is in compliance with ISO 14040 and 14044. The documentation includes all relevant information in view of the data quality and scope of the application of the respective LCI result / data set. The dataset represents the state-of-the-art in view of the referenced functional unit.

## Data sources
- GaBi database (general)
