# Dachziegel

Dataset: ILCD process, EPD, average dataset
Geography: DE
Reference year: 2018
Valid until: 2023
Classification: OEKOBAU.DAT: Mineralische Baustoffe / Steine und Elemente / Dachziegel
Classification: IBUCategories: 02 Bauprodukte / Bedachungen / Dachziegel
Method details: Dachziegel.pdf
Generated by: SUSTAINUM Institut für zukunftsfähiges Wirtschaften Berlin eG
Registration number: EPD-BRA-20170030-ICD1-DE
Owner: Braas GmbH
Compliance: DIN EN 15804; ISO 14025
Review: Accredited third party review by Institut Bauen und Umwelt e. V.
Amounts: rows without a unit in brackets have none in this file; such an amount is in the reference unit of its flow, which a separate flow dataset defines
copyright: true
licenseType: Free of charge for all users and uses
accessRestrictions: None

## General comment
BRAAS Dachziegel werden für das Eindecken von Dächern verschiedenster Formen und Dachneigungen sowie als Außenwandbekleidung verwendet. Die BRAAS Dachziegelmodelle sind:

Rubin (9V, 11V, 13V, 15V)
Achat (10V, 12V, 14)
Granat (11V, 13V, 15)
Topas (11V, 13V, 15V)
Opal (verschiedene Ausprägungen)
Smaragd
Turmalin
Saphir

Die Dachziegelmodelle unterscheiden sich in ihren Abmessungen, Formen, Oberflächen und Farben. Die Produktionsschritte und die Materialzusammensetzung sind nahezu identisch.

## Technology and included processes
Rohstoffaufbereitung Die Grundstoffe Ton und Lehm werden aus regionalen Gruben meist in Werksnähe im Tagebaubetrieb abgebaut. Die anschließende Aufbereitung für die Produktion umfasst die Aussonderung störender Bestandteile, Begrenzung der Maximalgröße, Dosierung und Mischung. Die aufbereitete Masse wird zur Homogenisierung im Sumpfhaus zwischengelagert. Formgebung Für die Produktion wird die Mischung bzgl. der Materialfeuchte nachjustiert, weiter homogenisiert und zu einem Strang gepresst. Bei Pressdachziegeln (z.B. Rubin) wird der Tonstrang zu sogenannten Batzen geschnitten. In der Revolverpresse, in die jeweils für die Ober- und Unterseite Gipsformen eingelegt sind, erhält der Batzen seine geplante Form. Bei Strangdachziegeln (z.B. Biberschwanzziegel) formt bereits das Mundstück der Strangpresse den Dachziegelquerschnitt. Anschließend wird der Dachziegelrohling entsprechend der Schnittform (z.B. Rund- oder Segmentschnitt) abgelängt. Überschüssiges Material wird wieder der Produktionsmasse zugesetzt. Trocknung Die Rohlinge werden entnommen, auf Trockenträgern abgelegt und in Trockenwagen gestapelt. Die Trockenwagen durchfahren einen Tunneltrockner mit einem definierten Profil bzgl. Temperatur und relativer Luftfeuchtigkeit. Der Trocknungsvorgang wird teilweise mit der Abwärme des Brennofens betrieben. Oberflächenveredelung und Brennvorgang Die Oberflächen der getrockneten Dachziegel können mit Engoben, Edelengoben oder Glasuren versehen werden. Die Rohlinge werden auf feuerfeste Brennkassetten positioniert und auf Tunnelofenwagen gesetzt, die den Tunnelofen mit einem definierten Temperatur- und Luftströmungsprofil durchfahren. Qualitätskontrolle und Verpackung Alle gebrannten Dachziegel werden auf Aussehen und Struktur geprüft, fehlerhafte Dachziegel werden als Brennbruch aussortiert. Die Dachziegel werden zu Kleinpaketen gebündelt, umreift und auf Mehrwegpaletten gesetzt. Diese werden entweder in Folie verpackt oder umreift.
Technische Daten:
Es gelten die Daten entsprechend der Leistungserklärung nach /EN 1304:2005 Dachziegel und Formziegel — Begriffe und Produktanforderungen/. Und folgende
Deklarierte Einheit:
Die Deklaration bezieht sich auf die Herstellung von 1 t durchschnittlich produziertem Dachziegel der BRAAS GmbH.

## Technical purpose
Dachziegel werden als Dachdeckungen für geneigte Dächer oder als Außenwandbekleidungen verwendet.

## Reference product
- 1t Dachziegel (1t Dachziegel ): 1000

## Inputs
- Erneuerbare Primärenergie als Energieträger (PERE) [MJ]: A1 25.9159, A2 8.97906, A3 313.669, A4 18.8902, A5 0.112437, B1 0, B4 0, B5 0, C1 0, C2 1.57418, C3 0, C4 24.6067, D -2.96143
- Erneuerbare Primärenergie zur stofflichen Nutzung (PERM) [MJ]: A1 0, A2 0, A3 0, A4 0, A5 0, B1 0, B4 0, B5 0, C1 0, C2 0, C3 0, C4 0, D 0
- Total erneuerbare Primärenergie (PERT) [MJ]: A1 25.9159, A2 8.97906, A3 313.669, A4 18.8902, A5 0.112437, B1 0, B4 0, B5 0, C1 0, C2 1.57418, C3 0, C4 24.6067, D -2.96143
- Nicht-erneuerbare Primärenergie als Energieträger (PENRE) [MJ]: A1 192.745, A2 132.218, A3 4165.44, A4 278.162, A5 31.626, B1 0, B4 0, B5 0, C1 0, C2 23.1801, C3 0, C4 216.321, D -16.1549
- Nicht-erneuerbare Primärenergie zur stofflichen Nutzung (PENRM) [MJ]: A1 30.8, A2 0, A3 0, A4 0, A5 -30.8, B1 0, B4 0, B5 0, C1 0, C2 0, C3 0, C4 0, D 0
- Total nicht erneuerbare Primärenergie (PENRT) [MJ]: A1 223.545, A2 132.218, A3 4165.44, A4 278.162, A5 0.825998, B1 0, B4 0, B5 0, C1 0, C2 23.1801, C3 0, C4 216.321, D -16.1549
- Einsatz von Sekundärstoffen (SM) [kg]: A1 0, A2 0, A3 0, A4 0, A5 0, B1 0, B4 0, B5 0, C1 0, C2 0, C3 0, C4 0, D 0
- Erneuerbare Sekundärbrennstoffe (RSF) [MJ]: A1 0, A2 0, A3 0, A4 0, A5 0, B1 0, B4 0, B5 0, C1 0, C2 0, C3 0, C4 0, D 0
- Nicht erneuerbare Sekundärbrennstoffe (NRSF) [MJ]: A1 0, A2 0, A3 0, A4 0, A5 0, B1 0, B4 0, B5 0, C1 0, C2 0, C3 0, C4 0, D 0
- Einsatz von Süßwasserressourcen (FW) [m^3]: A1 0.352951, A2 0.0135607, A3 0.237624, A4 0.0285291, A5 0.00444015, B1 0, B4 0, B5 0, C1 0, C2 0.00237743, C3 0, C4 0.0440491, D -0.00222605

## Outputs
- Gefährlicher Abfall zur Deponie (HWD) [kg]: A1 1.40049e-6, A2 1.70139e-5, A3 1.63949e-6, A4 3.5794e-5, A5 2.12787e-8, B1 0, B4 0, B5 0, C1 0, C2 2.98283e-6, C3 0, C4 4.94741e-6, D -1.04191e-8
- Entsorgter nicht gefährlicher Abfall (NHWD) [kg]: A1 346.742, A2 0.880055, A3 391.254, A4 1.85147, A5 0.41455, B1 0, B4 0, B5 0, C1 0, C2 0.154289, C3 0, C4 1038.31, D -3.48162
- Entsorgter radioaktiver Abfall (RWD) [kg]: A1 0.00803544, A2 0.000179013, A3 0.0752702, A4 0.000376609, A5 3.37889e-5, B1 0, B4 0, B5 0, C1 0, C2 3.13841e-5, C3 0, C4 0.00298807, D -0.000711873
- Komponenten für die Wiederverwendung (CRU) [kg]: A1 0, A2 0, A3 0, A4 0, A5 0, B1 0, B4 0, B5 0, C1 0, C2 0, C3 0, C4 0, D 0
- Stoffe zum Recycling (MFR) [kg]: A1 0, A2 0, A3 0, A4 0, A5 0, B1 0, B4 0, B5 0, C1 0, C2 0, C3 0, C4 0, D 0
- Stoffe für die Energierückgewinnung (MER) [kg]: A1 0, A2 0, A3 0, A4 0, A5 0, B1 0, B4 0, B5 0, C1 0, C2 0, C3 0, C4 0, D 0
- Exportierte elektrische Energie (EEE) [MJ]: A1 0, A2 0, A3 0, A4 0, A5 3.47, B1 0, B4 0, B5 0, C1 0, C2 0, C3 0, C4 0, D 0
- Exportierte thermische Energie (EET) [MJ]: A1 0, A2 0, A3 0, A4 0, A5 7.97, B1 0, B4 0, B5 0, C1 0, C2 0, C3 0, C4 0, D 0

## Impact indicators
- Globales Erwärmungspotenzial (GWP) [kg CO_(2)-Äq.]: A1 14.0441, A2 9.64754, A3 269.245, A4 20.2915, A5 1.79504, B1 0, B4 0, B5 0, C1 0, C2 1.69096, C3 0, C4 16.0675, D -1.11284
- Abbau Potential der stratosphärischen Ozonschicht (ODP) [kg CFC11-Äq.]: A1 1.3105e-9, A2 2.00532e-11, A3 3.71926e-9, A4 4.21881e-11, A5 5.50529e-12, B1 0, B4 0, B5 0, C1 0, C2 3.51567e-12, C3 0, C4 1.57926e-10, D -3.51476e-11
- Versauerungspotenzial von Boden und Wasser (AP) [kg SO_(2)-Äq.]: A1 0.0670968, A2 0.040454, A3 0.231552, A4 0.0880734, A5 0.000460775, B1 0, B4 0, B5 0, C1 0, C2 0.00733945, C3 0, C4 0.0962445, D -0.0011974
- Eutrophierungspotenzial (EP) [kg PO_(4)^(3)-Äq.]: A1 0.00625376, A2 0.0103272, A3 0.0352628, A4 0.0225018, A5 4.27247e-5, B1 0, B4 0, B5 0, C1 0, C2 0.00187515, C3 0, C4 0.0130939, D -0.000187059
- Bildungspotential für troposphärisches Ozon (POCP) [kg Ethen-Äq.]: A1 0.00663175, A2 -0.0146176, A3 0.0331985, A4 -0.0321217, A5 7.71124e-6, B1 0, B4 0, B5 0, C1 0, C2 -0.00267681, C3 0, C4 0.00924866, D -0.000129757
- Potenzial für den abiotischen Abbau nicht fossiler Ressourcen (ADPE) [kg Sb-Äq.]: A1 0.00024896, A2 7.33058e-7, A3 3.69154e-5, A4 1.54221e-6, A5 1.23396e-7, B1 0, B4 0, B5 0, C1 0, C2 1.28518e-7, C3 0, C4 5.55239e-6, D -2.85997e-7
- Potenzial für den abiotischen Abbau fossiler Brennstoffe (ADPF) [MJ]: A1 203.35, A2 131.754, A3 3975.85, A4 277.185, A5 0.741035, B1 0, B4 0, B5 0, C1 0, C2 23.0987, C3 0, C4 208.789, D -14.3621

## Use advice
Gültigkeitsbereich:
Dieses Dokument bezieht sich auf Dachziegel der Firma BRAAS GmbH, hergestellt in mehreren Werken in Deutschland. Es handelt sich um die Deklaration eines Produkts gemittelt aus 4 Werken des Herstellers: Hainstadt, Karstädt, Obergräfenhain und Petershagen. Die deklarierte Einheit bezieht sich auf 1 t Dachziegel. Die Datenerhebung für die Herstellung des deklarierten Produktes erfolgte werksspezifisch mit aktuellen Jahresdaten von 2015. Die Ökobilanz ist somit repräsentativ für Dachziegel der BRAAS GmbH. Der Deklarationsinhaber ist verantwortlich für die zugrunde liegenden Daten und deren Verifizierung.
Systemgrenze:
Die Ökobilanz betrachtet die Systemgrenzen "von der Wiege bis zur Bahre" und folgt dem modularen Aufbau nach /DIN EN 15804/. Die Ökobilanz berücksichtigt folgende Module:

A1-A3: Rohstoffversorgung, Transport, Herstellung
A4: Transport vom Hersteller zum Verwendungsort
A5: Montage
B1: Nutzung/ Anwendung
B4: Ersatz
B5: Erneuerung
C1: Rückbau/ Abriss
C2: Transport
C3: Abfallbehandlung
C4: Beseitigung
D: Wiederverwendungs-, Rückgewinnungs- oder Recyclingpotenzial

## Data sources
- GaBi Database (all versions)
- GaBi database SP29 2016
