# Rain drain pipe SML; SML pipe

Dataset: ILCD process, EPD, generic dataset
Geography: DE
Reference year: 2018
Valid until: 2022
Classification: oekobau.dat: Metalle / Stahl und Eisen / Guss- und Schmiedeteile aus Stahl und Eisen
Owner: thinkstep
Compliance: DIN EN 15804
Review: Dependent internal review by thinkstep, IABP-GaBi, IBP-GaBi; Independent external review by GaBi user forum, GaBi bug forum, GaBi user community
Amounts: rows without a unit in brackets have none in this file; such an amount is in the reference unit of its flow, which a separate flow dataset defines
copyright: true

## General comment
This data set has been modeled according to the European Standard EN 15804 for Sustainable Building. Results are depicted in modules that allow the structured expression of results over the entire life cycle.

## Geography
The data set represents the country specific situation in Germany, focusing on the main technologies, the region specific characteristics and / or import statistics.

## Time period
Annual average

## Technology and included processes
SML pipes are cast pipes that are produced by a centrifugal process. They are produced in nominal diameters of DN 80 to DN 2000 and in lengths from 6 - 8m. In the process known as De Lavaud, the pipes are produced in chill-moulds which are cooled with water from the outside. The space between the sand core and the chill-mould is filled with 1400°C hot iron and the machine begins to move. The interaction of longitudinal and radial motion and the centrifugal force on the fluid iron allows the pipe to form on the wall of the chill-mould. The iron cools down, solidifies and shrinks. The pipes are subsequently thermally treated. They are layered with epoxy resin on the inside and acrylic paint on the outside. The most important inputs during production of the SML pipes are therefore gray iron (manufactured from secondary metals), thermal energy and power.
It is expected, that the recycling quote of big appliances like boilers, air conditioning, and ventilation systems is 95%. For pipes or cables which are often flush-mounted a 90% recycling quote is expected. The quotes are only related to metals and plastics. For mineral materials like mineral wool, concrete or ceramics inert landfilling is assumed, as well as for 5-10% of metals and plastics (e.g. cable waste and pipe pieces) that are not recycled. Plastics that are not recycled are introduced to the municipal waste incineration. For the MWI a European model with average emission values and energy production rates was used. Depending on the incinerated type of plastic, different processes with corresponding elemental compositions were used. Then dataset were set up in collaboration with the Confederation of European Waste-to-Energy Plants (CEWEP) and are available on the website of the European Platform on LCA [EC 2008]. Power and thermal energy produced in the MWI are accounted to the European power- and thermal energy mix. The credits for the metal recycling and the energetic recovery of plastics, as well as the emission and resource consumptions (energy for remelting, incineration emissions, landfilling) are included in the datasets. Iron materials (steel sheet, pipes, grey cast iron) already use a share of steel scrap at the production. These values are deducted from the recycled steel material before introduced to the melting to avoid a overvaluation of the credits. For the credits primary steel was used. Credits for the recycling of rare earth or mercury emissions from fluorescent lamps are not considered due to a lack of information. The assumed transport distance from building to recycling plant/landfilling site or MWI are 50km using a truck. The assumed distance to the steel, copper, and aluminium plant is 200km by train.

Background system:
Electricity: Electricity is modelled according to the individual country-specific situations. The country-specific modelling is achieved on multiple levels. Firstly, individual energy carrier specific power plants and plants for renewable energy sources are modelled according to the current national electricity grid mix. Modelling the electricity consumption mix includes transmission / distribution losses and the own use by energy producers (own consumption of power plants and "other" own consumption e.g. due to pumped storage hydro power etc.), as well as imported electricity. Secondly, the national emission and efficiency standards of the power plants are modelled as well as the share of electricity plants and combined heat and power plants (CHP). Thirdly, the country-specific energy carrier supply (share of imports and / or domestic supply) including the country-specific energy carrier properties (e.g. element and energy content) are accounted for. Fourthly, the exploration, mining/production, processing and transport processes of the energy carrier supply chains are modelled according to the specific situation of each electricity producing country. The different production and processing techniques (emissions and efficiencies) in the different energy producing countries are considered, e.g. different crude oil production technologies or different flaring rates at the oil platforms.
Thermal energy, process steam: The thermal energy and process steam supply is modelled according to the individual country-specific situation with regard to emission standards and considered energy carriers. The thermal energy and process steam are produced at heat plants. Efficiencies for thermal energy production are by definition 100% in relation to the corresponding energy carrier input. For process steam the efficiency ranges from 85%, 90% to 95%. The energy carriers used for the generation of thermal energy and process steam are modelled according to the specific import situation (see electricity above).
Transports: All relevant and known transport processes are included. Ocean-going and inland ship transport as well as rail, truck and pipeline transport of bulk commodities are considered.
Energy carriers: The energy carriers are modelled according to the specific supply situation (see electricity above).
Refinery products: Diesel fuel, gasoline, technical gases, fuel oils, lubricants and residues such as bitumen are modelled with a parameterised country-specific refinery model. The refinery model represents the current national standard in refining techniques (e.g. emission level, internal energy consumption, etc.) as well as the individual country-specific product output spectrum, which can be quite different from country to country. The supply of crude oil is modelled, again, according to the country-specific situation with the respective properties of the resources.

## Technical purpose
This product can be used in construction.

## Safety margin
20 %. Product system depicted except for a few missing processes / flows. Technological, temporal and geographic representativeness partly given.

## Reference product
- Cast iron part: 1

## Inputs
- Use of renewable primary energy (PERE) [MJ]: A1-A3 3.12523, C1 0.000566453, C2 0.0021792, D -0.0822294
- Primary energy resources used as raw materials (PERM) [MJ]: A1-A3 0, C1 0, C2 0, D 0
- Total use of renewable primary energy resources (PERT) [MJ]: A1-A3 3.12523, C1 0.000566453, C2 0.0021792, D -0.0822294
- Use of non-renewable primary energy (PENRE) [MJ]: A1-A3 9.43733, C1 0.0097302, C2 0.037433, D 0.720662
- Non-renewable primary energy resources used as raw materials (PENRM) [MJ]: A1-A3 0, C1 0, C2 0, D 0
- Total use of non-renewable primary energy resources (PENRT) [MJ]: A1-A3 9.43733, C1 0.0097302, C2 0.037433, D 0.720662
- Input of secondary material (SM) [kg]: A1-A3 1.3914, C1 0, C2 0, D 0
- Use of renewable secondary fuels (RSF) [MJ]: A1-A3 0, C1 0, C2 0, D 0
- Use of non renewable secondary fuels (NRSF) [MJ]: A1-A3 0, C1 0, C2 0, D 0
- Use of net fresh water (FW) [m3]: A1-A3 0.00239401, C1 5.07306e-7, C2 1.95166e-6, D 6.49193e-5

## Outputs
- Hazardous waste disposed (HWD) [kg]: A1-A3 1.012e-8, C1 3.63607e-10, C2 1.39883e-9, D 6.10369e-10
- Non-hazardous waste disposed (NHWD) [kg]: A1-A3 0.00435062, C1 1.70782e-6, C2 6.57015e-6, D 0.00137247
- Radioactive waste disposed (RWD) [kg]: A1-A3 0.000432402, C1 1.02439e-8, C2 3.94093e-8, D -1.30763e-5
- Components for re-use (CRU) [kg]: A1-A3 0, C1 0, C2 0, D 0
- Materials for Recycling (MFR) [kg]: A1-A3 0, C1 1.2, C2 0, D 0
- Material for Energy Recovery (MER) [kg]: A1-A3 0, C1 0, C2 0, D 0
- Exported electrical energy (EEE) [MJ]: A1-A3 0, C1 0, C2 0, D 0
- Exported thermal energy (EET) [MJ]: A1-A3 0, C1 0, C2 0, D 0

## Impact indicators
- Global warming potential (GWP) [kg CO2 eq.]: A1-A3 0.722883, C1 0.000718871, C2 0.00278506, D 0.0952958
- Ozone Depletion Potential (ODP) [kg R11 eq.]: A1-A3 1.66881e-14, C1 2.39627e-19, C2 9.21867e-19, D -5.85378e-16
- Acidification potential (AP) [kg SO2 eq.]: A1-A3 0.00133302, C1 2.50738e-6, C2 5.62553e-6, D 0.000219816
- Eutrophication potential (EP) [kg Phosphate eq.]: A1-A3 0.000177211, C1 5.91605e-7, C2 1.33734e-6, D 1.82596e-5
- Photochemical Ozone Creation Potential (POCP) [kg Ethene eq.]: A1-A3 0.000633672, C1 2.47755e-7, C2 -1.6854e-6, D 2.87083e-5
- Abiotic depletion potential for non fossil resources (ADPE) [kg Sb eq.]: A1-A3 1.93577e-7, C1 6.09201e-11, C2 2.34365e-10, D -2.26818e-9
- Abiotic depletion potential for fossil resources (ADPF) [MJ]: A1-A3 8.34518, C1 0.00970402, C2 0.0373323, D 0.753785

## Use advice
The data set represents a cradle to gate inventory. It can be used to characterise the supply chain situation of the respective commodity in a representative manner. Combination with individual unit processes using this commodity enables the generation of user-specific (product) LCAs.

## Data sources
- Einträge von Kupfer, Zink und Blei in Gewässer und Böden - Analyse der Emissionspfade und möglicher
- Ökobilanz von Rohrleitungssystemen - Kurzfassung, 1998
- GaBi Database Edition 2020, SP40
- GaBi database (all versions)
