# TPO/FPO Dach-und Dichtungsbahn

Dataset: ILCD process, EPD, specific dataset
Geography: DE
Reference year: 2016
Valid until: 2022
Classification: OEKOBAU.DAT: Kunststoffe / Dachbahnen / Elastomer-Dachbahnen
Classification: IBUCategories: 02 Bauprodukte / Abdichtungen / Dach- und Dichtungsbahnsysteme aus Kunststoffen und Elastomeren
Method details: Dach- und Dichtungsbahnsysteme aus Kunststoffen und Elastomeren.pdf
Generated by: Sphera Solutions GmbH
Registration number: EPD-KBC-20160014-IBC1-DE
Owner: KÖSTER BAUCHEMIE AG
Compliance: DIN EN 15804; ISO 14025
Review: Accredited third party review by Institut Bauen und Umwelt e. V.
Amounts: rows without a unit in brackets have none in this file; such an amount is in the reference unit of its flow, which a separate flow dataset defines
copyright: true
licenseType: Free of charge for all users and uses
accessRestrictions: None

## General comment
KÖSTER TPO 1.6 / 1.8 / 2.0 / 2.0 F is a plastic roofing and sealing membrane that can be welded with hot air, made of flexible, thermoplastic polyolefins (FPO / TPO) and with glass fleece as an internal layer and in some cases with polyester fleece on the underside.

The internal glass fleece reinforcement serves as an additional support and thus improves the mechanical properties of the roofing and sealing membrane. The polyester fleece backing allows the membrane to be bonded onto other materials or to be fitted onto rough surfaces.

eff. thickness Overall
thickness
KÖSTER TPO 1.6 1.6 mm 1.6 mm
with internal glass fleece layer

KÖSTER TPO 1.8 1.8 mm 1.8 mm
with internal glass fleece layer

KÖSTER TPO 2.0 2.0 mm 2.0 mm
with internal glass fleece layer

KÖSTER TPO 2.0 F 2.0 mm 2.8 mm
with internal glass fleece layer and polyester fleece on the underside

## Technology and included processes
The production of KÖSTER TPO / FPO roofing and sealing membranes is certified in accordance with DIN EN ISO 9001. The membranes are manufactured on two-nozzle extrusion equipment. The raw material is heated up to the required temperature in an extruder and introduced into the process under pressure. The two low-viscosity melt streams can be monitored by measuring the temperature and pressure of the mass. The internal glass fleece insert serves as an additional support and thus improves the mechanical properties of the roofing and sealing membrane. The required thickness of the roofing and sealing membrane is achieved by regulating the melt streams as they emerge at the ends of the extrusion nozzles. The sheets are cooled down to below 30 °C after they leave the calendar and before they are wound. Cooling is effected by means of water-cooled rollers. The heated water is cooled in a heat exchanger, fed back into the water cycle and reused.
Technical data:
Designation in accordance with EN 20000-201

KÖSTER TPO 1.6/1.8/2.0: DE/E1-FPO-BV-E-GV-1.6 / 1.8 / 2.0
KÖSTER TPO 2.0 F: DE/E1-FPO-BV-E-GV-K-PV-2.0
Designation in accordance with DIN V 20000-202:
KÖSTER TPO 1.6/1.8 /2.0: BA-FPO-BV-E-GV-1.6 / 1.8 / 2.0
Declared unit:
The declared unit is 1 m² of roofing membrane produced.
These are not self-adhesive roofing membranes. The seams are joined together by thermal welding. The weight per unit area is rounded off to two places after the decimal point.

## Technical purpose
KÖSTER TPO and KÖSTER TPO F roofing and sealing membranes serve to seal unventilated and ventilated flat roofs, inclined roofs, green roofs, patios, balconies, rooftop gardens and underground garages in the event of direct exposure to the weather and with top load.
They can also be used to seal damp rooms, sprinkler containers and ponds.
KÖSTER TPO roofing and sealing membranes can be laid loosely (with top load) or mechanically secured.
KÖSTER TPO F roofing and sealing membranes can be laid loosely (with top load), mechanically secured and bonded over the whole area or in strips.

## Scenarios
- S0: Scenario 0
- S1: 100 % material recycling
- S2: 100 % thermal utilisation

## Reference product
- 1 m2 Dachbahn TPO 2.0 F: 1

## Inputs
- Renewable primary energy as energy carrier (PERE) [MJ]: A1-A3 7.44
- Renewable primary energy resources as material utilization (PERM) [MJ]: A1-A3 0
- Total use of renewable primary energy resources (PERT) [MJ]: A1-A3 7.44, A4 0.0577, A5 0.4, C2 (S1) 0.0279, C2 (S2) 0.00543, C3 0.494, C4 0.153, D (S1) -2.83, D (S2) -1.51
- Non renewable primary energy as energy carrier (PENRE) [MJ]: A1-A3 119
- Non renewable primary energy as material utilization (PENRM) [MJ]: A1-A3 74.6
- Total use of non renewable primary energy resources (PENRT) [MJ]: A1-A3 194, A4 0.756, A5 11.4, C2 (S1) 0.366, C2 (S2) 0.0712, C3 1.79, C4 1.32, D (S1) -168, D (S2) -12.3
- Use of secondary material (SM) [kg]: A1-A3 0, A4 0, A5 0, C2 (S1) 0, C2 (S2) 0, C3 0, C4 0, D (S1) 0, D (S2) 0
- Use of renewable secondary fuels (RSF) [MJ]: A1-A3 0, A4 0, A5 0, C2 (S1) 0, C2 (S2) 0, C3 0, C4 0, D (S1) 0, D (S2) 0
- Use of non renewable secondary fuels (NRSF) [MJ]: A1-A3 0, A4 0, A5 0, C2 (S1) 0, C2 (S2) 0, C3 0, C4 0, D (S1) 0, D (S2) 0
- Use of net fresh water (FW) [m^3]

## Outputs
- Hazardous waste disposed (HWD) [kg]
- Non hazardous waste disposed (NHWD) [kg]
- Radioactive waste disposed (RWD) [kg]
- Components for re-use (CRU) [kg]: A1-A3 0, A4 0, A5 0, C2 (S1) 0, C2 (S2) 0, C3 0, C4 0, D (S1) 0, D (S2) 0
- Materials for recycling (MFR) [kg]: A1-A3 0, A4 0, A5 0, C2 (S1) 0, C2 (S2) 0, C3 2.215, C4 0, D (S1) 0, D (S2) 0
- Materials for energy recovery (MER) [kg]: A1-A3 0, A4 0, A5 0, C2 (S1) 0, C2 (S2) 0, C3 0, C4 2.215, D (S1) 0, D (S2) 0
- Exported electrical energy (EEE) [MJ]: A1-A3 0, A4 0, A5 0.29, C2 (S1) 0, C2 (S2) 0, C3 0, C4 2.06, D (S1) 0, D (S2) 0
- Exported thermal energy (EET) [MJ]: A1-A3 0, A4 0, A5 0.751, C2 (S1) 0, C2 (S2) 0, C3 0, C4 5.63, D (S1) 0, D (S2) 0

## Impact indicators
- Global warming potential (GWP) [kg CO_(2)-Äq.]: A1-A3 7.01, A4 0.0553, A5 0.633, C2 (S1) 0.0267, C2 (S2) 0.0052, C3 0.131, C4 1.9, D (S1) -4.79, D (S2) -0.822
- Depletion potential of the stratospheric ozone layer (ODP) [kg CFC11-Äq.]: A1-A3 3.28e-7, A4 6.81e-14, A5 2.18e-8, C2 (S1) 3.3e-14, C2 (S2) 6.41e-15, C3 1.31e-11, C4 4.03e-12, D (S1) -2.74e-7, D (S2) -4.01e-11
- Acidification potential of land and water (AP) [kg SO_(2)-Äq.]: A1-A3 0.0283, A4 0.000245, A5 0.00181, C2 (S1) 0.000118, C2 (S2) 2.3e-5, C3 0.000215, C4 0.000961, D (S1) -0.0105, D (S2) -0.000966
- Eutrophication potential (EP) [kg PO_(4)^(3)-Äq.]: A1-A3 0.00152, A4 6.68e-5, A5 0.000102, C2 (S1) 3.23e-5, C2 (S2) 6.29e-6, C3 2.81e-5, C4 0.00019, D (S1) -0.000918, D (S2) -0.000133
- Formation potential of tropospheric ozone photochemical oxidants (POCP) [kg Ethen-Äq.]: A1-A3 0.00227, A4 -8.44e-5, A5 0.000122, C2 (S1) -4.08e-5, C2 (S2) -7.94e-6, C3 1.62e-5, C4 6.01e-5, D (S1) -0.00134, D (S2) -0.000102
- Abiotic depletion potential for non fossil resources (ADPE) [kg Sb-Äq.]: A1-A3 5.7e-6, A4 2.85e-9, A5 4.21e-7, C2 (S1) 1.38e-9, C2 (S2) 2.69e-10, C3 3.2e-8, C4 1.96e-7, D (S1) -6.33e-7, D (S2) -1.17e-7
- Abiotic depletion potential for fossil resources (ADPF) [MJ]: A1-A3 174, A4 0.753, A5 10.1, C2 (S1) 0.364, C2 (S2) 0.0709, C3 1.32, C4 1.17, D (S1) -154, D (S2) -10.9

## Use advice
Scope:
This EPD applies to 1 m² of the following roofing membranes of different thicknesses: KÖSTER TPO 1.6 / 1.8 / 2.0 / 2.0 F, whereby in Chapter 5 only the values of KÖSTER TPO 2.0 F are declared. For the other variants, conversion factors are specified in Chapter 3.10.
The life cycle assessment is based on the KÖSTER Bauchemie AG data from the year of production 2014, manufactured in the factory in Aurich in Germany. This document is translated from the German Environmental Product Declaration into English. It is based on the German original version EPD-KBC-20160014-IBC1-DE. The verifier has no influence on the quality of the translation.
System boundary:
Type of EPD: cradle to plant gate - with options. The Life Cycle Assessment takes account of raw material and energy exploitation, raw material transportation and the actual product manufacture (modules A1-A3), transportation to the construction site (module A4), installation taking account of cutting and packaging waste (without optional plate anchors for roof sheeting and adhesives) (module A5), as well as transportation after dismantling (module C2), recycling (modules C3 & D/1) or thermal utilisation (modules C4 and D/2), with the resulting credits and debits beyond the system limit.

There are two scenarios for the End-of-Life (modules C2, C3, C4 and D): the first proceeds from 100 % material recycling. The second scenario is based on 100 % thermal utilisation. Individual scenarios for combinations of thermal utilisation and material recycling can then be calculated from the results of these two 100 % scenarios.

## Data sources
- GaBi Database (all versions)
- GaBi database SP28 2015
