# Recycling ready-mix concrete C20/25; C20/25

Dataset: ILCD process, EPD, generic dataset
Geography: DE
Reference year: 2021
Valid until: 2022
Classification: oekobau.dat: Mineralische Baustoffe / Mörtel und Beton / Beton
Owner: Sphera Solutions GmbH
Compliance: EN 15804+A2
Review: Dependent internal review by Sphera Solutions GmbH; Independent external review by GaBi user forum
Amounts: rows without a unit in brackets have none in this file; such an amount is in the reference unit of its flow, which a separate flow dataset defines
copyright: true
licenseType: Free of charge for all users and uses
accessRestrictions: The license conditions as stated on https://www.oekobaudat.de/ apply.
accessRestrictions: Es gelten die Lizenzbedingungen wie sie auf https://www.oekobaudat.de/ genannt sind.

## General comment
This data set has been modeled according to the European Standard EN 15804+A2 for Sustainable Building. Results are depicted in modules that allow the structured expression of results over the entire life cycle.

## Geography
The data set represents the country specific situation in Germany, focusing on the main technologies, the region specific characteristics and / or import statistics.

## Time period
Annual average

## Technology and included processes
Module A1-A3: Recycled ready-mixed concrete of strength class C20/25 consists of a mix of recycled aggregates (approx. 80 M.%, load-free), cement (approx. 11 M.%), water (approx. 5.5 M.%) and fly ash ( approx. 3.5% by mass).
The cement production dominates the LCA of recycled concrete (e.g. contribution to the global warming potential approx. 88%).

Module A4: a Truck Transport to the construction site with 26 Tonnes payload and an average distance of 10 Kilometers has been assumed. The distance may be adjusted on building level as required.

In the disposal phase, a mechanical dismantling (excavator) is assumed in module C1. The transport in module C2 to the treatment plant takes place with a truck (50km). In module C3, the material is processed, any reinforcement is fed to a sink (no loads, no credits). A treatment loss of 25% was assumed. This loss is fed to an inert material landfill within Module C3 (average landfill emissions). In Module D, a credit for the net amount of material (excluding reinforcement and treatment losses) for the substitution of natural gravel as backfill material is given.

## Technical purpose
Beton wird für verschiedene tragende und nicht tragende Anwendungen im Baubereich sowohl im Innen- als auch im Aussenbereich verwendet.

## Safety margin
10 %. Product system almost completely covered. Good technological, temporal and geographic representativeness.

## Reference product
- Recycling ready-mix concrete C20/25: 1

## Inputs
- Use of renewable primary energy as energy carrier (PERE) [MJ]: A1-A3 219.944, A4 1.36295, C1 0.540911, C2 4.7294, C3 77.7618, D -0.533346
- Use of renewable primary energy resources used as raw materials (PERM) [MJ]: A1-A3 0, A4 0, C1 0, C2 0, C3 0, D 0
- Total use of renewable primary energy (PERT) [MJ]: A1-A3 219.944, A4 1.36295, C1 0.540911, C2 4.7294, C3 77.7618, D -0.533346
- Use of non renewable primary energy as energy carrier (PENRE) [MJ]: A1-A3 774.324, A4 22.8203, C1 9.31992, C2 81.4878, C3 620.981, D -1.95869
- Use of non renewable primary energy resources used as raw materials (PENRM) [MJ]: A1-A3 0, A4 0, C1 0, C2 0, C3 0, D 0
- Total use of non renewable primary energy resource (PENRT) [MJ]: A1-A3 774.324, A4 22.8203, C1 9.31992, C2 81.4878, C3 620.981, D -1.95869
- Use of secondary material (SM) [kg]: A1-A3 1865.81, A4 0, C1 0, C2 0, C3 0, D 0
- Use of renewable secondary fuels (SF) [MJ]: A1-A3 29.9734, A4 0, C1 0, C2 0, C3 0, D 0
- Use of non renewable secondary fuels (NRSF) [MJ]: A1-A3 550.838, A4 0, C1 0, C2 0, C3 0, D 0
- Net use of fresh water (FW) [m3]: A1-A3 0.394417, A4 0.00119373, C1 0.000480735, C2 0.00420326, C3 0.154659, D -0.000323315

## Outputs
- Hazardous waste disposed (HWD) [kg]: A1-A3 1.20152e-7, A4 9.6358e-10, C1 3.89542e-10, C2 3.40592e-9, C3 5.9752e-8, D -3.15577e-10
- Non harzardous waste disposed (NHWD) [kg]: A1-A3 0.948959, A4 0.00385371, C1 0.00150445, C2 0.013154, C3 2445.02, D -1.3007
- Radioactive waste disposed (RWD) [kg]: A1-A3 0.0232231, A4 2.79306e-5, C1 8.94368e-6, C2 7.81981e-5, C3 0.00602351, D -5.77659e-5
- Components for re-use (CRU) [kg]: A1-A3 0, A4 0, C1 0, C2 0, C3 0, D 0
- Materials for recycling (MFR) [kg]: A1-A3 0, A4 0, C1 0, C2 0, C3 68.676, D 0
- Materials for energy recovery (MER) [kg]: A1-A3 0, A4 0, C1 0, C2 0, C3 0, D 0
- Exported electrical energy (EEE) [MJ]: A1-A3 0, A4 0, C1 0, C2 0, C3 0, D 0
- Exported thermal energy (EET) [MJ]: A1-A3 0, A4 0, C1 0, C2 0, C3 0, D 0

## Impact indicators
- Global Warming Potential - total (GWP-total) [kg CO2 eq.]: A1-A3 230.01, A4 1.72609, C1 0.697268, C2 6.18988, C3 43.0781, D -0.149229
- Global Warming Potential - fossil fuels (GWP-fossil) [kg CO2 eq.]: A1-A3 229.511, A4 1.70036, C1 0.692589, C2 6.14762, C3 43.8905, D -0.14843
- Global Warming Potential - biogenic (GWP-biogenic) [kg CO2 eq.]: A1-A3 0.366729, A4 0.0147063, C1 0.000163718, C2 0.00277809, C3 -0.959031, D -0.000121341
- Global Warming Potential - land use and land use change (GWP-luluc) [kg CO2 eq.]: A1-A3 0.132674, A4 0.0110267, C1 0.0045156, C2 0.0394817, C3 0.146619, D -0.000678073
- Depletion potenzial of the stratospheric ozone layer (ODP) [kg CFC-11 eq.]: A1-A3 9.24806e-13, A4 6.10946e-16, C1 1.79909e-16, C2 1.57301e-15, C3 1.75927e-13, D -1.91652e-15
- Acidifcation potential, Accumulated Exceedance (AP) [Mole of H+ eq.]: A1-A3 0.239578, A4 0.00168824, C1 0.00932489, C2 0.0174299, C3 0.327666, D -0.0004916
- Eutrophication potential - freshwater (EP-freshwater) [kg P eq.]: A1-A3 0.000120223, A4 3.56782e-6, C1 1.44604e-6, C2 1.26433e-5, C3 7.79876e-5, D -4.13014e-7
- Eutrophication potential - marine (EP-marine) [kg N eq.]: A1-A3 0.0844645, A4 0.000560008, C1 0.00424223, C2 0.00802959, C3 0.100243, D -0.000191195
- Eutrophication potential - terrestrial (EP-terrestrial) [Mole of N eq.]: A1-A3 0.92307, A4 0.00665412, C1 0.0466438, C2 0.0898365, C3 1.10144, D -0.00210481
- Photochemical Ozone Creation Potential (POCP) [kg NMVOC eq.]: A1-A3 0.249514, A4 0.00149027, C1 0.012705, C2 0.0156579, C3 0.299805, D -0.000452217
- Abiotic depletion potential - non-fossil resources (ADPE) [kg Sb eq.]: A1-A3 1.22817e-5, A4 1.58186e-7, C1 6.11612e-8, C2 5.34757e-7, C3 1.1139e-5, D -3.03143e-8
- Abiotic depletion potential - fossil resources (ADPF) [MJ]: A1-A3 774.123, A4 22.8091, C1 9.31953, C2 81.4844, C3 620.714, D -1.9583
- Water (user) deprivation potential (WDP) [m³ world equiv.]: A1-A3 12.1099, A4 0.00672509, C1 0.00273325, C2 0.0238979, C3 5.11932, D -0.00361816

## Use advice
This data set refers to the production of 1 m³ recycled ready-mix concrete of quality C20/25. The gross density is 2360 kg/m³. The data set can be used to estimate bulk densities of 2200 - 2500 kg.
All mineral aggregates in this data set were balanced with 100% load-free secondary material. This represents the only difference between this data set and the generic data set "Ready-mixed concrete C20/25". Other secondary material proportions for ready-mixed concrete can therefore be estimated by mixing the two data sets.

## Data sources
- Ökologische Bilanzierung von Baustoffen und Gebäuden, 2000
- Documentation of data quality management
- GaBi Database Edition 2021, CUP2021.01
- GaBi database (all versions)
