# Laminated veneer board (generic); 465 kg/m3 density at 12 % moisture

Dataset: ILCD process, EPD, generic dataset
Geography: DE
Reference year: 2021
Valid until: 2022
Classification: oekobau.dat: Holz / Holzwerkstoffe / Funierschichtholz
Owner: Sphera Solutions GmbH
Compliance: EN 15804+A2
Review: Dependent internal review by Sphera Solutions GmbH; Independent external review by GaBi user forum
Amounts: rows without a unit in brackets have none in this file; such an amount is in the reference unit of its flow, which a separate flow dataset defines
copyright: true
licenseType: Free of charge for all users and uses
accessRestrictions: The license conditions as stated on https://www.oekobaudat.de/ apply.
accessRestrictions: Es gelten die Lizenzbedingungen wie sie auf https://www.oekobaudat.de/ genannt sind.

## General comment
This data set has been modeled according to the European Standard EN 15804+A2 for Sustainable Building. Results are depicted in modules that allow the structured expression of results over the entire life cycle.

## Geography
The data set represents the country specific situation in Germany, focusing on the main technologies, the region specific characteristics and / or import statistics.

## Time period
Annual average

## Technology and included processes
The life cycle analysis of laminated veneer lumber, a kind of plywood, includes the life cycle phases cradle to gate, i.e. the forested production, the wood transport, the manufacturing of the laminated veneer lumber incl. packaging and utilization of the production residues. The system boundary is the product (ready for shipment). Transports from the Finnish production location to Germany are taken into account.

In module C1, a manual dismantling (no loads) is assumed, collecting losses are neglected.
The transport in module C2 to the recycling plant takes place with a truck (50km).
Module C3 takes into account the grinding and thermal treatment (combustion) of the material. It is assumed that the material reaches the end of the waste status immediately after dismantling. The CO2 absorbed and stored in the material by photosynthesis (from module A1) is written off in C3 (CO2 neutrality within the product system according to EN 16485: Round and sawn timber - Environmental Product Declarations - Product category rules for wood and wood-based products for use in construction, 2014).
Module D contains the loads through the operation of the recovery facility (excluding biogenic CO2, see above) and credits for the substitution of electricity (German electricity mix) and thermal energy (from natural gas). The calculation of combustion emissions and credits takes into account the specific calorific value of the material and the material composition.

## Technical purpose
This product can be used in construction.

## Safety margin
10 %. Product system almost completely covered. Good technological, temporal and geographic representativeness.

## Reference product
- Laminated veneer board (generic): 1

## Inputs
- Use of renewable primary energy as energy carrier (PERE) [MJ]: A1-A3 6613.81, C2 0.933856, C3 9816.89, D -1428.51
- Use of renewable primary energy resources used as raw materials (PERM) [MJ]: A1-A3 8854, C2 0, C3 -8854, D 0
- Total use of renewable primary energy (PERT) [MJ]: A1-A3 15467.8, C2 0.933856, C3 962.889, D -1428.51
- Use of non renewable primary energy as energy carrier (PENRE) [MJ]: A1-A3 6191.96, C2 16.0904, C3 1017.18, D -4158.52
- Use of non renewable primary energy resources used as raw materials (PENRM) [MJ]: A1-A3 572, C2 0, C3 -572, D 0
- Total use of non renewable primary energy resource (PENRT) [MJ]: A1-A3 6763.96, C2 16.0904, C3 445.182, D -4158.52
- Use of secondary material (SM) [kg]: A1-A3 0.0134626, C2 0, C3 0, D 0
- Use of renewable secondary fuels (SF) [MJ]: A1-A3 0, C2 0, C3 0, D 0
- Use of non renewable secondary fuels (NRSF) [MJ]: A1-A3 0, C2 0, C3 0, D 0
- Net use of fresh water (FW) [m3]: A1-A3 3.15318, C2 0.000829965, C3 2.72818, D -0.531244

## Outputs
- Hazardous waste disposed (HWD) [kg]: A1-A3 7.68042e-6, C2 6.72526e-10, C3 9.37041e-8, D -1.44792e-6
- Non harzardous waste disposed (NHWD) [kg]: A1-A3 8.68955, C2 0.00259735, C3 8.12459, D -2.20754
- Radioactive waste disposed (RWD) [kg]: A1-A3 0.0645472, C2 1.54408e-5, C3 0.00951326, D -0.153638
- Components for re-use (CRU) [kg]: A1-A3 0, C2 0, C3 0, D 0
- Materials for recycling (MFR) [kg]: A1-A3 0, C2 0, C3 0, D 0
- Materials for energy recovery (MER) [kg]: A1-A3 0, C2 0, C3 0, D 0
- Exported electrical energy (EEE) [MJ]: A1-A3 0, C2 0, C3 1049.12, D 0
- Exported thermal energy (EET) [MJ]: A1-A3 0, C2 0, C3 2347.08, D 0

## Impact indicators
- Global Warming Potential - total (GWP-total) [kg CO2 eq.]: A1-A3 -418.833, C2 1.22224, C3 1096.37, D -267.851
- Global Warming Potential - fossil fuels (GWP-fossil) [kg CO2 eq.]: A1-A3 340.804, C2 1.21389, C3 27.1679, D -264.818
- Global Warming Potential - biogenic (GWP-biogenic) [kg CO2 eq.]: A1-A3 -760.767, C2 0.000548555, C3 1069.18, D -2.63848
- Global Warming Potential - land use and land use change (GWP-luluc) [kg CO2 eq.]: A1-A3 1.12926, C2 0.00779595, C3 0.0257011, D -0.394484
- Depletion potenzial of the stratospheric ozone layer (ODP) [kg CFC-11 eq.]: A1-A3 7.54024e-12, C2 3.10604e-16, C3 3.18284e-13, D -6.23664e-12
- Acidifcation potential, Accumulated Exceedance (AP) [Mole of H+ eq.]: A1-A3 1.66251, C2 0.00344167, C3 0.655805, D -0.273247
- Eutrophication potential - freshwater (EP-freshwater) [kg P eq.]: A1-A3 0.00261748, C2 2.49651e-6, C3 4.58283e-5, D -0.00065623
- Eutrophication potential - marine (EP-marine) [kg N eq.]: A1-A3 0.667962, C2 0.0015855, C3 0.294075, D -0.100287
- Eutrophication potential - terrestrial (EP-terrestrial) [Mole of N eq.]: A1-A3 7.29988, C2 0.0177389, C3 3.57472, D -1.06798
- Photochemical Ozone Creation Potential (POCP) [kg NMVOC eq.]: A1-A3 1.80585, C2 0.00309177, C3 0.752256, D -0.262397
- Abiotic depletion potential - non-fossil resources (ADPE) [kg Sb eq.]: A1-A3 8.16288e-5, C2 1.05592e-7, C3 4.81517e-6, D -8.39601e-5
- Abiotic depletion potential - fossil resources (ADPF) [MJ]: A1-A3 6819.5, C2 16.0897, C3 387.901, D -4157.91
- Water (user) deprivation potential (WDP) [m³ world equiv.]: A1-A3 86.4616, C2 0.00471882, C3 115.571, D -3.22423

## Use advice
The data set represents a cradle to gate inventory. It can be used to characterise the supply chain situation of the respective commodity in a representative manner. Combination with individual unit processes using this commodity enables the generation of user-specific (product) LCAs.

## Data sources
- Sach-Ökobilanzierung von KERTO-Furnierschichtholz, 2000
- Analyse und Bewertung der forstlichen Produktion
- Informationsdienst Holz: Ökobilanzen Holz, 1997
- Informationsdienst Holz: Erstellung von Ökobilanzen, 1997
- Vergleichende Oekobilanzierung der Rundholzproduktion in verschiedenen Forstbetrieben BFH Report 204
- Ökologische Bilanzierung von Bauschnittholz und veredelten Vollholzprodukten, 2000
- Documentation of data quality management
- GaBi Database Edition 2021, CUP2021.01
- GaBi database (all versions)
