# Automatic Sliding Door ST FLEX

Dataset: ILCD process, EPD, representative dataset
Geography: DE
Reference year: 2016
Valid until: 2021
Classification: OEKOBAU.DAT: Komponenten von Fenstern und Vorhangfassaden / Antriebssysteme / elektrisch
Classification: IBUCategories: 02 Bauprodukte / Türen, Fenster, Beschläge und Zubehör / Automatiktüren und -tore, sowie Karusselltüranlagen
Method details: Automatiktüren und -tore, sowie Karusselltüranlagen.pdf
Owner: DORMA Deutschland GmbH
Compliance: DIN EN 15804; ISO 14025
Review: Accredited third party review by IBU
Amounts: rows without a unit in brackets have none in this file; such an amount is in the reference unit of its flow, which a separate flow dataset defines
copyright: true

## General comment
ST FLEX stands for an automatic sliding door system manufactured by DORMA. The automatic sliding door system comprises a sliding door operator including sensors and control unit. It can be opened on one or two sides and configured with or without side screens. Thanks to its low profile width, the ST FLEX automatic sliding door is extremely versatile and allows plenty of light penetration. With its various designs, it is the perfect solution for sophisticated projects.To meet all requirements the ST FLEX system is available with different ES 200 operator versions.

## Technology and included processes
The ST FLEX product family stands for automatic sliding door systems manufactured by DORMA GmbH + Co. KG. The automatic sliding door systems comprise a sliding door operator including sensors and control unit, which can open on one or two sides and can be configured with or without side screens. Representative for the product family of automatic sliding door systems (ST FLEX, TST FLEX and ST FLEX Green), the ST FLEX serves as a basis for calculation with the average values based on the sales percentages attributable to DORMA ES 200 Standard (30 %), ES 200-2D (60 %) and ES 200 Easy (10 %) operator systems. A separate Environmental Product Declaration is available for the ST Flex Green, which displays particularly low UD values of 1.4 to max. 1.8 (heat transition coefficient). This was calculated using the ES 200 Easy operator system. The ST FLEX sliding panels and side screens are manufactured in the DORMA plant in Zusmarshausen. Electronic components in particular are also manufactured within the DORMA Group. The operators are manufactured in the Ennepetal plant while the accompanying circuit boards are manufactured in the Bonn plant. The certified Quality Management system to DIN EN ISO 9001 safeguards the high quality standard of DORMA products.
Technical data:
Technical data on the operator systems relating to the ST FLEX sliding door system:
Declared unit:
The declared unit is one piece (1 pc.) of the ST FLEX automatic sliding door system comprising:
average value of the ES 200 Standard, ES 200 2D, ES 200 EASY and ES 200 EASYplus operators,
two sliding panels,
two side screens and
respective packaging materials.

The side screens are not part of the moving automatic door but rather form a part of the overall automatic door system and have been taken into consideration in the declared unit. The declared unit comprises the following data:

## Technical purpose
On request, automatic sliding door systems from DORMA are manufactured for the individual dimensions of various building projects. The different operator systems analysed within the framework of the EPD are designed for the following application:

Details are available in the respective product catalogues.

## Reference product
- ST FLEX: 1

## Inputs
- Erneuerbare Primärenergie als Energieträger (PERE) [MJ]: A1-A3 2150, A4 3.99, A5 0.213, B3 378, B6 3850, C2 0.332, C3 17.4, D -2400
- Erneuerbare Primärenergie zur stofflichen Nutzung (PERM) [MJ]: A1-A3 92.7, A4 3.84e-12, A5 7.01e-12, B3 13.6, B6 1.08e-7, C2 3.14e-13, C3 0.0801, D -0.0452
- Total erneuerbare Primärenergie (PERT) [MJ]: A1-A3 2240, A4 3.99, A5 0.213, B3 392, B6 3850, C2 0.332, C3 17.4, D -2400
- Nicht-erneuerbare Primärenergie als Energieträger (PENRE) [MJ]: A1-A3 12700, A4 71.1, A5 2.23, B3 2130, B6 18300, C2 5.94, C3 405, D -7830
- Nicht-erneuerbare Primärenergie zur stofflichen Nutzung (PENRM) [MJ]: A1-A3 117, A4 0, A5 0, B3 70.3, B6 0, C2 0, C3 0.0225, D -1.18e-5
- Total nicht erneuerbare Primärenergie (PENRT) [MJ]: A1-A3 12900, A4 71.1, A5 2.23, B3 2200, B6 18300, C2 5.94, C3 405, D -7830
- Einsatz von Sekundärstoffen (SM) [kg]: A1-A3 56, A4 0, A5 0, B3 0, B6 0, C2 0, C3 0, D 0
- Erneuerbare Sekundärbrennstoffe (RSF) [MJ]: A1-A3 0.226, A4 0.000474, A5 7.98e-5, B3 0.0431, B6 0.242, C2 3.94e-5, C3 0.00568, D -0.12
- Nicht erneuerbare Sekundärbrennstoffe (NRSF) [MJ]: A1-A3 1.8, A4 0.00496, A5 0.000371, B3 0.329, B6 2.52, C2 0.000413, C3 0.0444, D -0.902
- Einsatz von Süßwasserressourcen (FW) [m^3]: A1-A3 4790, A4 0.319, A5 0.198, B3 790, B6 3480, C2 0.0266, C3 23.9, D -6030

## Outputs
- Gefährlicher Abfall zur Deponie (HWD) [kg]: A1-A3 0.31, A4 0, A5 0, B3 0.0603, B6 0, C2 0, C3 0.0903, D 0
- Entsorgter nicht gefährlicher Abfall (NHWD) [kg]: A1-A3 1770, A4 0.271, A5 0.445, B3 505, B6 4250, C2 0.0224, C3 39.6, D -1170
- Entsorgter radioaktiver Abfall (RWD) [kg]: A1-A3 0.671, A4 9.71e-5, A5 0.000135, B3 0.112, B6 2.74, C2 8.12e-6, C3 0.0131, D -0.383
- Komponenten für die Wiederverwendung (CRU) [kg]: A1-A3 0, A4 0, A5 0, B3 0, B6 0, C2 0, C3 0, D 0
- Stoffe zum Recycling (MFR) [kg]: A1-A3 7.13, A4 0, A5 0, B3 8.86, B6 0, C2 0, C3 287, D 0
- Stoffe für die Energierückgewinnung (MER) [kg]: A1-A3 0.148, A4 0, A5 4.86, B3 9.32, B6 0, C2 0, C3 9.56, D 0
- Exportierte elektrische Energie (EEE) [MJ]: A1-A3 1.59, A4 0, A5 9.29, B3 10, B6 0, C2 0, C3 30, D 0
- Exportierte thermische Energie (EET) [MJ]: A1-A3 4.02, A4 0, A5 21.8, B3 25.7, B6 0, C2 0, C3 74.7, D 0

## Impact indicators
- Globales Erwärmungspotenzial (GWP) [kg CO_(2)-Äq.]: A1-A3 931, A4 5.17, A5 7.18, B3 163, B6 1030, C2 0.432, C3 49.3, D -620
- Abbau Potential der stratosphärischen Ozonschicht (ODP) [kg CFC11-Äq.]: A1-A3 4.86e-6, A4 2.09e-11, A5 3.45e-11, B3 6.25e-7, B6 7.65e-7, C2 1.77e-12, C3 4.31e-7, D -1.34e-5
- Versauerungspotenzial von Boden und Wasser (AP) [kg SO_(2)-Äq.]: A1-A3 5.76, A4 0.0331, A5 0.00152, B3 1.25, B6 5.17, C2 0.00273, C3 0.0592, D -3.22
- Eutrophierungspotenzial (EP) [kg PO_(4)^(3)-Äq.]: A1-A3 0.626, A4 0.00849, A5 0.000268, B3 0.0537, B6 0.281, C2 0.000701, C3 0.00835, D -0.249
- Bildungspotential für troposphärisches Ozon (POCP) [kg Ethen-Äq.]: A1-A3 -0.0285, A4 -0.0137, A5 0.00011, B3 0.0649, B6 0.301, C2 -0.00113, C3 0.00535, D -0.205
- Potenzial für den abiotischen Abbau nicht fossiler Ressourcen (ADPE) [kg Sb-Äq.]: A1-A3 0.0266, A4 2.02e-7, A5 1.21e-7, B3 0.00878, B6 0.000163, C2 1.68e-8, C3 3.94e-5, D -0.0281
- Potenzial für den abiotischen Abbau fossiler Brennstoffe (ADPF) [MJ]: A1-A3 10800, A4 70.9, A5 1.89, B3 1770, B6 11400, C2 5.92, C3 369, D -6890

## Use advice
Scope:
This EPD refers to the entire life cycle of a DORMA ST FLEX automatic sliding door system. The various technical characteristics are outlined in section 2.3. The production location is DORMA Zusmarshausen, Germany. The material and energy flows were taken into consideration accordingly
System boundary:
Type of EPD: cradle to gate with options

Modules A1-3, A4 and A5

The product stage commences with considering production of the requisite raw materials and energies including all of the corresponding upstream chains and the requisite procurement transport. Furthermore the whole production phase was displayed at two production facilities until reaching the End-of-Waste status (EoW). Transport associated with distribution as well as installation in the building were also taken into consideration.

Module B3

This module includes replacement of wear parts across its entire service life of 10 years. The production of spare parts and the disposal of wear parts until EoW belong to this.

Module B6

This module includes the energy consumption for operating the declared drive units including the stand-by modus over the entire operating life time of 10 years.

Modules C2-3

These modules include the environmental impacts of the treatment of waste fractions until reaching the EoW including transport associated with this at the end of the product life cycle.

Module D The credits resulting from the waste treatment which are resulting from the energetic (MVA-route) or mechanical recycling (recycling-route) of packaging (A5), spare parts (B3) and the product in the End-of-Life status (C3) are indicated here.

## Data sources
- Automatische Schiebetüranlage ST FLEX.pdf
- GaBi Database (all versions)
- GaBi database SP28 2015
