# SCHÜCO AWS 75.SI+

Dataset: ILCD process, EPD, average dataset
Geography: DE
Reference year: 2017
Valid until: 2022
Classification: OEKOBAU.DAT: Komponenten von Fenstern und Vorhangfassaden / Rahmen / Profile / Aluminium
Classification: IBUCategories: 02 Bauprodukte / Türen, Fenster, Beschläge und Zubehör / Fenster und Türen
Method details: Fenster und Türen.pdf
Owner: Schüco International KG
Compliance: DIN EN 15804; ISO 14025
Review: Accredited third party review by IBU
Amounts: rows without a unit in brackets have none in this file; such an amount is in the reference unit of its flow, which a separate flow dataset defines
copyright: true

## General comment
Das Schüco Fenstersystem AWS (Aluminium Window System) besteht aus gedämmten Aluminiumverbundprofilen. Das Fenstersystem Schüco AWS bietet funktionelle Vorteile verbunden mit architektonischen und gestalterischen Aspekten. In aufeinander abgestimmten Bauteilen vereinen sich Vorzüge wie hohe Wärmedämmungen, schlanke Ansichtsbreiten, verdeckt liegende, klassisch manuelle oder integrierte mechatronische Beschläge. Das System besteht aus den Bautiefen 50, 60, 65, 70, 75, 90, 112, 120 mm. Dabei können verschiedene Öffnungsarten mit Festfeldern des Systems verbunden werden. Die Profiloberflächen der Fensterelemente können nach Wahl eloxiert oder nass- oder pulverbeschichtet ausgeführt werden.

Das deklarierte Fensterelement AWS besteht aus folgenden Elementen:

• Hauptprofile, bestehend aus:

Aluminium

PT (Polythermid)

• Beschläge, bestehend aus:

Aluminium/Edelstahl

Aluminium/Kunststoff

Aluminium/Stahl

INOX (Edelstahl)

Zinkdruckguss

• Zubehör, bestehend aus:

Aluminiumdruckguss

INOX A2 (Edelstahl A2)

PA 66 (Polyamid)

PA (Polyamid)

PA6 (Polyamid)

PE Schaum (Polyethylen)

Zinkdruckguss

• Zubehörprofile, bestehend aus:

Aluminium

PE Schaum (Polyethylen)

• Dichtungen, bestehend aus:

EPDM (Ethylen-Propylen-Dien)

• Verglasung, bestehend aus:

3-fach Isolierglas

• Beschichtung, bestehend aus:

Pulver

Das Schüco Fenstersystem AWS besteht aus folgenden Ausführungen:

AWS 50

AWS 60

AWS 60 FR 30

AWS 65

AWS 70

AWS 70 FR 30

AWS 75

AWS 90

AWS 112

AWS 120

Mit dieser Deklaration wird folgendes Element aus dem Schüco Fenstersystem AWS beschrieben:

Systemausführung: Schüco AWS 75.SI+

B x H: 1230 mm x 1480 mm

Oberfläche Profile: Pulverbeschichtet

Anlagen: Elementübersicht

## Technology and included processes
Die oberflächenbehandelten Aluminiumprofile und die damit bereits verbundenen Isolierstege werden auf Maß geschnitten und für die entsprechende Rahmengröße konfektioniert. Der dabei entstehende Verschnitt an Aluminiumprofilen wird dem Recycling zugeführt. Anschließend werden die Profile zu Rahmen fest verbunden und die Dichtungen in die vorgesehenen Nuten eingezogen. Die beweglichen Fensterrahmen werden mit den Beschlagsbauteilen verbunden. Danach wird die Verglasung eingesetzt und mit Verglasungsprofilen gesichert. Abschließend erfolgt eine Funktionskontrolle und die Etikettierung des Elementes.
Technische Daten:
Gemäß CE-Kennzeichnung sind folgende bautechnische Daten für das Element zu nennen:
Deklarierte Einheit:
Die deklarierte Einheit ist ein Fenster Typ Schüco AWS 75.SI+ in spezifischer Abmessung 1230 mm x 1480 mm.

## Technical purpose
Das Produkt wird im Allgemeinen in der Gebäudewand eingebaut, um einen Luftaustausch und Lichteinfall zu ermöglichen.

## Reference product
- Schüco AWS 75.SI+ B x H: 1230 mm x 1480 mm: 1

## Inputs
- Erneuerbare Primärenergie als Energieträger (PERE) [MJ]: A1-A3 611.3, A4 0, B6 0, C4 0, D 0
- Erneuerbare Primärenergie zur stofflichen Nutzung (PERM) [MJ]: A1-A3 0, A4 0, B6 0, C4 0, D 0
- Total erneuerbare Primärenergie (PERT) [MJ]: A1-A3 611.3, A4 0.0448, B6 0, C4 0.5, D -394.25
- Nicht-erneuerbare Primärenergie als Energieträger (PENRE) [MJ]: A1-A3 3452.98, A4 0, B6 0, C4 0, D 0
- Nicht-erneuerbare Primärenergie zur stofflichen Nutzung (PENRM) [MJ]: A1-A3 286.92, A4 0, B6 0, C4 0, D 0
- Total nicht erneuerbare Primärenergie (PENRT) [MJ]: A1-A3 3739.9, A4 0.791, B6 0, C4 4.55, D -1321.93
- Einsatz von Sekundärstoffen (SM) [kg]: A1-A3 7.47, A4 0, B6 0, C4 0, D 0
- Erneuerbare Sekundärbrennstoffe (RSF) [MJ]: A1-A3 0, A4 0, B6 0, C4 0, D 0
- Nicht erneuerbare Sekundärbrennstoffe (NRSF) [MJ]: A1-A3 0, A4 0, B6 0, C4 0, D 0
- Einsatz von Süßwasserressourcen (FW) [m^3]: A1-A3 1.36, A4 0.000112, B6 0, C4 0.0419, D -0.802

## Outputs
- Gefährlicher Abfall zur Deponie (HWD) [kg]: A1-A3 0.000171, A4 5.98e-8, B6 0, C4 1.99e-8, D -2.52e-5
- Entsorgter nicht gefährlicher Abfall (NHWD) [kg]: A1-A3 33.36, A4 6.65e-5, B6 0, C4 1.73, D -20.12
- Entsorgter radioaktiver Abfall (RWD) [kg]: A1-A3 0.201, A4 1.13e-6, B6 0, C4 0.000207, D -0.129
- Komponenten für die Wiederverwendung (CRU) [kg]: A1-A3 0, A4 0, B6 0, C4 0, D 0
- Stoffe zum Recycling (MFR) [kg]: A1-A3 0, A4 0, B6 0, C4 0, D 64.55
- Stoffe für die Energierückgewinnung (MER) [kg]: A1-A3 0, A4 0, B6 0, C4 0, D 0
- Exportierte elektrische Energie (EEE) [MJ]: A1-A3 0, A4 0, B6 0, C4 32.32, D 0
- Exportierte thermische Energie (EET) [MJ]: A1-A3 0, A4 0, B6 0, C4 74.61, D 0

## Impact indicators
- Globales Erwärmungspotenzial (GWP) [kg CO_(2)-Äq.]: A1-A3 251.65, A4 0.0573, B6 0, C4 16.68, D -92.74
- Abbau Potential der stratosphärischen Ozonschicht (ODP) [kg CFC11-Äq.]: A1-A3 5.61e-6, A4 2.63e-13, B6 0, C4 4.74e-11, D -4.3e-6
- Versauerungspotenzial von Boden und Wasser (AP) [kg SO_(2)-Äq.]: A1-A3 0.863, A4 0.00014, B6 0, C4 0.00891, D -0.358
- Eutrophierungspotenzial (EP) [kg PO_(4)^(3)-Äq.]: A1-A3 0.109, A4 3.26e-5, B6 0, C4 0.00141, D -0.0211
- Bildungspotential für troposphärisches Ozon (POCP) [kg Ethen-Äq.]: A1-A3 0.0892, A4 -3.91e-5, B6 0, C4 0.0004, D -0.0227
- Potenzial für den abiotischen Abbau nicht fossiler Ressourcen (ADPE) [kg Sb-Äq.]: A1-A3 0.00468, A4 3.81e-9, B6 0, C4 2.91e-7, D -0.00343
- Potenzial für den abiotischen Abbau fossiler Brennstoffe (ADPF) [MJ]: A1-A3 3248.38, A4 0.788, B6 0, C4 4.03, D -1007.08

## Use advice
Gültigkeitsbereich:
Die Umweltproduktdeklaration bezieht sich auf ein

Fenster Typ Schüco AWS 75.SI+ in spezifischer

Abmessung Breite x Höhe.

Die für die Systembauteile Schüco AWS 75.SI+

verwendeten Kennwerte in der Ökobilanz werden von

der Schüco International KG bereitgestellt.

Produktionsort ist der Standort des Erstellers.

Der Ersteller ist für die in dieser EPD beschriebenen

Spezifikation und die Herstellung des Fensters

verantwortlich.
Systemgrenze:
Bei dieser EPD handelt es sich um eine EPD vom Typ Wiege bis Werkstor - mit Optionen. Die Ökobilanz berücksichtigt das Produktstadium (Modul A1-A3, inklusive Rohstoffbereitstellung, Transport zum Werk und Herstellung), den Transport zur Baustelle (Modul A4), sowie die End-of-Life- Module C4: Abfallbehandlung und D: Gutschriften und Lasten außerhalb der Systemgrenzen.

## Data sources
- SCHÜCO AWS 75.SI+.pdf
- GaBi Database (all versions)
- GaBi database SP29 2016
