# Gravel 2/32 (dried); dried

Dataset: ILCD process, EPD, generic dataset
Geography: DE
Reference year: 2021
Valid until: 2022
Classification: oekobau.dat: Mineralische Baustoffe / Zuschläge / Sand und Kies
Owner: Sphera Solutions GmbH
Compliance: EN 15804+A2
Review: Dependent internal review by Sphera Solutions GmbH; Independent external review by GaBi user forum
Amounts: rows without a unit in brackets have none in this file; such an amount is in the reference unit of its flow, which a separate flow dataset defines
copyright: true
licenseType: Free of charge for all users and uses
accessRestrictions: The license conditions as stated on https://www.oekobaudat.de/ apply.
accessRestrictions: Es gelten die Lizenzbedingungen wie sie auf https://www.oekobaudat.de/ genannt sind.

## General comment
This data set has been modeled according to the European Standard EN 15804+A2 for Sustainable Building. Results are depicted in modules that allow the structured expression of results over the entire life cycle.

## Geography
The data set represents the country specific situation in Germany, focusing on the main technologies, the region specific characteristics and / or import statistics.

## Time period
Annual average

## Technology and included processes
The processing of the raw materials starts with the washing of the rock, which has been extracted at open pit mine. With the addition of clear water the raw material is cleaned from desludging substances in various washing stages (clay) and from foreign matters (wood, kaolin, carbon, metals etc.). Then, a sorting with the help of a screen riddle and/or a preceding sorting machine. Sand and gravel with a SiO2 content of more than 96% are knwon as silica sand or quartz gravel. This is succeeded by the drying. In a hot-gas generator air is heated to 450° with a gas burner. With the hot air the drying of the granulate in the kiln is done, until the moisture content falls below 0.2%. The LCA of gravel covers the process of the extraction of natural aggregate and the processing in the gravel plant as well as the following drying. The system boundaries are represented by the finished product gravel 2/32 (dried) at the factory gate. Transports from the factory to the building site are not considered and must be included according to the system boundaries.
A transport distance of 10km is used between the quarry and the plant.

In the disposal phase, a mechanical dismantling (excavator) is assumed in module C1. The transport in module C2 to the treatment plant takes place with a truck (50km). In module C3, the material is processed, any reinforcement is fed to a sink (no loads, no credits). A treatment loss of 25% was assumed. This loss is fed to an inert material landfill within Module C3 (average landfill emissions). In Module D, a credit for the net amount of material (excluding reinforcement and treatment losses) for the substitution of natural gravel as backfill material is given.

## Technical purpose
This product can be used in construction.

## Safety margin
20 %. Product system depicted except for a few missing processes / flows. Technological, temporal and geographic representativeness partly given.

## Reference product
- Gravel 2/32 (dried): 1

## Inputs
- Use of renewable primary energy as energy carrier (PERE) [MJ]: A1-A3 0.0136044, C1 0.000250036, C2 0.00218616, C3 0.0132272, D -0.00517903
- Use of renewable primary energy resources used as raw materials (PERM) [MJ]: A1-A3 0, C1 0, C2 0, C3 0, D 0
- Total use of renewable primary energy (PERT) [MJ]: A1-A3 0.0136044, C1 0.000250036, C2 0.00218616, C3 0.0132272, D -0.00517903
- Use of non renewable primary energy as energy carrier (PENRE) [MJ]: A1-A3 0.584832, C1 0.00430813, C2 0.0376677, C3 0.11883, D -0.0190198
- Use of non renewable primary energy resources used as raw materials (PENRM) [MJ]: A1-A3 0, C1 0, C2 0, C3 0, D 0
- Total use of non renewable primary energy resource (PENRT) [MJ]: A1-A3 0.584832, C1 0.00430813, C2 0.0376677, C3 0.11883, D -0.0190198
- Use of secondary material (SM) [kg]: A1-A3 0, C1 0, C2 0, C3 0, D 0
- Use of renewable secondary fuels (SF) [MJ]: A1-A3 0, C1 0, C2 0, C3 0, D 0
- Use of non renewable secondary fuels (NRSF) [MJ]: A1-A3 0, C1 0, C2 0, C3 0, D 0
- Net use of fresh water (FW) [m3]: A1-A3 6.93265e-5, C1 2.2222e-7, C2 1.94295e-6, C3 3.00552e-5, D -3.13954e-6

## Outputs
- Hazardous waste disposed (HWD) [kg]: A1-A3 1.62437e-10, C1 1.80066e-13, C2 1.57439e-12, C3 9.72366e-12, D -3.06439e-12
- Non harzardous waste disposed (NHWD) [kg]: A1-A3 0.0251932, C1 6.9543e-7, C2 6.08042e-6, C3 0.291304, D -0.0126304
- Radioactive waste disposed (RWD) [kg]: A1-A3 1.33942e-6, C1 4.13421e-9, C2 3.61471e-8, C3 1.0478e-6, D -5.60933e-7
- Components for re-use (CRU) [kg]: A1-A3 0, C1 0, C2 0, C3 0, D 0
- Materials for recycling (MFR) [kg]: A1-A3 0, C1 0, C2 0, C3 0.7275, D 0
- Materials for energy recovery (MER) [kg]: A1-A3 0, C1 0, C2 0, C3 0, D 0
- Exported electrical energy (EEE) [MJ]: A1-A3 0, C1 0, C2 0, C3 0, D 0
- Exported thermal energy (EET) [MJ]: A1-A3 0, C1 0, C2 0, C3 0, D 0

## Impact indicators
- Global Warming Potential - total (GWP-total) [kg CO2 eq.]: A1-A3 0.0340342, C1 0.000322305, C2 0.00286116, C3 0.00753714, D -0.00144919
- Global Warming Potential - fossil fuels (GWP-fossil) [kg CO2 eq.]: A1-A3 0.0339242, C1 0.000320149, C2 0.00284173, C3 0.00760629, D -0.00144132
- Global Warming Potential - biogenic (GWP-biogenic) [kg CO2 eq.]: A1-A3 9.52766e-5, C1 6.93722e-8, C2 1.17716e-6, C3 -9.96475e-5, D -1.28539e-6
- Global Warming Potential - land use and land use change (GWP-luluc) [kg CO2 eq.]: A1-A3 1.47738e-5, C1 2.08733e-6, C2 1.82504e-5, C3 3.04888e-5, D -6.58439e-6
- Depletion potenzial of the stratospheric ozone layer (ODP) [kg CFC-11 eq.]: A1-A3 5.04058e-17, C1 8.31628e-20, C2 7.27125e-19, C3 3.15603e-17, D -1.86103e-17
- Acidifcation potential, Accumulated Exceedance (AP) [Mole of H+ eq.]: A1-A3 2.89823e-5, C1 4.31043e-6, C2 8.05696e-6, C3 6.11923e-5, D -4.77365e-6
- Eutrophication potential - freshwater (EP-freshwater) [kg P eq.]: A1-A3 1.37181e-8, C1 6.6843e-10, C2 5.84435e-9, C3 1.4705e-8, D -4.01055e-9
- Eutrophication potential - marine (EP-marine) [kg N eq.]: A1-A3 1.2625e-5, C1 1.96097e-6, C2 3.71167e-6, C3 2.29024e-5, D -1.85659e-6
- Eutrophication potential - terrestrial (EP-terrestrial) [Mole of N eq.]: A1-A3 0.00013923, C1 2.15611e-5, C2 4.15269e-5, C3 0.000251667, D -2.04387e-5
- Photochemical Ozone Creation Potential (POCP) [kg NMVOC eq.]: A1-A3 3.42085e-5, C1 5.87288e-6, C2 7.23785e-6, C3 6.75744e-5, D -4.39124e-6
- Abiotic depletion potential - non-fossil resources (ADPE) [kg Sb eq.]: A1-A3 3.15772e-9, C1 2.82717e-11, C2 2.47191e-10, C3 3.94691e-9, D -2.94365e-10
- Abiotic depletion potential - fossil resources (ADPF) [MJ]: A1-A3 0.584817, C1 0.00430795, C2 0.0376661, C3 0.118795, D -0.019016
- Water (user) deprivation potential (WDP) [m³ world equiv.]: A1-A3 0.000172398, C1 1.26344e-6, C2 1.10468e-5, C3 0.00100916, D -3.5134e-5

## Use advice
The data set represents a cradle to gate inventory. It can be used to characterise the supply chain situation of the respective commodity in a representative manner. Combination with individual unit processes using this commodity enables the generation of user-specific (product) LCAs.

## Data sources
- Waschen und Entwässern. Immer wichtiger bei der Aufbereitung von Kies, Sand und Naturstein, 2000
- Ökologische Bilanzierung von Baustoffen und Gebäuden, 2000
- Baustoff-Ökobilanz. Wirkungsabschätzung und Auswertung in der Steine-Erden-Industrie, 1999
- Documentation of data quality management
- GaBi Database Edition 2021, CUP2021.01
- GaBi database (all versions)
