# Cembrit Transparent

Dataset: ILCD process, EPD, average dataset
Geography: RER
Reference year: 2018
Valid until: 2023
Classification: OEKOBAU.DAT: Mineralische Baustoffe / Steine und Elemente / Faserzement
Classification: IBUCategories: 02 Building products / Facades / Fibre cement / Fibre concrete
Method details: Fibre cement / Fibre concrete.pdf
Generated by: Büro für Umweltchemie
Registration number: EPD-CEM-20180031-IAD1-EN
Owner: Cembrit Holding A/S
Compliance: DIN EN 15804; ISO 14025
Review: Accredited third party review by Institut Bauen und Umwelt e. V.
Amounts: rows without a unit in brackets have none in this file; such an amount is in the reference unit of its flow, which a separate flow dataset defines
copyright: true
licenseType: Free of charge for all users and uses
accessRestrictions: None

## General comment
Large-size, even boards made of natural-hardened fibre cement based on grey cement. The boards are made as pigmented boards (dyed) with a translucent or opaque Coating.

## Technology and included processes
The production of large-size boards made of fibre cement is carried out by an automated filament winding (see figure): The raw materials are treated with water to a homogeneous mixture. The mixture is pumped into head boxes, in which sieve cylinders rotate, that are dewatered inside. Thereby the sieve surface is covered with a thin fleece of fibre cement, which is transferred to the endless circulating conveyor belt (transport felt). From there, the fleece of fibre cement reaches a format roller, which is gradually covered with a thickening layer of fibre cement. Once the desired material thickness is achieved, the still moist and formable layer of fibre cement (fleece) is separated and unrolled from the format roller. In the next step, the layer of fibre cement (fleece) is punched, residual material is returned to the production process, so that no waste is left. The cut, not yet hardened, mouldable board is stacked with intermediate layers and pressed. Subsequently, the boards are stored for hardening, later stacked on pallets and stored for further hardening in a maturation store. The setting time is about four weeks. The visible side is usually coated for which high-grade pure acrylate paint is twice applied and hot-filmed in the casting process and spray treatment. The back side gets a single or double coating which is usually rolled on. A quality management system according to the /EN ISO 9001:2015/ has been introduced and certified in the manufacturing plants.
Technical data:
The following technical data are to be mentioned:
Declared unit:
The life-cycle assessment refers to 1 ton of fibre cement boards.

The declared indicators for the inventory and impact assessment indicators were calculated as an average, weighted by the production volumes, from the results of the life-cycle assessments of the production in the plants in Switzerland and Austria.

## Technical purpose
Even boards for installation on the facade or on the roof on substructures made of wood or metal. On the façade according to the principle of the curtain, ventilated facade.

## Reference product
- large-size fibre cement boards, pigmented, coated (): 1000

## Inputs
- Renewable primary energy as energy carrier (PERE) [MJ]: A1-A3 2740
- Renewable primary energy resources as material utilization (PERM) [MJ]: A1-A3 831
- Total use of renewable primary energy resources (PERT) [MJ]: A1-A3 3570
- Non renewable primary energy as energy carrier (PENRE) [MJ]: A1-A3 16100
- Non renewable primary energy as material utilization (PENRM) [MJ]: A1-A3 979
- Total use of non renewable primary energy resources (PENRT) [MJ]: A1-A3 17100
- Use of secondary material (SM) [kg]: A1-A3 0
- Use of renewable secondary fuels (RSF) [MJ]: A1-A3 0
- Use of non renewable secondary fuels (NRSF) [MJ]: A1-A3 0
- Use of net fresh water (FW) [m^3]: A1-A3 11.0355

## Outputs
- Hazardous waste disposed (HWD) [kg]: A1-A3 0.0303
- Non hazardous waste disposed (NHWD) [kg]: A1-A3 201
- Radioactive waste disposed (RWD) [kg]: A1-A3 0.0785
- Components for re-use (CRU) [kg]: A1-A3 0
- Materials for recycling (MFR) [kg]: A1-A3 0
- Materials for energy recovery (MER) [kg]: A1-A3 0
- Exported electrical energy (EEE) [MJ]: A1-A3 0
- Exported thermal energy (EET) [MJ]: A1-A3 0

## Impact indicators
- Global warming potential (GWP) [kg CO_(2)-Äq.]: A1-A3 1280
- Depletion potential of the stratospheric ozone layer (ODP) [kg CFC11-Äq.]: A1-A3 0.000156
- Acidification potential of land and water (AP) [kg SO_(2)-Äq.]: A1-A3 3.6
- Eutrophication potential (EP) [kg PO_(4)^(3)-Äq.]: A1-A3 0.49
- Formation potential of tropospheric ozone photochemical oxidants (POCP) [kg Ethen-Äq.]: A1-A3 0.245
- Abiotic depletion potential for non fossil resources (ADPE) [kg Sb-Äq.]: A1-A3 0.0183
- Abiotic depletion potential for fossil resources (ADPF) [MJ]: A1-A3 15700

## Use advice
Scope:
The EPD refers to large-size, coated grey boards made of fibre cement that are produced on behalf of Cembrit Holding A/S in Vöcklabruck, Austria. The EPD represents an average of the supplier´s average production, weighted by production volumes, in two production plants. Besides the Austrian one, a plant in Switzerland has been considered.
System boundary:
Type of the EPD: Cradle to factory gate

The LCA refers to the stage of product development in accordance with /EN 15804/ (information modules A1 to A3). Other life-cycle phases such as processing, use and disposal have not been accounted for. The system boundary includes the provision and processing of raw materials. These include in particular cement, plastic fibres, pulp and packaging materials (A1). The transports to the manufacturer (A2) were specifically collected for all starting materials. The production (A3) includes also all in-plant energy consumption, the consumption of auxiliary materials, VOC emissions of the coating process as well as the treatment of the quantities of waste and waste-water. All material and energy input processes of modules A1 to A3 and the treatment of all waste are part of the system. A large part of the waste arises when cutting the boards. Some of the waste-water is treated in in-plant sewage treatment plants.

## Data sources
- ecoinvent database (all versions)
- ecoinvent 3.1 database
