# EPDM roofing and waterproofing membranes NovoProof ® DA, FA, DA-F, DA-K, DA-S, DA-G, DA-FG, DA-SK

Dataset: ILCD process, EPD, average dataset
Geography: DE
Reference year: 2018
Valid until: 2023
Classification: OEKOBAU.DAT: Kunststoffe / Dachbahnen / Elastomer-Dachbahnen
Classification: IBUCategories: 02 Bauprodukte / Abdichtungen / Dach- und Dichtungsbahnsysteme aus Kunststoffen und Elastomeren
Method details: Dach- und Dichtungsbahnsysteme aus Kunststoffen und Elastomeren.pdf
Generated by: SaarGummi Construction Deutschland GmbH
Registration number: EPD-DUR-20180034-IBD1-DE
Owner: SaarGummi Construction Deutschland GmbH
Compliance: DIN EN 15804; ISO 14025
Review: Accredited third party review by Institut Bauen und Umwelt e. V.
Amounts: rows without a unit in brackets have none in this file; such an amount is in the reference unit of its flow, which a separate flow dataset defines
copyright: true
licenseType: Free of charge for all users and uses
accessRestrictions: None

## General comment
Normal 0 21 false false false DE X-NONE X-NONE

## Technology and included processes
Normal 0 21 false false false DE X-NONE X-NONE The quality of the finished products is regularly assured in the form of in-plant production inspections and external quality monitoring.
Technical data:
The information provided in the Declaration of Performance applies for the technical data.

n.a. = not applicable; data can be requested from the manufacturer

n.r. = not of relevance

The product’s performance values correspond with the Declaration of Performance in terms of its essential properties in accordance with /DIN EN 13956:2012/ - waterproofing membranes /DIN EN 13859-2:2014/ - waterproofing membranes
Declared unit:
Normal 0 21 false false false DE X-NONE X-NONE

The declared unit is 1 m² of the weighted average according to production volume for mechanically fastened, secured or adhered under ballast, hot air-welded NovoProof® roofing and waterproofing membranes (DA, DA-F, DA-K, DA-G, DA-S, DA-FG, DA-SK, FA), including packaging and fastening materials.

## Technical purpose
Normal 0 21 false false false DE X-NONE X-NONE

NovoProof® surface sealing systems are suitable for all single-ply laying systems on flat roofs.

Use is governed by the respective national regulations.

NovoProof® DA is supplied as prefabricated sealing membranes and loosely laid under ballast (gravel, tiles) or green roofs.

NovoProof® DA-F is supplied as prefabricated sealing membranes. Ballast is not necessary on account of the flame-retardant compound.

NovoProof® DA-K/S/G/FG sheets are mechanically fastened without ballast or partly adhered.

NovoProof® DA SK sheets are fully adhered across the surface without ballast.

NovoProof® FA is used for establishing permanently resilient, air- and waterproof sealing of window and facade connections. The sheet is adhered to the external wall and/or window.

## Scenarios
- S1: Thermal utilisation (C3-2 & D2)
- S2: Scenario 2

## Reference product
- EPDM Dach- und Dichtungsbahnen NOVOPROOF DA, FA, DA-F, DA-K, DA-S, DA-G, DA-FG, DA-SK: 1

## Inputs
- Renewable primary energy as energy carrier (PERE) [MJ]: A1-A3 9.6128, A4 0.0245, A5 0.9242, C2 0.00493, C3 (S1) 0.0633, C3 (S2) 0.0848, D (S1) -2.63, D (S2) -5.76
- Renewable primary energy resources as material utilization (PERM) [MJ]: A1-A3 0.0972, A4 0, A5 -0.0972, C2 0, C3 (S1) 0, C3 (S2) 0, D (S1) 0, D (S2) 0
- Total use of renewable primary energy resources (PERT) [MJ]: A1-A3 9.71, A4 0.0245, A5 0.827, C2 0.00493, C3 (S1) 0.0633, C3 (S2) 0.0848, D (S1) -2.63, D (S2) -5.76
- Non renewable primary energy as energy carrier (PENRE) [MJ]: A1-A3 88.84, A4 0.488, A5 14.1, C2 0.0982, C3 (S1) 0.186, C3 (S2) 25.361, D (S1) -78.2, D (S2) -29.1
- Non renewable primary energy as material utilization (PENRM) [MJ]: A1-A3 26.16, A4 0, A5 -1.5, C2 0, C3 (S1) -24.66, C3 (S2) -24.66, D (S1) 0, D (S2) 0
- Total use of non renewable primary energy resources (PENRT) [MJ]: A1-A3 115, A4 0.488, A5 12.6, C2 0.0982, C3 (S1) -24.474, C3 (S2) 0.701, D (S1) -78.2, D (S2) -29.1
- Use of secondary material (SM) [kg]: A1-A3 0, A4 0, A5 0, C2 0, C3 (S1) 0, C3 (S2) 0, D (S1) 0.8, D (S2) 0
- Use of renewable secondary fuels (RSF) [MJ]: A1-A3 0, A4 0, A5 0, C2 0, C3 (S1) 0, C3 (S2) 0, D (S1) 0, D (S2) 0
- Use of non renewable secondary fuels (NRSF) [MJ]: A1-A3 0, A4 0, A5 0, C2 0, C3 (S1) 0, C3 (S2) 0, D (S1) 0, D (S2) 0
- Use of net fresh water (FW) [m^3]: A1-A3 0.535, A4 4.53e-5, A5 0.0301, C2 9.12e-6, C3 (S1) 9.03e-5, C3 (S2) 0.00843, D (S1) -0.00935, D (S2) 0

## Outputs
- Hazardous waste disposed (HWD) [kg]: A1-A3 2.51e-7, A4 2.56e-8, A5 1.59e-8, C2 5.15e-9, C3 (S1) 7.53e-11, C3 (S2) 1.1e-9, D (S1) -3.82e-7, D (S2) -0.00392
- Non hazardous waste disposed (NHWD) [kg]: A1-A3 0.046, A4 3.73e-5, A5 0.00595, C2 7.5e-6, C3 (S1) 0.000122, C3 (S2) 0.0206, D (S1) -0.0322, D (S2) 0
- Radioactive waste disposed (RWD) [kg]: A1-A3 0.00209, A4 6.66e-7, A5 0.000257, C2 1.34e-7, C3 (S1) 2.89e-5, C3 (S2) 3.7e-5, D (S1) -0.000621, D (S2) 0
- Components for re-use (CRU) [kg]: A1-A3 0, A4 0, A5 0, C2 0, C3 (S1) 0, C3 (S2) 0, D (S1) 0, D (S2) 0
- Materials for recycling (MFR) [kg]: A1-A3 0, A4 0, A5 0, C2 0, C3 (S1) 1.59, C3 (S2) 0, D (S1) 0, D (S2) 0
- Materials for energy recovery (MER) [kg]: A1-A3 0, A4 0, A5 0, C2 0, C3 (S1) 0, C3 (S2) 0, D (S1) 0, D (S2) 0
- Exported electrical energy (EEE) [MJ]: A1-A3 0, A4 0, A5 0.263476, C2 0, C3 (S1) 0, C3 (S2) 5.93, D (S1) 0, D (S2) 0
- Exported thermal energy (EET) [MJ]: A1-A3 0, A4 0, A5 0.61069, C2 0, C3 (S1) 0, C3 (S2) 14.31, D (S1) 0, D (S2) 0

## Impact indicators
- Global warming potential (GWP) [kg CO_(2)-Äq.]: A1-A3 4.79, A4 0.0352, A5 0.69, C2 0.00708, C3 (S1) 0.0106, C3 (S2) 3.16, D (S1) -2.82, D (S2) -2.03
- Depletion potential of the stratospheric ozone layer (ODP) [kg CFC11-Äq.]: A1-A3 2.91e-7, A4 1.18e-14, A5 1.65e-8, C2 2.38e-15, C3 (S1) 4.7e-13, C3 (S2) 8.98e-10, D (S1) -3.34e-11, D (S2) -3.97e-12
- Acidification potential of land and water (AP) [kg SO_(2)-Äq.]: A1-A3 0.00986, A4 0.000147, A5 0.00109, C2 4.31e-5, C3 (S1) 3.03e-5, C3 (S2) 0.000245, D (S1) -0.0036, D (S2) -0.00221
- Eutrophication potential (EP) [kg PO_(4)^(3)-Äq.]: A1-A3 0.00117, A4 3.66e-5, A5 0.000119, C2 1.09e-5, C3 (S1) 2.74e-6, C3 (S2) 5.46e-5, D (S1) -0.000434, D (S2) -0.000349
- Formation potential of tropospheric ozone photochemical oxidants (POCP) [kg Ethen-Äq.]: A1-A3 0.000936, A4 -5.4e-5, A5 0.000125, C2 -1.92e-5, C3 (S1) 1.93e-6, C3 (S2) 2.24e-5, D (S1) -0.000525, D (S2) -0.000226
- Abiotic depletion potential for non fossil resources (ADPE) [kg Sb-Äq.]: A1-A3 1.53e-5, A4 2.83e-9, A5 3.18e-6, C2 5.7e-10, C3 (S1) 4.23e-9, C3 (S2) -4.36e-8, D (S1) -2.09e-6, D (S2) -5.75e-7
- Abiotic depletion potential for fossil resources (ADPF) [MJ]: A1-A3 110, A4 0.486, A5 11.9, C2 0.0978, C3 (S1) 0.113, C3 (S2) 0.598, D (S1) -76.6, D (S2) -26

## Use advice
Scope:
This EPD refers to the entire life cycle of an average roofing and waterproofing membrane produced by SaarGummi Construction Deutschland in the DA, FA, DA-F, DA-K, DA-G, DA-S, DA-FG and DA-SK variants. The various technical characteristics are depicted in section 2.3. The products are manufactured at the production facility in Wadern-Büschfeld, Germany.
System boundary:
Normal 0 21 false false false DE X-NONE X-NONE

Module D

The value streams arising from waste treatment (from A5 and C3) which can serve as energetic (incineration with energy recovery) or material input (recycling) for a downstream product system are indicated as benefits outside the system boundaries here.

## Data sources
- GaBi Database (all versions)
- GaBi database SP35 2018
