# Dachziegel - Gebr. Laumans GmbH & Co. KG - Flächenziegel inkl. Formziegel (Zubehör)

Dataset: ILCD process, EPD, specific dataset
Geography: DE
Reference year: 2019
Valid until: 2026
Classification: OEKOBAU.DAT: Mineralische Baustoffe / Steine und Elemente / Dachziegel
Synonyms: Formziegel; grobkeramische Deckelemente; Tondachziegel
Method details: EPD Dachziegel; Produktkategorieregeln Teil A; Produktkategorieregeln Teil B – für Bauprodukte aus gebranntem Ton
Owner: Gebr. Laumans GmbH & Co. KG
Compliance: EN 15804
Review: Independent external review by Eric Brehm
Amounts: rows without a unit in brackets have none in this file; such an amount is in the reference unit of its flow, which a separate flow dataset defines
copyright: true

## General comment
A1-A3 . Das Umweltprofil beinhaltet die Aufwendungen für die Lebenszyklus-Stadien cradle to gate (Modul A1-A3). Die Herstellung der Verpackung wurde innerhalb der Module A1-A3 berücksichtigt.

## Geography
Dieser Datensatz repräsentiert die Situation des Unternehmens Gebr. Laumans GmbH & Co. KG in 41379 Brüggen, im Hinblick auf die wichtigsten Technologien und die gesetzlichen Rahmenbedingungen.

## Time period
jährlicher Durchschnitt

## Technology and included processes
Die Ökobilanzergebnisse umfassen die Lebenszyklusstadien der Herstellung der Vorprodukte bis hin zur Rohstoffgewinnung und Verarbeitungsprozesse von als Input dienenden Sekundärstoffen (z.B. Recyclingprozesse), deren Transporte zum Werk sowie die Produktion selbst, einschließlich der Bereitstellung von allen Hilfs- und Betriebsstoffen, Energie, sowie die vollständige Abfallbehandlung oder die Deponierung der Restabfälle während des Stadiums der Produktion. Die Module A1, A2 und A3 sind hier als ein aggregiertes Modul A1-A3 ausgewiesen. Falls für diesen Datensatz weitere Module berechnet wurden, sind diese separat zu finden und können für eine Betrachtung des gesamten Lebenszyklus zusammengeführt werden.

## Technical purpose
Dachziegel kommen zum Einsatz bei Erstellung und Sanierung von Gebäuden

## Reference product
- Dachziegel - Gebr. Laumans GmbH & Co. KG - Flächenziegel inkl. Formziegel (Zubehöhr): 1000

## Inputs
- Use of net fresh water (FW) [m3]: A1-A3 0.4
- Nicht-erneuerbare Primärenergie als Energieträger (PENRE) [MJ]: A1-A3 3010
- Nicht-erneuerbare Primärenergie zur stofflichen Nutzung (PENRM) [MJ]: A1-A3 0
- Use of non renewable secondary fuels (NRSF) [MJ]: A1-A3 0
- Erneuerbare Primärenergie als Energieträger (PERE) [MJ]: A1-A3 285
- Erneuerbare Primärenergie zur stofflichen Nutzung (PERM) [MJ]: A1-A3 0
- Use of renewable secondary fuels (RSF) [MJ]: A1-A3 0
- Input of secondary material (SM) [kg]: A1-A3 0
- Total use of non-renewable primary energy resources (PENRT) [MJ]: A1-A3 3010
- Total use of renewable primary energy resources (PERT) [MJ]: A1-A3 285

## Outputs
- Components for re-use (CRU) [kg]: A1-A3 0
- Exported electrical energy (EEE) [MJ]: A1-A3 0
- Exported thermal energy (EET) [MJ]: A1-A3 0
- Hazardous waste disposed (HWD) [kg]: A1-A3 7.9e-5
- Material for Energy Recovery (MER) [kg]: A1-A3 0
- Materials for Recycling (MFR) [kg]: A1-A3 87.5
- Non-hazardous waste disposed (NHWD) [kg]: A1-A3 0.94
- Radioactive waste disposed (RWD) [kg]: A1-A3 0.000612

## Impact indicators
- Abiotic depletion potential for non fossil resources (ADPE) [kg Sb eq.]: A1-A3 1.4e-5
- Abiotic depletion potential for fossil resources (ADPF) [MJ]: A1-A3 3010
- Acidification potential of soil and water (AP) [kg SO2 eq.]: A1-A3 0.11
- Eutrophication potential (EP) [kg (PO4)3- eq.]: A1-A3 0.0206
- Global warming potential (GWP) [kg CO2 eq.]: A1-A3 189
- Depletion potential of the stratospheric ozone layer (ODP) [kg CFC 11 eq.]: A1-A3 1.94e-9
- Formation potential of tropospheric ozone (POCP) [kg C2H2 eq.]: A1-A3 0.0138

## Use advice
Dieser Datensatz beinhaltet die Ergebnisse für die Module A1-A3 gemäß EN 15804.
Ein Vergleich mit anderen Produkten ist nur mit einer vergleichbaren Anwendung im Gebäude zulässig. Grundsätzlich ist eine Gegenüberstellung oder die Bewertung von EPD Daten nur möglich, wenn alle zu vergleichenden Datensätze nach EN 15804 erstellt wurden und der Gebäudekontext, bzw. die produktspezifischen Leistungsmerkmale berücksichtigt werden.

## Review details
Die angewendete LCI Methode ist in Übereinstimmung mit ISO 14040 und 14044. Die Dokumentation enthält alle relevanten Informationen im Hinblick auf die Datenqualität und den Umfang der Anwendung der jeweiligen LCI Ergebnisse bzw. der Datensätze. Der Datensatz repräsentiert den Stand der Technik bezogen auf die funktionelle Einheit.

## Data sources
- GaBi database (general)
