# Rahmenlose Schiebefenster - Skyframe AG - Sky-Frame 3

Dataset: ILCD process, EPD, representative dataset
Geography: DE
Reference year: 2018
Valid until: 2023
Classification: OEKOBAU.DAT: Komponenten von Fenstern und Vorhangfassaden / Fenster / Metallfenster
Synonyms: Schiebetür; Schiebefenster; Fenster
Method details: EPD Rahmenlose Schiebefenster; Produktkategorieregeln Teil A; Produktkategorieregeln Teil B – für Fenster, Flachdachfenster, Lichtkuppeln und Lichtbänder
Owner: Sky-Frame AG
Compliance: EN 15804
Review: Independent external review by Patrick Wortner
Amounts: rows without a unit in brackets have none in this file; such an amount is in the reference unit of its flow, which a separate flow dataset defines
copyright: true

## General comment
Module A1-A3. Das Umweltprofil beinhaltet die Aufwendungen für die Lebenszyklus-Stadien cradle-to-gate (Modul A1-A3). Die Herstellung der Verpackung wurde innerhalb der Module A1-A3 berücksichtigt.

## Geography
Dieser Datensatz repräsentiert die Situation des Unternehmens Sky-Frame AG in 8500 Frauenfeld, Schweiz, im Hinblick auf die wichtigsten Technologien und die gesetzlichen Rahmenbedingungen.

## Time period
jährlicher Durchschnitt

## Technology and included processes
Die Ökobilanzergebnisse umfassen die Lebenszyklusstadien der Herstellung der Vorprodukte bis hin zur Rohstoffgewinnung und Verarbeitungsprozesse von als Input dienenden Sekundärstoffen (z.B. Recyclingprozesse), deren Transporte zum Werk sowie die Produktion selbst, einschließlich der Bereitstellung von allen Hilfs- und Betriebsstoffen, Energie, sowie die vollständige Abfallbehandlung oder die Deponierung der Restabfälle während des Stadiums der Produktion. Die Module A1, A2 und A3 sind hier als ein aggregiertes Modul A1-A3 ausgewiesen. Falls für diesen Datensatz weitere Module berechnet wurden, sind diese separat zu finden und können für eine Betrachtung des gesamten Lebenszyklus zusammengeführt werden.

## Technical purpose
Rahmenlose Schiebetüren / Fenster für den privatwirtschaftlichen Gebäudesektor.

## Reference product
- Rahmenlose Schiebefenster - Skyframe AG - Sky-Frame 3: 1

## Inputs
- Einsatz von Süßwasserressourcen (FW) [m3]: A1-A3 0.4
- Nicht-erneuerbare Primärenergie als Energieträger (PENRE) [MJ]: A1-A3 1375.37
- Nicht-erneuerbare Primärenergie zur stofflichen Nutzung (PENRM) [MJ]: A1-A3 15.86
- Nicht erneuerbare Sekundärbrennstoffe (NRSF) [MJ]: A1-A3 9.51e-8
- Erneuerbare Primärenergie als Energieträger (PERE) [MJ]: A1-A3 212.66
- Erneuerbare Primärenergie zur stofflichen Nutzung (PERM) [MJ]: A1-A3 42.42
- Erneuerbare Sekundärbrennstoffe (RSF) [MJ]: A1-A3 8.1e-9
- Einsatz von Sekundärstoffen (SM) [kg]: A1-A3 1.71
- Total nicht erneuerbare Primärenergie (PENRT) [MJ]: A1-A3 1391.23
- Total erneuerbare Primärenergie (PERT) [MJ]: A1-A3 255.08

## Outputs
- Komponenten für die Wiederverwendung (CRU) [kg]: A1-A3 0
- Exportierte elektrische Energie (EEE) [MJ]: A1-A3 0
- Exportierte thermische Energie (EET) [MJ]: A1-A3 0
- Gefährlicher Abfall zur Deponie (HWD) [kg]: A1-A3 1.89e-6
- Stoffe für die Energierückgewinnung (MER) [kg]: A1-A3 0
- Stoffe zum Recycling (MFR) [kg]: A1-A3 4.28
- Entsorgter nicht gefährlicher Abfall (NHWD) [kg]: A1-A3 43.12
- Entsorgter radioaktiver Abfall (RWD) [kg]: A1-A3 0.1

## Impact indicators
- Potenzial für den abiotischen Abbau nicht fossiler Ressourcen (ADPE) [kg Sb eq.]: A1-A3 0.000569
- Potenzial für den abiotischen Abbau fossiler Brennstoffe (ADPF) [MJ]: A1-A3 1123.96
- Versauerungspotenzial von Boden und Wasser (AP) [kg SO2 eq.]: A1-A3 0.59
- Eutrophierungspotenzial (EP) [kg (PO4)3- eq.]: A1-A3 0.0495
- Globales Erwärmungspotenzial (GWP) [kg CO2 eq.]: A1-A3 68.37
- Abbau Potential der stratosphärischen Ozonschicht (ODP) [kg CFC 11 eq.]: A1-A3 1.51e-7
- Bildungspotential für troposphärisches Ozon (POCP) [kg C2H2 eq.]: A1-A3 0.0313

## Use advice
Dieser Datensatz beinhaltet die Ergebnisse für die Module A1-A3 gemäß EN 15804. Ein Vergleich mit anderen Produkten ist nur mit einer vergleichbaren Anwendung im Gebäude zulässig. Grundsätzlich ist eine Gegenüberstellung oder die Bewertung von EPD Daten nur möglich, wenn alle zu vergleichenden Datensätze nach EN 15804 erstellt wurden und der Gebäudekontext, bz. die produktspezifischen Leistungsmerkmale berücksichtigt werden.

## Review details
Die angewendete LCI Methode ist in Übereinstimmung mit ISO 14040 und 14044. Die Dokumentation enthält alle relevanten Informationen im Hinblick auf die Datenqualität und den Umfang der Anwendung der jeweiligen LCI Ergebnisse bzw. der Datensätze. Der Datensatz repräsentiert den Stand der Technik bezogen auf die funktionelle Einheit.

## Data sources
- GaBi database (general)
