# Windows - heroal-Johann Henkenjohann GmbH & Co. KG - Aluminium lifting-sliding door / -PSK

Dataset: ILCD process, EPD, template dataset
Geography: DE
Reference year: 2019
Valid until: 2026
Classification: OEKOBAU.DAT: Komponenten von Fenstern und Vorhangfassaden / Fenster / Metallfenster
Synonyms: aluminium window systems; lifting-sliding door; lifting-sliding door systems; parallel sliding-tilting; S77; S77 SL; W72 PSK
Method details: Produktkategorieregeln Teil A; EPD heroal Windows and Lifting-Sliding Elements; Produktkategorieregeln Teil B – für Fenster, Flachdachfenster, Lichtkuppeln und Lichtbänder
Owner: heroal-Johann Henkenjohann GmbH & Co. KG
Compliance: EN 15804
Review: Independent external review by Patrick Wortner
Amounts: rows without a unit in brackets have none in this file; such an amount is in the reference unit of its flow, which a separate flow dataset defines
copyright: true

## General comment
aluminium windows with installation depths from 77 mm to 202 mm.
Face widths from 35 mm to 52 mm.

This dataset includes the results for modules A1-A3 as well as modules B2, B3, B4, B5, B6, B7, C1, C2, C3, C4, and D in accordance with EN 15804. The environmental profile includes the expenditures for the life cycle stages cradle to gate with options. The production of the packaging was taken into account within modules A1-A3.

## Geography
This data set represents the situation of companies manufacturing products corresponding to the systems of heroal-Johann Henkenjohann GmbH & Co. KG , with regard to the most important technologies and the legal framework.

## Time period
anual average

## Technology and included processes
The LCA results include the life cycle stages of the pre-products manufacture to the point of the raw material extraction and processing of secondary material input (e.g. recycling processes), their transport to the manufacturer as well as the maufacturing itself, including provision of all operating supplies, energy and the complete waste treatment or the landfill of residual waste during the stage of manufacture.
The modules A1, A2 and A3 are shown here as an aggregated module A1-A3. If further modules have been calculated for this dataset, these can be found separately and can be merged for consideration of the entire life cycle.

## Technical purpose
aluminium lifting-sliding door systems for all building classes.

## Reference product
- Window - heroal-Johann Henkenjohann GmbH & Co. KG - Aluminium lifting-sliding doors / PSK: 1

## Inputs
- Use of net fresh water (FW) [m3]: A1-A3 1.65, A4 0.00588, A5 0.00158, B2 0.28, B3 0.18, B4 0, B5 0, B6 0, B7 0, C1 0, C2 0.000916, C3 0.0229, C4 0.000925, D -0.68
- Nicht-erneuerbare Primärenergie als Energieträger (PENRE) [MJ]: A1-A3 2710, A4 92.1, A5 3.18, B2 1480, B3 777, B4 0, B5 2203.43, B6 0, B7 0, C1 0, C2 14.4, C3 70.41, C4 7.34, D -930
- Nicht-erneuerbare Primärenergie zur stofflichen Nutzung (PENRM) [MJ]: A1-A3 74.8, A4 0, A5 -3.06, B2 0, B3 0, B4 0, B5 0, B6 0, B7 0, C1 0, C2 0, C3 -68.15, C4 -3.59, D 0
- Use of non renewable secondary fuels (NRSF) [MJ]: A1-A3 0, A4 0, A5 0, B2 0, B3 0, B4 0, B5 0, B6 0, B7 0, C1 0, C2 0, C3 0, C4 0, D 0
- Erneuerbare Primärenergie als Energieträger (PERE) [MJ]: A1-A3 744, A4 5.13, A5 2.23, B2 21.1, B3 46.5, B4 0, B5 490.37, B6 0, B7 0, C1 0, C2 0.8, C3 0.7, C4 0.51, D -285
- Erneuerbare Primärenergie zur stofflichen Nutzung (PERM) [MJ]: A1-A3 2.21, A4 0, A5 -2.21, B2 0, B3 0, B4 0, B5 0.00404, B6 0, B7 0, C1 0, C2 0, C3 0, C4 0, D 0
- Use of renewable secondary fuels (RSF) [MJ]: A1-A3 0, A4 0, A5 0, B2 0, B3 0, B4 0, B5 0, B6 0, B7 0, C1 0, C2 0, C3 0, C4 0, D 0
- Input of secondary material (SM) [kg]: A1-A3 2.03, A4 0, A5 0, B2 0, B3 1.13, B4 0, B5 2.03, B6 0, B7 0, C1 0, C2 0, C3 0, C4 0, D 0
- Total use of non-renewable primary energy resources (PENRT) [MJ]: A1-A3 2780, A4 92.1, A5 0.12, B2 1480, B3 777, B4 0, B5 2198.63, B6 0, B7 0, C1 0, C2 14.4, C3 2.26, C4 3.75, D -930
- Total use of renewable primary energy resources (PERT) [MJ]: A1-A3 746, A4 5.13, A5 0.0231, B2 21.1, B3 46.5, B4 0, B5 490.16, B6 0, B7 0, C1 0, C2 0.8, C3 0.7, C4 0.51, D -285

## Outputs
- Components for re-use (CRU) [kg]: A1-A3 0, A4 0, A5 0, B2 0, B3 0, B4 0, B5 0, B6 0, B7 0, C1 0, C2 0, C3 0, C4 0, D 0
- Exported electrical energy (EEE) [MJ]: A1-A3 0.85, A4 0, A5 1.29, B2 0, B3 7.72, B4 0, B5 24.34, B6 0, B7 0, C1 0, C2 0, C3 22.2, C4 0, D 0
- Exported thermal energy (EET) [MJ]: A1-A3 1.88, A4 0, A5 2.31, B2 0, B3 13.7, B4 0, B5 43.69, B6 0, B7 0, C1 0, C2 0, C3 39.5, C4 0, D 0
- Hazardous waste disposed (HWD) [kg]: A1-A3 0.00474, A4 4.64e-9, A5 2.18e-11, B2 2.02e-7, B3 0.00408, B4 0, B5 0.00474, B6 0, B7 0, C1 0, C2 7.23e-10, C3 4.87e-10, C4 3.98e-10, D -1.39e-7
- Material for Energy Recovery (MER) [kg]: A1-A3 0, A4 0, A5 0, B2 0, B3 0, B4 0, B5 0, B6 0, B7 0, C1 0, C2 0, C3 0, C4 0, D 0
- Materials for Recycling (MFR) [kg]: A1-A3 2.85, A4 0, A5 0, B2 0, B3 29.4, B4 0, B5 20.85, B6 0, B7 0, C1 0, C2 0, C3 18, C4 0, D 0
- Non-hazardous waste disposed (NHWD) [kg]: A1-A3 53.7, A4 0.0137, A5 0.00795, B2 0.45, B3 29.5, B4 0, B5 59.67, B6 0, B7 0, C1 0, C2 0.00213, C3 0.042, C4 18.7, D -14.5
- Radioactive waste disposed (RWD) [kg]: A1-A3 0.11, A4 0.000111, A5 6.4e-6, B2 0.00331, B3 0.0147, B4 0, B5 0.0731, B6 0, B7 0, C1 0, C2 1.74e-5, C3 0.000219, C4 3.94e-5, D -0.0461

## Impact indicators
- Abiotic depletion potential for non fossil resources (ADPE) [kg Sb-Äqv.]: A1-A3 0.00126, A4 5.89e-7, A5 6.44e-9, B2 1.05e-5, B3 0.00114, B4 0, B5 0.00122, B6 0, B7 0, C1 0, C2 9.17e-8, C3 7.58e-8, C4 9.85e-8, D -7.3e-5
- Abiotic depletion potential for fossil resources (ADPF) [MJ]: A1-A3 2490, A4 91.8, A5 0.1, B2 1470, B3 739, B4 0, B5 2007.55, B6 0, B7 0, C1 0, C2 14.3, C3 1.7, C4 3.65, D -812
- Acidification potential of soil and water (AP) [kg SO2-Äqv.]: A1-A3 0.81, A4 0.0156, A5 6.76e-5, B2 0.0474, B3 0.39, B4 0, B5 0.62, B6 0, B7 0, C1 0, C2 0.00203, C3 0.00074, C4 0.00161, D -0.28
- Eutrophication potential (EP) [kg Phosphat-Äqv.]: A1-A3 0.0734, A4 0.00389, A5 1.39e-5, B2 0.00787, B3 0.0309, B4 0, B5 0.064, B6 0, B7 0, C1 0, C2 0.000502, C3 0.000153, C4 0.000183, D -0.0235
- Global warming potential (GWP) [kg CO2-Äqv.]: A1-A3 179, A4 6.74, A5 0.66, B2 48.2, B3 43.9, B4 0, B5 146.72, B6 0, B7 0, C1 0, C2 1.05, C3 10.5, C4 0.27, D -67.3
- Depletion potential of the stratospheric ozone layer (ODP) [kg R11 eq.]: A1-A3 4.76e-8, A4 1.18e-15, A5 9.71e-17, B2 1.04e-13, B3 1.64e-8, B4 0, B5 4.76e-8, B6 0, B7 0, C1 0, C2 1.83e-16, C3 2.8e-15, C4 1.46e-15, D -2.9e-13
- Formation potential of tropospheric ozone (POCP) [kg Ethen-Äqv.]: A1-A3 0.0478, A4 -0.00555, A5 5.64e-6, B2 0.0129, B3 0.0222, B4 0, B5 0.0338, B6 0, B7 0, C1 0, C2 -0.00066, C3 7.48e-5, C4 0.000123, D 0.00142

## Use advice
This dataset is modelled according to the European Standard EN 15804 for Sustainable Construction. Results are declared in modules, which allow the structured expression of results throughout the life cycle. It contains the modules A1-A3, A4, A5, B2, B3, B4, B5, B6, B7, C1, C2, C3, C4, D.
The comparison with other products is only permissible if the application in the building is comparable. A comparison or the evaluation of EPD data is only possible, if the datasets have been created according to EN 15804. The building context or the product-specific performance characteristics must be considered.

The model-EPD becomes valid when it is transferred to the manufacturer by the ift. Currently valid EPDs can be found in the following list and are published on www.ift-service.de/epd.
EPD-number and declaration holder:
There are currently no valid EPDs available.

## Review details
The LCI method applied is in compliance with ISO 14040 and 14044. The documentation includes all relevant information in view of the data quality and scope of the application of the respective LCI result / data set. The dataset represents the state-of-the-art in view of the referenced functional unit.

## Data sources
- GaBi database (general)
