# frame profiles for doors - Verband Fenster + Fassade - frame profile for fire control doors made of (stainless) steel

Dataset: ILCD process, EPD, template dataset
Geography: RER
Reference year: 2017
Valid until: 2023
Classification: OEKOBAU.DAT: Komponenten von Fenstern und Vorhangfassaden / Rahmen / Profile / Stahl
Synonyms: fire control door frame profile made of steel, stainless steel or weather resistant structural steel
Method details: Produktkategorieregeln Teil A; Produktkategorieregeln Teil B – für Türen und Tore
Generated by: ift Rosenheim
Registration number: M-EPD-TUE-000
Owner: Verband Fenster + Fassade
Compliance: EN 15804
Review: Independent external review by Patrick Wortner
Amounts: rows without a unit in brackets have none in this file; such an amount is in the reference unit of its flow, which a separate flow dataset defines
copyright: true
licenseType: Free of charge for all users and uses
accessRestrictions: None
Declaration holders can be found on page 3.

## General comment
This dataset contains the results for the modules A1-A3 according to the European Standard EN 15804 for Sustainable Construction. The comparison with other products is only permissible if the application in the building is comparable. In principle, a comparison or the evaluation of EPD data is only possible, if all compared datasets have been generated in accordance with EN 15804 and the building context or the product-specific performance characteristics are taken into account.

## Geography
This data set represents the situation of companies producing products according to the systems of Forster Profilsysteme AG, Jansen AG, RP Technik GmbH, Ottostumm SA, voestalpine Krems GmbH, with regard to the most important technologies and the legal framework.

## Time period
annual average

## Technology and included processes
The LCA results include the life cycle stages of the pre-products manufacture to the point of the raw material extraction and processing of secondary material input (e.g. recycling processes), their transport to the manufacturer as well as the maufacturing itself, including provision of all operating supplies, energy and the complete waste treatment or the landfill of residual waste during the stage of manufacture.
The modules A1, A2 and A3 are shown here as an aggregated module A1-A3. If further modules have been calculated for this dataset, these can be found separately and can be merged for consideration of the entire life cycle.

## Technical purpose
Steel/stainless steel doors for use in office and administration buildings, public buildings as well as private buildings.

## Reference product
- frame profiles for doors - Verband Fenster + Fassade - frame profile for fire control doors made of (stainless) steel: 1

## Inputs
- Use of net fresh water (FW) [m3]: A1-A3 0.16
- Nicht-erneuerbare Primärenergie als Energieträger (PENRE) [MJ]: A1-A3 521.99
- Nicht-erneuerbare Primärenergie zur stofflichen Nutzung (PENRM) [MJ]: A1-A3 34.6
- Use of non renewable secondary fuels (NRSF) [MJ]: A1-A3 1.68e-8
- Erneuerbare Primärenergie als Energieträger (PERE) [MJ]: A1-A3 88.72
- Erneuerbare Primärenergie zur stofflichen Nutzung (PERM) [MJ]: A1-A3 0
- Use of renewable secondary fuels (RSF) [MJ]: A1-A3 1.43e-9
- Input of secondary material (SM) [kg]: A1-A3 0
- Total use of non-renewable primary energy resources (PENRT) [MJ]: A1-A3 556.59
- Total use of renewable primary energy resources (PERT) [MJ]: A1-A3 88.72

## Outputs
- Components for re-use (CRU) [kg]: A1-A3 0
- Exported electrical energy (EEE) [MJ]: A1-A3 0.37
- Exported thermal energy (EET) [MJ]: A1-A3 0.69
- Hazardous waste disposed (HWD) [kg]: A1-A3 5.98e-7
- Material for Energy Recovery (MER) [kg]: A1-A3 0
- Materials for Recycling (MFR) [kg]: A1-A3 0
- Non-hazardous waste disposed (NHWD) [kg]: A1-A3 1.51
- Radioactive waste disposed (RWD) [kg]: A1-A3 0.0286

## Impact indicators
- Abiotic depletion potential for non fossil resources (ADPE) [kg Sb-Äqv.]: A1-A3 9.94e-5
- Abiotic depletion potential for fossil resources (ADPF) [MJ]: A1-A3 482.92
- Acidification potential of soil and water (AP) [kg SO2-Äqv.]: A1-A3 0.1
- Eutrophication potential (EP) [kg Phosphat-Äqv.]: A1-A3 0.00961
- Global warming potential (GWP) [kg CO2-Äqv.]: A1-A3 37.89
- Depletion potential of the stratospheric ozone layer (ODP) [kg R11 eq.]: A1-A3 1.09e-8
- Formation potential of tropospheric ozone (POCP) [kg Ethen-Äqv.]: A1-A3 0.00984

## Use advice
A1-A3. The environmental profile includes the life cycle stages cradle to gate.

The model EPD obtains validity through the transfer to the manufacturer by the ift. Currently valid EPDs are to be taken from the list below and are published on www.ift-service.de/epd.
EPD number and declaration holder:
- M-EPD-TUE-GB-001, Thoruns AB, SE-63103 Eskilstuna
- M-EPD-TUE-GB-002, CREANI SL, ES-08401 Granollers
- M-EPD-TUE-GB-003, TALOS Metallbau, GR-19002 Paiania
- M-EPD-TUE-GB-004, Sobrima SAS, FR-67726 Hoerdt Cedex
- M-EPD-TUE-GB-005, Sottas SA, CH-1630 Bulle
- M-EPD-TUE-006, Jansen AG, CH-9463 Oberriet

## Review details
The LCI method applied is in compliance with ISO 14040 and 14044. The documentation includes all relevant information in view of the data quality and scope of the application of the respective LCI result or data set. The dataset represents the state-of-the-art with regard to to the functional unit.

## Data sources
- GaBi database (general)
