# Styrodur® BMB

Dataset: ILCD process, EPD, specific dataset
Geography: DE
Reference year: 2019
Valid until: 2022
Classification: OEKOBAU.DAT: Dämmstoffe / Extrudiertes Polystyrol (XPS) / XPS weiß
Classification: IBUCategories: 02 Bauprodukte / Wärmedämmungsprodukte / Dämmstoffe aus Schaumkunststoffen
Method details: Dämmstoffe aus Schaumkunststoffen.pdf
Registration number: EPD-BAS-20190114-IBA1-DE
Owner: BASF SE
Compliance: DIN EN 15804; ISO 14025
Review: Accredited third party review by Institut Bauen und Umwelt e. V.
Amounts: rows without a unit in brackets have none in this file; such an amount is in the reference unit of its flow, which a separate flow dataset defines
copyright: true

## General comment
Styrodur® BMB ist eine Dämmstoffplatte aus extrud- iertem Polystyrolhartschaum (XPS) entsprechend der /EN 13164/, welche im Rohdichtenbereich von ca. 31 bis 39 kg/m³ hergestellt wird. Die Styrodur® BMB Platten werden mit einer Druckfestigkeitsstufe von 300 kPa im Dickenbereich 30 bis 240 mm geliefert.

„BMB“ steht für Biomassenbilanz-Produkte. Im Biomassenbilanzverfahren werden erneuerbare Roh- stoffe wie Bio-Naphtha oder Biogas bei der Herstellung von chemischen Grundprodukten im Produktions- verbund der BASF gemeinsam mit fossilen Rohstoffen eingesetzt. Der Bioanteil wird dann nach der zertifizierten Methode /TÜV Süd Standard CMS 71/ bestimmten BASF-Verkaufsprodukten wie Styrodur® BMB rechnerisch zugeordnet. BMB-Produkte haben die gleiche Qualität wie Nicht-BMB-Produkte, da die Formulierung des Produktes identisch ist mit der des fossilen Äquivalents.

Der Biomassenbilanz-Ansatz der BASF unterstützt die Verwendung von erneuerbaren Rohstoffen, die zu einer Einsparung von fossilen Rohstoffen und zu einer Reduzierung von Treibhausgasemissionen führt. Für die eingesetzte Biomasse muss ein Nachweis der Nachhaltigkeit in Form eines Zertifikats eines gemäß Erneuerbare-Energien-Richtlinie anerkannten Standards erbracht werden. Styrodur® BMB wird aus Biogas hergestellt, das aus Küchenabfällen gewonnen wird. Das eingesetzte Biogas ist nach dem /REDcert/ System zertifiziert.

## Technology and included processes
Styrodur® BMB wird in einem kontinuierlichen Extru-sionsprozess mit Dampf als Hauptenergieträger hergestellt. Polystyrol-Granulat wird zusammen mit den Hilfsstoffen im Extruder unter hohem Druck aufge-schmolzen. Das Treibmittel Kohlendioxid wird der Schmelze hinzugegeben und in ihr gelöst. Die Schmelze wird durch eine Breitschlitzdüse ausgetrag-en. Durch den Schaumdruck schäumt das Treibmittel die Schmelze auf. Dabei kühlt diese ab und das Polystyrol verfestigt sich. Es entsteht ein endloser Strang aus homogenem und geschlossenzelligem Polystyrolhartschaum. Dieser wird weiter abgekühlt und anschließend dimensioniert, besäumt und in einer 4- oder 6- Seitenverpackung mit Polyethylenfilm verpackt und palettiert. Durch die Verwendung von unterschiedlichen Düsen können Plattenstärken bis 240 mm produziert werden. Produktionsabschnitte und -ausschüsse von Styrodur® BMB werden direkt für die Produktion von neuen Platten wiederverwendet.
Technische Daten:
Leistungswerte des Produkts entsprechend der Leistungserklärung in Bezug auf dessen wesentliche Merkmale gemäß /ETA-17/0913/ vom 13. November 2017, Styrodur 3000 CS.
Deklarierte Einheit:
Diese Deklaration bezieht sich auf 1 m2 Styrodur® BMB mit einer Stärke von 120 mm, d. h. 0,12 m³ mit einer Dichte von 32,5 kg/m3 (Referenzprodukt). Dieses Produkt wurde gewählt, da es mengenmäßig das marktgängigste Produkt darstellt.

## Technical purpose
Anwendungsgebiete sind nach der /DIN 4108-10/ Wärmedämmung von Dach, Decke, Wand, Boden und Perimeter mit dort festgelegten Anforderungen an die physikalischen Eigenschaften: Perimeterdämmung der Bodenplatte, Perimeterdämmung der Kelleraußen- wände, Flachdachdämmung nach dem Umkehrdach- prinzip, Wärmedämmung von Fußböden z.B. hochbelasteter Industriefußböden, Außenwanddäm-mung, als Kerndämmung in zweischaligem Mauer-werk, Innendämmung von Wänden, Innendämmung von Decken, Wärmedämmung von Steildächern oberhalb und unterhalb der Sparren.

## Reference product
- Styrodur® BMB Platte (Dicke: 120 mm): 1

## Inputs
- Erneuerbare Primärenergie als Energieträger (PERE) [MJ]: A1-A3 465.98, A4 0.29, A5 0.01, C2 0.03, C4 155.96, D -21.89
- Erneuerbare Primärenergie zur stofflichen Nutzung (PERM) [MJ]: A1-A3 155.61, A4 0, A5 0, C2 0, C4 -155.61, D 0
- Total erneuerbare Primärenergie (PERT) [MJ]: A1-A3 621.59, A4 0.29, A5 0.01, C2 0.03, C4 0.35, D -21.89
- Nicht-erneuerbare Primärenergie als Energieträger (PENRE) [MJ]: A1-A3 158.96, A4 4.73, A5 4.2, C2 0.47, C4 1.85, D -91.57
- Nicht-erneuerbare Primärenergie zur stofflichen Nutzung (PENRM) [MJ]: A1-A3 4.15, A4 0, A5 -4.15, C2 0, C4 0, D 0
- Total nicht erneuerbare Primärenergie (PENRT) [MJ]: A1-A3 163.11, A4 4.73, A5 0.05, C2 0.47, C4 1.85, D -91.57
- Einsatz von Sekundärstoffen (SM) [kg]: A1-A3 4.97, A4 0, A5 0, C2 0, C4 0, D 0
- Erneuerbare Sekundärbrennstoffe (RSF) [MJ]: A1-A3 0, A4 0, A5 0, C2 0, C4 0, D 0
- Nicht erneuerbare Sekundärbrennstoffe (NRSF) [MJ]: A1-A3 0, A4 0, A5 0, C2 0, C4 0, D 0
- Einsatz von Süßwasserressourcen (FW) [m^3]: A1-A3 0.06, A4 0.000332, A5 0.000587, C2 3.3e-5, C4 0.0249, D -0.0118

## Outputs
- Gefährlicher Abfall zur Deponie (HWD) [kg]: A1-A3 8.7e-5, A4 2.68e-7, A5 2.31e-10, C2 2.66e-8, C4 1.66e-9, D -5.17e-8
- Entsorgter nicht gefährlicher Abfall (NHWD) [kg]: A1-A3 0.155, A4 0.000334, A5 0.00111, C2 3.32e-5, C4 0.0484, D -0.0489
- Entsorgter radioaktiver Abfall (RWD) [kg]: A1-A3 0.0105, A4 7.13e-6, A5 1.36e-6, C2 7.08e-7, C4 6.04e-5, D -0.00381
- Komponenten für die Wiederverwendung (CRU) [kg]: A1-A3 0, A4 0, A5 0, C2 0, C4 0, D 0
- Stoffe zum Recycling (MFR) [kg]: A1-A3 0, A4 0, A5 0, C2 0, C4 0, D 0
- Stoffe für die Energierückgewinnung (MER) [kg]: A1-A3 0, A4 0, A5 0, C2 0, C4 0, D 0
- Exportierte elektrische Energie (EEE) [MJ]: A1-A3 0, A4 0, A5 0.5, C2 0, C4 20.16, D 0
- Exportierte thermische Energie (EET) [MJ]: A1-A3 0, A4 0, A5 1.14, C2 0, C4 46.5, D 0

## Impact indicators
- Globales Erwärmungspotenzial (GWP) [kg CO_(2)-Äq.]: A1-A3 3.25, A4 0.35, A5 0.27, C2 0.04, C4 13.18, D -6.3
- Abbau Potential der stratosphärischen Ozonschicht (ODP) [kg CFC11-Äq.]: A1-A3 1.48e-9, A4 1.67e-16, A5 4.69e-17, C2 1.66e-17, C4 2.09e-15, D -1.32e-13
- Versauerungspotenzial von Boden und Wasser (AP) [kg SO_(2)-Äq.]: A1-A3 0.0267, A4 0.000981, A5 2.53e-5, C2 9.75e-5, C4 0.00104, D -0.00606
- Eutrophierungspotenzial (EP) [kg PO_(4)^(3)-Äq.]: A1-A3 0.00486, A4 0.000238, A5 5.66e-6, C2 2.37e-5, C4 0.000233, D -0.00107
- Bildungspotential für troposphärisches Ozon (POCP) [kg Ethen-Äq.]: A1-A3 0.0357, A4 -0.000368, A5 1.61e-6, C2 -3.66e-5, C4 7.6e-5, D -0.000537
- Potenzial für den abiotischen Abbau nicht fossiler Ressourcen (ADPE) [kg Sb-Äq.]: A1-A3 5.54e-6, A4 3.23e-8, A5 5.25e-10, C2 3.21e-9, C4 2.23e-8, D -1.4e-6
- Potenzial für den abiotischen Abbau fossiler Brennstoffe (ADPF) [MJ]: A1-A3 135.17, A4 4.71, A5 0.04, C2 0.47, C4 1.7, D -81.94

## Use advice
Gültigkeitsbereich:
Styrodur® BMB wird zu 100% am Standort von BASF SE in Ludwigshafen hergestellt. Die EPD gilt für das Produktsortiment Styrodur® BMB 3000 CS/SQ der BASF SE. Es wurden Daten aus dem Jahr 2017 verwendet.
Systemgrenze:
Typ der EPD: Cradle-to-Gate-mit Optionen

Die in der Lebenszyklusbewertung berücksichtigten Module sind:

- Rohstoffbereitstellung (A1)

- Transport zum Hersteller (A2)

- Herstellung (A3)

- Transporte zur Baustelle (A4)

- Montage (A5)

- Transport zur Abfallbehandlung (C2)

- Entsorgung (C4)

- Wiederverwendungs-, Verwertungs- oder

Recyclingpotential (D)

Die Analyse des Produktlebenszyklus umfasst die Herstellung der Grundstoffe, den Transport der Grundstoffe, die Herstellung des Produkts und der Verpackungsmaterialien in den Modulen A1-A3. Der Transport des Produkts wird in Modul A4 und die Entsorgung der Verpackungsmaterialien im Modul A5 berücksichtigt. Zurückgewonnene Energien aus Verbrennungsprozessen werden in Modul D über die Systemgrenze hinaus deklariert.

Die Nutzenphase wird bei den Ökobilanzberechnungen nicht berücksichtigt.
Die End-of-Life-Modellierungen (EoL) umfassen den Transport bis zum Ende der Lebensdauer (C2) sowie die Entsorgung des Produktes durch Verbrennung (C4).

Die Bilanzierung des Biomethans aus Küchenabfällen umfasst alle relevanten Prozessschritte von der Rohstoffgewinnung bis zur Herstellung (cradle-to-gate). Die Küchenabfälle haben keinen ökonomischen Wert und werden daher ohne Lasten berücksichtigt.

Sie verlieren ihre Abfalleigenschaften sobald sie in Biogas umgewandelt sind.

Die Aufnahme von biogenem Kohlendioxid aus der Atmosphäre wird entsprechend dem biogenen Kohlenstoff-Gehalt im BMB-Produkt berücksichtigt (A1-A3). Bei der Entsorgung des Produktes werden biogene CO2-Emissionen wieder freigesetzt, die in C4 betrachtet sind.

## Data sources
- Styrodur® BMB.pdf
- GaBi Database (all versions)
- GaBi database SP37 2019
