# Polystyrene foam filling (cement bound)

Dataset: ILCD process, EPD, generic dataset
Geography: DE
Reference year: 2018
Valid until: 2022
Classification: oekobau.dat: Dämmstoffe / Expandiertes Polystyrol (EPS) / EPS weiß
Owner: thinkstep
Compliance: DIN EN 15804
Review: Dependent internal review by thinkstep, IABP-GaBi, IBP-GaBi; Independent external review by GaBi user forum, GaBi bug forum, GaBi user community
Amounts: rows without a unit in brackets have none in this file; such an amount is in the reference unit of its flow, which a separate flow dataset defines
copyright: true

## General comment
This data set has been modeled according to the European Standard EN 15804 for Sustainable Building. Results are depicted in modules that allow the structured expression of results over the entire life cycle.

## Geography
The data set represents the country specific situation in Germany, focusing on the main technologies, the region specific characteristics and / or import statistics.

## Time period
annual average

## Technology and included processes
Usually, EPS particles are produced for fillings by grinding production waste (for example from EPS plate production). Since the price differences per unit of volume for EPS plates and EPS filling are negligibly small, no economic allocation of the environmental burden between main product and by-product was applied. Instead, balancing was applied for 100% primary material. Other raw materials include cement and sand. The mixture is mixed with water and installed similar to a cement screed. The production of EPS and the use of cement dominate the life cycle assessment (together > 80% of the GWP).

Background system:
Electricity: Electricity from renewable and non- renewable powerplants is modelled so that it represents a countrys specific consumption mix including transmission / distribution losses, own consumption, imports, emissions and efficiency standards, and energy carrier properties. Several factors are taken into account. (1) Energy carrier production - The exploration, mining / production, processing, and transportation of energy carrier supply chains are modelled for each country. The models account for differences among countries in production and processing, including crude oil production technologies, flaring rates, production efficiencies, emissions, etc. (2) Energy carrier supply - Each countrys specific energy carrier supply is modelled, taking into account domestic supply versus imports from abroad. Energy carrier properties (e.g. carbon and energy content), which can vary depending from where an energy carrier is sourced, are adjusted accordingly. (3) Power plants - Models are created to represent energy carrier-specific power plants and electricity generation facilities specific to different renewable energy resources. Energy carrier production and supply models are used to represent power plant inputs. Combined heat and power (CHP) plants are also considered. (4) Electricity grid - Models representing the electricity generation facilities are combined into a larger model that reflects a countrys consumption mix. The larger model accounts for a countrys production mix, internal consumption (e.g. pumped storage for hydro power), transmission / distribution losses, and imported electricity. The country model is also adjusted according to national power plant emission and efficiency standards, as well as the countrys share of electricity plants versus CHP facilities.
Thermal energy, process steam: The thermal energy and process steam supply is modelled to reflect each countrys emission standards and typical energy carriers (e.g., coal, natural gas, etc.) Both thermal energy and process steam are assumed to be produced at heat plants. Thermal energy datasets assume energy carrier inputs are converted to thermal energy with 100% efficiency; process steam datasets assume conversion efficiencies of 85%, 90% to 95%. The energy carriers used for the generation of thermal energy and process steam are modelled according to each countrys import situation (see electricity above).
Transportation: All relevant and known transportation processes are included. Ocean-going and inland ship transport as well as rail, truck and pipeline transport of bulk commodities are considered.
Energy carriers: The energy carriers and their respective properties are modelled according to the specific supply situation (see electricity above).
Refinery products: Diesel fuel, gasoline, technical gases, fuel oils, lubricants and residues such as bitumen are modelled with a parameterised country-specific refinery model. The refinery model aims to represent each countrys refining processes (e.g. emissions levels, internal energy consumption, etc.), as well as the countrys product output spectrum, which can vary significantly among countries. The supply of crude oil is likewise modelled according to the country-specific situation and accounts for differences in resource properties (e.g., crude oil energy content).

## Technical purpose
Bound fills of polystyrene foam (EPS) are used as a insulation and leveling layer, especially in old buildings. With an appropriate structure (load-distributing layer over the fill) loads of up to 5 kN/m² can be removed through the fill. Fill hights from 4-50 cm can be introduced in one work step.

## Safety margin
10 %. Product system almost completely covered. Good technological, temporal and geographic representativeness.

## Reference product
- Polystyrene foam filling (cement bound) [m3]: 1

## Inputs
- Use of renewable primary energy (PERE) [MJ]: A1-A3 111.135, C1 0, C2 0.0559328, C3 3.35622, D -181.187
- Primary energy resources used as raw materials (PERM) [MJ]: A1-A3 0, C1 0, C2 0, C3 0, D 0
- Total use of renewable primary energy resources (PERT) [MJ]: A1-A3 111.135, C1 0, C2 0.0559328, C3 3.35622, D -181.187
- Use of non-renewable primary energy (PENRE) [MJ]: A1-A3 1750.42, C1 0, C2 0.96078, C3 1269.1, D -633.971
- Non-renewable primary energy resources used as raw materials (PENRM) [MJ]: A1-A3 1253.56, C1 0, C2 0, C3 -1253.56, D 0
- Total use of non-renewable primary energy resources (PENRT) [MJ]: A1-A3 3003.98, C1 0, C2 0.96078, C3 15.5447, D -633.971
- Input of secondary material (SM) [kg]: A1-A3 0, C1 0, C2 0, C3 0, D 0
- Use of renewable secondary fuels (RSF) [MJ]: A1-A3 0, C1 0, C2 0, C3 0, D 0
- Use of non renewable secondary fuels (NRSF) [MJ]: A1-A3 0, C1 0, C2 0, C3 0, D 0
- Use of net fresh water (FW) [m3]: A1-A3 0.463155, C1 0, C2 5.00925e-5, C3 0.19699, D -0.0845199

## Outputs
- Hazardous waste disposed (HWD) [kg]: A1-A3 1.61569e-6, C1 0, C2 3.59034e-8, C3 1.50793e-8, D -3.35139e-7
- Non-hazardous waste disposed (NHWD) [kg]: A1-A3 7.29626, C1 0, C2 0.000168634, C3 0.627934, D -0.298238
- Radioactive waste disposed (RWD) [kg]: A1-A3 0.0186601, C1 0, C2 1.0115e-6, C3 0.00048624, D -0.0218902
- Components for re-use (CRU) [kg]: A1-A3 0, C1 0, C2 0, C3 0, D 0
- Materials for Recycling (MFR) [kg]: A1-A3 0, C1 0, C2 0, C3 0, D 0
- Material for Energy Recovery (MER) [kg]: A1-A3 0, C1 30.8, C2 0, C3 0, D 0
- Exported electrical energy (EEE) [MJ]: A1-A3 0, C1 0, C2 0, C3 159.262, D 0
- Exported thermal energy (EET) [MJ]: A1-A3 0, C1 0, C2 0, C3 367.242, D 0

## Impact indicators
- Global warming potential (GWP) [kg CO2 eq.]: A1-A3 160.083, C1 0, C2 0.0714833, C3 103.432, D -43.3217
- Ozone Depletion Potential (ODP) [kg R11 eq.]: A1-A3 5.83396e-13, C1 0, C2 2.36612e-17, C3 1.89926e-14, D -1.00188e-12
- Acidification potential (AP) [kg SO2 eq.]: A1-A3 0.165967, C1 0, C2 0.000144388, C3 0.00821342, D -0.0365647
- Eutrophication potential (EP) [kg Phosphate eq.]: A1-A3 0.0225384, C1 0, C2 3.43251e-5, C3 0.00185421, D -0.0069288
- Photochemical Ozone Creation Potential (POCP) [kg Ethene eq.]: A1-A3 0.492608, C1 0, C2 -4.71913e-5, C3 0.000607381, D -0.00372505
- Abiotic depletion potential for non fossil resources (ADPE) [kg Sb eq.]: A1-A3 1.22928e-5, C1 0, C2 6.01538e-9, C3 2.02809e-7, D -1.07577e-5
- Abiotic depletion potential for fossil resources (ADPF) [MJ]: A1-A3 2956.89, C1 0, C2 0.958195, C3 14.3173, D -578.709

## Use advice
This dataset refers to 1 m³ polystyrene foam filling. Cement is used as binding agent. Dry bulk density 350 kg/m³, thermal conductivity 0.1 - 0.15 W/mK. The dataset can be used for approximate estimation of other bulk densities of 300 - 400 kg.

The data set represents a cradle to gate inventory. It can be used to characterise the supply chain situation of the respective commodity in a representative manner. Combination with individual unit processes using this commodity enables the generation of user-specific (product) LCAs.

## Data sources
- GaBi databases
- GaBi Database Edition 2020, SP40
- GaBi database (all versions)
