# Melamin resin foam; 10 kg/m3

Dataset: ILCD process, EPD, generic dataset
Geography: DE
Reference year: 2018
Valid until: 2022
Classification: oekobau.dat: Dämmstoffe / Melaminharz / Schaum
Owner: thinkstep
Compliance: DIN EN 15804
Review: Dependent internal review by thinkstep, IABP-GaBi, IBP-GaBi; Independent external review by GaBi user forum, GaBi bug forum, GaBi user community
Amounts: rows without a unit in brackets have none in this file; such an amount is in the reference unit of its flow, which a separate flow dataset defines
copyright: true

## General comment
This data set has been modeled according to the European Standard EN 15804 for Sustainable Building. Results are depicted in modules that allow the structured expression of results over the entire life cycle.

## Geography
The data set represents the country specific situation in Germany, focusing on the main technologies, the region specific characteristics and / or import statistics.

## Time period
Annual average

## Technology and included processes
The life cycle analysis of melamine resin foam includes the life cycle phases cradle to gate, i.e. manufacturing of raw and auxiliary materials as well as the melamine resin foam production incl. operation of the production plant and waste water treatment. Melamine is produced from urea in a one-step, low-pressure (0,7 MPa), catalytic vapor-phase process. Urea is converted into melamine using silica-alumina as a catalyst fluidized by preheated ammonia at a reaction temperature of 400 °C. Melamine leaves the reactor in the gaseous form together with ammonia and carbon dioxide. The mixture is quenched with recycled mother liquor (from the following crystallization step), separating ammonia and carbon dioxide from the product. Melamine precipitates from the gas stream and is collected at the bottom of a scrubber. It is purified by crystallization and an activated carbon treatment. Surplus ammonia is recovered and recycled to the reactor. The system boundary is cutted melamine resin foam block at the factory gate (ready for shipment) covered with a cover mat. Transports from the factory to the construction site are not taken into account and have to be incorporated in a system approach.
Background system:
Electricity: Electricity is modelled according to the individual country-specific situations. The country-specific modelling is achieved on multiple levels. Firstly, individual energy carrier specific power plants and plants for renewable energy sources are modelled according to the current national electricity grid mix. Modelling the electricity consumption mix includes transmission / distribution losses and the own use by energy producers (own consumption of power plants and "other" own consumption e.g. due to pumped storage hydro power etc.), as well as imported electricity. Secondly, the national emission and efficiency standards of the power plants are modelled as well as the share of electricity plants and combined heat and power plants (CHP). Thirdly, the country-specific energy carrier supply (share of imports and / or domestic supply) including the country-specific energy carrier properties (e.g. element and energy content) are accounted for. Fourthly, the exploration, mining/production, processing and transport processes of the energy carrier supply chains are modelled according to the specific situation of each electricity producing country. The different production and processing techniques (emissions and efficiencies) in the different energy producing countries are considered, e.g. different crude oil production technologies or different flaring rates at the oil platforms.
Thermal energy, process steam: The thermal energy and process steam supply is modelled according to the individual country-specific situation with regard to emission standards and considered energy carriers. The thermal energy and process steam are produced at heat plants. Efficiencies for thermal energy production are by definition 100% in relation to the corresponding energy carrier input. For process steam the efficiency ranges from 85%, 90% to 95%. The energy carriers used for the generation of thermal energy and process steam are modelled according to the specific import situation (see electricity above).
Transports: All relevant and known transport processes are included. Ocean-going and inland ship transport as well as rail, truck and pipeline transport of bulk commodities are considered.
Energy carriers: The energy carriers are modelled according to the specific supply situation (see electricity above).
Refinery products: Diesel fuel, gasoline, technical gases, fuel oils, lubricants and residues such as bitumen are modelled with a parameterised country-specific refinery model. The refinery model represents the current national standard in refining techniques (e.g. emission level, internal energy consumption, etc.) as well as the individual country-specific product output spectrum, which can be quite different from country to country. The supply of crude oil is modelled, again, according to the country-specific situation with the respective properties of the resources.

## Technical purpose
This product can be used in construction.

## Safety margin
20 %. Product system depicted except for a few missing processes / flows. Technological, temporal and geographic representativeness partly given.

## Reference product
- Melamine resin foam: 1

## Inputs
- Use of renewable primary energy (PERE) [MJ]: A1-A3 7.66864, C1 0, C2 0.0021792, C3 0.186829, D -2.78178
- Primary energy resources used as raw materials (PERM) [MJ]: A1-A3 0, C1 0, C2 0, C3 0, D 0
- Total use of renewable primary energy resources (PERT) [MJ]: A1-A3 7.66864, C1 0, C2 0.0021792, C3 0.186829, D -2.78178
- Use of non-renewable primary energy (PENRE) [MJ]: A1-A3 104.936, C1 0, C2 0.037433, C3 17.4908, D -9.70936
- Non-renewable primary energy resources used as raw materials (PENRM) [MJ]: A1-A3 16.8, C1 0, C2 0, C3 -16.8, D 0
- Total use of non-renewable primary energy resources (PENRT) [MJ]: A1-A3 121.736, C1 0, C2 0.037433, C3 0.690775, D -9.70936
- Input of secondary material (SM) [kg]: A1-A3 0, C1 0, C2 0, C3 0, D 0
- Use of renewable secondary fuels (RSF) [MJ]: A1-A3 0, C1 0, C2 0, C3 0, D 0
- Use of non renewable secondary fuels (NRSF) [MJ]: A1-A3 0, C1 0, C2 0, C3 0, D 0
- Use of net fresh water (FW) [m3]: A1-A3 0.0218847, C1 0, C2 1.95166e-6, C3 0.00353066, D -0.00129759

## Outputs
- Hazardous waste disposed (HWD) [kg]: A1-A3 9.71164e-8, C1 0, C2 1.39883e-9, C3 2.56024e-9, D -5.13551e-9
- Non-hazardous waste disposed (NHWD) [kg]: A1-A3 0.138001, C1 0, C2 6.57015e-6, C3 0.149603, D -0.00457308
- Radioactive waste disposed (RWD) [kg]: A1-A3 0.000927619, C1 0, C2 3.94093e-8, C3 2.66965e-5, D -0.000336084
- Components for re-use (CRU) [kg]: A1-A3 0, C1 0, C2 0, C3 0, D 0
- Materials for Recycling (MFR) [kg]: A1-A3 0, C1 0, C2 0, C3 0, D 0
- Material for Energy Recovery (MER) [kg]: A1-A3 0, C1 1.2, C2 0, C3 0, D 0
- Exported electrical energy (EEE) [MJ]: A1-A3 0, C1 0, C2 0, C3 2.66749, D 0
- Exported thermal energy (EET) [MJ]: A1-A3 0, C1 0, C2 0, C3 6.12435, D 0

## Impact indicators
- Global warming potential (GWP) [kg CO2 eq.]: A1-A3 6.5813, C1 0, C2 0.00278506, C3 1.43404, D -0.663676
- Ozone Depletion Potential (ODP) [kg R11 eq.]: A1-A3 3.07012e-14, C1 0, C2 9.21867e-19, C3 1.04377e-15, D -1.53821e-14
- Acidification potential (AP) [kg SO2 eq.]: A1-A3 0.00528444, C1 0, C2 5.62553e-6, C3 0.000161159, D -0.000560638
- Eutrophication potential (EP) [kg Phosphate eq.]: A1-A3 0.00301715, C1 0, C2 1.33734e-6, C3 3.58544e-5, D -0.000106253
- Photochemical Ozone Creation Potential (POCP) [kg Ethene eq.]: A1-A3 0.000691021, C1 0, C2 -1.6854e-6, C3 1.49199e-5, D -5.70835e-5
- Abiotic depletion potential for non fossil resources (ADPE) [kg Sb eq.]: A1-A3 8.03055e-6, C1 0, C2 2.34365e-10, C3 1.08154e-8, D -1.65081e-7
- Abiotic depletion potential for fossil resources (ADPF) [MJ]: A1-A3 119.392, C1 0, C2 0.0373323, C3 0.623384, D -8.86092

## Use advice
The data set represents a cradle to gate inventory. It can be used to characterise the supply chain situation of the respective commodity in a representative manner. Combination with individual unit processes using this commodity enables the generation of user-specific (product) LCAs.

## Data sources
- ULLMANN'S Encyclopedia of Industrial Chemistry
- GaBi Database Edition 2020, SP40
- GaBi database (all versions)
