# Wood fibre insulation boards

Dataset: ILCD process, EPD, average dataset
Geography: RER
Reference year: 2020
Valid until: 2025
Classification: OEKOBAU.DAT: Dämmstoffe / Holzfasern / Holzfaserdämmplatte
Classification: IBUCategories: 02 Bauprodukte / Holzwerkstoffe / Holzwerkstoffe
Method details: Holzwerkstoffe.pdf
Generated by: Sphera Solutions GmbH
Registration number: EPD-GTX-20200178-IBC1-DE
Owner: GUTEX Holzfaserplattenwerk H. Henselmann GmbH + Co KG
Compliance: DIN EN 15804; ISO 14025
Review: Accredited third party review by Institut Bauen und Umwelt e. V.
Amounts: rows without a unit in brackets have none in this file; such an amount is in the reference unit of its flow, which a separate flow dataset defines
copyright: true
licenseType: Free of charge for all users and uses
accessRestrictions: None

## General comment
GUTEX wood fibre insulating boards are board-shaped insulating materials manufactured from wood fibres in accordance with EN 13171.

By adding low quantities of polyurethane (PUR) resin, insulating boards are manufactured from wood fibres in a dry process. After production, they are cut and profiled and finished where necessary. Water-repellent and non-water-repellent single-layer insulation panels can be manufactured to a thickness of 240 mm.

Directive (EU) No. 305/2011(CPR) applies for placing the product on the market in the EU/EFTA (with the exception of Switzerland). The product requires a Declaration of Performance taking consideration of the harmonised product standard EN 13171:2015-04, Thermal insulation products for buildings – Factory-made wood fibre (WF) products, and CE marking.

Other application standards:

· DIN 4108-4:2017-03, Thermal protection and

saving energy in buildings

· DIN 4108-10:2015-12, Thermal protection and

saving energy in buildings

· DIN EN 622-4:2019-08, Fibreboards

· SIA 2001:2015 data sheet: Thermally-insulating

construction products

· Association pour la certification des matériaux

isolants ACERMI certificate

· ÖNORM B 6000:2018-08-01, Factory-made

insulating materials for thermal and/or noise

protection in buildings

## Technology and included processes
The manufacturing process is broken down into the following process steps: 1. Delivering the wood chips 2. Defibring the wood chips using the defibrator process 3. Hydrophobing the fibres with paraffin 4. Drying the fibres in the flow dryer 5. Glueing the fibres with PUR resin 6. Scattering the fibres on the forming belt to form a mat 7. Curing the mat in the calibration and hardening unit 8. Dividing up, profiling and assembling The location is certified to ISO 9001.
Technical data:
The following technical (construction) data is of relevance for GUTEX wood fibre insulating boards on delivery:
Declared unit:
The unit taken as a basis for the Declaration is one cubic metre (1 m³) wood fibre insulating board with an average weighted density of 167 kg/m³ by production volume (m³/year).

## Technical purpose
GUTEX insulating materials can be used in both old and new buildings: as a thermal insulation composite system for the plaster facade, wall insulation for back-ventilated facades, on-roof and/or false ceilings, insulating ceilings between floors, interior insulation of external walls, insulation of installation levels and impact sound insulation for floors.

## Reference product
- 1 m³ Holzfaserdämmplatte (): 1

## Inputs
- Renewable primary energy as energy carrier (PERE) [MJ]: A1-A3 316, A5 141.286, C3 0, D -833.4
- Renewable primary energy resources as material utilization (PERM) [MJ]: A1-A3 2902, A5 -137.108, C3 -2765, D 0
- Total use of renewable primary energy resources (PERT) [MJ]: A1-A3 3218, A5 4.178, C3 -2765, D -833.4
- Non renewable primary energy as energy carrier (PENRE) [MJ]: A1-A3 1227, A5 16.8, C3 0, D -2627
- Non renewable primary energy as material utilization (PENRM) [MJ]: A1-A3 251, A5 -11.2, C3 -240, D 0
- Total use of non renewable primary energy resources (PENRT) [MJ]: A1-A3 1478, A5 5.573, C3 -240, D -2627
- Use of secondary material (SM) [kg]: A1-A3 0, A5 0, C3 0, D 0
- Use of renewable secondary fuels (RSF) [MJ]: A1-A3 0, A5 0, C3 0, D 3008
- Use of non renewable secondary fuels (NRSF) [MJ]: A1-A3 0, A5 0, C3 0, D 0
- Use of net fresh water (FW) [m^3]: A1-A3 0.3129, A5 0.05302, C3 0, D -0.2616

## Outputs
- Hazardous waste disposed (HWD) [kg]: A1-A3 2.949e-6, A5 6.782e-9, C3 0, D -1.434e-6
- Non hazardous waste disposed (NHWD) [kg]: A1-A3 0.5877, A5 0.3073, C3 0, D -0.03311
- Radioactive waste disposed (RWD) [kg]: A1-A3 0.01082, A5 0.000178, C3 0, D -0.1257
- Components for re-use (CRU) [kg]: A1-A3 0, A5 0, C3 0, D 0
- Materials for recycling (MFR) [kg]: A1-A3 0, A5 0, C3 0, D 0
- Materials for energy recovery (MER) [kg]: A1-A3 0, A5 0, C3 167, D 0
- Exported electrical energy (EEE) [MJ]: A1-A3 0, A5 27.75, C3 0, D 0
- Exported thermal energy (EET) [MJ]: A1-A3 0, A5 64.91, C3 0, D 0

## Impact indicators
- Global warming potential (GWP) [kg CO_(2)-Äq.]: A1-A3 -198.4, A5 21.76, C3 270, D -184.5
- Depletion potential of the stratospheric ozone layer (ODP) [kg CFC11-Äq.]: A1-A3 8.517e-13, A5 6.951e-15, C3 0, D -4.701e-12
- Acidification potential of land and water (AP) [kg SO_(2)-Äq.]: A1-A3 0.1318, A5 0.002808, C3 0, D 0.2386
- Eutrophication potential (EP) [kg PO_(4)^(3)-Äq.]: A1-A3 0.02621, A5 0.0005747, C3 0, D -0.006272
- Formation potential of tropospheric ozone photochemical oxidants (POCP) [kg Ethen-Äq.]: A1-A3 0.01554, A5 0.0001789, C3 0, D 0.02911
- Abiotic depletion potential for non fossil resources (ADPE) [kg Sb-Äq.]: A1-A3 9.07e-5, A5 4.827e-7, C3 0, D -5.104e-5
- Abiotic depletion potential for fossil resources (ADPF) [MJ]: A1-A3 1451, A5 5.124, C3 0, D -2309

## Use advice
Scope:
This Declaration applies for wood fibre insulating boards manufactured in a dry process by GUTEX at its location in Waldshut-Tiengen.
System boundary:
EPD type: cradle to gate – with options

This Environmental Product Declaration refers to the product stage (Modules A1–A3, including provision of raw materials, transport, manufacture and packaging materials). Furthermore, an end-of-life scenario (Module D) was also calculated: incineration with energy recovery. Recycling of packaging materials is considered in A5.

## Data sources
- GaBi Database (all versions)
- GaBi database SP33 2017
