# Electricity from photovoltaik (1 kWh)

Dataset: ILCD process, EPD, generic dataset
Geography: DE
Reference year: 2021
Valid until: 2022
Classification: oekobau.dat: Sonstige / Energieträger - Bereitstellung frei Verbraucher / Strom
Owner: Sphera Solutions GmbH
Compliance: EN 15804+A2
Review: Dependent internal review by Sphera Solutions GmbH; Independent external review by GaBi user forum
Amounts: rows without a unit in brackets have none in this file; such an amount is in the reference unit of its flow, which a separate flow dataset defines
copyright: true
licenseType: Free of charge for all users and uses
accessRestrictions: The license conditions as stated on https://www.oekobaudat.de/ apply.
accessRestrictions: Es gelten die Lizenzbedingungen wie sie auf https://www.oekobaudat.de/ genannt sind.

## General comment
This data set has been modeled according to the European Standard EN 15804+A2 for Sustainable Building. Results are depicted in modules that allow the structured expression of results over the entire life cycle.

## Geography
The data set represents the country specific situation in Germany, focusing on the main technologies, the region specific characteristics and / or import statistics.

## Time period
Annual average

## Technology and included processes
The data set includes the production of the photovoltaic systems based on the global average market mix of installed photovoltaic technologies: monocrystalline cells 42%, polycrystalline cells 47%, cadmium telluride cells (CdTe) 7% and copper-indium-gallium-diselenide cells 4% . The manufacturing and operation of the system are taken into account. The service life of the panels is modeled at 20 years. The following average efficiencies per technology are used: monocrystalline cells 18%, polycrystalline cells 16%, cadmium telluride (CdTe) 17%, copper-indium-gallium-diselenide 15%. The system efficiency is taken into account at 75% for pitched roof installation and 80% for floor installation. The proportion of pitched roof installation is 90%.

## Technical purpose
Electrical energy is required for the operation of various technical systems and installations in the building context.

## Safety margin
0 %.

## Reference product
- Electricity from photovoltaik (1 kWh): 3.6

## Inputs
- Use of renewable primary energy as energy carrier (PERE) [MJ]: B6 21.6783
- Use of renewable primary energy resources used as raw materials (PERM) [MJ]: B6 0
- Total use of renewable primary energy (PERT) [MJ]: B6 21.6783
- Use of non renewable primary energy as energy carrier (PENRE) [MJ]: B6 0.881078
- Use of non renewable primary energy resources used as raw materials (PENRM) [MJ]: B6 0
- Total use of non renewable primary energy resource (PENRT) [MJ]: B6 0.881078
- Use of secondary material (SM) [kg]: B6 0
- Use of renewable secondary fuels (SF) [MJ]: B6 0
- Use of non renewable secondary fuels (NRSF) [MJ]: B6 0
- Net use of fresh water (FW) [m3]: B6 0.000490473

## Outputs
- Hazardous waste disposed (HWD) [kg]: B6 7.3971e-9
- Non harzardous waste disposed (NHWD) [kg]: B6 0.00531692
- Radioactive waste disposed (RWD) [kg]: B6 4.3546e-5
- Components for re-use (CRU) [kg]: B6 0
- Materials for recycling (MFR) [kg]: B6 0
- Materials for energy recovery (MER) [kg]: B6 0
- Exported electrical energy (EEE) [MJ]: B6 0
- Exported thermal energy (EET) [MJ]: B6 0

## Impact indicators
- Global Warming Potential - total (GWP-total) [kg CO2 eq.]: B6 0.0683219
- Global Warming Potential - fossil fuels (GWP-fossil) [kg CO2 eq.]: B6 0.0682811
- Global Warming Potential - biogenic (GWP-biogenic) [kg CO2 eq.]: B6 -2.12661e-5
- Global Warming Potential - land use and land use change (GWP-luluc) [kg CO2 eq.]: B6 6.20625e-5
- Depletion potenzial of the stratospheric ozone layer (ODP) [kg CFC-11 eq.]: B6 2.67482e-13
- Acidifcation potential, Accumulated Exceedance (AP) [Mole of H+ eq.]: B6 0.000276534
- Eutrophication potential - freshwater (EP-freshwater) [kg P eq.]: B6 1.09673e-7
- Eutrophication potential - marine (EP-marine) [kg N eq.]: B6 5.01678e-5
- Eutrophication potential - terrestrial (EP-terrestrial) [Mole of N eq.]: B6 0.000546374
- Photochemical Ozone Creation Potential (POCP) [kg NMVOC eq.]: B6 0.000190262
- Abiotic depletion potential - non-fossil resources (ADPE) [kg Sb eq.]: B6 2.24623e-6
- Abiotic depletion potential - fossil resources (ADPF) [MJ]: B6 0.880173
- Water (user) deprivation potential (WDP) [m³ world equiv.]: B6 0.0141709

## Use advice
This data set relates to the production of 1 kWh (3.6 MJ) of electrical energy from solar energy using photovoltaics. The data set can be used to balance the potential environmental effects of electricity consumption from photovoltaic systems during the building use phase.

## Data sources
- Documentation of data quality management
- GaBi Database Edition 2021, CUP2021.01
- GaBi database (all versions)
