# noracare®

Dataset: ILCD process, EPD, specific dataset
Geography: GLO
Reference year: 2020
Valid until: 2025
Classification: OEKOBAU.DAT: Kunststoffe / Bodenbeläge / Synth. Thermoplast / Polyolefin
Classification: IBUCategories: 02 Bauprodukte / Bodenbeläge / Bodenbeläge
Method details: Bodenbeläge.pdf
Registration number: EPD-NOR-20190169-IAB1-DE
Owner: nora systems GmbH
Compliance: DIN EN 15804; ISO 14025
Review: Accredited third party review by Institut Bauen und Umwelt e. V.
Amounts: rows without a unit in brackets have none in this file; such an amount is in the reference unit of its flow, which a separate flow dataset defines
copyright: true

## General comment
In dieser Umwelt-Produktdeklaration (EPD) werden
elastische Bodenbeläge auf Basis thermoplastischer Elastomere und Kautschuk der Produktfamilie
noracare® der nora systems GmbH

in verschiedenen Designs abgebildet.

Besondere Merkmale der noracare® Beläge sind:
Herstellungsart: kontinuierlich gefertigte Bodenbeläge in Bahnen
Belagsaufbau: mehrschichtig
Zusammensetzung: Thermoplastische Elastomere, Natur- und Synthesekautschuk, Mineralien aus natürlichen Vorkommen, Farbpigmente und Verarbeitungshilfsmittel
Auszeichnung: Blauer Engel nach DE-UZ 120 für elastische Fußbodenbeläge "Schützt Umwelt und Gesundheit, weil emissionsarm"

## Technology and included processes
Die Produktionsstufen sind Einwiegen, Mischen und anschließende Granulatherstellung. Das Granulat wird kontinuierlich zu Bahnenware extrudiert. Die Oberfläche der Bahnen wird veredelt und die Rückseite geschliffen. Der Bodenbelag wird als Rollenware aufgewickelt. Das Flächengewicht beträgt 3,61 kg/m². Die gesamte elektrische Energie für Produktion und Verwaltung am Standort Weinheim bezieht die nora systems GmbH aus erneuerbaren Energien aus den Ørsted Offshore-Windparks in der dänischen Nord- und Ostsee. Thermische Energie wird zentral bzw. in Heizkesseln an einzelnen Anlagen über Erdgas erzeugt. Das Qualitäts- und Energiemanagement der nora Systems GmbH ist nach ISO 9001 bzw. ISO 50001 zertifiziert.
Technische Daten:
Auszug aus dem technischen Datenblatt: (abrufbar auf www.nora.com)
Deklarierte Einheit:
Als Referenzgröße wird 1 m² Bodenbelag betrachtet. Die Werte des Moduls A1-A3 beziehen sich auf 1 m² produziertes Produkt.

Es handelt sich um eine Produktdeklaration, d. h. die Herstellung und Beseitigung der Verschnitte bei der Installation werden dem Modul A5 zugeordnet. Die Module A1-A3, A4 und A5 beziehen sich gesamt auf 1m² installiertes Produkt.

Die zur Installation notwendigen Materialien zur Vorbereitung des Untergrunds und Klebung werden nicht berücksichtigt. Für den vollständigen Bodenaufbau können Umweltproduktdeklarationen
nach den PCR „Dispersionsklebstoffe und –voranstriche“ sowie „Mineralische Werkmörtel“ herangezogen werden.

## Technical purpose
Die Bodenbeläge werden gemäß ISO 10874
klassifiziert.
Bodenbeläge für starke Beanspruchung im Privat- und

Objektbereich: (auch anwendbar für Industrie (Klasse 42))

## Reference product
- noracare® (): 1

## Inputs
- Erneuerbare Primärenergie als Energieträger (PERE) [MJ]: A1-A3 32.3, A4 0.138, A5 1.77, B2 0.437, C1 0.303, C2 0.00686, C3 1.78, D -3.63
- Erneuerbare Primärenergie zur stofflichen Nutzung (PERM) [MJ]: A1-A3 1.7, A4 0, A5 0, B2 0, C1 0, C2 0, C3 -1.7, D 0
- Total erneuerbare Primärenergie (PERT) [MJ]: A1-A3 34, A4 0.138, A5 1.77, B2 0.437, C1 0.303, C2 0.00686, C3 0.0785, D -3.63
- Nicht-erneuerbare Primärenergie als Energieträger (PENRE) [MJ]: A1-A3 59, A4 2.61, A5 5.33, B2 8.11, C1 0.752, C2 0.115, C3 41.8, D -18
- Nicht-erneuerbare Primärenergie zur stofflichen Nutzung (PENRM) [MJ]: A1-A3 41.3, A4 0, A5 0, B2 0, C1 0, C2 0, C3 -41.3, D 0
- Total nicht erneuerbare Primärenergie (PENRT) [MJ]: A1-A3 100, A4 2.61, A5 5.33, B2 8.11, C1 0.752, C2 0.115, C3 0.439, D -18
- Einsatz von Sekundärstoffen (SM) [kg]: A1-A3 0.0846, A4 0, A5 0.00436, B2 0, C1 0, C2 0, C3 0, D 0
- Erneuerbare Sekundärbrennstoffe (RSF) [MJ]: A1-A3 0, A4 0, A5 0, B2 0, C1 0, C2 0, C3 0, D 0
- Nicht erneuerbare Sekundärbrennstoffe (NRSF) [MJ]: A1-A3 0, A4 0, A5 0, B2 0, C1 0, C2 0, C3 0, D 0
- Einsatz von Süßwasserressourcen (FW) [m^3]: A1-A3 0.187, A4 0.000233, A5 0.00995, B2 0.00145, C1 0.000357, C2 1.16e-5, C3 0.00526, D -0.00428

## Outputs
- Gefährlicher Abfall zur Deponie (HWD) [kg]: A1-A3 6.39e-6, A4 1.28e-7, A5 3.36e-7, B2 0.000414, C1 3.6e-10, C2 6.41e-9, C3 1.45e-9, D -7.38e-9
- Entsorgter nicht gefährlicher Abfall (NHWD) [kg]: A1-A3 1.19, A4 0.000197, A5 0.0661, B2 0.0156, C1 0.000548, C2 9.73e-6, C3 0.0786, D -0.00775
- Entsorgter radioaktiver Abfall (RWD) [kg]: A1-A3 0.00123, A4 5.09e-6, A5 6.51e-5, B2 0.000219, C1 0.000121, C2 2.37e-7, C3 2.65e-5, D -0.00145
- Komponenten für die Wiederverwendung (CRU) [kg]: A1-A3 0, A4 0, A5 0, B2 0, C1 0, C2 0, C3 0, D 0
- Stoffe zum Recycling (MFR) [kg]: A1-A3 0, A4 0, A5 0.105, B2 0, C1 0, C2 0, C3 0, D 0
- Stoffe für die Energierückgewinnung (MER) [kg]: A1-A3 0, A4 0, A5 0, B2 0, C1 0, C2 0, C3 0, D 0
- Exportierte elektrische Energie (EEE) [MJ]: A1-A3 0, A4 0, A5 0.251, B2 0, C1 0, C2 0, C3 4.05, D 0
- Exportierte thermische Energie (EET) [MJ]: A1-A3 0, A4 0, A5 0.45, B2 0, C1 0, C2 0, C3 7.25, D 0

## Impact indicators
- Globales Erwärmungspotenzial (GWP) [kg CO_(2)-Äq.]: A1-A3 4.01, A4 0.194, A5 0.375, B2 0.338, C1 0.0416, C2 0.00849, C3 2.61, D -1.01
- Abbau Potential der stratosphärischen Ozonschicht (ODP) [kg CFC11-Äq.]: A1-A3 1.02e-11, A4 4.52e-17, A5 5.23e-13, B2 5.05e-11, C1 1.17e-15, C2 2.11e-18, C3 3.34e-16, D -1.39e-14
- Versauerungspotenzial von Boden und Wasser (AP) [kg SO_(2)-Äq.]: A1-A3 0.0119, A4 0.00114, A5 0.000684, B2 0.000882, C1 0.000108, C2 1.89e-5, C3 0.000172, D -0.00158
- Eutrophierungspotenzial (EP) [kg PO_(4)^(3)-Äq.]: A1-A3 0.00168, A4 0.000171, A5 9.78e-5, B2 0.000144, C1 1.07e-5, C2 4.5e-6, C3 3.61e-5, D -0.00018
- Bildungspotential für troposphärisches Ozon (POCP) [kg Ethen-Äq.]: A1-A3 0.0021, A4 -7.83e-5, A5 0.000105, B2 0.000295, C1 7.5e-6, C2 -5.96e-6, C3 1.66e-5, D -0.000136
- Potenzial für den abiotischen Abbau nicht fossiler Ressourcen (ADPE) [kg Sb-Äq.]: A1-A3 2.1e-5, A4 1.44e-8, A5 1.08e-6, B2 6.42e-8, C1 1.23e-8, C2 6.89e-10, C3 4.11e-9, D -1.71e-7
- Potenzial für den abiotischen Abbau fossiler Brennstoffe (ADPF) [MJ]: A1-A3 97.3, A4 2.59, A5 5.17, B2 7.57, C1 0.447, C2 0.115, C3 0.372, D -14.3

## Use advice
Gültigkeitsbereich:
Produktfamilie noracare® Kontinuierlich in Bahnen hergestellte Bodenbeläge

aus thermoplastischen Elastomeren und Kautschuk in verschiedenen Farben und Designs.

Diese Deklaration ist eine Umweltproduktdeklaration
gemäß ISO 14025 und beschreibt die spezifische
Umweltleistung der hier genannten Bauprodukte in
Deutschland am Produktionsstandort Weinheim
(Bergstrasse).
Systemgrenze:
Typ der EPD: von der Wiege bis zum Fabriktor mit Optionen

Die ökobilanzielle Berechnung umfasst folgende

Phasen:

Herstellungsphase A1-A3: Berücksichtigung der Vorkette und der Produktion des Bodenbelags, inkl. Verpackung (Input von Altpapier bei der Papier-/Kartonherstellung).
Transport A4: Annahme für den Transport der Produkte zur Baustelle.
Installationsphase A5: Berücksichtigung der Herstellung und des Transports der Verschnittmenge, Verbrennung des Verschnitts (gewonnene Energie wird in D als vermiedene Umweltlasten deklariert), Entsorgung der Verpackungsmaterialien (Verbrennung von PE-Folie). Die Untergrundvorbehandlung (Grundierung, Spachtelmasse, Klebstoff) bleibt unberücksichtigt. Diese ist abhängig vom Gebäude und der Anwendung und muss im Einzelfall spezifiziert werden.
Nutzungsphase B2: Szenario für die Reinigung entsprechend den Herstellerempfehlungen (siehe 4.).
End-of-Life Phase C1, C2, C3: Szenario für die Verbrennung des Bodenbelags inkl. Ausbau aus dem Gebäude und Transport zum Verbrennungsort (gewonnene Energie wird in D als vermiedene Umweltlasten deklariert).

Nutzen und Lasten für das nächste System D: Gewinnung von elektrischer und thermischer Energie aus der thermischen Verwertung des Produkts, des Installationsverschnitts und der VerpackungEinflüsse von Abfällen werden in den Modulen berücksichtigt, in denen diese anfallen.

## Data sources
- noracare®.pdf
- GaBi Database (all versions)
- GaBi database SP39 2019
