# Mehrschichtparkett (Durchschnitt DE)

Dataset: ILCD process, EPD, representative dataset
Geography: DE
Reference year: 2020
Valid until: 2025
Classification: OEKOBAU.DAT: Holz / Holzböden / Parkett
Method details: EN 15804; ILCD format
Owner: Thünen-Institut für Holzforschung
Compliance: EN 15804
Review: Independent external review by Dr. Frank Werner - Umwelt & Entwicklung
Amounts: rows without a unit in brackets have none in this file; such an amount is in the reference unit of its flow, which a separate flow dataset defines
copyright: true

## General comment
Weitere Informationen zur deklarierten Einheit (Zusammensetzung) und die auf Herstellerangaben beruhende Sachbilanz (In- und Output der Stoff- und Energieströme) stehen als Excel-Datei unter dem Unterpunkt Hintergrund-Bericht zum Download bereit.
Der Datensatz wurde 2020 als Aktualisierung mit gleichbleibendem Vordergrundsystem erstellt. Alle Hintergrunddaten entstammen der GaBi Professional Datenbank 2020 im Service Pack 40. Die Modellierung und Berechnung der Ökobilanz basiert auf den europäischen Normen EN 15804:2012+A1:2013 und EN 16485:2014. Bei Rückfragen wenden Sie sich bitte an holzundklima@thuenen.de.

## Geography
Im Bereich der Parkettproduktion werden durch das Statistische Bundesamt nur 2 Meldenummern gelistet, die insgesamt eine Produktion von 9,6 Mio. m² angeben, wobei hier zwischen Mosaikparkett (1622 10 300) und Anderen (1622 10 600) unterschieden wird. Die Erhebung im Parkettbereich lieferte aussagekräftige Zahlen für 315.000 m² Massivholzbodenbeläge, die im Wesentlichen Stabparkett und Massivholzdielen, aber auch Hochkantlamellen und Mosaikparkett repräsentieren. Daneben wurde die Produktion von insgesamt 7,9 Mio. m² Mehrschichtparkett analysiert. Die Bilanzierung der Parkettproduktion konnten etwa 88 % der unter Meldenummer 1622 10 600 gelisteten Produktion und 12 % der unter Meldenummer 1622 10 300 gelisteten Produktionsmengen abdecken.

## Time period
Der Datensatz basiert auf Produktionsdaten aus den Jahren 2009 bis 2011 (Vordergrundsystem).
Eine Aktualisierung des Hintergrundsystems erfolgte 2020.

## Technology and included processes
Mehrschichtige Holzböden sind in Lagen aufgebaute Holzböden, die eine Deckschicht von mindestens 2 mm Dicke haben. Sie können 2-lagig mit Trägerplatte aus Vollholz oder Holzwerkstoffen und einer dekorativen Deckschicht, oder 3-lagig mit einer zusätzlichen Gegenzuglage ausgestattet sein. Die 2-lagigen Böden müssen auf der Baustelle mit dem Untergrund verklebt werden, die 3-lagigen können schwimmend verlegt werden. Die hier betrachteten Produkte sind mehrschichtige Holzböden am Werkstor der Herstellung. Zur Herstellung von mehrschichtigen Holzbodenbelägen werden Rundhölzer, frische Schnitthölzer, kammergetrocknete Schnitthölzer oder Hobelware eingesetzt. Daneben kommen teilweise Sperrhölzer und HDF Platten zum Einsatz. Die Schichten werden zunächst getrennt hergestellt.
Die Deckschicht wird analog zu den einschichtigen Holzbodenbelägen hergestellt, jedoch ist sie hier wesentlich dünner. In der Regel ist sie etwa 4 mm dick. Die Mittellage kann aus Holzwerkstoffen oder massiven Einzelteilen bestehen, die grundsätzlich ähnlich wie die Deckschicht hergestellt werden, jedoch meist dicker und von geringerer Qualität (oft Nadelholz) sind. Im Falle des 3-lagigen Aufbaus wird ein Gegenzug aus Furnier genutzt. Die Furnierherstellung erfolgt hier analog zur Furnierherstellung bei der Herstellung von Furniersperrholz. Die einzelnen Lagen werden nach Aufbringung von Klebstoffen zusammengepresst und aufgetrennt. Die Oberflächen werden geschliffen und lackiert. Lack und Lackierung werden im Rahmen dieser Untersuchung jedoch nicht betrachtet.
Die Holzfeuchte des Produktes liegt bei 10%.

## Technical purpose
Mehrschichtparkett kommt als Fußbodenbelag im Wohnbereich zum Einsatz.

## Scenarios
- energetisch: therm. Verwertung
- stofflich: stoffl. Verwertung

## Reference product
- Mehrschichtparkett: 1

## Inputs
- Use of renewable primary energy (PERE) [MJ]: A1 50.7907, A2 0.386913, A3 308.987, A1-A3 360.164, A5 0.0168723, C2 0.00725106, C3 0.411135, D (energetisch) 104.465, D (stofflich) -1.44132
- Use of renewable primary energy resources used as raw materials (PERM) [MJ]: A1 152.954, A2 0, A3 0.665662, A1-A3 153.62, A5 -0.665662, C2 0, C3 -152.954, D (energetisch) 0, D (stofflich) 0
- Total use of renewable primary energy resources (PERT) [MJ]: A1 203.745, A2 0.386913, A3 309.653, A1-A3 513.784, A5 -0.64879, C2 0.00725106, C3 -152.543, D (energetisch) 104.465, D (stofflich) -1.44132
- Use of non renewable primary energy (PENRE) [MJ]: A1 27.7996, A2 6.83453, A3 86.6195, A1-A3 121.254, A5 0.0828041, C2 0.129124, C3 0.714837, D (energetisch) -85.4561, D (stofflich) -4.40025
- Use of non renewable primary energy resources used as raw materials (PENRM) [MJ]: A1 3.54586, A2 0, A3 2.9088, A1-A3 6.45466, A5 -2.9088, C2 0, C3 -3.54586, D (energetisch) 0, D (stofflich) 0
- Total use of non renewable primary energy resource (PENRT) [MJ]: A1 31.3455, A2 6.83453, A3 89.5283, A1-A3 127.708, A5 -2.826, C2 0.129124, C3 -2.83102, D (energetisch) -85.4561, D (stofflich) -4.40025
- Use of secondary material (SM) [kg]: A1 0, A2 0, A3 0, A1-A3 0, A5 0, C2 0, C3 0, D (energetisch) 0, D (stofflich) 8.9542
- Use of renewable secondary fuels (RSF) [MJ]: A1 6.11233, A2 0, A3 5.43178, A1-A3 11.5441, A5 0, C2 0, C3 0, D (energetisch) 0, D (stofflich) 0
- Use of non renewable secondary fuels (NRSF) [MJ]: A1 0, A2 0, A3 0, A1-A3 0, A5 0, C2 0, C3 0, D (energetisch) 0, D (stofflich) 0
- Use of net fresh water (FW) [m3]: A1 0.00691256, A2 0.000424924, A3 0.0223465, A1-A3 0.029684, A5 0.000787447, C2 8.39623e-6, C3 0.000222578, D (energetisch) 0.0124017, D (stofflich) -0.000554767

## Outputs
- Hazardous waste disposed (HWD) [kg]: A1 3.84079e-7, A2 3.04194e-7, A3 2.21272e-6, A1-A3 2.90099e-6, A5 2.32696e-10, C2 6.00904e-9, C3 4.80733e-10, D (energetisch) -4.80961e-8, D (stofflich) -1.01391e-7
- Non hazardous waste dispose (NHWD) [kg]: A1 0.0483439, A2 0.00107994, A3 0.225749, A1-A3 0.275173, A5 0.00420615, C2 1.9761e-5, C3 0.000550163, D (energetisch) 0.0608209, D (stofflich) -0.000746504
- Radioactive waste disposed (RWD) [kg]: A1 0.000871318, A2 8.17969e-6, A3 0.00512741, A1-A3 0.00600691, A5 2.99207e-6, C2 1.59822e-7, C3 5.97521e-5, D (energetisch) -0.00536698, D (stofflich) -0.000124313
- Components for re-use (CRU) [kg]: A1 0, A2 0, A3 0, A1-A3 0, A5 0, C2 0, C3 0, D (energetisch) 0, D (stofflich) 0
- Materials for recycling (MFR) [kg]: A1 0, A2 0, A3 0, A1-A3 0, A5 0, C2 0, C3 8.9542, D (energetisch) 0, D (stofflich) 0
- Materials for energy recovery (MER) [kg]: A1 0, A2 0, A3 0, A1-A3 0, A5 0, C2 0, C3 8.9542, D (energetisch) 0, D (stofflich) 0
- Exported electrical energy (EEE) [MJ]: A1 0, A2 0, A3 0.0226074, A1-A3 0.0226074, A5 0.441076, C2 0, C3 0, D (energetisch) 0, D (stofflich) 0
- Exported thermal energy (EET) [MJ]: A1 0, A2 0, A3 0.0525196, A1-A3 0.0525196, A5 0.956957, C2 0, C3 0, D (energetisch) 0, D (stofflich) 0

## Impact indicators
- Global warming potential (GWP) [kg CO2-Äqv.]: A1 -12.7737, A2 0.498934, A3 6.55251, A1-A3 -5.7223, A5 0.141167, C2 0.00932489, C3 14.5976, D (energetisch) -5.94958, D (stofflich) -0.324786
- Depletion potential of the stratospheric ozone layer (ODP) [kg R11 eq.]: A1 4.48274e-14, A2 1.01221e-16, A3 1.79174e-12, A1-A3 1.83667e-12, A5 8.88865e-17, C2 1.55224e-18, C3 2.34641e-15, D (energetisch) -2.10738e-13, D (stofflich) -4.84796e-15
- Acidification potential of soil and water (AP) [kg SO2-Äqv.]: A1 0.0073725, A2 0.00218165, A3 0.0328589, A1-A3 0.0424131, A5 4.89547e-5, C2 3.90707e-5, C3 7.83827e-5, D (energetisch) -0.00615527, D (stofflich) -0.000954768
- Eutrophication potential (EP) [kg Phosphat-Äqv.]: A1 0.00193052, A2 0.000549423, A3 0.00725379, A1-A3 0.00973374, A5 1.01118e-5, C2 9.82892e-6, C3 1.39779e-5, D (energetisch) -0.00103165, D (stofflich) -0.000221747
- Formation potential of tropospheric ozone (POCP) [kg Ethen-Äqv.]: A1 0.00110796, A2 -0.000752137, A3 0.00167407, A1-A3 0.00202989, A5 2.82247e-6, C2 -1.64307e-5, C3 5.53029e-6, D (energetisch) -0.000485496, D (stofflich) -1.19408e-5
- Abiotic depletion potential for non fossil resources (ADPE) [kg Sb-Äqv.]: A1 9.10282e-7, A2 4.27462e-8, A3 2.74685e-6, A1-A3 3.69988e-6, A5 6.40529e-9, C2 7.85198e-10, C3 2.33693e-8, D (energetisch) -2.01686e-6, D (stofflich) -6.43783e-8
- Abiotic depletion potential for fossil resources (ADPF) [MJ]: A1 29.2362, A2 6.81364, A3 74.1196, A1-A3 110.17, A5 0.0752581, C2 0.128716, C3 0.564015, D (energetisch) -68.3632, D (stofflich) -4.0864

## Use advice
Aufgrund der hohen Abdeckung bildet der Datensatz die durchschnittlichen Produktionsverhältnisse und die damit verbundenen Umweltwirkungen repräsentativ für Deutschland ab. Liegen keine herstellerspezifischen Ökobilanzergebnisse des verwendeten Produkts vor, empfiehlt sich die Verwendung dieses Durchschnittsdatensatzes.

## Data sources
- Rüter S, Diederichs S (2012) Ökobilanz Basisdaten für Bauprodukte aus Holz, Hamburg, Johann Heinrich von Thünen Institut, Institut für Holztechnologie und Holzbiologie, Abschlussbericht
- GaBi database SP40 2020
- GaBi database (general)
