# Calcium hydroxide (Ca(OH)2; dry; slaked lime); solid, density: 2,24 g·cm3 (20 °C), molar mass: 74,10 g·mol1

Dataset: ILCD process, EPD, generic dataset
Geography: DE
Reference year: 2021
Valid until: 2022
Classification: oekobau.dat: Mineralische Baustoffe / Bindemittel / Kalk
Owner: Sphera Solutions GmbH
Compliance: EN 15804+A2
Review: Dependent internal review by Sphera Solutions GmbH; Independent external review by GaBi user forum
Amounts: rows without a unit in brackets have none in this file; such an amount is in the reference unit of its flow, which a separate flow dataset defines
copyright: true
licenseType: Free of charge for all users and uses
accessRestrictions: The license conditions as stated on https://www.oekobaudat.de/ apply.
accessRestrictions: Es gelten die Lizenzbedingungen wie sie auf https://www.oekobaudat.de/ genannt sind.

## General comment
This data set has been modeled according to the European Standard EN 15804+A2 for Sustainable Building. Results are depicted in modules that allow the structured expression of results over the entire life cycle.

## Geography
The data set represents the country specific situation in Germany, focusing on the main technologies, the region specific characteristics and / or import statistics.

## Time period
Annual average

## Technology and included processes
Hydrated lime (calcium hydroxide) is produced from the slow addition of water to crushed or ground quicklime (calcium oxide), which is produced by burning various forms of limestone. This is done in a premixing chamber or vessel that mixes and agitates the lime and water at prescribed levels. The addition of water generates considerable heat because of the exothermal reaction and produces steam. Partly classifiers were used, in order to get an improved quality with a better regularity. The finished product is then supplied to the finished goods bunker.

## Technical purpose
This product can be used in construction.

## Safety margin
20 %. Product system depicted except for a few missing processes / flows. Technological, temporal and geographic representativeness partly given.

## Reference product
- Calcium hydroxide (Ca(OH)2; dry; slaked lime): 1

## Inputs
- Use of renewable primary energy as energy carrier (PERE) [MJ]: A1-A3 0.59183
- Use of renewable primary energy resources used as raw materials (PERM) [MJ]: A1-A3 0
- Total use of renewable primary energy (PERT) [MJ]: A1-A3 0.59183
- Use of non renewable primary energy as energy carrier (PENRE) [MJ]: A1-A3 3.31247
- Use of non renewable primary energy resources used as raw materials (PENRM) [MJ]: A1-A3 0
- Total use of non renewable primary energy resource (PENRT) [MJ]: A1-A3 3.31247
- Use of secondary material (SM) [kg]: A1-A3 0
- Use of renewable secondary fuels (SF) [MJ]: A1-A3 0
- Use of non renewable secondary fuels (NRSF) [MJ]: A1-A3 0
- Net use of fresh water (FW) [m3]: A1-A3 0.000825199

## Outputs
- Hazardous waste disposed (HWD) [kg]: A1-A3 5.31271e-10
- Non harzardous waste disposed (NHWD) [kg]: A1-A3 0.00162238
- Radioactive waste disposed (RWD) [kg]: A1-A3 6.3204e-5
- Components for re-use (CRU) [kg]: A1-A3 0
- Materials for recycling (MFR) [kg]: A1-A3 0
- Materials for energy recovery (MER) [kg]: A1-A3 0
- Exported electrical energy (EEE) [MJ]: A1-A3 0
- Exported thermal energy (EET) [MJ]: A1-A3 0

## Impact indicators
- Global Warming Potential - total (GWP-total) [kg CO2 eq.]: A1-A3 1.09408
- Global Warming Potential - fossil fuels (GWP-fossil) [kg CO2 eq.]: A1-A3 1.09334
- Global Warming Potential - biogenic (GWP-biogenic) [kg CO2 eq.]: A1-A3 0.000498994
- Global Warming Potential - land use and land use change (GWP-luluc) [kg CO2 eq.]: A1-A3 0.000247473
- Depletion potenzial of the stratospheric ozone layer (ODP) [kg CFC-11 eq.]: A1-A3 2.51738e-15
- Acidifcation potential, Accumulated Exceedance (AP) [Mole of H+ eq.]: A1-A3 0.000303665
- Eutrophication potential - freshwater (EP-freshwater) [kg P eq.]: A1-A3 3.32006e-7
- Eutrophication potential - marine (EP-marine) [kg N eq.]: A1-A3 0.000132853
- Eutrophication potential - terrestrial (EP-terrestrial) [Mole of N eq.]: A1-A3 0.00144539
- Photochemical Ozone Creation Potential (POCP) [kg NMVOC eq.]: A1-A3 0.000342931
- Abiotic depletion potential - non-fossil resources (ADPE) [kg Sb eq.]: A1-A3 3.56653e-8
- Abiotic depletion potential - fossil resources (ADPF) [MJ]: A1-A3 3.31203
- Water (user) deprivation potential (WDP) [m³ world equiv.]: A1-A3 0.021458

## Use advice
The data set represents a cradle to gate inventory. It can be used to characterise the supply chain situation of the respective commodity in a representative manner. Combination with individual unit processes using this commodity enables the generation of user-specific (product) LCAs.

## Data sources
- Umweltgesichtspunkte bei der Herstellung und Anwendung von Kalkprodukten, Teil 3
- Umweltgesichtspunkte bei der Herstellung und Anwendung von Kalkprodukten, Teil 2
- Ökologische Bilanzierung von Baustoffen und Gebäuden, 2000
- Umweltgesichtspunkte bei der Herstellung und Anwendung von Kalkprodukten, 1995
- Documentation of data quality management
- GaBi Database Edition 2021, CUP2021.01
- GaBi database (all versions)
