# HASSLACHER CROSS LAMINATED TIMBER

Dataset: ILCD process, EPD, average dataset
Geography: AT
Reference year: 2021
Valid until: 2026
Classification: OEKOBAU.DAT: Holz / Vollholz / Brettschichtholz (BSH)
Classification: IBUCategories: 02 Bauprodukte / Produkte aus Bauholz / Vollholzprodukte
Method details: Vollholzprodukte.pdf
Generated by: Daxner & Merl GmbH
Registration number: EPD-HAS-20210172-IBD1-DE
Owner: HASSLACHER Holding GmbH
Compliance: DIN EN 15804+A2; ISO 14025
Review: Accredited third party review by Institut Bauen und Umwelt e. V.
Amounts: rows without a unit in brackets have none in this file; such an amount is in the reference unit of its flow, which a separate flow dataset defines
copyright: true
licenseType: Free of charge for all users and uses
accessRestrictions: None

## General comment
HASSLACHER CROSS LAMINATED TIMBER from the HASSLACHER Group is a solid, panel-shaped timber construction element consisting of layers of softwood bonded at right angles to each other.
HASSLACHER CROSS LAMINATED TIMBER is manufactured in accordance with ETA-12/0281 of 09.11.2020.

HASSLACHER CROSS LAMINATED TIMBER is manufactured at the sites NORITEC Holzindustrie GmbH in Stall im Mölltal (Austria) and, since 2021, at NORDLAM GmbH in Magdeburg (Germany). The data of the production site of NORITEC Holzindustrie GmbH in Stall im Mölltal (Austria) for the reference year 2019 have been included in this EPD. NORDLAM GmbH Magdeburg produces with the same technologies.

The crosswise bonding of the individual lamellas and the generally symmetrical structure of HASSLACHER CROSS LAMINATED TIMBER has the advantage of extremely high dimensional stability, as well as potential load transfer both longitudinally and transversely to the main load-bearing direction.

HASSLACHER CROSS LAMINATED TIMBER is defined in its cross-sectional structure by a minimum number of layers of at least three, whereby the maximum number of layers is limited to eleven.

HASSLACHER CROSS LAMINATED TIMBER is available in two different strength classes, i.e. CL26E11.8 and CL36E14.7, according to ETA-12/0281.

Due to the existing joinery and surface finishing options integrated in the production plants, a high degree of prefabrication and thus a shortened construction time can be achieved.

## Technology and included processes
HASSLACHER CROSS LAMINATED TIMBER is manufactured from spruce, fir, pine, larch, birch, oak and Swiss stone pine, whereby the larch, birch, oak and Swiss stone pine species are primarily used in the form of ‘Excellent’ lamellas for top layers in so-called ‘Excellent' quality. For the production of HASSLACHER CROSS LAMINATED TIMBER, conventional sawn timber is first dried to below 15 % wood moisture (target moisture content: approx. 12 + 2 %), pre-planed and graded visually or mechanically according to strength. Identified areas with strength-reducing spots are cut out depending on the desired strength class. The cut lamellas are finger-jointed to form endless lamellas. The thickness range of the planed single lamellas is 19 to 45 mm, with a width of 80 to 300 mm. The crosswise bonding of the lamellas is carried out using the adhesive listed in chapter 2.5. ‘Excellent’ lamellas according to ETA-12/0281 or wood-based panels according to EN 13986 can also be used for the visual qualities. After the adhesive has fully cured, the final surface treatment is carried out as well as the customised joinery and packaging. If required, treatment with wood preservatives or surface finishes (end-grain protection, UV protection, etc.) can be carried out before packaging.
Technical data:
The structural data for HASSLACHER CROSS LAMINATED TIMBER according to ETA-12/0281 are given.
Declared unit:
This EPD refers to a declared unit of 1 m³ of HASSLACHER CROSS LAMINATED TIMBER with an average density of 470 kg/m³ at 11 % moisture at delivery.

## Technical purpose
HASSLACHER CROSS LAMINATED TIMBER is used in all structural areas of modern timber construction in service classes 1 and 2 according to EN 1995-1-1 in the form of structural elements with predominantly static traffic loads.

The use of preventive chemical wood preservation according to DIN 68800-3 is unusual and only permissible if structural wood preservation according to DIN 68800-2 alone is not sufficient. If, in exceptional cases, a preventive chemical wood preservative is used, this must be regulated by a general building authority approval or approval according to the Biocidal Products Regulation.

## Reference product
- Brettsperrholz HASSLACHER CROSS LAMINATED TIMBER (): 1

## Inputs
- Renewable primary energy as energy carrier (PERE) [MJ]: A1-A3 3178.25, C1 0, C2 1.07706, C3 7682.24, C4 0, D -1826.45
- Renewable primary energy resources as material utilization (PERM) [MJ]: A1-A3 7669.67, C1 0, C2 0, C3 -7651.6, C4 0, D 0
- Total use of renewable primary energy resources (PERT) [MJ]: A1-A3 10847.9, C1 0, C2 1.07706, C3 30.6381, C4 0, D -1826.45
- Non renewable primary energy as energy carrier (PENRE) [MJ]: A1-A3 1299.73, C1 0, C2 18.7859, C3 66.5405, C4 0, D -7167.85
- Non renewable primary energy as material utilization (PENRM) [MJ]: A1-A3 61.0765, C1 0, C2 0, C3 0, C4 0, D 0
- Total use of non renewable primary energy resources (PENRT) [MJ]: A1-A3 1360.8, C1 0, C2 18.7859, C3 66.5405, C4 0, D -7167.85
- Use of secondary material (SM) [kg]: A1-A3 0, C1 0, C2 0, C3 0, C4 0, D 0
- Use of renewable secondary fuels (RSF) [MJ]: A1-A3 0, C1 0, C2 0, C3 0, C4 0, D 7651.6
- Use of non renewable secondary fuels (NRSF) [MJ]: A1-A3 0, C1 0, C2 0, C3 0, C4 0, D 0
- Use of net fresh water (FW) [m^3]: A1-A3 1.47833, C1 0, C2 0.00123359, C3 0.0298324, C4 0, D -1.20244

## Outputs
- Hazardous waste disposed (HWD) [kg]: A1-A3 2.67361e-6, C1 0, C2 9.89869e-10, C3 1.75785e-8, C4 0, D -1.60827e-6
- Non hazardous waste disposed (NHWD) [kg]: A1-A3 2.62874, C1 0, C2 0.00294728, C3 0.0471551, C4 0, D 0.271643
- Radioactive waste disposed (RWD) [kg]: A1-A3 0.0293987, C1 0, C2 3.40762e-5, C3 0.00990141, C4 0, D -0.588619
- Components for re-use (CRU) [kg]: A1-A3 0, C1 0, C2 0, C3 0, C4 0, D 0
- Materials for recycling (MFR) [kg]: A1-A3 0, C1 0, C2 0, C3 0, C4 0, D 0
- Materials for energy recovery (MER) [kg]: A1-A3 0, C1 0, C2 0, C3 470, C4 0, D 0
- Exported electrical energy (EEE) [MJ]: A1-A3 0, C1 0, C2 0, C3 0, C4 0, D 0
- Exported thermal energy (EET) [MJ]: A1-A3 0, C1 0, C2 0, C3 0, C4 0, D 0

## Impact indicators
- Global Warming Potential total (GWP-total) [kg CO_(2)-Äq.]: A1-A3 -660.122, C1 0, C2 1.42131, C3 753.425, C4 0, D -409.858
- Global Warming Potential fossil fuels (GWP-fossil) [kg CO_(2)-Äq.]: A1-A3 92.9712, C1 0, C2 1.4115, C3 3.73757, C4 0, D -408.123
- Global Warming Potential biogenic (GWP-biogenic) [kg CO_(2)-Äq.]: A1-A3 -753.765, C1 0, C2 -0.00167377, C3 749.682, C4 0, D -1.41598
- Global Warming Potential luluc (GWP-luluc) [kg CO_(2)-Äq.]: A1-A3 0.671682, C1 0, C2 0.0114864, C3 0.00529095, C4 0, D -0.319425
- Depletion potential of the stratospheric ozone layer (ODP) [kg CFC11-Äq.]: A1-A3 1.88443e-12, C1 0, C2 2.7744e-16, C3 8.94654e-14, C4 0, D -5.31659e-12
- Acidification potential of land and water (AP) [mol H^(+)-Äq.]: A1-A3 0.610896, C1 0, C2 0.00466067, C3 0.00777939, C4 0, D 0.304727
- Eutrophication potential aquatic freshwater (EP-freshwater) [kg PO_(4)-Äq.]: A1-A3 0.00242045, C1 0, C2 4.1749e-6, C3 1.00274e-5, C4 0, D -0.000604653
- Eutrophication potential aquatic marine (EP-marine) [kg N-Äq.]: A1-A3 0.265189, C1 0, C2 0.00214084, C3 0.00184769, C4 0, D 0.0577358
- Eutrophication potential terrestrial (EP-terrestrial) [mol N-Äq.]: A1-A3 2.56627, C1 0, C2 0.0238971, C3 0.0193988, C4 0, D 0.697954
- Formation potential of tropospheric ozone photochemical oxidants (POCP) [kg NMVOC-Äq.]: A1-A3 0.689637, C1 0, C2 0.00420231, C3 0.00501477, C4 0, D 0.261618
- Abiotic depletion potential for non fossil resources (ADPE) [kg Sb-Äq.]: A1-A3 4.34934e-5, C1 0, C2 1.24556e-7, C3 1.0996e-6, C4 0, D -7.47094e-5
- Abiotic depletion potential for fossil resources (ADPF) [MJ]: A1-A3 1359.65, C1 0, C2 18.7177, C3 66.5249, C4 0, D -7166.89
- Water use (WDP) [m^(3) Welt-Äq. entzogen]: A1-A3 16.0289, C1 0, C2 0.0130405, C3 0.59968, C4 0, D -10.4912
- Incidence of disease due to PM emissions (PM) [Krankheitsfälle]
- Human exposure efficiency relative to U235 (IR) [kBq U235-Äq.]
- Comparative toxic unit for ecosystems (ETP-fw) [CTUe]
- Comparative toxic unit for humans (carcinogenic) (HTP-c) [CTUh]
- Comparative toxic unit for humans (noncarcinogenic) (HTP-nc) [CTUh]
- Soil quality index (SQP) [SQP]

## Use advice
Scope:
This document refers to average HASSLACHER CROSS LAMINATED TIMBER of the HASSLACHER group.

This EPD includes data of the NORITEC Holzindustrie GmbH in Stall im Mölltal (Austria) and represents

100 % of HASSLACHER’s CROSS LAMINATED TIMBER production in the year of reference.
System boundary:
The life cycle assessment of HASSLACHER CROSS LAMINATED TIMBER refers to a cradle-to-gate analysis of the environmental impacts with modules C1-C4 and D (A1-A3, + C, +D). The following life cycle phases are taken into consideration in the analysis:

Module A1-A3 | Production stage

The production stage includes the upstream burdens

of raw material supply (sawn timber, production of the

adhesive system, etc.) and their transports to the manufacturing plant in Stall. Sorting, planing, finger-jointing, chamfering and joining, including the packaging of the product, are taken into account. The share of electricity demand covered by green electricity is 100 % (emission factor GWP-total: 13 g CO2 equivalent/kWh). Thermal energy is provided from the energetic use of wooden residues from the production process.

Module C1 | Deconstruction and demolition

After the removal of building components overlying the product, the joints can simply be loosened by screwing or sawing and lifted by cranes to the place of removal. Required energy demand can be neglected. The actual energy demand depends on the installation of the products and can therefore vary greatly in the building context.

Module C2 | Transport to disposal

Module C2 includes the transport to waste treatment. In this case, transport by truck over a transport distance of 50 km is assumed.

Module C3 | Waste processing

In Module C3, the chipping after removal of the products is considered. The wooden products and with them the material-inherent properties leave the product system as secondary fuel in module C3.

Modul C4 | Disposal

The applied scenario declares the energetic recovery of the wooden products; therefore, no environmental impacts are to be expected from waste processing of the products in C4.

Modul D | Benefits and loads beyond the system boundary

Applying an European average scenario, module D describes the energetic recovery of the product at the end-of-life including the corresponding energy substitution potentials.

## Data sources
- GaBi Database (all versions)
- GaBi Database Edition 2021, CUP 2021.01
