# Carpet floor covering (1400 g/m²)

Dataset: ILCD process, EPD, generic dataset
Geography: DE
Reference year: 2018
Valid until: 2022
Classification: oekobau.dat: Kunststoffe / Bodenbeläge / Textile Bodenbeläge
Owner: thinkstep
Compliance: DIN EN 15804
Review: Dependent internal review by thinkstep, IABP-GaBi, IBP-GaBi; Independent external review by GaBi user forum, GaBi bug forum, GaBi user community
Amounts: rows without a unit in brackets have none in this file; such an amount is in the reference unit of its flow, which a separate flow dataset defines
copyright: true

## General comment
This data set has been modeled according to the European Standard EN 15804 for Sustainable Building. Results are depicted in modules that allow the structured expression of results over the entire life cycle.

## Geography
The data set represents the country specific situation in Germany, focusing on the main technologies, the region specific characteristics and / or import statistics.

## Time period
annual average

## Technology and included processes
In this data set is an average of homogeneous (type 1) and multi-layer (type 2/3) floor coverings considered with an average top layer weight of 600 g/m².
The composition of the polymeric top layer consists of 37% polymide 6, 37% polypropylene and 26% polyester.
The color of the top layer is assumed to be an average of spun-dyed and strand-dyed yarn for this data set.
The needle-punched nonwovens are finished with an SBR-latex and SA-latex based formulation with flame retardant.

The production of the polymer top layer dominates the life cycle assessment.

Background system:
Electricity: Electricity from renewable and non- renewable powerplants is modelled so that it represents a countrys specific consumption mix including transmission / distribution losses, own consumption, imports, emissions and efficiency standards, and energy carrier properties. Several factors are taken into account. (1) Energy carrier production - The exploration, mining / production, processing, and transportation of energy carrier supply chains are modelled for each country. The models account for differences among countries in production and processing, including crude oil production technologies, flaring rates, production efficiencies, emissions, etc. (2) Energy carrier supply - Each countrys specific energy carrier supply is modelled, taking into account domestic supply versus imports from abroad. Energy carrier properties (e.g. carbon and energy content), which can vary depending from where an energy carrier is sourced, are adjusted accordingly. (3) Power plants - Models are created to represent energy carrier-specific power plants and electricity generation facilities specific to different renewable energy resources. Energy carrier production and supply models are used to represent power plant inputs. Combined heat and power (CHP) plants are also considered. (4) Electricity grid - Models representing the electricity generation facilities are combined into a larger model that reflects a countrys consumption mix. The larger model accounts for a countrys production mix, internal consumption (e.g. pumped storage for hydro power), transmission / distribution losses, and imported electricity. The country model is also adjusted according to national power plant emission and efficiency standards, as well as the countrys share of electricity plants versus CHP facilities.
Thermal energy, process steam: The thermal energy and process steam supply is modelled to reflect each countrys emission standards and typical energy carriers (e.g., coal, natural gas, etc.) Both thermal energy and process steam are assumed to be produced at heat plants. Thermal energy datasets assume energy carrier inputs are converted to thermal energy with 100% efficiency; process steam datasets assume conversion efficiencies of 85%, 90% to 95%. The energy carriers used for the generation of thermal energy and process steam are modelled according to each countrys import situation (see electricity above).
Transportation: All relevant and known transportation processes are included. Ocean-going and inland ship transport as well as rail, truck and pipeline transport of bulk commodities are considered.
Energy carriers: The energy carriers and their respective properties are modelled according to the specific supply situation (see electricity above).
Refinery products: Diesel fuel, gasoline, technical gases, fuel oils, lubricants and residues such as bitumen are modelled with a parameterised country-specific refinery model. The refinery model aims to represent each countrys refining processes (e.g. emissions levels, internal energy consumption, etc.), as well as the countrys product output spectrum, which can vary significantly among countries. The supply of crude oil is likewise modelled according to the country-specific situation and accounts for differences in resource properties (e.g., crude oil energy content).

## Technical purpose
The area of application of the declared floor covering is the object area. In general, the installation in the building is done as glued installation.

## Safety margin
10 %. Product system almost completely covered. Good technological, temporal and geographic representativeness.

## Reference product
- Nadelvlies Bodenbelag: 1

## Inputs
- Erneuerbare Primärenergie als Energieträger (PERE) [MJ]: A1-A3 13.2513, C1 0, C2 0.00279664, C3 0.279174, D -6.93458
- Erneuerbare Primärenergie zur stofflichen Nutzung (PERM) [MJ]: A1-A3 0, C1 0, C2 0, C3 0, D 0
- Total use of renewable primary energy resources (PERT) [MJ]: A1-A3 13.2513, C1 0, C2 0.00279664, C3 0.279174, D -6.93458
- Nicht-erneuerbare Primärenergie als Energieträger (PENRE) [MJ]: A1-A3 142.582, C1 0, C2 0.048039, C3 50.3388, D -23.3716
- Nicht-erneuerbare Primärenergie zur stofflichen Nutzung (PENRM) [MJ]: A1-A3 48.73, C1 0, C2 0, C3 -48.73, D 0
- Total use of non-renewable primary energy resources (PENRT) [MJ]: A1-A3 191.312, C1 0, C2 0.048039, C3 1.6088, D -23.3716
- Input of secondary material (SM) [kg]: A1-A3 0, C1 0, C2 0, C3 0, D 0
- Use of renewable secondary fuels (RSF) [MJ]: A1-A3 3.75508e-9, C1 0, C2 0, C3 0, D 0
- Use of non renewable secondary fuels (NRSF) [MJ]: A1-A3 4.41079e-8, C1 0, C2 0, C3 0, D 0
- Use of net fresh water (FW) [m3]: A1-A3 0.038053, C1 0, C2 2.50463e-6, C3 0.0109003, D -0.003233

## Outputs
- Hazardous waste disposed (HWD) [kg]: A1-A3 1.19375e-7, C1 0, C2 1.79517e-9, C3 1.47633e-9, D -1.24595e-8
- Non-hazardous waste disposed (NHWD) [kg]: A1-A3 0.161736, C1 0, C2 8.43169e-6, C3 0.0563092, D -0.0111994
- Radioactive waste disposed (RWD) [kg]: A1-A3 0.00479312, C1 0, C2 5.05752e-8, C3 4.04121e-5, D -0.000837881
- Components for re-use (CRU) [kg]: A1-A3 0, C1 0, C2 0, C3 0, D 0
- Materials for Recycling (MFR) [kg]: A1-A3 0, C1 0, C2 0, C3 0, D 0
- Material for Energy Recovery (MER) [kg]: A1-A3 0, C1 1.54, C2 0, C3 0, D 0
- Exported electrical energy (EEE) [MJ]: A1-A3 0, C1 0, C2 0, C3 6.09691, D 0
- Exported thermal energy (EET) [MJ]: A1-A3 0, C1 0, C2 0, C3 13.1537, D 0

## Impact indicators
- Global warming potential (GWP) [kg CO2 eq.]: A1-A3 8.91813, C1 0, C2 0.00357416, C3 4.04533, D -1.60441
- Ozone Depletion Potential (ODP) [kg R11 eq.]: A1-A3 3.68438e-9, C1 0, C2 1.18306e-18, C3 1.58009e-15, D -3.83512e-14
- Acidification potential (AP) [kg SO2 eq.]: A1-A3 0.0128738, C1 0, C2 7.21942e-6, C3 0.00250068, D -0.00137188
- Eutrophication potential (EP) [kg Phosphate eq.]: A1-A3 0.00181342, C1 0, C2 1.71626e-6, C3 0.000581077, D -0.000260533
- Photochemical Ozone Creation Potential (POCP) [kg Ethene eq.]: A1-A3 0.00197164, C1 0, C2 -2.35957e-6, C3 0.000144935, D -0.00013858
- Abiotic depletion potential for non fossil resources (ADPE) [kg Sb eq.]: A1-A3 2.58479e-6, C1 0, C2 3.00769e-10, C3 1.80975e-8, D -4.0865e-7
- Abiotic depletion potential for fossil resources (ADPF) [MJ]: A1-A3 179.169, C1 0, C2 0.0479098, C3 1.50678, D -21.2564

## Use advice
This dataset refers to the production of 1 m² multilayer carpet floor covering with a weight of 1400 g/m². The weight of the polymeric top layer is 600 g/m².
Scaling the dataset to other weights per unit area is not recommended, as in particular the composition / mass of the polymeric top layer (and not the weight of the floor covering in total) is crucial for LCA results.

The data set represents a cradle to gate inventory. It can be used to characterise the supply chain situation of the respective commodity in a representative manner. Combination with individual unit processes using this commodity enables the generation of user-specific (product) LCAs.

## Data sources
- GaBi databases
- Gemeinschaft Umweltfreundlicher Teppichboden e.V. (GUT)
- GaBi Database Edition 2020, SP40
- GaBi database (all versions)
