# Kooltherm® K8 Plus

Dataset: ILCD process, EPD, specific dataset
Geography: RER
Reference year: 2021
Valid until: 2026
Classification: OEKOBAU.DAT: Dämmstoffe / Phenolharz-Hartschaum (PF) / PF-Platten
Classification: IBUCategories: 02 Building products / Thermal insulation products / Insulating materials made of foam plastics
Method details: Insulating materials made of foam plastics.pdf
Generated by: Kingspan Insulation
Registration number: EPD-KSI-20210039-CBA1-EN
Owner: Kingspan Insulation
Compliance: DIN EN 15804+A2; ISO 14025
Review: Accredited third party review by Institut Bauen und Umwelt e. V.
Amounts: rows without a unit in brackets have none in this file; such an amount is in the reference unit of its flow, which a separate flow dataset defines
copyright: true
licenseType: Free of charge for all users and uses
accessRestrictions: None

## General comment
Kooltherm® K8 Plus is a rigid thermoset cellular insulation material faced on both sides with a composite foil based facing. On the backside a mineral wool (20 mm) is bonded. The product is available in variable thicknesses from 20/20 mm up to 200/20 mm. This EPD covers one of the most commonly sold thickness of 100/20 mm with an RD-value of 5,6 m²·K/W.

For the placing on the market of the product in the

European Union/European Free Trade Association

(EU/EFTA) (with the exception of Switzerland)

Regulation (EU) No. 305/2011 (CPR) applies. The

product needs a declaration of performance taking into

consideration EN 13166:2012+A2:2016 - Thermal

insulation products for buildings - Factory made

phenolic foam (PF) products - Specification and the

CE-marking. For the application and use the respective

national provisions apply.

## Technology and included processes
Phenolic foam is produced by the use of phenolic resin, a catalyst, additives and blowing agent. The cell structure is formed in the resin under the influence of heat released during the chemical reaction. Hereby, the blowing agent is incorporated into the material which forms a solid and very fine cell structure, which is nearly 100% closed. The foam is applied on the facings. After this, the thickness and strength is determined by the conveyor belt where upper and lower rollers compress the material into the desired thickness. The board is sawed into the correct size and packed according to the product specification.
Declared unit:
The declared unit (1 m²) and conversion factors are

listed in the table below.

## Technical purpose
Due to its high insulating value, Kooltherm® K8 Plus is suitable for use as cavity wall insulation. The extra layer mineral wool (20 mm) will absorb unevenness in a construction, which makes Kooltherm® K8 Plus suitable for renovation projects.

## Reference product
- 100/20 mm thickness: 1

## Inputs
- Renewable primary energy as energy carrier (PERE) [MJ]: A1-A3 38.539, A4 0.0269, A5 0.0153, C1 0.000105, C2 0.0134, C3 0.342, C4 0, D -12.4
- Renewable primary energy resources as material utilization (PERM) [MJ]: A1-A3 0, A4 0, A5 0, C1 0, C2 0, C3 0, C4 0, D 0
- Total use of renewable primary energy resources (PERT) [MJ]: A1-A3 38.539, A4 0.0269, A5 0.0153, C1 0.000105, C2 0.0134, C3 0.342, C4 0, D -12.4
- Non renewable primary energy as energy carrier (PENRE) [MJ]: A1-A3 125, A4 0.463, A5 0.0792, C1 0.0359, C2 0.232, C3 100.05, C4 0, D -61.4
- Non renewable primary energy as material utilization (PENRM) [MJ]: A1-A3 97.6, A4 0, A5 0, C1 0, C2 0, C3 -97.6, C4 0, D 0
- Total use of non renewable primary energy resources (PENRT) [MJ]: A1-A3 222.4, A4 0.463, A5 0.0792, C1 0.0359, C2 0.232, C3 2.45, C4 0, D -61.4
- Use of secondary material (SM) [kg]: A1-A3 0, A4 0, A5 0, C1 0, C2 0, C3 0, C4 0, D 0
- Use of renewable secondary fuels (RSF) [MJ]: A1-A3 0, A4 0, A5 0, C1 0, C2 0, C3 0, C4 0, D 0
- Use of non renewable secondary fuels (NRSF) [MJ]: A1-A3 0, A4 0, A5 0, C1 0, C2 0, C3 0, C4 0, D 0
- Use of net fresh water (FW) [m^3]: A1-A3 0.063243, A4 4.54e-5, A5 0.000494, C1 1.95e-7, C2 2.27e-5, C3 0.0202, C4 0, D -0.0146

## Outputs
- Hazardous waste disposed (HWD) [kg]: A1-A3 8.87412e-5, A4 2.59e-8, A5 3.71e-10, C1 3.8e-12, C2 1.29e-8, C3 4.89e-9, C4 0, D -2.52e-8
- Non hazardous waste disposed (NHWD) [kg]: A1-A3 0.373176, A4 3.77e-5, A5 0.0193, C1 2.14e-7, C2 1.88e-5, C3 0.242, C4 0, D -0.0265
- Radioactive waste disposed (RWD) [kg]: A1-A3 0.0035351, A4 6.29e-7, A5 3.64e-6, C1 4.13e-8, C2 3.14e-7, C3 0.000112, C4 0, D -0.00495
- Components for re-use (CRU) [kg]: A1-A3 0, A4 0, A5 0, C1 0, C2 0, C3 0, C4 0, D 0
- Materials for recycling (MFR) [kg]: A1-A3 0, A4 0, A5 0, C1 0, C2 0, C3 0, C4 0, D 0
- Materials for energy recovery (MER) [kg]: A1-A3 0, A4 0, A5 0.0799, C1 0, C2 0, C3 4.09, C4 0, D 0
- Exported electrical energy (EEE) [MJ]: A1-A3 0, A4 0, A5 0.443, C1 0, C2 0, C3 14.3, C4 0, D 0
- Exported thermal energy (EET) [MJ]: A1-A3 0, A4 0, A5 0.798, C1 0, C2 0, C3 25.6, C4 0, D 0

## Impact indicators
- Global Warming Potential total (GWP-total) [kg CO_(2)-Äq.]: A1-A3 8.753, A4 0.0351, A5 0.2, C1 0.00264, C2 0.0175, C3 8.29, C4 0, D -3.55
- Global Warming Potential fossil fuels (GWP-fossil) [kg CO_(2)-Äq.]: A1-A3 8.901, A4 0.0347, A5 0.2, C1 0.00264, C2 0.0174, C3 8.29, C4 0, D -3.54
- Global Warming Potential biogenic (GWP-biogenic) [kg CO_(2)-Äq.]: A1-A3 -0.22758, A4 -0.000211, A5 -3.63e-6, C1 -1.86e-7, C2 -0.000106, C3 0.000857, C4 0, D -0.00687
- Global Warming Potential luluc (GWP-luluc) [kg CO_(2)-Äq.]: A1-A3 0.0794829, A4 0.000531, A5 7.2e-6, C1 8.97e-8, C2 0.000266, C3 0.000119, C4 0, D -0.00241
- Depletion potential of the stratospheric ozone layer (ODP) [kg CFC11-Äq.]: A1-A3 1.31e-8, A4 4.22e-18, A5 5.97e-17, C1 2.54e-19, C2 2.11e-18, C3 1.14e-15, C4 0, D -3.62e-14
- Acidification potential of land and water (AP) [mol H^(+)-Äq.]: A1-A3 0.027043, A4 4.1e-5, A5 2.76e-5, C1 1.26e-5, C2 2.05e-5, C3 0.00476, C4 0, D -0.00669
- Eutrophication potential aquatic freshwater (EP-freshwater) [kg PO_(4)-Äq.]: A1-A3 2.8255e-5, A4 1.68e-7, A5 1.05e-8, C1 4.7e-10, C2 8.38e-8, C3 2.92e-7, C4 0, D -4.66e-6
- Eutrophication potential aquatic marine (EP-marine) [kg N-Äq.]: A1-A3 0.005932, A4 1.26e-5, A5 7.28e-6, C1 5.87e-6, C2 6.32e-6, C3 0.00226, C4 0, D -0.00154
- Eutrophication potential terrestrial (EP-terrestrial) [mol N-Äq.]: A1-A3 0.0784, A4 0.000148, A5 0.00012, C1 6.43e-5, C2 7.41e-5, C3 0.0261, C4 0, D -0.0165
- Formation potential of tropospheric ozone photochemical oxidants (POCP) [kg NMVOC-Äq.]: A1-A3 0.02268, A4 3.3e-5, A5 2.09e-5, C1 1.67e-5, C2 1.65e-5, C3 0.00582, C4 0, D -0.00441
- Abiotic depletion potential for non fossil resources (ADPE) [kg Sb-Äq.]: A1-A3 6.5591e-6, A4 2.42e-9, A5 8.6e-10, C1 6.96e-11, C2 1.21e-9, C3 1.93e-8, C4 0, D -5.53e-7
- Abiotic depletion potential for fossil resources (ADPF) [MJ]: A1-A3 222.39, A4 0.463, A5 0.0791, C1 0.0359, C2 0.231, C3 2.45, C4 0, D -61.4
- Water use (WDP) [m^(3) world-Äq. deprived]: A1-A3 1.48765, A4 0.000749, A5 0.0208, C1 4.62e-6, C2 0.000375, C3 0.854, C4 0, D -0.329
- Incidence of disease due to PM emissions (PM) [Disease incidence]: A1-A3 2.6359e-7, A4 2.36e-10, A5 3.77e-10, C1 1.41e-10, C2 1.18e-10, C3 1.64e-8, C4 0, D -5.67e-8
- Human exposure efficiency relative to U235 (IR) [kBq U235-Äq.]: A1-A3 0.58403, A4 9.21e-5, A5 0.000482, C1 6.03e-6, C2 4.6e-5, C3 0.0173, C4 0, D -0.813
- Comparative toxic unit for ecosystems (ETP-fw) [CTUe]: A1-A3 128.3, A4 0.312, A5 0.056, C1 0.0242, C2 0.156, C3 0.955, C4 0, D -13.6
- Comparative toxic unit for humans (carcinogenic) (HTP-c) [CTUh]: A1-A3 8.9126e-9, A4 6.26e-12, A5 4.28e-12, C1 4.12e-13, C2 3.13e-12, C3 1.35e-10, C4 0, D -2.5e-9
- Comparative toxic unit for humans (noncarcinogenic) (HTP-nc) [CTUh]: A1-A3 1.1486e-7, A4 2.52e-10, A5 3.14e-10, C1 1.44e-11, C2 1.26e-10, C3 1.95e-9, C4 0, D -1.26e-8
- Soil quality index (SQP) [SQP]: A1-A3 46.554, A4 0.209, A5 0.0199, C1 9.39e-5, C2 0.104, C3 0.516, C4 0, D -9.23

## Use advice
Scope:
The insulation material Kooltherm® is produced by Kingspan Insulation B.V. at the manufacturing facility in Tiel, the Netherlands. A composite foil based facing is autohesively bonded to the insulation core during manufacture. On the backside a mineral wool layer is bonded afterwards.

In order to enable the user of the EPD to calculate the LCA results for different thicknesses, the EPD contains the respective calculation rules.
System boundary:
Type of EPD: according to EN 15804:

cradle to gate with options, modules C1–C4, and module D (A1–A3, C, D and additional modules: A4,A5).

According to PCR Part A:

1a) declaration of one specific product from one plant

of one manufacturer;

The product stage is a mandatory information module

and it covers:

· A1, raw material extraction and processing,

processing of secondary material input (e.g. recycling

processes),

· A2, transport to the manufacturer,

· A3, manufacturing,

including provision of all materials, products and

energy, packaging processing and its transport, as well

as waste processing up to the end-of-waste state or

disposal of final residues during the product stage.

The construction process stage includes:

· A4 transport to the building site;

· A5 installation in the building

including provision of all materials, products and energy, as well as waste processing up to the end-of-waste state or disposal of final residues during the construction process stage.

The end-of-life stage is a mandatory information module and it covers:

· C1 de-construction, demolition;

· C2 transport to waste processing;

· C3 waste processing for reuse, recovery and/or recycling;

· C4 disposal (not applicable for this EPD)

including provision and all transport, provision of all materials, products and related energy and water use.

Environmental burden of the incineration (R1 > 60%) of the product

at the end-of-life stage are assigned to the product system (C3); resulting potential credits for thermal and electrical energy from energy substitution are declared in module D.

Renewable electricity sources for manufacturing

All electricity used during production comes from

renewable sources.

By generating energy on-site with solar panels and with procured energy from fully certified renewable sources. Following the global Net Zero Energy strategy from Kingspan Group plc.

## Data sources
- GaBi Database (all versions)
- GaBi database SP39 2019
