# Tor - Condoor BV - Industrie- und Garagentor Alu 80 mm (PG 1); 1 m² Fläche

Dataset: ILCD process, EPD, specific dataset
Geography: NL
Reference year: 2016
Valid until: 2021
Classification: OEKOBAU.DAT: Komponenten von Fenstern und Vorhangfassaden / Türen und Tore / Aluminium
Synonyms: Sektionaltor; Sectionaldoor; Panel door; ALU frame; Luxe-Line ALU frame
Method details: EPD Industrie- und Garagentore - Condoor; Produktkategorieregeln Teil A; Produktkategorieregeln Teil B – für Türen und Tore
Owner: Condoor BV
Compliance: EN 15804
Review: Independent external review by Patrick Wortner
Amounts: rows without a unit in brackets have none in this file; such an amount is in the reference unit of its flow, which a separate flow dataset defines
copyright: true

## General comment
A1-A3 sowie Module A4, A5, B2, B5, B6, B7, C1, C2, C3, C4, D. Das Umweltprofil beinhaltet die Aufwendungen für die Lebenszyklus-Stadien cradle to gate mit Optionen (Modul A1-A3).

## Geography
Dieser Datensatz repräsentiert die Situation des Unternehmens Condoor BV, 3899 AA Zeewolde, Niederlande im Hinblick auf die wichtigsten Technologien und die gesetzlichen Rahmenbedingungen.

## Time period
jährlicher Durchschnitt

## Technology and included processes
Die Ökobilanzergebnisse umfassen die Lebenszyklusstadien für die Herstellung der Vorprodukte bis hin zur Rohstoffgewinnung und Verarbeitungsprozesse von als Input dienenden Sekundärstoffen (z.B. Recyclingprozesse), deren Transporte zum Werk sowie die Produktion selbst, einschließlich der Bereitstellung von allen Hilfs- und Betriebsstoffen, Energie, sowie die vollständige Abfallbehandlung oder die Deponierung der Restabfälle während des Stadiums der Produktion. Die Module A1, A2 und A3 sind hier als ein aggregiertes Modul A1-A3 ausgewiesen. Falls für diesen Datensatz weitere Module berechnet wurden, sind diese separat zu finden und können für eine Betrachtung des gesamten Lebenszyklus zusammengeführt werden.

## Technical purpose
Industrie- und Garagentore sowohl für private als auch für industrielle Anwendungen.

## Reference product
- Tor - Condoor BV - Industrie- und Garagentor Alu 80 mm (PG 1): 1

## Inputs
- Use of net fresh water (FW) [m3]: A1-A3 3.8, A4 0.000324, A5 0.00208, B2 0.00269, B5 0, B6 0, B7 0, C1 0.00318, C2 0.000161, C3 0.00046, C4 0.0262, D -0.72
- Use of non renewable primary energy (PENRE) [MJ]: A1-A3 2070, A4 2.28, A5 13.6, B2 13.1, B5 0, B6 0, B7 0, C1 2.06, C2 0.06, C3 53.2, C4 86.5, D -271
- Use of non renewable primary energy resources used as raw materials (PENRM) [MJ]: A1-A3 145, A4 0, A5 -6.27, B2 0, B5 0, B6 0, B7 0, C1 0, C2 0, C3 -52.9, C4 -86.2, D 0
- Use of non renewable secondary fuels (NRSF) [MJ]: A1-A3 0, A4 0, A5 0, B2 0, B5 0, B6 0, B7 0, C1 0, C2 0, C3 0, C4 0, D 0
- Use of renewable primary energy (PERE) [MJ]: A1-A3 490, A4 0.13, A5 12.3, B2 0.19, B5 0, B6 0, B7 0, C1 2.06, C2 0.06, C3 0.3, C4 0.25, D -271
- Use of renewable primary energy resources used as raw materials (PERM) [MJ]: A1-A3 4.51, A4 0, A5 -4.51, B2 0, B5 0, B6 0, B7 0, C1 0, C2 0, C3 0, C4 0, D 0
- Use of renewable secondary fuels (RSF) [MJ]: A1-A3 0, A4 0, A5 0, B2 0, B5 0, B6 0, B7 0, C1 0, C2 0, C3 0, C4 0, D 0
- Use of secondary material (SM) [kg]: A1-A3 0, A4 0, A5 0, B2 0, B5 0, B6 0, B7 0, C1 0, C2 0, C3 0, C4 0, D 0
- Total use of non renewable primary energy resource (PENRT) [MJ]: A1-A3 2220, A4 2.28, A5 7.3, B2 13.1, B5 0, B6 0, B7 0, C1 2.06, C2 0.06, C3 0.3, C4 0.25, D -271
- Total use of renewable primary energy resources (PERT) [MJ]: A1-A3 495, A4 0.13, A5 7.75, B2 0.19, B5 0, B6 0, B7 0, C1 2.06, C2 0.06, C3 0.3, C4 0.25, D -271

## Outputs
- Components for re-use (CRU) [kg]: A1-A3 0, A4 0, A5 0, B2 0, B5 0, B6 0, B7 0, C1 0, C2 0, C3 0, C4 0
- Exported electrical energy (EEE) [MJ]: A1-A3 0, A4 0, A5 1.42, B2 0, B5 0, B6 0, B7 0, C1 0, C2 0, C3 0, C4 0
- Exported thermal energy (EET) [MJ]: A1-A3 0, A4 0, A5 3.75, B2 0, B5 0, B6 0, B7 0, C1 0, C2 0, C3 0, C4 0
- Hazardous waste disposed (HWD) [kg]: A1-A3 4.4e-5, A4 1.73e-7, A5 4.13e-8, B2 7.24e-9, B5 0, B6 0, B7 0, C1 4.67e-9, C2 8.56e-8, C3 6.76e-10, C4 1.37e-8, D -8.02e-7
- Materials for energy recovery (MER) [kg]: A1-A3 0, A4 0, A5 0, B2 0, B5 0, B6 0, B7 0, C1 0, C2 0, C3 0, C4 0
- Materials for recycling (MFR) [kg]: A1-A3 0, A4 0, A5 0, B2 0, B5 0, B6 0, B7 0, C1 0, C2 0, C3 25.8, C4 0
- Non hazardous waste dispose (NHWD) [kg]: A1-A3 23.4, A4 0.000192, A5 0.0483, B2 0.00112, B5 0, B6 0, B7 0, C1 0.00444, C2 9.51e-5, C3 0.000643, C4 2.54, D -13.1
- Radioactive waste disposed (RWD) [kg]: A1-A3 0.0929, A4 3.26e-6, A5 4.79e-5, B2 4.74e-5, B5 0, B6 0, B7 0, C1 0.00111, C2 1.62e-6, C3 0.000161, C4 0.000104, D -0.0496

## Impact indicators
- Abiotic depletion potential for non fossil resources (ADPE) [kg Sb-Äqv.]: A1-A3 0.000387, A4 1.1e-8, A5 8.63e-8, B2 1.49e-7, B5 0, B6 0, B7 0, C1 1.37e-7, C2 5.45e-9, C3 1.98e-8, C4 7.75e-8, D -0.000671
- Abiotic depletion potential for fossil resources (ADPF) [MJ]: A1-A3 1960, A4 2.27, A5 7.17, B2 12.9, B5 0, B6 0, B7 0, C1 4.57, C2 1.13, C3 0.66, C4 1.76, D -864
- Acidification potential of soil and water (AP) [kg SO2-Äqv.]: A1-A3 0.56, A4 0.00101, A5 0.00296, B2 0.00085, B5 0, B6 0, B7 0, C1 0.00117, C2 0.000499, C3 0.00017, C4 0.00102, D -0.3
- Eutrophication potential (EP) [kg Phosphat-Äqv.]: A1-A3 0.0451, A4 0.000252, A5 0.000377, B2 5.95e-5, B5 0, B6 0, B7 0, C1 0.000105, C2 0.000125, C3 1.52e-5, C4 0.000196, D -0.0203
- Global warming potential (GWP) [kg CO2-Äqv.]: A1-A3 136, A4 0.17, A5 1.02, B2 0.28, B5 0, B6 0, B7 0, C1 0.42, C2 0.0819, C3 0.0611, C4 12.1, D -69.5
- Depletion potential of the stratospheric ozone layer (ODP) [kg CFC 11 eq.]: A1-A3 3.16e-7, A4 7.59e-13, A5 1.6e-7, B2 2.39e-12, B5 0, B6 0, B7 0, C1 2.99e-10, C2 3.76e-13, C3 4.34e-11, C4 2.54e-11, D -1.66e-8
- Formation potential of tropospheric ozone (POCP) [kg Ethen-Äqv.]: A1-A3 0.0465, A4 -0.000418, A5 0.00131, B2 0.000123, B5 0, B6 0, B7 0, C1 8.09e-5, C2 -0.000207, C3 1.17e-5, C4 0.000123, D -0.0188

## Use advice
Dieser Datensatz beinhaltet die Ergebnisse für die Module A1-A3 sowie die Module A4, A5, B2, B5, B6, B7,C1, C2, C3, C4, D gemäß EN 15804. Ein Vergleich mit anderen Produkten ist nur mit einer vergleichbaren Anwendung im Gebäude zulässig. Grundsätzlich ist eine Gegenüberstellung oder die Bewertung von EPD Daten nur möglich, wenn alle zu vergleichenden Datensätze nach EN 15804 erstellt wurden und der Gebäudekontext, bzw. die produktspezifischen Leistungsmerkmale berücksichtigt werden.

## Review details
Die angewendete LCI Methode ist in Übereinstimmung mit ISO 14040 und 14044. Die Dokumentation enthält alle relevanten Informationen im Hinblick auf die Datenqualität und den Umfang der Anwendung der jeweiligen LCI Ergebnisse bzw. der Datensätze. Der Datensatz repräsentiert den Stand der Technik bezogen auf die funktionelle Einheit.

## Data sources
- GaBi database (all versions)
