# Schüco ADS 70-HI Door system with triple glazing; 42 kg/m²

Dataset: ILCD process, EPD, specific dataset
Geography: AT
Reference year: 2020
Valid until: 2025
Classification: OEKOBAU.DAT: Komponenten von Fenstern und Vorhangfassaden / Türen und Tore / Aluminium
Synonyms: Tür, Profil
Method details: PKR Bau EPD GmbH PKR-Code: 2.21.1 Stand 07.06.2019 "Fenster Tueren Glasfassadenelemente"
Generated by: IBO Institut für Baubiologie und Bauökologie
Registration number: BAU-EPD-ALUKÖNIGSTAHL-2020-1-ECOINVENT-ADS-ADUP
Owner: AluKönigStahl GmbH
Compliance: EN 15804; ISO 14025
Review: Independent external review by Richter Sarah
Amounts: rows without a unit in brackets have none in this file; such an amount is in the reference unit of its flow, which a separate flow dataset defines
copyright: true
licenseType: Free of charge for all users and uses
accessRestrictions: Keine

## General comment
Aluminiumtüren mit Dreifach-Verglasung im Format 1,23 x 2,18 m².
Als funktionale Einheit wurde ein Stück Tür festgelegt.

## Time period
Die Sachbilanzdaten repräsentieren die Produktion der betrachteten
Schüco ADS Türensysteme in Österreich zum Zeitpunkt der
Deklarationserstellung im Jahr 2020

## Technology and included processes
Aluminum doors with triple glazing measuring 1.23 x 2.18 m².
A piece of door was defined as a functional unit.

## Technical purpose
The products are used in single and multi-storey residential buildings and in non-residential buildings, both indoors and outdoors
use.

## Scenarios
- Recycling: 100% Recycling

## Reference product
- Schüco ADS 70.HI Türsystem mit Dreifachverglasung B x H 1230 mm x 2180: 1

## Inputs
- Use of renewable primary energy (PERE) [MJ]: C1 (Recycling) 0.601377, C2 (Recycling) 0.526326, C3 (Recycling) 0.164985, C4 (Recycling) 0.136522, D (Recycling) -656.106, A1-A3 525.893, A4 1.48103, A5 2.40078
- Use of renewable primary energy resources used as raw materials (PERM) [MJ]: C1 (Recycling) 0, C2 (Recycling) 0, C3 (Recycling) 0, C4 (Recycling) 0, D (Recycling) 0, A1-A3 0, A4 0, A5 0
- Total use of renewable primary energy resources (PERT) [MJ]: C1 (Recycling) 0.601377, C2 (Recycling) 0.526326, C3 (Recycling) 0.164985, C4 (Recycling) 0.136522, D (Recycling) -656.106, A1-A3 525.893, A4 1.48103, A5 2.40078
- Use of non renewable primary energy (PENRE) [MJ]: C1 (Recycling) 107.457, C2 (Recycling) 52.8425, C3 (Recycling) 6.00638, C4 (Recycling) 10.9643, D (Recycling) -1456.99, A1-A3 5013.52, A4 148.693, A5 143.43
- Use of non renewable primary energy resources used as raw materials (PENRM) [MJ]: C1 (Recycling) 0, C2 (Recycling) 0, C3 (Recycling) 0, C4 (Recycling) 0, D (Recycling) 0, A1-A3 195.263, A4 0, A5 0
- Total use of non renewable primary energy resource (PENRT) [MJ]: C1 (Recycling) 107.457, C2 (Recycling) 52.8425, C3 (Recycling) 6.00638, C4 (Recycling) 10.9643, D (Recycling) -1456.99, A1-A3 5208.78, A4 148.693, A5 143.43
- Use of secondary material (SM) [kg]: C1 (Recycling) 0, C2 (Recycling) 0, C3 (Recycling) 0, C4 (Recycling) 0, D (Recycling) 0, A1-A3 11.8282, A4 0, A5 0
- Use of renewable secondary fuels (RSF) [MJ]: C1 (Recycling) 0, C2 (Recycling) 0, C3 (Recycling) 0, C4 (Recycling) 0, D (Recycling) 0, A1-A3 0, A4 0, A5 0
- Use of non renewable secondary fuels (NRSF) [MJ]: C1 (Recycling) 0, C2 (Recycling) 0, C3 (Recycling) 0, C4 (Recycling) 0, D (Recycling) 0, A1-A3 0, A4 0, A5 0
- Use of net fresh water (FW) [m3]

## Outputs
- Hazardous waste disposed (HWD) [kg]: C1 (Recycling) 4.79183e-5, C2 (Recycling) 3.31935e-5, C3 (Recycling) 1.74773e-5, C4 (Recycling) 3.78401e-6, D (Recycling) 0.111671, A1-A3 0.105711, A4 9.34031e-5, A5 9.06425e-5
- Non hazardous waste dispose (NHWD) [kg]: C1 (Recycling) 0.117144, C2 (Recycling) 2.46828, C3 (Recycling) 0.591607, C4 (Recycling) 76.7377, D (Recycling) -32.2976, A1-A3 85.891, A4 6.94548, A5 2.6717
- Radioactive waste disposed (RWD) [kg]: C1 (Recycling) 0.00149015, C2 (Recycling) 0.000712926, C3 (Recycling) 2.80652e-5, C4 (Recycling) 0.000149498, D (Recycling) -0.0166172, A1-A3 0.0252308, A4 0.0020061, A5 0.00174665
- Components for re-use (CRU) [kg]: C1 (Recycling) 0, C2 (Recycling) 0, C3 (Recycling) 0, C4 (Recycling) 0, D (Recycling) 0, A1-A3 0, A4 0, A5 0
- Materials for recycling (MFR) [kg]: C1 (Recycling) 0, C2 (Recycling) 0, C3 (Recycling) 29.054, C4 (Recycling) 0, D (Recycling) -29.054, A1-A3 0, A4 0, A5 0
- Materials for energy recovery (MER) [kg]: C1 (Recycling) 0, C2 (Recycling) 0, C3 (Recycling) 6.28829, C4 (Recycling) 0, D (Recycling) -6.28829, A1-A3 0, A4 0, A5 0
- Exported electrical energy (EEE) [MJ]: C1 (Recycling) 0, C2 (Recycling) 0, C3 (Recycling) 11.0649, C4 (Recycling) 0, D (Recycling) -11.0649, A1-A3 0, A4 0, A5 0
- Exported thermal energy (EET) [MJ]: C1 (Recycling) 0, C2 (Recycling) 0, C3 (Recycling) 97.6316, C4 (Recycling) 0, D (Recycling) -97.6316, A1-A3 0, A4 0, A5 0

## Impact indicators
- Global warming potential (GWP) [kg CO2-Äqv.]: C1 (Recycling) 7.33942, C2 (Recycling) 3.39572, C3 (Recycling) 20.3191, C4 (Recycling) 0.325069, D (Recycling) -109.63, A1-A3 441.911, A4 9.5552, A5 10.1718
- Depletion potential of the stratospheric ozone layer (ODP) [kg R11 eq.]: C1 (Recycling) 1.33292e-6, C2 (Recycling) 6.34007e-7, C3 (Recycling) 6.60072e-8, C4 (Recycling) 1.30993e-7, D (Recycling) -9.59545e-6, A1-A3 2.5102e-5, A4 1.78403e-6, A5 1.61138e-6
- Acidification potential of soil and water (AP) [kg SO2-Äqv.]: C1 (Recycling) 0.055781, C2 (Recycling) 0.0173654, C3 (Recycling) 0.00558079, C4 (Recycling) 0.00242919, D (Recycling) -0.79504, A1-A3 2.74105, A4 0.0488643, A5 0.0786677
- Eutrophication potential (EP) [kg Phosphat-Äqv.]: C1 (Recycling) 0.0129893, C2 (Recycling) 0.00419709, C3 (Recycling) 0.00383288, C4 (Recycling) 0.000536522, D (Recycling) -0.300066, A1-A3 0.803472, A4 0.0118102, A5 0.0173811
- Formation potential of tropospheric ozone (POCP) [kg Ethen-Äqv.]: C1 (Recycling) 0.00678325, C2 (Recycling) 0.00190619, C3 (Recycling) 0.000169207, C4 (Recycling) 0.000328932, D (Recycling) -0.0806784, A1-A3 0.220407, A4 0.00536381, A5 0.00814845
- Abiotic depletion potential for non fossil resources (ADPE) [kg Sb-Äqv.]: C1 (Recycling) 2.47869e-6, C2 (Recycling) 1.01925e-5, C3 (Recycling) 6.73735e-7, C4 (Recycling) 3.54651e-7, D (Recycling) 0.00389382, A1-A3 0.00678015, A4 2.86807e-5, A5 1.41219e-5
- Abiotic depletion potential for fossil resources (ADPF) [MJ]: C1 (Recycling) 106.464, C2 (Recycling) 52.0073, C3 (Recycling) 5.84236, C4 (Recycling) 10.7118, D (Recycling) -968.886, A1-A3 4759.19, A4 146.343, A5 139.549

## Data sources
- ecoinvent 3.5 database
- ecoinvent database (general)
- Software: SimaPro 9.0
