# Structural finger jointed solid timber & GLT® – Girder Longitudinally Tensiletested

Dataset: ILCD process, EPD, average dataset
Geography: AT
Reference year: 2021
Valid until: 2026
Classification: OEKOBAU.DAT: Holz / Vollholz / Konstruktionsvollholz
Classification: IBUCategories: 02 Bauprodukte / Produkte aus Bauholz / Vollholzprodukte
Method details: Vollholzprodukte.pdf
Generated by: Daxner & Merl GmbH
Registration number: EPD-HAS-20210170-IBD1-DE
Owner: HASSLACHER Holding GmbH
Compliance: DIN EN 15804+A2; ISO 14025
Review: Accredited third party review by Institut Bauen und Umwelt e. V.
Amounts: rows without a unit in brackets have none in this file; such an amount is in the reference unit of its flow, which a separate flow dataset defines
copyright: true
licenseType: Free of charge for all users and uses
accessRestrictions: None

## General comment
Structural finger jointed solid timber from HASSLACHER Holding GmbH is an industrially manufactured product for load-bearing structures. It consists of kiln-dried, finger-jointed planks and squared timber made of softwood, which are graded visually or mechanically according to their strength. Adhesives according to 2.5 are used for bonding. Structural finger jointed solid timber is produced with a maximum wood moisture content of 18 %.

Structural finger jointed solid timber is supplied in dimensions according to 2.4 and with dimensional tolerances according to EN 336.

Structural finger jointed solid timber is highly dimensionally stable, especially due to stricter specifications regarding cutting and wood moisture content, and therefore tends to crack less than standard solid timber. Structural finger jointed solid timber can be produced with increased surface requirements compared to standard finger-jointed or non-jointed sawn timber.

## Technology and included processes
For the production of structural finger jointed solid timber, conventional sawn timber is first dried to below 18 % wood moisture (target moisture content: approx. 15 %), pre-planed and graded visually, but mainly by machine, according to strength. Identified areas with strength-reducing spots are cut out depending on the desired strength class. In the case of structural finger jointed solid timber, the resulting sawn timber sections are joined by finger-joints to form endless lamellas. Structural finger jointed solid timber from HASSLACHER Preding Holzindustrie GmbH is subjected to a tensile test load procedure after curing. If the tensile test is passed with a positive result, the profiles are planed, chamfered, tied and packed. If required, treatment with wood preservatives or a surface finish or even joinery work can be carried out.
Technical data:
Structural data for structural finger jointed solid softwood timber according to EN 15497 are given.
Declared unit:
This EPD refers to a declared unit of 1 m³ HASSLACHER solid structural timber with an average density of 470 kg/m³ at 15 % moisture at delivery.

## Technical purpose
Structural finger jointed solid timber is used as a load-bearing element in building and bridge construction.

The use of preventive chemical wood preservation according to DIN 68800-3 is unusual and only permissible if structural wood preservation according to DIN 68800-2 alone is not sufficient. If, in exceptional cases, a preventive chemical wood preservative is used, this must be regulated by a general building authority approval or approval according to the Biocidal Products Regulation.

## Reference product
- Konstruktionsvollholz (): 1

## Inputs
- Renewable primary energy as energy carrier (PERE) [MJ]: A1-A3 2000.34, C1 0, C2 1.07706, C3 7682.24, C4 0, D -1826.45
- Renewable primary energy resources as material utilization (PERM) [MJ]: A1-A3 7654, C1 0, C2 0, C3 -7651.6, C4 0, D 0
- Total use of renewable primary energy resources (PERT) [MJ]: A1-A3 9654.34, C1 0, C2 1.07706, C3 30.6381, C4 0, D -1826.45
- Non renewable primary energy as energy carrier (PENRE) [MJ]: A1-A3 712.895, C1 0, C2 18.7859, C3 66.5405, C4 0, D -7167.85
- Non renewable primary energy as material utilization (PENRM) [MJ]: A1-A3 33.6725, C1 0, C2 0, C3 0, C4 0, D 0
- Total use of non renewable primary energy resources (PENRT) [MJ]: A1-A3 746.568, C1 0, C2 18.7859, C3 66.5405, C4 0, D -7167.85
- Use of secondary material (SM) [kg]: A1-A3 0.121862, C1 0, C2 0, C3 0, C4 0, D 0
- Use of renewable secondary fuels (RSF) [MJ]: A1-A3 0, C1 0, C2 0, C3 0, C4 0, D 7651.6
- Use of non renewable secondary fuels (NRSF) [MJ]: A1-A3 0, C1 0, C2 0, C3 0, C4 0, D 0
- Use of net fresh water (FW) [m^3]: A1-A3 0.809528, C1 0, C2 0.00123359, C3 0.0298324, C4 0, D -1.20244

## Outputs
- Hazardous waste disposed (HWD) [kg]: A1-A3 2.00256e-6, C1 0, C2 9.89869e-10, C3 1.75785e-8, C4 0, D -1.60827e-6
- Non hazardous waste disposed (NHWD) [kg]: A1-A3 1.80397, C1 0, C2 0.00294728, C3 0.0471551, C4 0, D 0.271643
- Radioactive waste disposed (RWD) [kg]: A1-A3 0.0160736, C1 0, C2 3.40762e-5, C3 0.00990141, C4 0, D -0.588619
- Components for re-use (CRU) [kg]: A1-A3 0, C1 0, C2 0, C3 0, C4 0, D 0
- Materials for recycling (MFR) [kg]: A1-A3 0, C1 0, C2 0, C3 0, C4 0, D 0
- Materials for energy recovery (MER) [kg]: A1-A3 0, C1 0, C2 0, C3 470, C4 0, D 0
- Exported electrical energy (EEE) [MJ]: A1-A3 0, C1 0, C2 0, C3 0, C4 0, D 0
- Exported thermal energy (EET) [MJ]: A1-A3 0, C1 0, C2 0, C3 0, C4 0, D 0

## Impact indicators
- Global Warming Potential total (GWP-total) [kg CO_(2)-Äq.]: A1-A3 -695.816, C1 0, C2 1.42131, C3 759.456, C4 0, D -419.258
- Global Warming Potential fossil fuels (GWP-fossil) [kg CO_(2)-Äq.]: A1-A3 56.691, C1 0, C2 1.4115, C3 3.73757, C4 0, D -408.123
- Global Warming Potential biogenic (GWP-biogenic) [kg CO_(2)-Äq.]: A1-A3 -752.971, C1 0, C2 -0.00167377, C3 755.713, C4 0, D -10.816
- Global Warming Potential luluc (GWP-luluc) [kg CO_(2)-Äq.]: A1-A3 0.463294, C1 0, C2 0.0114864, C3 0.00529095, C4 0, D -0.319425
- Depletion potential of the stratospheric ozone layer (ODP) [kg CFC11-Äq.]: A1-A3 1.34398e-6, C1 0, C2 2.7744e-16, C3 8.94654e-14, C4 0, D -5.31659e-12
- Acidification potential of land and water (AP) [mol H^(+)-Äq.]: A1-A3 0.455492, C1 0, C2 0.00466067, C3 0.00777939, C4 0, D 0.304727
- Eutrophication potential aquatic freshwater (EP-freshwater) [kg PO_(4)-Äq.]: A1-A3 0.00180674, C1 0, C2 4.1749e-6, C3 1.00274e-5, C4 0, D -0.000604653
- Eutrophication potential aquatic marine (EP-marine) [kg N-Äq.]: A1-A3 0.194016, C1 0, C2 0.00214084, C3 0.00184769, C4 0, D 0.0577358
- Eutrophication potential terrestrial (EP-terrestrial) [mol N-Äq.]: A1-A3 1.93415, C1 0, C2 0.0238971, C3 0.0193988, C4 0, D 0.697954
- Formation potential of tropospheric ozone photochemical oxidants (POCP) [kg NMVOC-Äq.]: A1-A3 0.522839, C1 0, C2 0.00420231, C3 0.00501477, C4 0, D 0.261618
- Abiotic depletion potential for non fossil resources (ADPE) [kg Sb-Äq.]: A1-A3 2.53487e-5, C1 0, C2 1.24556e-7, C3 1.0996e-6, C4 0, D -7.47094e-5
- Abiotic depletion potential for fossil resources (ADPF) [MJ]: A1-A3 745.915, C1 0, C2 18.7177, C3 66.5249, C4 0, D -7166.89
- Water use (WDP) [m^(3) Welt-Äq. entzogen]: A1-A3 10.6495, C1 0, C2 0.0130405, C3 0.59968, C4 0, D -10.4912
- Incidence of disease due to PM emissions (PM) [Krankheitsfälle]
- Human exposure efficiency relative to U235 (IR) [kBq U235-Äq.]
- Comparative toxic unit for ecosystems (ETP-fw) [CTUe]
- Comparative toxic unit for humans (carcinogenic) (HTP-c) [CTUh]
- Comparative toxic unit for humans (noncarcinogenic) (HTP-nc) [CTUh]
- Soil quality index (SQP) [SQP]

## Use advice
Scope:
This document refers to average HASSLACHER solid structural timber and GLT® – girder longitudinally tensiletested manufactured at the production site in Preding (Austria). This EPD is valid for the entire solid structural timber production of the HASSLACHER group (100 %). A good representativeness of the declared average can be assumed.
System boundary:
The life cycle assessment of HASSLACHER solid structural timber refers to a cradle-to-gate analysis of the environmental impacts with modules C1-C4 and D (A1-A3, + C, +D). The following life cycle phases are taken into consideration in the analysis:

Module A1-A3 | Production stageThe production stage includes the upstream burdens of raw material supply (sawn timber, production of the adhesive system, etc.) and their transports to the manufacturing plant in Preding. Sorting, planing, finger-jointing, chamfering and joining, including the packaging of the product, are taken into account. The share of electricity demand covered by green electricity is 100 % (emission factor GWP-total: 13 g CO2 equivalent/kWh). Thermal energy is provided from the energetic use of wooden residues from the production process.

Module C1 | Deconstruction and demolition

After the removal of building components overlying the product, the joints can simply be loosened by screwing or sawing and lifted by cranes to the place of removal. Required energy demand can be neglected. The actual energy demand depends on the installation of the products and can therefore vary greatly in the building context.

Module C2 | Transport to disposal

Module C2 includes the transport to waste treatment. In this case, transport by truck over a transport distance of 50 km is assumed.

Module C3 | Waste processing

In Module C3, the chipping after removal of the products is considered. The wooden products and with them the material-inherent properties leave the product system as secondary combustibles in module C3.

Module C4 | Disposal

The applied scenario declares the energetic recovery of the wooden products, therefore no environmental impacts are to be expected from waste processing of the products in C4.

Module D | Benefits and loads beyond the system boundary

Applying an European average scenario, module D describes the energetic recovery of the product at the end-of-life including the corresponding energy substitution potentials.

## Data sources
- GaBi Database (all versions)
- GaBi Database Edition 2021, CUP 2021.01
