# Tensar TriAX TX 130 S-G Geogitter; Flächengewicht: 0.281 kg/m²

Dataset: ILCD process, EPD, specific dataset
Geography: GB
Reference year: 2017
Valid until: 2022
Classification: OEKOBAU.DAT: Kunststoffe / Folien und Vliese / Technische Textilien
Synonyms: Geogitter, Geokunststoffe, Geotextilien
Method details: PCR-Dokument Geokunststoffe und Geotextilien
Owner: Tensar International Limited
Compliance: DIN EN 15804
Review: Independent external review by Matthias Schulz
Amounts: rows without a unit in brackets have none in this file; such an amount is in the reference unit of its flow, which a separate flow dataset defines
copyright: true

## General comment
Das Geogitter besteht aus mehreren Sechsecken, die durch gleichseitige dreieckige Öffnungen gebildet sind. Diese Öffnungen sind durch eine Struktur von monolithischen, multidirektionalen Zugelementen bestimmter Ausrichtung, Größe und Form definiert. Das hexagonale Geogitter wird aus einer extrudierten Polypropylenfolie hergestellt, die dann in drei gleichseitige Richtungen gestanzt und ausgerichtet wird, so dass die resultierenden Rippen der dreieckigen Öffnungen einen hohen Grad an molekularer Orientierung aufweisen, welche sich durch die Masse des integralen Knotens fortsetzt.
Die bestimmungsgemäße Verwendung des Geogitters besteht darin, körnige Schichten zu stabilisieren, um Verformungen beim Transport zu minimieren, die Tragfähigkeit zu verbessern und die Lebensdauer der körnigen Schicht in oder unter einer Konstruktion in Straßen, Eisenbahnlinien und anderen Verkehrsflächen unter Berücksichtigung geltender nationaler Vorschriften zu erhöhen. Die Kombination des Geogitters und des Aggregats erzeugt eine mechanisch stabilisierte Verbundschicht mit signifikant verbesserten Eigenschaften und Leistungsfähigkeiten als Reaktion auf dynamische und statische Belastung im Vergleich zu Aggregatschichten. Bei der Installation sind die Installationsverfahren des Herstellers sowie die jeweiligen nationalen Praktiken zu beachten. Das Geogitter ist in fünf Schritten installiert.

## Time period
Die Sachbilanzdaten repräsentieren alle im 2014 von Tensar International produzierten Geogitter des Typs Tensar TriAX.

## Technology and included processes
Die Herstellung des Geogitter erfolgt am Standort in Blackburn. Die Rohstoffe werden mittels Extrusion, Punching und Stretching Prozesse verarbeitet.

## Technical purpose
Zur Qualitätssicherung sind die Geogrids TriAx TX0-Serie gemäß der Europäischen Technischen Bewertung (ETA) 12/0529 reguliert und vom Hersteller mit einer CE-Kennzeichnung versehen. In der EU / EFTA (ohne Schweiz) ist das Inverkehrbringen von Geogittern durch die Verordnung (EU) Nr. 305/2011 vom 9. März 2011 abgedeckt. Für die Verwendung des Produkts gelten die jeweiligen nationalen Bestimmungen. Das Produkt wird verpackt und als Rolle transportiert.

## Reference product
- Tensar TriAX TX 130S-G Geogitter: 1

## Inputs
- Einsatz von Süßwasserressourcen (FW) [m3]: A1-A3 0.00308
- Nicht-erneuerbare Primärenergie als Energieträger (PENRE) [MJ]: A1-A3 11.7
- Nicht-erneuerbare Primärenergie zur stofflichen Nutzung (PENRM) [MJ]: A1-A3 12.3
- Nicht erneuerbare Sekundärbrennstoffe (NRSF) [MJ]
- Erneuerbare Primärenergie als Energieträger (PERE) [MJ]: A1-A3 0.733
- Erneuerbare Primärenergie zur stofflichen Nutzung (PERM) [MJ]
- Erneuerbare Sekundärbrennstoffe (RSF) [MJ]
- Einsatz von Sekundärstoffen (SM) [kg]
- Total nicht erneuerbare Primärenergie (PENRT) [MJ]: A1-A3 24
- Total erneuerbare Primärenergie (PERT) [MJ]: A1-A3 0.733

## Outputs
- Komponenten für die Wiederverwendung (CRU) [kg]
- Exportierte elektrische Energie (EEE) [MJ]
- Exportierte thermische Energie (EET) [MJ]
- Gefährlicher Abfall zur Deponie (HWD) [kg]: A1-A3 3.1e-6
- Stoffe für die Energierückgewinnung (MER) [kg]
- Stoffe zum Recycling (MFR) [kg]
- Entsorgter nicht gefährlicher Abfall (NHWD) [kg]: A1-A3 0.927
- Entsorgter radioaktiver Abfall (RWD) [kg]: A1-A3 0.000496

## Impact indicators
- Potenzial für den abiotischen Abbau nicht fossiler Ressourcen (ADPE) [kg Sb-Äqv.]: A1-A3 1.78e-7
- Potenzial für den abiotischen Abbau fossiler Brennstoffe (ADPF) [MJ]: A1-A3 22.7
- Versauerungspotenzial von Boden und Wasser (AP) [kg SO2-Äqv.]: A1-A3 0.00182
- Eutrophierungspotenzial (EP) [kg Phosphat-Äqv.]: A1-A3 0.000178
- Globales Erwärmungspotenzial (GWP) [kg CO2-Äqv.]: A1-A3 0.775
- Abbau Potential der stratosphärischen Ozonschicht (ODP) [kg R11-Äqv.]: A1-A3 4.75e-11
- Bildungspotential für troposphärisches Ozon (POCP) [kg Ethen-Äqv.]: A1-A3 0.000263

## Use advice
Eine Gegenüberstellung oder Bewertung von EPD Daten ist nur möglich, wenn alle zu vergleichenden Datensätze nach EN 15804 erstellt wurden und die produktspezifischen Leistungsmerkmale berücksichtigt werden.

## Data sources
- GaBi database SP28 2015
