# Brettsperrholz (Durchschnitt DE)

Dataset: ILCD process, EPD, representative dataset
Geography: DE
Reference year: 2020
Valid until: 2025
Classification: OEKOBAU.DAT: Holz / Vollholz / Brettschichtholzplatte
Method details: EN 15804; ILCD format
Owner: Thünen-Institut für Holzforschung
Compliance: EN 15804
Review: Independent external review by Dr. Frank Werner - Umwelt & Entwicklung
Amounts: rows without a unit in brackets have none in this file; such an amount is in the reference unit of its flow, which a separate flow dataset defines
copyright: true

## General comment
Weitere Informationen zur deklarierten Einheit (Zusammensetzung) und die auf Herstellerangaben beruhende Sachbilanz (In- und Output der Stoff- und Energieströme) stehen als Excel-Datei unter dem Unterpunkt Hintergrund-Bericht zum Download bereit.
Der Datensatz wurde 2020 als Aktualisierung mit gleichbleibendem Vordergrundsystem erstellt. Alle Hintergrunddaten entstammen der GaBi Professional Datenbank 2020 im Service Pack 40. Die Modellierung und Berechnung der Ökobilanz basiert auf den europäischen Normen EN 15804:2012+A1:2013 und EN 16485:2014. Bei Rückfragen wenden Sie sich bitte an holzundklima@thuenen.de.

## Geography
Für die Ökobilanzierung von Brettsperrholz wurden Daten von 5 Werken berücksichtigt (Rüter & Diederichs 2012). Für alle in Rüter & Diederichs (2012) angeführten Vollholzprodukte wurden von 2009 bis 2011 insgesamt 178 Prozesslinien erfasst. Im Verhältnis zu den vom Statistischen Bundesamt gemeldeten Produktionsmengen im selben Zeitraum entspricht die erreichte Abdeckung von Vollholzprodukten aus Nadelschnittholz 38%.

## Time period
Der Datensatz basiert auf Produktionsdaten aus den Jahren 2009 bis 2011 (Vordergrundsystem).
Eine Aktualisierung des Hintergrundsystems erfolgte 2020.

## Technology and included processes
Brettsperrholz ist i.d.R. symmetrisch aufgebaut und besteht aus mindestens drei rechtwinklig zueinander verklebten Lagen aus Nadelschnittholz, wobei die einzelnen Schnitthölzer längs ihrer Schmalseiten ohne oder mit planmäßigem seitlichem Abstand zueinander angeordnet sein können. Bei Brettsperrholzholz mit mehr als fünf Lagen können gemäß der Vorgaben der jeweiligen bauaufsichtlichen Zulassung bis zu drei benachbarte Vollholzlagen faserparallel miteinander verklebt werden. Die Vollholzlagen haben Dicken zwischen 17 und 45 mm. Einige bauaufsichtliche Zulassungen erlauben den Einsatz von Lagen aus Holzwerkstoffen wie OSB oder Furnierschichtholz. Zusätzliche, außenseitig angeordnete, nicht tragende Funktionsschichten aus Holz- oder Gipswerkstoffen sind möglich. Hier wird jedoch nur Brettsperrholz ohne Holzwerkstofflage betrachtet. Die Verklebung von Brettsperrholz wird vornehmlich mittels Melamin-Harnstoff-Formaldehyd und 1 Komponenten Polyurethan-Bindemittel durchgeführt. Teilweise kommen Emulsion-Polymer-Isocya-nat-Bindemittel zum Einsatz. Für die Herstellung von Brettsperrholz werden Bretter und Bohlen aus Nadelholz zunächst auf weniger als 15 % Holzfeuchte getrocknet, vorgehobelt und visuell bzw. maschinell nach der Festigkeit sortiert. Identifizierte Brettabschnitte mit festigkeitsvermindernden Stellen werden abhängig von der erwünschten Festigkeitsklasse ausgekappt und die so entstandenen Brettabschnitte durch Keilzinkenverbindung zu endlos langen Lamellen gestoßen. Im folgenden Vorhobelprozess werden die Lamellen auf Stärken zwischen 17 mm und 45 mm vierseitig gehobelt. Bei einigen Herstellern werden die Lamellen mittels Schmalseitenverklebung zu einer Einschichtplatte verklebt. Produziert der Brettsperrholzhersteller zunächst Einschichtplatten, so werden diese nach der Aushärtung gehobelt, beleimt und danach in der Presse kreuzweise angeordnet. Hersteller, die ohne Schmalseitenverklebung arbeiten, ordnen unmittelbar die beleimten Lamellen kreuzweise im Pressbett an. Je nach Hersteller können einzelne Lagen aus Holzwerkstoffplatten hergestellt werden, die wiederum herstellerabhängig in den Fugen kraftschlüssig gestoßen sein können. Nach dem Pressen und Aushärten wird der Rohling gehobelt, gefast, abgebunden und verpackt.
Die Holzfeuchte des Produktes liegt bei 12%

## Technical purpose
Brettsperrholz wird vorwiegend bei hoher statischer Beanspruchung im Ingenieurholzbau verwendet. Es wird als Platten- oder Scheibenelement eingesetzt. Es kann für die Errichtung von Außen- und Innenwänden, Dach- und Deckenelementen eingesetzt werden sowie für Stiegenläufe und Balkonplatten.

## Scenarios
- energetisch: therm. Verwertung
- stofflich: stoffl. Verwertung

## Reference product
- Brettsperrholz: 1

## Inputs
- Use of renewable primary energy (PERE) [MJ]: A1 1502.53, A2 6.01975, A3 840.214, A1-A3 2348.77, A5 0.0530012, C2 0.397185, C3 30.8332, D (energetisch) 6086.92, D (stofflich) -26.8857
- Use of renewable primary energy resources used as raw materials (PERM) [MJ]: A1 8290.96, A2 0, A3 0, A1-A3 8290.96, A5 0, C2 0, C3 -8290.96, D (energetisch) 0, D (stofflich) 0
- Total use of renewable primary energy resources (PERT) [MJ]: A1 9793.5, A2 6.01975, A3 840.214, A1-A3 10639.7, A5 0.0530012, C2 0.397185, C3 -8260.13, D (energetisch) 6086.92, D (stofflich) -26.8857
- Use of non renewable primary energy (PENRE) [MJ]: A1 849.908, A2 98.3068, A3 832.846, A1-A3 1781.06, A5 0.284735, C2 7.07294, C3 53.6094, D (energetisch) -4682.53, D (stofflich) -144.781
- Use of non renewable primary energy resources used as raw materials (PENRM) [MJ]: A1 75.5691, A2 0, A3 20.268, A1-A3 95.8371, A5 -20.268, C2 0, C3 -75.5691, D (energetisch) 0, D (stofflich) 0
- Total use of non renewable primary energy resource (PENRT) [MJ]: A1 925.477, A2 98.3068, A3 853.114, A1-A3 1876.9, A5 -19.9833, C2 7.07294, C3 -21.9597, D (energetisch) -4682.53, D (stofflich) -144.781
- Use of secondary material (SM) [kg]: A1 0, A2 0, A3 0, A1-A3 0, A5 0, C2 0, C3 0, D (energetisch) 0, D (stofflich) 489.437
- Use of renewable secondary fuels (RSF) [MJ]: A1 105.302, A2 0, A3 0, A1-A3 105.302, A5 0, C2 0, C3 0, D (energetisch) 0, D (stofflich) 0
- Use of non renewable secondary fuels (NRSF) [MJ]: A1 0, A2 0, A3 0, A1-A3 0, A5 0, C2 0, C3 0, D (energetisch) 0, D (stofflich) 0
- Use of net fresh water (FW) [m3]: A1 0.209445, A2 0.00603257, A3 0.247192, A1-A3 0.46267, A5 0.00379929, C2 0.000459913, C3 0.0166923, D (energetisch) 0.775387, D (stofflich) -0.0166659

## Outputs
- Hazardous waste disposed (HWD) [kg]: A1 1.62722e-5, A2 4.14401e-6, A3 5.59419e-6, A1-A3 2.60105e-5, A5 6.53183e-10, C2 3.29152e-7, C3 3.60527e-8, D (energetisch) -2.71912e-6, D (stofflich) -5.45604e-6
- Non hazardous waste dispose (NHWD) [kg]: A1 1.30334, A2 0.0165, A3 0.986692, A1-A3 2.30653, A5 0.00885651, C2 0.00108243, C3 0.0412596, D (energetisch) 6.56038, D (stofflich) -0.0401709
- Radioactive waste disposed (RWD) [kg]: A1 0.0232448, A2 0.000178869, A3 0.0569549, A1-A3 0.0803786, A5 7.62227e-6, C2 8.75443e-6, C3 0.00448112, D (energetisch) -0.304898, D (stofflich) -0.00318144
- Components for re-use (CRU) [kg]: A1 0, A2 0, A3 0, A1-A3 0, A5 0, C2 0, C3 0, D (energetisch) 0, D (stofflich) 0
- Materials for recycling (MFR) [kg]: A1 0, A2 0, A3 0, A1-A3 0, A5 0, C2 0, C3 489.437, D (energetisch) 0, D (stofflich) 0
- Materials for energy recovery (MER) [kg]: A1 0, A2 0, A3 0, A1-A3 0, A5 0, C2 0, C3 489.437, D (energetisch) 0, D (stofflich) 0
- Exported electrical energy (EEE) [MJ]: A1 0, A2 0, A3 0.435461, A1-A3 0.435461, A5 3.21052, C2 0, C3 0, D (energetisch) 0, D (stofflich) 0
- Exported thermal energy (EET) [MJ]: A1 0, A2 0, A3 1.01163, A1-A3 1.01163, A5 7.39429, C2 0, C3 0, D (energetisch) 0, D (stofflich) 0

## Impact indicators
- Global warming potential (GWP) [kg CO2-Äqv.]: A1 -728.762, A2 7.19574, A3 63.5675, A1-A3 -657.999, A5 1.76765, C2 0.510782, C3 792.456, D (energetisch) -305.99, D (stofflich) -11.1234
- Depletion potential of the stratospheric ozone layer (ODP) [kg R11 eq.]: A1 8.90807e-13, A2 4.3117e-15, A3 2.2271e-12, A1-A3 3.12222e-12, A5 2.96788e-16, C2 8.50258e-17, C3 1.7597e-13, D (energetisch) -1.19722e-11, D (stofflich) -1.23222e-13
- Acidification potential of soil and water (AP) [kg SO2-Äqv.]: A1 0.294281, A2 0.0294414, A3 0.181614, A1-A3 0.505336, A5 0.000163209, C2 0.00214014, C3 0.00587833, D (energetisch) -0.34152, D (stofflich) -0.0452206
- Eutrophication potential (EP) [kg Phosphat-Äqv.]: A1 0.068572, A2 0.00742614, A3 0.0367677, A1-A3 0.112766, A5 3.67984e-5, C2 0.000538391, C3 0.00104827, D (energetisch) -0.0577755, D (stofflich) -0.0108353
- Formation potential of tropospheric ozone (POCP) [kg Ethen-Äqv.]: A1 0.0526116, A2 -0.0124771, A3 0.0330379, A1-A3 0.0731725, A5 1.04376e-5, C2 -0.000900009, C3 0.000414745, D (energetisch) -0.0271506, D (stofflich) -9.39923e-5
- Abiotic depletion potential for non fossil resources (ADPE) [kg Sb-Äqv.]: A1 5.5479e-5, A2 6.52604e-7, A3 2.63859e-5, A1-A3 8.25175e-5, A5 1.26107e-8, C2 4.30101e-8, C3 1.75259e-6, D (energetisch) -0.000110189, D (stofflich) -1.91002e-6
- Abiotic depletion potential for fossil resources (ADPF) [MJ]: A1 869.147, A2 97.8519, A3 689.932, A1-A3 1656.93, A5 0.265494, C2 7.05059, C3 42.2985, D (energetisch) -3837.35, D (stofflich) -136.747

## Use advice
Aufgrund der hohen Abdeckung bildet der Datensatz die durchschnittlichen Produktionsverhältnisse und die damit verbundenen Umweltwirkungen repräsentativ für Deutschland ab. Liegen keine herstellerspezifischen Ökobilanzergebnisse des verwendeten Produkts vor, empfiehlt sich die Verwendung dieses Durchschnittsdatensatzes.

## Data sources
- Rüter S, Diederichs S (2012) Ökobilanz Basisdaten für Bauprodukte aus Holz, Hamburg, Johann Heinrich von Thünen Institut, Institut für Holztechnologie und Holzbiologie, Abschlussbericht
- GaBi database SP40 2020
- GaBi database (general)
