# Use - 1 kWh of final energy from wood chips (according to EnEV)

Dataset: ILCD process, EPD, generic dataset
Geography: DE
Reference year: 2018
Valid until: 2022
Classification: oekobau.dat: Gebäudetechnik / Nutzung / Nutzung Wärmeerzeuger (EnEV)
Owner: thinkstep
Compliance: DIN EN 15804
Review: Dependent internal review by thinkstep, IABP-GaBi, IBP-GaBi; Independent external review by GaBi user forum, GaBi bug forum, GaBi user community
Amounts: rows without a unit in brackets have none in this file; such an amount is in the reference unit of its flow, which a separate flow dataset defines
copyright: true

## General comment
This data set has been modeled according to the European Standard EN 15804 for Sustainable Building. Results are depicted in modules that allow the structured expression of results over the entire life cycle.

## Geography
The data set represents the country specific situation in Germany, focusing on the main technologies, the region specific characteristics and / or import statistics.

## Time period
Annual average

## Technology and included processes
This dataset includes wood extraction, wood chips production, transportation and incineration of wood chips, as well as landfilling of incineration residues (ash). An economic allocation has been used at sawmill level to allocate the loads of different sawmill products. A natural drying (no loads) has been modeled to get 20 M.% water content of the wood chips. Since final energy according to EnEV is the reference value for this dataset, a boiler efficiency of 100% has been calculated. Usually occurring system losses as well as auxiliary energy and power consumption in relation to boiler operation are not included in this dataset. The life cycle assessment is dominated by the combustion process as well as the sawmill processes and transports. The CO2 balance of the fuel is almost neutral - the amount of CO2 bound during the growth phase of the tree is released during the combustion process.

## Technical purpose
Thermal energy from wood chips is used for heating a building or technical processes (e.g. drying).

## Safety margin
0 %.

## Reference product
- Thermal energy (MJ): 3.6

## Inputs
- Erneuerbare Primärenergie als Energieträger (PERE) [MJ]: B6 3.84552
- Erneuerbare Primärenergie zur stofflichen Nutzung (PERM) [MJ]: B6 0
- Total use of renewable primary energy resources (PERT) [MJ]: B6 3.84552
- Nicht-erneuerbare Primärenergie als Energieträger (PENRE) [MJ]: B6 0.0662346
- Nicht-erneuerbare Primärenergie zur stofflichen Nutzung (PENRM) [MJ]: B6 0
- Total use of non-renewable primary energy resources (PENRT) [MJ]: B6 0.0662346
- Input of secondary material (SM) [kg]: B6 0
- Use of renewable secondary fuels (RSF) [MJ]: B6 0
- Use of non renewable secondary fuels (NRSF) [MJ]: B6 0
- Use of net fresh water (FW) [m3]: B6 8.98461e-6

## Outputs
- Hazardous waste disposed (HWD) [kg]: B6 1.7866e-9
- Non-hazardous waste disposed (NHWD) [kg]: B6 0.00599898
- Radioactive waste disposed (RWD) [kg]: B6 1.65006e-6
- Components for re-use (CRU) [kg]: B6 0
- Materials for Recycling (MFR) [kg]: B6 0
- Material for Energy Recovery (MER) [kg]: B6 0
- Exported electrical energy (EEE) [MJ]: B6 0
- Exported thermal energy (EET) [MJ]: B6 0

## Impact indicators
- Global warming potential (GWP) [kg CO2 eq.]: B6 0.0076469
- Ozone Depletion Potential (ODP) [kg R11 eq.]: B6 7.42985e-17
- Acidification potential (AP) [kg SO2 eq.]: B6 0.000228471
- Eutrophication potential (EP) [kg Phosphate eq.]: B6 5.20899e-5
- Photochemical Ozone Creation Potential (POCP) [kg Ethene eq.]: B6 3.11804e-5
- Abiotic depletion potential for non fossil resources (ADPE) [kg Sb eq.]: B6 9.8526e-10
- Abiotic depletion potential for fossil resources (ADPF) [MJ]: B6 0.0620674

## Use advice
This dataset refers to the production of 1 kWh of thermal energy from wood chips. The data set is intended for the use of final energy acc. EnEV as reference. The final energy acc. EnEV already takes into account system losses and system efficiency as well as power supply and power consumption, which is why this is not included in this data set. Therefore, the combustion process is calculated with 100% efficiency. To calculate the life cycle assessment results at building level, the indicator results have to be multiplied with the final energy demand acc. EnEV.

## Data sources
- PECH 2007
- GaBi Database Edition 2020, SP40
- GaBi database (all versions)
