# GUTEX Thermofibre

Dataset: ILCD process, EPD, specific dataset
Geography: RER
Reference year: 2019
Valid until: 2024
Classification: OEKOBAU.DAT: Dämmstoffe / Holzfasern / Holzfaserdämmplatte
Classification: IBUCategories: 01 Grundstoffe und Vorprodukte / Produkte für Beton, Mörtel und Einpressmörtel / Betonzusatzmittel
Method details: Betonzusatzmittel.pdf
Generated by: Thünen-Institut für Holzforschung
Registration number: EPD-GTX-20190018-IBA1-DE
Owner: GUTEX Holzfaserplattenwerk H. Henselmann GmbH + Co KG
Compliance: DIN EN 15804; ISO 14025
Review: Accredited third party review by Institut Bauen und Umwelt e. V.
Amounts: rows without a unit in brackets have none in this file; such an amount is in the reference unit of its flow, which a separate flow dataset defines
copyright: true
licenseType: Free of charge for all users and uses
accessRestrictions: None

## General comment
GUTEX Thermofibre are loose wood fibres which are dried and made available in pre-compressed units according to /ETA-12/0181/.

The wood fibres are manufactured from mechanically-crushed coniferous wood chips.

The blow-in gross density depends on the area of application and is on average approx. 35 kg/m³.

## Technology and included processes
Product manufacturing is based on wood chips supplied by regional sawmills which are broken down into wood fibres when exposed to moisture and heat. Then the fibres are dried and packed as units of the same size and weight in a filling process. The production site works on the basis of certified quality management (/ISO 9001/).
Technical data:
The product’s performance values correspond with the Declaration of Performance (GX-01-0029-02) in terms of its essential properties in accordance with /ETA-12/0181/ dated 21.06.2017.
Declared unit:
The declared unit of this ecological analysis is the provision of 1 kg GUTEX Thermofibre.

Note: Depending on the respective application, various densities can be assumed for analysis at building level (see section 2.3).

## Technical purpose
This thermal insulation serves towards manufacturing thermal layers which are not resistant to compression by mechanically processing them at the place of application.

The following areas of application are possible:

- Expansive insulation in closed cavities in exterior and interior walls

- Insulation in closed cavities between rafters and wood beams

- Exposed insulation in horizontal or slightly inclined areas

- Insulation of top storey ceilings which are accessible but cannot be walked on

- Cavity insulation between sleepers in the floor area and comparable supporting constructions

## Reference product
- GUTEX Thermofibre (): 1

## Inputs
- Renewable primary energy as energy carrier (PERE) [MJ]: A1 0.107752, A2 0.00475656, A3 0.767701, A5 1.074, C2 0.000607673, C3 0, D 13.9214
- Renewable primary energy resources as material utilization (PERM) [MJ]: A1 17.0548, A2 0, A3 1.06851, A5 -1.06851, C2 0, C3 -17.0548, D 0
- Total use of renewable primary energy resources (PERT) [MJ]: A1 17.1626, A2 0.00475656, A3 1.83621, A5 0.00548571, C2 0.000607673, C3 -17.0548, D 13.9214
- Non renewable primary energy as energy carrier (PENRE) [MJ]: A1 0.674382, A2 0.10069, A3 8.36718, A5 0.357205, C2 0.0128637, C3 0, D -14.2211
- Non renewable primary energy as material utilization (PENRM) [MJ]: A1 0.35, A2 0, A3 0.32616, A5 -0.32616, C2 0, C3 -0.35, D 0
- Total use of non renewable primary energy resources (PENRT) [MJ]: A1 1.02438, A2 0.10069, A3 8.69334, A5 0.0310451, C2 0.0128637, C3 -0.35, D -14.2211
- Use of secondary material (SM) [kg]: A1 0, A2 0, A3 0, A5 0, C2 0, C3 0, D 0
- Use of renewable secondary fuels (RSF) [MJ]: A1 0, A2 0, A3 0, A5 0, C2 0, C3 0, D 17.0548
- Use of non renewable secondary fuels (NRSF) [MJ]: A1 0, A2 0, A3 0, A5 0, C2 0, C3 0, D 0.35
- Use of net fresh water (FW) [m^3]: A1 0.00106958, A2 9.35294e-6, A3 0.00376481, A5 0.000299024, C2 1.19488e-6, C3 0, D 0.00191356

## Outputs
- Hazardous waste disposed (HWD) [kg]: A1 0, A2 0, A3 0, A5 0, C2 0, C3 0, D 0
- Non hazardous waste disposed (NHWD) [kg]: A1 0, A2 0, A3 0.0001812, A5 0, C2 0, C3 0, D 0
- Radioactive waste disposed (RWD) [kg]: A1 1.6738e-5, A2 1.37542e-7, A3 2.15143e-5, A5 1.26689e-6, C2 1.75717e-8, C3 0, D -0.000668049
- Components for re-use (CRU) [kg]: A1 0, A2 0, A3 0, A5 0, C2 0, C3 0, D 0
- Materials for recycling (MFR) [kg]: A1 0, A2 0, A3 0, A5 0, C2 0, C3 0, D 0
- Materials for energy recovery (MER) [kg]: A1 0, A2 0, A3 0, A5 0, C2 0, C3 1, D 0
- Exported electrical energy (EEE) [MJ]: A1 0, A2 0, A3 0, A5 0.168128, C2 0, C3 0, D 0
- Exported thermal energy (EET) [MJ]: A1 0, A2 0, A3 0, A5 0.409573, C2 0, C3 0, D 0

## Impact indicators
- Global warming potential (GWP) [kg CO_(2)-Äq.]: A1 -1.55089, A2 0.00716958, A3 0.39824, A5 0.125663, C2 0.000915947, C3 1.62132, D -0.94077
- Depletion potential of the stratospheric ozone layer (ODP) [kg CFC11-Äq.]: A1 5.9016e-14, A2 3.69824e-15, A3 1.4502e-13, A5 7.74507e-15, C2 4.72468e-16, C3 0, D -2.14159e-12
- Acidification potential of land and water (AP) [kg SO_(2)-Äq.]: A1 0.000249204, A2 3.02804e-5, A3 0.000363795, A5 1.51492e-5, C2 3.86846e-6, C3 0, D -0.00100538
- Eutrophication potential (EP) [kg PO_(4)^(3)-Äq.]: A1 5.70497e-5, A2 7.54503e-6, A3 5.43299e-5, A5 2.57092e-6, C2 9.63914e-7, C3 0, D -0.000151532
- Formation potential of tropospheric ozone photochemical oxidants (POCP) [kg Ethen-Äq.]: A1 1.90911e-6, A2 -1.23187e-5, A3 6.37933e-5, A5 8.74356e-7, C2 -1.57377e-6, C3 0, D -0.000103015
- Abiotic depletion potential for non fossil resources (ADPE) [kg Sb-Äq.]: A1 1.6881e-8, A2 4.44082e-10, A3 1.10972e-7, A5 2.80411e-9, C2 5.67336e-11, C3 0, D -2.90734e-7
- Abiotic depletion potential for fossil resources (ADPF) [MJ]: A1 0.982152, A2 0.100338, A3 8.31291, A5 0.0278517, C2 0.0128187, C3 0, D -12.8867

## Use advice
Scope:
This Environmental Product Declaration is valid for loose GUTEX Thermofibre wood fibre insulation boards produced in the Gutenburg plant (see manufacturer's address).
System boundary:
The Declaration complies with an EPD "from cradle to gate, with options". It includes the production stage, i.e. from provision of the raw materials through to production (cradle-to-gate, Modules A1-A3), disposal of product packaging in Module A5, and parts of the end-of-life stage (Modules C2-C4). It also contains an analysis of the potential benefits and loads over and beyond the product's entire life cycle (Module D).

The provision of wood as a raw material in the form of wood chips from forestry and the provision of additives are analysed in Module A1. Transport of these substances is considered in Module A2. Module A3 comprises the provision of fuels, resources and electricity as well as the production processes on site. These are essentially defibring, fibre drying, adding additives as well as packing the products.

Module A5 exclusively concerns the disposal of packaging materials.

Module C2 considers transport to the disposal company and Module C3 is concerned with preparing and sorting waste wood.

In accordance with /EN 16485/, Module C3 also includes as outflows the CO2 equivalents of the carbon in the product and packaging as well as the renewable and non-renewable primary energy (PERM and PENRM) contained in the product and its packaging. The loads and potentials arising from thermal recycling of the product at its end of life and the potential benefits by substituting fossil fuels in the course of generating energy during thermal recycling of the product packaging are analysed in Module D.

## Data sources
- GaBi Database (all versions)
- GaBi database SP33 2017
