# Tor - EFAFLEX Tor- und Sicherheitssysteme GmbH & Co. KG - Schnelllauf-Spiraltor SST Alu

Dataset: ILCD process, EPD, specific dataset
Geography: DE
Reference year: 2018
Valid until: 2023
Classification: OEKOBAU.DAT: Komponenten von Fenstern und Vorhangfassaden / Türen und Tore / Aluminium
Synonyms: Schnelllauftor; Spiraltor; EFA-SST, EFA-THERM; EFA-ALUX
Method details: EPD Schnellauf-Spiraltor und -Turbotor; Produktkategorieregeln Teil A; Produktkategorieregeln Teil B – für Türen und Tore
Owner: EFAFLEX Tor- und Sicherheitssysteme GmbH Co. KG
Compliance: EN 15804
Review: Independent external review by Dr.-Ing. Carolin Roth
Amounts: rows without a unit in brackets have none in this file; such an amount is in the reference unit of its flow, which a separate flow dataset defines
copyright: true

## General comment
A1-A3 sowie Module C3, C4, D . Das Umweltprofil beinhaltet die Aufwendungen für die Lebenszyklus-Stadien cradle-to-gate mit Optionen (Modul A1-A3). Die Herstellung der Verpackung wurde innerhalb der Module A1-A3 berücksichtigt.

## Geography
Dieser Datensatz repräsentiert die Situation des Unternehmens EFAFLEX Tor- und Sicherheitssysteme GmbH & Co. KG in 84079 Bruckberg, Deutschland, im Hinblick auf die wichtigsten Technologien und die gesetzlichen Rahmenbedingungen.

## Time period
jährlicher Durchschnitt

## Technology and included processes
Die Ökobilanzergebnisse umfassen die Lebenszyklusstadien der Herstellung der Vorprodukte bis hin zur Rohstoffgewinnung und Verarbeitungsprozesse von als Input dienenden Sekundärstoffen (z.B. Recyclingprozesse), deren Transporte zum Werk sowie die Produktion selbst, einschließlich der Bereitstellung von allen Hilfs- und Betriebsstoffen, Energie, sowie die vollständige Abfallbehandlung oder die Deponierung der Restabfälle während des Stadiums der Produktion. Die Module A1, A2 und A3 sind hier als ein aggregiertes Modul A1-A3 ausgewiesen. Falls für diesen Datensatz weitere Module berechnet wurden, sind diese separat zu finden und können für eine Betrachtung des gesamten Lebenszyklus zusammengeführt werden.

## Technical purpose
EFAFLEX Schnelllauftore sind für die Außen- und Innenanwendung als energiesparender Abschluss für Gebäudeöffnungen gedacht.

## Reference product
- Tor - EFAFLEX Tor- und Sicherheitssysteme GmbH & Co. KG - Schnelllauf-Spiraltor SST Alu: 1

## Inputs
- Use of net fresh water (FW) [m3]: A1-A3 2.36, C3 0.000485, C4 0.0124, D -0.95
- Use of non renewable primary energy (PENRE) [MJ]: A1-A3 3147.72, C3 7.2, C4 81.23, D -1409.85
- Use of non renewable primary energy resources used as raw materials (PENRM) [MJ]: A1-A3 84.87, C3 -6.25, C4 -78.62, D 0
- Use of non renewable secondary fuels (NRSF) [MJ]: A1-A3 1.65e-6, C3 1.41e-30, C4 4.47e-22, D -6.91e-9
- Use of renewable primary energy (PERE) [MJ]: A1-A3 798.76, C3 0.36, C4 0.35, D -386.56
- Use of renewable primary energy resources used as raw materials (PERM) [MJ]: A1-A3 15.28, C3 0, C4 0, D 0
- Use of renewable secondary fuels (RSF) [MJ]: A1-A3 1.3e-7, C3 0, C4 3.81e-23, D -5.88e-10
- Use of secondary material (SM) [kg]: A1-A3 19.96, C3 0, C4 0, D 0
- Total use of non renewable primary energy resource (PENRT) [MJ]: A1-A3 3232.59, C3 0.95, C4 2.61, D -1409.85
- Total use of renewable primary energy resources (PERT) [MJ]: A1-A3 814.04, C3 0.36, C4 0.35, D -386.56

## Outputs
- Components for re-use (CRU) [kg]: A1-A3 0, C3 0, C4 0, D 0
- Exported electrical energy (EEE) [MJ]: A1-A3 0.0612, C3 0, C4 0, D 0
- Exported thermal energy (EET) [MJ]: A1-A3 0, C3 0, C4 0, D 0
- Hazardous waste disposed (HWD) [kg]: A1-A3 0.00104, C3 4.44e-10, C4 3.4e-8, D -1.27e-6
- Materials for energy recovery (MER) [kg]: A1-A3 0, C3 0, C4 1.18, D 0
- Materials for recycling (MFR) [kg]: A1-A3 0, C3 77.63, C4 0, D 0
- Non hazardous waste dispose (NHWD) [kg]: A1-A3 40.17, C3 0.000667, C4 9.16, D -20.12
- Radioactive waste disposed (RWD) [kg]: A1-A3 0.13, C3 0.000157, C4 7.32e-5, D -0.06

## Impact indicators
- Abiotic depletion potential for non fossil resources (ADPE) [kg Sb-Äqv.]: A1-A3 0.00618, C3 2.76e-8, C4 8.77e-8, D -0.01
- Abiotic depletion potential for fossil resources (ADPF) [MJ]: A1-A3 2875.25, C3 0.55, C4 2.43, D -1250.57
- Acidification potential of soil and water (AP) [kg SO2-Äqv.]: A1-A3 1.02, C3 0.000147, C4 0.00121, D -0.44
- Eutrophication potential (EP) [kg Phosphat-Äqv.]: A1-A3 0.07, C3 1.38e-5, C4 0.000194, D -0.03
- Global warming potential (GWP) [kg CO2-Äqv.]: A1-A3 263.69, C3 0.0519, C4 5.71, D -121.04
- Depletion potential of the stratospheric ozone layer (ODP) [kg CFC 11 eq.]: A1-A3 9.79e-7, C3 2.31e-13, C4 9.81e-14, D -9.14e-11
- Formation potential of tropospheric ozone (POCP) [kg Ethen-Äqv.]: A1-A3 0.08, C3 9.22e-6, C4 0.000103, D -0.03

## Use advice
Dieser Datensatz beinhaltet die Ergebnisse für die Module A1-A3 sowie die Module C3, C4, D gemäß EN 15804. Ein Vergleich mit anderen Produkten ist nur mit einer vergleichbaren Anwendung im Gebäude zulässig. Grundsätzlich ist eine Gegenüberstellung oder die Bewertung von EPD Daten nur möglich, wenn alle zu vergleichenden Datensätze nach EN 15804 erstellt wurden und der Gebäudekontext, bzw. die produktspezifischen Leistungsmerkmale berücksichtigt werden.

## Review details
Die angewendete LCI Methode ist in Übereinstimmung mit ISO 14040 und 14044. Die Dokumentation enthält alle relevanten Informationen im Hinblick auf die Datenqualität und den Umfang der Anwendung der jeweiligen LCI Ergebnisse bzw. der Datensätze. Der Datensatz repräsentiert den Stand der Technik bezogen auf die funktionelle Einheit.

## Data sources
- GaBi database (all versions)
