# Glasfaserbeton concrete skin und öko Skin

Dataset: ILCD process, EPD, average dataset
Geography: DE
Reference year: 2018
Valid until: 2023
Classification: OEKOBAU.DAT: Mineralische Baustoffe / Steine und Elemente / Faserzement
Classification: IBUCategories: 02 Bauprodukte / Innen-, Außenwand und Deckenbekleidungen / Faserzement / Faserbeton
Method details: Faserzement / Faserbeton.pdf
Generated by: Sphera Solutions GmbH
Registration number: EPD-RSE-20180069-IAD2-DE
Owner: Rieder Sales GmbH
Compliance: DIN EN 15804; ISO 14025
Review: Accredited third party review by Institut Bauen und Umwelt e. V.
Amounts: rows without a unit in brackets have none in this file; such an amount is in the reference unit of its flow, which a separate flow dataset defines
copyright: true
licenseType: Free of charge for all users and uses
accessRestrictions: None

## General comment
ꞌconcrete skinꞌ and ꞌöko skinꞌ are facade sheets made from the material named ꞌfibreCꞌ glass-fibre-reinforced concrete. The reinforcement consists of textile and fibre made of alkali-resistant glass (AR glass). The sheet is dyed throughout. The standard thickness comprises 13 mm. The declaration is valid for the ꞌferro,ꞌ ꞌferro light,ꞌ and ꞌmattꞌ surfaces respectively, and also for all 12 Colours.

## Technology and included processes
The glass-fibre-reinforced exposed-concrete sheets are manufactured in a special extrusion procedure. After being hardened accordingly, the sheets are passed on for further processing (surface, cuts, drilling of holes, etc.)
Declared unit:
The declaration pertains to the declared unit of 1 t, according to the IBU-PCR Instructions Text, Part B, for the product group ꞌfibre cement / fibre concrete.ꞌ What is taken into consideration is an average product for the Kolbermoor facility in Germany. fibreC glass-fibre-reinforced concrete has a thickness of 13 mm; ist average surface-area weight comprises 28.73 kg/m²

## Technical purpose
The sheets, made of fibreC glass-fibre-reinforced concrete, serve as cladding material for back-ventilated pre-hung facades, as an indoor and outdoor cladding, and also as a floor covering.

## Reference product
- concrete skin und öko skin (): 1000

## Inputs
- Renewable primary energy as energy carrier (PERE) [MJ]: A1-A3 1599
- Renewable primary energy resources as material utilization (PERM) [MJ]: A1-A3 0
- Total use of renewable primary energy resources (PERT) [MJ]: A1-A3 1599
- Non renewable primary energy as energy carrier (PENRE) [MJ]: A1-A3 8777
- Non renewable primary energy as material utilization (PENRM) [MJ]: A1-A3 24
- Total use of non renewable primary energy resources (PENRT) [MJ]: A1-A3 8801
- Use of secondary material (SM) [kg]: A1-A3 0
- Use of renewable secondary fuels (RSF) [MJ]: A1-A3 0
- Use of non renewable secondary fuels (NRSF) [MJ]: A1-A3 0
- Use of net fresh water (FW) [m^3]: A1-A3 2.88

## Outputs
- Hazardous waste disposed (HWD) [kg]: A1-A3 3.05e-5
- Non hazardous waste disposed (NHWD) [kg]: A1-A3 180.2
- Radioactive waste disposed (RWD) [kg]: A1-A3 0.24
- Components for re-use (CRU) [kg]: A1-A3 0
- Materials for recycling (MFR) [kg]: A1-A3 0
- Materials for energy recovery (MER) [kg]: A1-A3 0
- Exported electrical energy (EEE) [MJ]: A1-A3 0
- Exported thermal energy (EET) [MJ]: A1-A3 0

## Impact indicators
- Global warming potential (GWP) [kg CO_(2)-Äq.]: A1-A3 723.9
- Depletion potential of the stratospheric ozone layer (ODP) [kg CFC11-Äq.]: A1-A3 1.02e-8
- Acidification potential of land and water (AP) [kg SO_(2)-Äq.]: A1-A3 1.89
- Eutrophication potential (EP) [kg PO_(4)^(3)-Äq.]: A1-A3 0.19
- Formation potential of tropospheric ozone photochemical oxidants (POCP) [kg Ethen-Äq.]: A1-A3 0.0869
- Abiotic depletion potential for non fossil resources (ADPE) [kg Sb-Äq.]: A1-A3 0.00324
- Abiotic depletion potential for fossil resources (ADPF) [MJ]: A1-A3 8192

## Use advice
Scope:
The life-cycle assessment (LCA) is based upon Rieder Sales GmbH data from the production-year 2016. The study’s subject matter is the glass-fibre-reinforced sheets manufactured at Rieder Faserbeton-Elemente GmbH in Kolbermoor, Germany; these products are declared to be an average product; the average refers to the span of production quantities that emerged throughout the year referred-to. The declaration’s owner shall hold liability for the information and items of proof that form the basis for it; it is ruled out for there to be any liability on the part of IBU, in relation to manufacturer information, LCA data, or items of proof.
System boundary:
This LCA addresses that life-cycle stage of product manufacture called ꞌCradle to factory gateꞌ.

This production stage comprises these modules: A1 (Provision of raw materials), A2 (Transport), A3 (Manufacture) according to /DIN EN 15804:2014/

## Data sources
- GaBi Database (all versions)
- GaBi database SP33 2017
