# Raw an coated MDF and HDF wood fibre boards

Dataset: ILCD process, EPD, average dataset
Geography: DE
Reference year: 2019
Valid until: 2024
Classification: OEKOBAU.DAT: Holz / Holzwerkstoffe / Holzfaserplatten
Classification: IBUCategories: 02 Bauprodukte / Holzwerkstoffe / Holzwerkstoffe
Method details: Holzwerkstoffe.pdf
Generated by: Sphera Solutions GmbH
Registration number: EPD-20190043-IBD1-DE
Owner: SWISS KRONO GmbH
Compliance: DIN EN 15804; ISO 14025
Review: Accredited third party review by Institut Bauen und Umwelt e. V.
Amounts: rows without a unit in brackets have none in this file; such an amount is in the reference unit of its flow, which a separate flow dataset defines
copyright: true
licenseType: Free of charge for all users and uses
accessRestrictions: None

## General comment
Holzfaserplatten aus mitteldichten Faserplatten (MDF) und hochdichten Faserplatten (HDF) sind plattenförmige Holzwerkstoffe nach EN 622-5 für den Möbel- und Innenausbau. Diese können mit melaminharzgetränkten Papieren beschichtet sein.

## Technology and included processes
The manufacture of the MDF panels includes the following production steps: 1) Partial debarking of the wood 2) Chopping the round wood into wood chips 3) Washing the wood chips 4) Plasticization of the wood chips 5) Defibration of the wood chips 6) Gluing with resin and addition of additives 7) drying the fibers 8) Sprinkle the fibers on the forming line 7) Compression of the fibers in a continuously operating press 8) Trimming the panels along the long edges and dividing them into panel lengths 9) Sanding the surfaces 10) Stacking the panels and packing All manufacturing plants have a quality management system in accordance with ISO 9001: 2015.

## Technical purpose
Rohe und beschichtete MDF und HDF-Platten werden im dekorativen Innenausbau, Möbelbau, als Fußboden-, Wand- und Deckenpaneele und im dekorativen Objektbau verwendet.

## Reference product
- MDF und HDF Platte, Roh und beschichtet: 1

## Inputs
- Renewable primary energy as energy carrier (PERE) [MJ]: A1-A3 3510, C3 0, D -3170
- Renewable primary energy resources as material utilization (PERM) [MJ]: A1-A3 14200, C3 -14200, D 0
- Total use of renewable primary energy resources (PERT) [MJ]: A1-A3 17700, C3 -14200, D -3170
- Non renewable primary energy as energy carrier (PENRE) [MJ]: A1-A3 9719.4, C3 0, D -13700
- Non renewable primary energy as material utilization (PENRM) [MJ]: A1-A3 881, C3 -881, D 0
- Total use of non renewable primary energy resources (PENRT) [MJ]: A1-A3 10600, C3 -881, D -13700
- Use of secondary material (SM) [kg]: A1-A3 0, C3 0, D 0
- Use of renewable secondary fuels (RSF) [MJ]: A1-A3 0, C3 0, D 142
- Use of non renewable secondary fuels (NRSF) [MJ]: A1-A3 0, C3 0, D 880
- Use of net fresh water (FW) [m^3]: A1-A3 2.99, C3 0, D -3.21

## Outputs
- Hazardous waste disposed (HWD) [kg]: A1-A3 8.52e-5, C3 0, D -4.94e-6
- Non hazardous waste disposed (NHWD) [kg]: A1-A3 6.97, C3 0, D 0.319
- Radioactive waste disposed (RWD) [kg]: A1-A3 0.264, C3 0, D -1.4
- Components for re-use (CRU) [kg]: A1-A3 0, C3 0
- Materials for recycling (MFR) [kg]: A1-A3 0, C3 0
- Materials for energy recovery (MER) [kg]: A1-A3 0, C3 810
- Exported electrical energy (EEE) [MJ]: A1-A3 0, C3 0
- Exported thermal energy (EET) [MJ]: A1-A3 0, C3 0

## Impact indicators
- Global warming potential (GWP) [kg CO_(2)-Äq.]: A1-A3 -710, C3 1340, D -740
- Depletion potential of the stratospheric ozone layer (ODP) [kg CFC11-Äq.]: A1-A3 3.22e-10, C3 0, D -2.05e-9
- Acidification potential of land and water (AP) [kg SO_(2)-Äq.]: A1-A3 1.96, C3 0, D 0.787
- Eutrophication potential (EP) [kg PO_(4)^(3)-Äq.]: A1-A3 0.441, C3 0, D -0.00139
- Formation potential of tropospheric ozone photochemical oxidants (POCP) [kg Ethen-Äq.]: A1-A3 0.265, C3 0, D 0.154
- Abiotic depletion potential for non fossil resources (ADPE) [kg Sb-Äq.]: A1-A3 0.000215, C3 0, D -0.000258
- Abiotic depletion potential for fossil resources (ADPF) [MJ]: A1-A3 9900, C3 0, D -10200

## Use advice
Gültigkeitsbereich:
Dieses Dokument bezieht sich auf alle Holzfaserplatten, welche in folgenden Werken der SWISS KRONO GROUP hergestellt werden:
SWISS KRONO GmbH, Heiligengrabe, Deutschland

SWISS KRONO Sp. z o.o, Zary, Polen

SWISS KRONO AG, Menznau, Schweiz
Systemgrenze:
Es handelt sich um eine EPD vom Typ: "Wiege bis zum Werkstor – mit Optionen". Diese Ökobilanz adressiert die Lebenszyklusstadien A1- A3, C3 und D gemäß /EN15804/. Das Produktstadium umfasst die Produktion aller notwendigen Rohstoffe inklusive aller Vorketten sowie der CO2-Aufnahme der Rohstoffe (Holzwachstum durch Photosynthese). Die weiteren Prozesse sind die Produktion der Krono MDF Platte roh und beschichtet im Werk inklusive der Energiebereitstellung unter Berücksichtigung der entsprechenden Vorketten. Alle notwendigen dazugehörigen Transporte der Roh- und Hilfsstoffe sind in der Ökobilanz berücksichtigt.

In Modul C3 werden die Emission des im Produkt gebundenen biogenen CO2 aufgeführt, damit wird innerhalb des Produktsystems die CO2–Neutralität sichergestellt.

Nachdem das Produkt den End-of-Waste-Status nach Demontage erreicht hat, wird angenommen, dass das Produkt einer Biomasseverbrennung zugeführt wird, welche thermische Energie und Elektrizität erzeugt. Daraus entstehende Wirkungen und potentielle Gutschriften (Energiesubstitution) sind im Modul D deklariert.

## Data sources
- GaBi Database (all versions)
- GaBi database SP35 2018
