# Mineral pre-made mortar: rendering mortar – Reinforcement Fibre Plaster

Dataset: ILCD process, EPD, average dataset
Geography: RER
Reference year: 2021
Valid until: 2026
Classification: OEKOBAU.DAT: Mineralische Baustoffe / Mörtel und Beton / Putz und Putzmörtel
Classification: IBUCategories: 02 Building products / Masonry and related products / Mineral factory-made mortar
Method details: Mineral factory-made mortar.pdf
Generated by: thinkstep AG
Registration number: EPD-IWM-STO-20210130-IBG1-DE
Owner: Sto SE & Co. KGaA
Compliance: DIN EN 15804; ISO 14025
Review: Accredited third party review by Institut Bauen und Umwelt e. V.
Amounts: rows without a unit in brackets have none in this file; such an amount is in the reference unit of its flow, which a separate flow dataset defines
copyright: true
licenseType: Free of charge for all users and uses
accessRestrictions: None

## General comment
Mineral pre-made mortars are mortars whose components are mixed at the factory and not on the construction site. They are divided into three different types – masonry mortar, rendering and plastering mortar, and screed material – depending on the type of application. Mineral rendering and plastering mortars are mixtures of one or more mineral binders, aggregates, water, and – if applicable – additions or admixtures for the manufacture of renders or plasters. Rendering and plastering mortars are applied to walls and ceilings in one or more layers as required. Alongside the aesthetic design of the surface, they protect against effects of the weather when used as external renders and provide an even substrate for paint coats and wallpaper when used as internal plasters. In the case of reinforced concrete ceilings and stairs, renders/plasters also serve as fire protection; when porous aggregates are added, they serve as thermal protection. Depending on the technical data, the base materials and processing aids used, and the practical application, rendering and plastering mortars are divided into the following product groups: normal/finishing render or plaster, normal/finishing render, or plaster with special properties, lightweight render, Reinforcement Fibre Plaster, and insulating render with an especially high proportion of lightweight aggregates.

Placing Reinforcement Fibre Plaster on the market in the EU/EFTA (with the exception of Switzerland) is subject to Regulation (EU) No. 305/2011 (CPR). Reinforcement Fibre Plaster requires a declaration of performance – taking into consideration DIN EN 998-1:2017-02, Specification for mortar for masonry - Part 1: Rendering and plastering mortar – and the CE marking.
The relevant national regulations apply with regard to usage.

## Technology and included processes
The graphic shows the manufacturing process. Mineral rendering and plastering mortars are made in mixing plants in the following steps: Filling of the storage or weighing containers Conveyance of ingredients and substances being mixed into the mixer Mixing Conveyance of finished products Packaging Loading and shipping of the finished product The raw materials – sand, binder, lightweight aggregates, processing aids, admixtures, and additions (see base materials) – are stored at the manufacturing plant in silos. From the silos, the raw materials are gravimetrically dosed and intensely mixed according to the respective formulation. The mixture is then packaged and shipped dry as pre-made dry mortar in containers or silos. Graphic 1: Manufacturing process (green: input; blue: unit process)
Declared unit:
This declaration refers to the production of one kilogram of typical rendering and plastering mortar of the Reinforcement Fibre Plaster product group. Only dry mortars are taken into consideration.

## Technical purpose
Rendering and plastering mortars produced in the factory for use as a base coat or finishing render/plaster on walls, ceilings, piers, and separating walls of structures which comply with the applicable standards or on similar backgrounds (e.g. in the case of existing buildings).

Reinforcement Fibre Plaster as an inlay plaster for the production of internal plaster and external render on difficult plaster substrates.

## Reference product
- 1 kg rendering mortar - Reinforcement Fibre Plaster (1 kg rendering mortar – Reinforcement Fibre Plaster): 1

## Inputs
- Renewable primary energy as energy carrier (PERE) [MJ]: A1-A3 0.563, A4 0.0198, A5 0.32962, B1 0, C4 0.0297, D -0.0596
- Renewable primary energy resources as material utilization (PERM) [MJ]: A1-A3 0.327, A4 0, A5 -0.327, B1 0, C4 0, D 0
- Total use of renewable primary energy resources (PERT) [MJ]: A1-A3 0.89, A4 0.0198, A5 0.00262, B1 0, C4 0.0297, D -0.0596
- Non renewable primary energy as energy carrier (PENRE) [MJ]: A1-A3 4.648, A4 0.294, A5 0.0557, B1 0, C4 0.239, D -0.287
- Non renewable primary energy as material utilization (PENRM) [MJ]: A1-A3 0.042, A4 0, A5 -0.042, B1 0, C4 0, D 0
- Total use of non renewable primary energy resources (PENRT) [MJ]: A1-A3 4.69, A4 0.294, A5 0.0137, B1 0, C4 0.239, D -0.287
- Use of secondary material (SM) [kg]: A1-A3 0, A4 0, A5 0, B1 0, C4 0, D 0
- Use of renewable secondary fuels (RSF) [MJ]: A1-A3 0, A4 0, A5 0, B1 0, C4 0, D 0
- Use of non renewable secondary fuels (NRSF) [MJ]: A1-A3 0, A4 0, A5 0, B1 0, C4 0, D 0
- Use of net fresh water (FW) [m^3]: A1-A3 0.0253, A4 2.29e-5, A5 0.000416, B1 0, C4 4.56e-5, D -3.8e-5

## Outputs
- Hazardous waste disposed (HWD) [kg]: A1-A3 1.65e-8, A4 1.88e-8, A5 1.31e-11, B1 0, C4 4.12e-9, D -1.61e-10
- Non hazardous waste disposed (NHWD) [kg]: A1-A3 0.00705, A4 2.19e-5, A5 0.000197, B1 0, C4 1.12, D -0.000155
- Radioactive waste disposed (RWD) [kg]: A1-A3 0.00012, A4 3.55e-7, A5 5.52e-7, B1 0, C4 3.43e-6, D -1.26e-5
- Components for re-use (CRU) [kg]: A1-A3 0, A4 0, A5 0, B1 0, C4 0, D 0
- Materials for recycling (MFR) [kg]: A1-A3 0, A4 0, A5 0.000125, B1 0, C4 0, D 0
- Materials for energy recovery (MER) [kg]: A1-A3 0, A4 0, A5 0.0259, B1 0, C4 0, D 0
- Exported electrical energy (EEE) [MJ]: A1-A3 0, A4 0, A5 0.0596, B1 0, C4 0, D 0
- Exported thermal energy (EET) [MJ]: A1-A3 0, A4 0, A5 0.14, B1 0, C4 0, D 0

## Impact indicators
- Global warming potential (GWP) [kg CO_(2)-Äq.]: A1-A3 0.433, A4 0.0219, A5 0.0477, B1 -0.147, C4 0.0179, D -0.0198
- Depletion potential of the stratospheric ozone layer (ODP) [kg CFC11-Äq.]: A1-A3 3.01e-9, A4 4.59e-16, A5 6.32e-16, B1 0, C4 3.97e-15, D -1.45e-14
- Acidification potential of land and water (AP) [kg SO_(2)-Äq.]: A1-A3 0.000827, A4 1.67e-5, A5 6.19e-6, B1 0, C4 0.000106, D -2.13e-5
- Eutrophication potential (EP) [kg PO_(4)^(3)-Äq.]: A1-A3 0.000146, A4 3.75e-6, A5 1.37e-6, B1 0, C4 1.46e-5, D -3.52e-6
- Formation potential of tropospheric ozone photochemical oxidants (POCP) [kg Ethen-Äq.]: A1-A3 9.44e-5, A4 -2.36e-7, A5 4.13e-7, B1 0, C4 8.2e-6, D -1.86e-6
- Abiotic depletion potential for non fossil resources (ADPE) [kg Sb-Äq.]: A1-A3 1.35e-6, A4 2.27e-9, A5 8.17e-10, B1 0, C4 6.86e-9, D -2.99e-8
- Abiotic depletion potential for fossil resources (ADPF) [MJ]: A1-A3 4.3, A4 0.293, A5 0.0123, B1 0, C4 0.231, D -0.255

## Use advice
Scope:
This document is a model EPD. When calculating the Life Cycle Assessment, the product selected to represent the group in question was the product with the highest environmental impact in that group. This EPD applies exclusively to rendering and plastering mortars – Reinforcement Fibre Plaster as mineral pre-made mortars for association members; these can be found on the association’s website. Any numerical values – e.g. for constructional data or concentration specifications – are average values that are customary in practice for this product group.
System boundary:
The life cycle analysis of the products being examined encompasses the production of the mortar including raw material extraction and the provision of energy sources up to the packaged, finished product (module A1-A3), the application of the product including transportation to the construction site (module A4-A5), the usage phase (module B1), and disposal of the mortar (module C4). For silo-based goods, the proportionate expenditure for transportation and manufacturing of the silo is taken into account. Credit for packaging including energy recovery (module D) is also incorporated into the Life Cycle Assessment.

## Data sources
- GaBi Database (all versions)
- GaBi database SP36 2018
