# Tectofin RV plus, Tectofin SK

Dataset: ILCD process, EPD, average dataset
Geography: RER
Reference year: 2020
Valid until: 2025
Classification: OEKOBAU.DAT: Kunststoffe / Dachbahnen / PVC-Dachbahnen
Classification: IBUCategories: 02 Bauprodukte / Abdichtungen / Dach- und Dichtungsbahnsysteme aus Kunststoffen und Elastomeren
Method details: Dach- und Dichtungsbahnsysteme aus Kunststoffen und Elastomeren.pdf
Generated by: BMI Technical Services GmbH
Registration number: EPD-BMI-20200177-IBA1-DE
Owner: BMI Technical Services GmbH
Compliance: DIN EN 15804+A2; ISO 14025
Review: Accredited third party review by Institut Bauen und Umwelt e. V.
Amounts: rows without a unit in brackets have none in this file; such an amount is in the reference unit of its flow, which a separate flow dataset defines
copyright: true
licenseType: Free of charge for all users and uses
accessRestrictions: None

## General comment
Tectofin RV plus is a bitumen-compatible synthetic roofing and sealing membrane with a glass fleece internal layer and fleece backing based on a patented recipe combination of high-polymer plastic with rubber, specially designed for new buildings and large areas.

Designation acc. to DIN SPEC 20000-201:

DE/E1-PVC-P-BV-E-GV-K-PV (1.5)

Designation acc. to DIN SPEC 20000-202:

BA-PVC-P-BV-E-GV-K-PV (1.5)

Tectofin SK is a self-adhesive, bitumen-compatible roofing membrane based on a patented recipe combination of high-polymer plastic with rubber, specially designed for glued construction in high-quality new buildings.

Designation acc. to DIN SPEC 20000-201:

DE/E1-PVC-P-BV-E-GV-K-PV-SK (1.5)

## Technology and included processes
Declared unit:
The declared unit is 1 m² Tectofin RV Plus and Tectofin SK of roof membrane produced. A (worst-case scenario: Tectofin SK) thickness of 2.6 mm and a surface weight of 2.4 kg/m² is declared.

## Technical purpose
Tectofin RV plus is used as roof waterproofing for exposed and covered flat roofs. The application allows for glued or mechanically fastened installation loose or with ballast (gravel, paving, parking deck and greenery).

Tectofin RV plus is also used as a damp-proof sheet (type A) and as a tanking sheet (type T).

Tectofin SK is used as roof waterproofing for exposed and covered flat roofs. The application allows for glued installation loose or with ballast (gravel, paving, parking deck and greenery).

The manufacturer’s Tectofin installation instructions must be observed during processing.

## Reference product
- Tectofin RV Plus und Tectofin SK (worst case) Dicke: 2,6 mm; Flächengewicht: 2,4 kg/m²: 1

## Inputs
- Renewable primary energy as energy carrier (PERE) [MJ]: A1-A3 24.1334, C1 0, C2 0.00441, C3 2.38, C4 0, D -5.49
- Renewable primary energy resources as material utilization (PERM) [MJ]: A1-A3 0.11, C1 0, C2 0, C3 0, C4 0, D 0
- Total use of renewable primary energy resources (PERT) [MJ]: A1-A3 24.2434, C1 0, C2 0.00441, C3 2.38, C4 0, D -5.49
- Non renewable primary energy as energy carrier (PENRE) [MJ]: A1-A3 184.995, C1 0, C2 0.0757, C3 57.1, C4 0, D -25.3
- Non renewable primary energy as material utilization (PENRM) [MJ]: A1-A3 48.96, C1 0, C2 0, C3 -45.6, C4 0, D 0
- Total use of non renewable primary energy resources (PENRT) [MJ]: A1-A3 233.955, C1 0, C2 0.0757, C3 11.5, C4 0, D -25.3
- Use of secondary material (SM) [kg]: A1-A3 0, C1 0, C2 0, C3 0, C4 0, D 0
- Use of renewable secondary fuels (RSF) [MJ]: A1-A3 0, C1 0, C2 0, C3 0, C4 0, D 0
- Use of non renewable secondary fuels (NRSF) [MJ]: A1-A3 0, C1 0, C2 0, C3 0, C4 0, D 0
- Use of net fresh water (FW) [m^3]: A1-A3 0.0670588, C1 0, C2 3.95e-6, C3 0.0126, C4 0, D -0.00636

## Outputs
- Hazardous waste disposed (HWD) [kg]: A1-A3 1.23597e-6, C1 0, C2 2.83e-9, C3 5.19e-8, C4 0, D -1.01e-8
- Non hazardous waste disposed (NHWD) [kg]: A1-A3 0.651931, C1 0, C2 1.33e-5, C3 3.82, C4 0, D -0.0116
- Radioactive waste disposed (RWD) [kg]: A1-A3 0.00305678, C1 0, C2 7.97e-8, C3 0.000364, C4 0, D -0.00187
- Components for re-use (CRU) [kg]: A1-A3 0, C1 0, C2 0, C3 0, C4 0, D 0
- Materials for recycling (MFR) [kg]: A1-A3 0, C1 0, C2 0, C3 0, C4 0, D 0
- Materials for energy recovery (MER) [kg]: A1-A3 0, C1 0, C2 0, C3 0, C4 0, D 0
- Exported electrical energy (EEE) [MJ]: A1-A3 0, C1 0, C2 0, C3 6.27, C4 0, D 0
- Exported thermal energy (EET) [MJ]: A1-A3 0, C1 0, C2 0, C3 11.4, C4 0, D 0

## Impact indicators
- Global Warming Potential total (GWP-total) [kg CO_(2)-Äq.]: A1-A3 12.3963, C1 0, C2 0.00573, C3 6.23, C4 0, D -1.49
- Global Warming Potential fossil fuels (GWP-fossil) [kg CO_(2)-Äq.]: A1-A3 12.6061, C1 0, C2 0.0057, C3 6.23, C4 0, D -1.49
- Global Warming Potential biogenic (GWP-biogenic) [kg CO_(2)-Äq.]: A1-A3 -0.193927, C1 0, C2 2.29e-6, C3 -0.00272, C4 0, D -0.00349
- Global Warming Potential luluc (GWP-luluc) [kg CO_(2)-Äq.]: A1-A3 0.017565, C1 0, C2 2.39e-5, C3 0.00127, C4 0, D -0.00104
- Depletion potential of the stratospheric ozone layer (ODP) [kg CFC11-Äq.]: A1-A3 1.36105e-10, C1 0, C2 1.4e-18, C3 9.48e-15, C4 0, D -1.55e-14
- Acidification potential of land and water (AP) [mol H^(+)-Äq.]: A1-A3 0.0220973, C1 0, C2 4.79e-6, C3 0.00185, C4 0, D -0.00208
- Eutrophication potential aquatic freshwater (EP-freshwater) [kg PO_(4)-Äq.]: A1-A3 0.000111512, C1 0, C2 1.24e-8, C3 1.6e-6, C4 0, D -1.91e-6
- Eutrophication potential aquatic marine (EP-marine) [kg N-Äq.]: A1-A3 0.0061613, C1 0, C2 1.38e-6, C3 0.000611, C4 0, D -0.000538
- Eutrophication potential terrestrial (EP-terrestrial) [mol N-Äq.]: A1-A3 0.064075, C1 0, C2 1.71e-5, C3 0.00747, C4 0, D -0.00577
- Formation potential of tropospheric ozone photochemical oxidants (POCP) [kg NMVOC-Äq.]: A1-A3 0.0233201, C1 0, C2 3.85e-6, C3 0.00173, C4 0, D -0.00155
- Abiotic depletion potential for non fossil resources (ADPE) [kg Sb-Äq.]: A1-A3 232.955, C1 0, C2 0.0757, C3 11.5, C4 0, D -25.3
- Abiotic depletion potential for fossil resources (ADPF) [MJ]: A1-A3 1.76947e-5, C1 0, C2 4.74e-10, C3 1.36e-7, C4 0, D -2.44e-7
- Water use (WDP) [m^(3) Welt-Äq. entzogen]: A1-A3 0.559541, C1 0, C2 2.46e-5, C3 0.481, C4 0, D -0.154
- Incidence of disease due to PM emissions (PM) [Krankheitsfälle]: A1-A3 1.95985e-7, C1 0, C2 5.4e-11, C3 4.45e-8, C4 0, D -1.77e-8
- Human exposure efficiency relative to U235 (IR) [kBq U235-Äq.]: A1-A3 0.306596, C1 0, C2 7.7e-6, C3 0.037, C4 0, D -0.307
- Comparative toxic unit for ecosystems (ETP-fw) [CTUe]: A1-A3 118.19, C1 0, C2 0.0631, C3 9.52, C4 0, D -5.43
- Comparative toxic unit for humans (carcinogenic) (HTP-c) [CTUh]: A1-A3 1.23378e-8, C1 0, C2 1.5e-12, C3 3.76e-10, C4 0, D -2.36e-10
- Comparative toxic unit for humans (noncarcinogenic) (HTP-nc) [CTUh]: A1-A3 1.21663e-6, C1 0, C2 6.68e-11, C3 4e-8, C4 0, D -8.76e-9
- Soil quality index (SQP) [SQP]: A1-A3 64.863, C1 0, C2 0.0237, C3 2.6, C4 0, D -3.95

## Use advice
Scope:
This Declaration applies for Tectofin RV plus and Tectofin SK roofing and sealing membranes manufactured at the Wächtersbach plant in Germany. The LCA results of Tectofin SK with a thickness of 2.6 mm and a surface weight of 2.4 kg/m² (worst-case scenario) are declared.

The LCA is based on average production data for fiscal 2019. This was supplied by BMI GmbH.
System boundary:
System boundary

Type of EPD: cradle to gate, with options

The following modules are considered in the LCA:

Product stage (A1-A3):

The BMI roofing membranes product stage comprises:

A1 Raw material supply and processing and processing of secondary materials serving as input (e.g. recycling processes)
A2 Transporting raw materials by truck to the plant (Wächtersbach in Germany)
A3 Manufacturing sheets in the plant (incl. provisions of energy, provision of water, provisions of auxiliaries, disposal of production waste, manufacturing packaging materials)

End-of-life stage (C1-C4):

The BMI roofing membranes end-of-life stage comprises:

EoL scenario: 100% thermal utilisation of roofing membranes in a waste incineration plant with an R1 value > 0.6 with recovery potentials in D from energy substitution

C1 Manual selective removal (unencumbered)
C2 Transport by truck (50 km) to thermal utilisation (waste incineration plant)
C3 Waste treatment of roofing membranes: 100% thermal utilisation in a waste incineration plant
C4 No further expenses incurred by landfilling/disposal

Potentials and loads outside the system boundaries (D) of BMI roofing membranes:

Module D comprises recovery potentials from thermal utilisation of roofing membranes in a waste incineration plant by means of energy substitution.

## Data sources
- GaBi Database (all versions)
- GaBi database SP40 2020
