# Shower surfaces, bathtubs and washbasins made of KALDEWEI steel enamel

Dataset: ILCD process, EPD, average dataset
Geography: DE
Reference year: 2019
Valid until: 2024
Classification: OEKOBAU.DAT: Gebäudetechnik / Sanitär / Dusch- und Badewannen
Classification: IBUCategories: 03 Gebäudetechnik / Sanitäreinrichtungen / Sanitärprodukte aus Verbundwerkstoffen
Method details: Sanitärprodukte aus Verbundwerkstoffen.pdf
Generated by: Sphera Solutions GmbH
Registration number: EPD-KAL-20190057-IBC1-DE
Owner: Franz Kaldewei GmbH & Co. KG
Compliance: DIN EN 15804; ISO 14025
Review: Accredited third party review by Institut Bauen und Umwelt e. V.
Amounts: rows without a unit in brackets have none in this file; such an amount is in the reference unit of its flow, which a separate flow dataset defines
copyright: true
licenseType: Free of charge for all users and uses
accessRestrictions: None

## General comment
Enamelled shower surfaces, bathtubs and washbasins consist of a deep-drawn body made of steel suitable for enamelling which is coated on both sides with base enamel and on the front with finishing enamel. The declared unit is 1 m² steel enamel for manufacturing Kaldewei shower surfaces, bathtubs and washbasins. The steel thickness and enamel thickness vary depending on the product. Accordingly, there are certain deviations for the specific product in terms of environmental impacts depending on the thickness of steel and enamel.

## Technology and included processes
The manufacturing process for enamelled shower surfaces, bathtubs and washbasins is subdivided into the following processes: - Manufacture of the steel blanks - Cleaning the blanks - Manufacture of the enamel frits - Manufacture of the enamel slips - Enamelling The process steps associated with these sub-processes are outlined as follows: 1. Manufacture of the steel blanks The blanks are manufactured in automatic, continuous press lines in the following process stages: · Deep-drawing: The blanks acquire the required shape by deep-drawing electrostatically-oiled steel blanks in 2-part drawings with forces of 8,000–10,000 kN. · Processing the blank: After deep-drawing, the outlets, overflows and sometimes holes for handles are punched in the blanks and the base frame brackets mounted. · In the case of bathtubs with panelling, these are welded on after deep-drawing the bathtub blanks. · In the case of wall-mounted washbasins as well as built-in and top-mounted washbasins, the washbasin edges are welded. · Working the edges of the raw bath/tray: The edge contours of the raw bathtubs/trays are produced by folding over and trimming the edges in several steps. 2. Cleaning the blanks The raw steel bathtubs and trays are cleaned in a continuous, automated facility according to the following sub-steps: · Degreasing the blanks: After they have been produced, the blanks are covered with a film of corrosion-protection oils, deep-drawing oils and abraded metal particles from the deep-drawing process which are washed off by spraying them with alkali tenside solutions. · Acidic rinsing of the blanks: Any impurities remaining on the blanks after degreasing are washed off by spraying with a strongly-diluted solution of sulphuric acid. · Alkali rinsing of the blanks: A temporary rust-inhibiting layer is formed on the blanks by spraying them with a slightly alkaline amine solution. 3. Manufacture of the enamel frits Enamel frits are the glass granulate used for enamelling and are produced in the following sub-steps: · Formulation and mixing of the raw materials for the glass: The raw materials for the glass are weighed and mixed in mixing plants. · Smelting the enamel frit: The raw material mixtures for the glass are smelted in batch-type smelters for 2-3 hours at temperatures of between 1100 and -1300 °C. When the smelting process is complete, the glass melt is poured into water to quench it and thus granulated. · Drying the enamel frit: The surface water adhering to the grains of the enamel frit is partially removed by drying. 4. Manufacture of the enamel slips Enamel slips are the suspensions of glass granulate in water used for enamelling and are produced in the following sub-steps: · Formulation of the raw materials for the slip: Solid raw materials are weighed and filled into batch-operated mills along with the liquid, volumetrically-dosed raw materials. · Grinding process: The raw materials for the slip are ground to enamel slips in drum mills. · Preparation of the enamel slips: After the grinding process, the enamel slips are pumped through systems of sieves and magnetic separators in order to separate off coarse mechanical and magnetic metallic impurities. 5. Enamelling Enamelling is the production of a layer of glass on a metal surface and is carried out in the following sub-steps: · Coating the cleaned blanks with enamel slip: Robots in automatic spray booths spray the fronts and backs of the blanks with enamel slips. · Drying the enamel coating: The water remaining in the enamel coating is evaporated in continuous drying ovens. · Firing the enamel coating at 820-860 °C: The enamel coating is fired onto the blanks in continuous furnaces so that the coating on the upper side of the washbasin or bathtub/tray has a thickness of 200-300 μm. · Packaging: An automated system applies the company logo before the enamelled parts are packaged.
Technical data:
The products consist of a deep-drawn body made of steel suitable for enamelling which is coated on both sides with base enamel and on the front with finishing enamel. The following chart depicts sample data on some shower surfaces, bathtubs and washbasins.

For KALDEWEI products, the ratio of bathtub/tray surface to the projection surface is determined as follows:

For bathtubs:

bathtub surface [m²] ~ 1.5 x projection surface [m²] + 0.5 [m²]

For shower trays lower than 140 mm:

tray surface [m²] ~ 1.14 x projection surface [m²] + 0.06 [m²]

For shower trays with a depth of 140 mm:

tray surface [m²] ~ 1.24 x projection surface [m²] + 0.13 [m²]

For shower trays with a depth of 250 mm:

tray surface [m²] ~ 1.45 x projection surface [m²] + 0.24 [m²]

Built-in and under-counter washbasins:

washbasin surface [m²] ~ projection surface [m²] x 1.19 + 0.02 [m²]

Wall-mounted and top-mounted washbasins:

washbasin surface [m²] ~ projection surface [m²] x 1.86 + 0.04 [m²]

Bathtubs with panelling:

bathtub surface [m²] ~ projection surface [m²] x 1.5 + panelling length [m] x bathtub height [m] 0.5 [m²]

The basis weight of the steel body used for enamelling is 18 to 22 kg/m² for shower surfaces and bathtubs, 10 to 11 kg/m² for bathtubs with a reduced steel thickness (primarily for export), and 15 to 21 kg/m² for washbasins.

Depending on the respective model, features and construction specifications on the test bench, KALDEWEI shower surfaces, bathtubs and washbasins comply with individual or several sound insulation standards. These include DIN 4109, DIN 4109/A1, VDI 4100 SST I-III and SIA 181. All sound insulation certificates are available on www.kaldewei.de.

The maximum service temperature of the enamelled steel parts is significantly higher than 500 °C. The enamel is at least 0.2 mm thick on the upper side.

The optional enamel-based "Anti-slip", "Full anti-slip" or "KALDEWEI SECURE PLUS" surface finishes comply with evaluation group B for wet-loaded barefoot areas /DIN 51097/ and evaluation group R 10 for anti-slip properties in workrooms and fields of activities with increased risk of slipping /DIN 51130/.
Declared unit:
1m2 of surface of the declared average product weighs 17.93 kg.

The average basis weight of steel is 16.64 kg/m². This gives rise to an average calculated steel thickness of 2.1 mm for these products.

The average basis weight across the various products is 1.29 kg/m² for enamel. This gives rise to a calculated enamel thickness of 517 µm, including enamelling on the front and back.

## Technical purpose
Steel enamel shower surfaces, bathtubs and washbasins manufactured by KALDEWEI are used as self-supporting or non self-supporting elements in sanitary areas.

## Reference product
- 1m² Duschfläche, Badewanne oder Waschtisch: 1

## Inputs
- Renewable primary energy as energy carrier (PERE) [MJ]: A1-A3 74.848, A5 0.00712, C3 0.191, C4 0.0561, D 19.4
- Renewable primary energy resources as material utilization (PERM) [MJ]: A1-A3 6.952, A5 0, C3 0, C4 0, D 0
- Total use of renewable primary energy resources (PERT) [MJ]: A1-A3 81.8, A5 0.00712, C3 0.191, C4 0.0561, D 19.4
- Non renewable primary energy as energy carrier (PENRE) [MJ]: A1-A3 678, A5 0.0324, C3 0.537, C4 0.452, D -253
- Non renewable primary energy as material utilization (PENRM) [MJ]: A1-A3 0, A5 0, C3 0, C4 0, D 0
- Total use of non renewable primary energy resources (PENRT) [MJ]: A1-A3 678, A5 0.0324, C3 0.537, C4 0.452, D -253
- Use of secondary material (SM) [kg]: A1-A3 4.341, A5 0, C3 0, C4 0, D 16.8
- Use of renewable secondary fuels (RSF) [MJ]: A1-A3 0, A5 0, C3 0, C4 0, D 0
- Use of non renewable secondary fuels (NRSF) [MJ]: A1-A3 0, A5 0, C3 0, C4 0, D 0
- Use of net fresh water (FW) [m^3]: A1-A3 0.0454, A5 0.000187, C3 0.000259, C4 8.61e-5, D -0.0518

## Outputs
- Hazardous waste disposed (HWD) [kg]: A1-A3 4.93e-6, A5 1.66e-10, C3 2.58e-9, C4 7.78e-9, D -3.23e-5
- Non hazardous waste disposed (NHWD) [kg]: A1-A3 3.8, A5 0.00629, C3 0.000355, C4 2.12, D 3.01
- Radioactive waste disposed (RWD) [kg]: A1-A3 0.012, A5 1.47e-6, C3 8.3e-5, C4 6.48e-6, D -1.89e-5
- Components for re-use (CRU) [kg]: A1-A3 0, A5 0, C3 0, C4 0, D 0
- Materials for recycling (MFR) [kg]: A1-A3 0, A5 0, C3 16.8, C4 0, D 0
- Materials for energy recovery (MER) [kg]: A1-A3 0, A5 0, C3 0, C4 0, D 0
- Exported electrical energy (EEE) [MJ]: A1-A3 0, A5 0.133, C3 0, C4 0, D 0
- Exported thermal energy (EET) [MJ]: A1-A3 0, A5 0.306, C3 0, C4 0, D 0

## Impact indicators
- Global warming potential (GWP) [kg CO_(2)-Äq.]: A1-A3 64.5, A5 0.0763, C3 0.0301, C4 0.0337, D -28
- Depletion potential of the stratospheric ozone layer (ODP) [kg CFC11-Äq.]: A1-A3 3.14e-11, A5 1.69e-15, C3 1.22e-13, C4 7.5e-15, D 5.26e-14
- Acidification potential of land and water (AP) [kg SO_(2)-Äq.]: A1-A3 0.163, A5 1.77e-5, C3 8.75e-5, C4 0.000199, D -0.0541
- Eutrophication potential (EP) [kg PO_(4)^(3)-Äq.]: A1-A3 0.017, A5 1.95e-6, C3 9.64e-6, C4 2.75e-5, D -0.00377
- Formation potential of tropospheric ozone photochemical oxidants (POCP) [kg Ethen-Äq.]: A1-A3 0.0182, A5 7.7e-7, C3 5.84e-6, C4 1.57e-5, D -0.0131
- Abiotic depletion potential for non fossil resources (ADPE) [kg Sb-Äq.]: A1-A3 0.000606, A5 9.62e-9, C3 1.48e-8, C4 1.3e-8, D -0.000472
- Abiotic depletion potential for fossil resources (ADPF) [MJ]: A1-A3 648, A5 0.0287, C3 0.328, C4 0.436, D -263

## Use advice
Scope:
Shower surfaces, bathtubs and washbasins made of KALDEWEI steel enamel, exclusively manufactured in the Ahlen plant of Franz Kaldewei GmbH & Co. KG, Germany.
System boundary:
Type of EPD: cradle to gate – with options

The LCA for the steel enamel shower surfaces, bathtubs and washbasins manufactured by KALDEWEI considers the life cycle phases of production (A1-A3) as well as recycling of packaging during installation (Module A5). Disposal in terms of reuse or treatment (C3) and landfilling (C4) is also considered in this study. An analysis of the modules under review gives rise to credits and debits beyond the system boundary (Module D), especially as a result of the steel recycling potential which is fully allocated to this module.

Transport to the building (Module A4), dismantling at the end-of-life (C1), transport for the end-of-life (C2) and the use stage (Module B) are not considered in this study.

## Data sources
- GaBi Database (all versions)
- GaBi database SP36 2018
