# ceramic tile

Dataset: ILCD process, EPD, average dataset
Geography: IT
Reference year: 2017
Valid until: 2023
Classification: OEKOBAU.DAT: Mineralische Baustoffe / Steine und Elemente / Fliesen und Platten
Classification: IBUCategories: 02 Building products / Internal and external wall and ceiling finishes / Ceramic tiles and panels
Method details: Ceramic tiles and panels.pdf
Generated by: thinkstep Italy
Registration number: EPD-CIP-20170141-CCC1-EN
Owner: Cipa Gres spa
Compliance: DIN EN 15804; ISO 14025
Review: Accredited third party review by Institut Bauen und Umwelt e. V.
Amounts: rows without a unit in brackets have none in this file; such an amount is in the reference unit of its flow, which a separate flow dataset defines
copyright: true
licenseType: Free of charge for all users and uses
accessRestrictions: None

## Technology and included processes
Ceramic tiles produced by CIPA GRES SPA comply with the following regulations and specifications. In accordance with EN 14411 / Europe and / ISO 13006 /. Ceramic tiles with the lowest water absorption level (≤ 0.5%) can be called porcelain stoneware (full-length waterproof tiles), including mosaic tiles and special pieces. Company CIPA GRES SPA starts up in 1967 as a quarry tile manufacturer. All over the years our company keeps its core business but also broadens its products ‘range, firstly moving to full body or enamelled porcelain tile of high-tech quality and then stretching its brand to double pressing or double loading porcelain tiles. In-depth researches into new solutions build up the guidelines of our philosophy. Our company knows how to keep the pace with major technological breakthroughs as well as with economic changes. We have strengthened our sales potential and at the same time, we have embarked on a path of steady growth, becoming a point of reference in Italian as well as in International markets. The main target of our latest policies is the production of tiles for residential areas or trade spaces with an eye to Italian Design and to first-class outdoors or indoors design solutions. Moreover, our company is fully committed to the safeguard of environment. MISSION Thanks to the outstanding techniques and the beauty of our porcelain tile, we can satisfy any project demands with a view of those who want to pave the way for the future of tomorrow. PRODUCTION CYCLE Production cycle starts by wet grinding of clays in order to form atomised bags that we receive ready from our suppliers and we store in 30 silos. CIPA GRES SPA production plant is based on a sophisticated brand new technology that allows continuous controls from first phases of processing up to the end of the production line. In that, way we can assure high quality of our tiles. FINE PORCELAIN STONEWARE The tiles manufactured by Cipa Gres SpA are formed by blending raw materials from selected sites, that are quarried and checked by means of advanced systems so as to guarantee fade-free stability and purity. The atomized grain is rather spheroid in shape, with a more or less prominent internal cavity. It contains the residual humidity required for blending with the different coloured mixes. The size of the grains that form the atomized powder range between 100 and 600 microns, with an extremely prominent static distribution in the 300 to 180 micron range. The highest concentration of particles is generally in the 300 to 250 micron grain size range. The three all-important factors for an atomized mix are: 1 Grain morphology, 2 Percentage of residual humidity, 3 Particle size distribution. These factors are very important when it comes to establishing the smoothness of the powders, something that plays a fundamental role in the pressing process. The incoming atomized raw materials are stored in 30 dedicated bins, which provide a stock of different coloured atomized supplies with stabilized characteristics to suit the production schedule. The product is vitrified by means of a heat treatment in natural gas-fuelled kilns that raise the temperature of the material to approximately 1220°C (depending on the matrix), just below the distortion temperature (when melting starts), after which it is gradually brought to ambient temperature. This process obtains a non-absorbent ceramic body with truly remarkable intrinsic physical-mechanical characteristics that make the material suitable for all applications, able to withstand high stress in relation to its mechanical strength values and the final project for which it is used. PRESS DEPARTMENT After the step of preparation of mixtures we arrive at the forming process of the tile. Cipa Gres plant has n°5 presses of different tons according to sizes and exits suitable for shaping the tile body for dry press. Mighty hydraulic presses compress the mass of approximately 550 Kg/cm2, uniformly compacting each centimeter of the surface of the piece to be shaped. We can therefore guarantee precision, dimension, evenness and hardness of our tiles. Press n°1 PH 2800(Sacmi) Technology: Through Body Hi-Tech Press N°2 PH2800 (Sacmi)Technology: Through Body Hi-Tech Press n°3 PH680 (Sacmi) Technology: Through Body Hi-Tech (small sizes) Press n°4 PH5000 (Sacmi) Technology: Through Body- Double Loading Press n°5 PH3590 (Sacmi) Technology: Double Loading FIRING DEPARTMENT The next step is firing of tile body. Firing is made in linear kilns Number 3 roller kilns, of which 1 dual channel or “two floors” Number 1 Ecological Kiln of new generation labelled SACMI. Firing: the tile is brought step by step to a temperature of approximately 1200°C, allowing in this way the vitrification of molecules and the creation of a unique fully vitrified body (Firing cycle- entry approx 3- 4°C- Halfway maximum 1210° C- Exit from 650° C to 350° C). The average firing cycle lasts 60 minutes. Time of processing inside the three areas of the kiln, i.e heating, firing and cooling, varies according to sizes and thicknesses of tiles. SORTING When the firing cycle is over, we move to the phase of quality sorting. This step is implemented by qualified staff, who is using computing tools that assure exact correspondence between aesthetical and technical parameters, such as evenness, calibration and orthogonality. Finally, the product is automatically packaged and put on pallets ready for delivery. WAREHOUSE Finally, the product is authomatically packaged in boxes and put on pallets for shipment. TECHNOLOGY TOWER • High Technology System called “ Technology Tower” • Through Body • Double Loading “Technology Tower” is a system that uses the vertical space to process powders and clay mixtures before coming to press loading. Powder falls down through dosage phases, such as mixing, sieving, agglomeration, granulation, micronisation and colouring. This technological system allows to reduce machine transfers and other utilities with a sub-sequent optimisation of space. The aim of this research is to create a new original product in order to give way to a new age of porcelain tile. Innovation is represented by this technology, a machine able to start a new philosophy of press decoration with the intention to confer to the product new effects in terms of multi-functionality, aesthetics and similarity to natural stones. THROUGH-BODIED PORCELAIN STONEWARE The production process for through-bodied porcelain tiles CIPA GRES SPA uses raw materials selected by our laboratories, obtained from quarries all over the world. Combining tile body mixes with different types of minerals during pressing provides a wide range of products that successfully deliver both excellent technical performance and high stylistic content. MANUFACTURED BY THE DOUBLE LOADING METHOD The double loading technology offers all the technological benefits of through-bodied porcelain with particularly fine appearance. The loading of tile body mixes and micronised powders into the press in a number of steps generates colour shade differences within the material, leading to attractive, natural variability like that of marble and other types of stone. RESEARCH AND DEVELOPMENT Our accurate research precedes each phase of production. We begin with the study of new mixtures of materials, then focus on the search of new aesthetical proposals. The last step is a final in-depth control of the manufactured product. Our research department is always keen on anticipating future requirements and new methods of production. Our tiles are entirely made with raw materials that are firstly mixed and then dry pressed. This confers the same features on the whole tile thickness. Therefore, our tile when polished takes on a brilliant, easy to clean surface. If we think to duration and economical advantages, Cipa Gres tiles represent a valid alternative to marble and granite without giving up quality and variety in aesthetics. These special pieces possess the same technical specifications and appearance as the products to which they are matched. PHOTOVOLTAIC PANELS Company CIPA GRES SPA in Casalgrande is equipped with one of the largest photovoltaic power plants in the tiles district, as a part of a development plan that focuses on both energy and production efficiency without forgetting respect for the environment. The installation maintained by SINERGIA sas was realized by EOSENERGIA. 800.000 Kg for year of CO2 and 2000 kg for year of NOx will be saved in our atmosphere thanks to clean production of photovoltaic panels. With the construction of this plant, CIPAGRES was able to remove about 11.000 square meters of ETERNIT Roofings.
Technical data:
Porcelain tiles conform to the following standards and specifications:

The data specified in the Declaration of Performance apply.
Declared unit:
The declared unit is 1 m2 ceramic tile for covering

walls and floors with an average weight of 22,15 kg.

/GaBi/ data sets apply.

## Technical purpose
The designated application for the EPD object product

is both for wall and floor covering, for civilian and

residential/industrial use.

For the placing on the market in the EU/EFTA (with exception of Switzerland), the Regulation (EU) No 305/2011 applies. The products need a Declaration of Performance taking into consideration /EN 14411:2012/ Ceramic tiles — Definitions, classification, characteristics, evaluation of conformity and the CEmarking.

## Scenarios
- S1: 100% recycling
- S2: Scenario 2

## Reference product
- Ceramics Tiles - Unglazed porcelain tiles 1 m2: 1

## Inputs
- Renewable primary energy as energy carrier (PERE) [MJ]: A1-A3 38.3, A4 0.68, A5 7.23, B1 0, B2 0.00859, B3 0, B4 0, B5 0, B6 0, B7 0, C1 0, C2 0.0242, C3 (S1) 0.083, C3 (S2) 0, C4 (S1) 0, C4 (S2) 0.656, D (S1) -1.07, D (S2) -0.866
- Renewable primary energy resources as material utilization (PERM) [MJ]: A1-A3 2.64, A4 0, A5 -2.81, B1 0, B2 0, B3 0, B4 0, B5 0, B6 0, B7 0, C1 0, C2 0, C3 (S1) 0, C3 (S2) 0, C4 (S1) 0, C4 (S2) 0, D (S1) 0, D (S2) 0
- Total use of renewable primary energy resources (PERT) [MJ]: A1-A3 40.9, A4 0.68, A5 4.77, B1 0, B2 0.00859, B3 0, B4 0, B5 0, B6 0, B7 0, C1 0, C2 0.0242, C3 (S1) 0.083, C3 (S2) 0, C4 (S1) 0, C4 (S2) 0.656, D (S1) -1.07, D (S2) -0.866
- Non renewable primary energy as energy carrier (PENRE) [MJ]: A1-A3 250, A4 13.6, A5 25.2, B1 0, B2 0.237, B3 0, B4 0, B5 0, B6 0, B7 0, C1 0, C2 0.428, C3 (S1) 1.39, C3 (S2) 0, C4 (S1) 0, C4 (S2) 5.78, D (S1) -6.17, D (S2) -5.3
- Non renewable primary energy as material utilization (PENRM) [MJ]: A1-A3 0.967, A4 0, A5 -1.03, B1 0, B2 0, B3 0, B4 0, B5 0, B6 0, B7 0, C1 0, C2 0, C3 (S1) 0, C3 (S2) 0, C4 (S1) 0, C4 (S2) 0, D (S1) 0, D (S2) 0
- Total use of non renewable primary energy resources (PENRT) [MJ]: A1-A3 251, A4 13.6, A5 24.3, B1 0, B2 0.237, B3 0, B4 0, B5 0, B6 0, B7 0, C1 0, C2 0.428, C3 (S1) 1.39, C3 (S2) 0, C4 (S1) 0, C4 (S2) 5.78, D (S1) -6.17, D (S2) -5.3
- Use of secondary material (SM) [kg]: A1-A3 0, A4 0, A5 0, B1 0, B2 0, B3 0, B4 0, B5 0, B6 0, B7 0, C1 0, C2 0, C3 (S1) 0, C3 (S2) 0, C4 (S1) 0, C4 (S2) 0, D (S1) 25.9, D (S2) 0
- Use of renewable secondary fuels (RSF) [MJ]: A1-A3 0, A4 0, A5 0, B1 0, B2 0, B3 0, B4 0, B5 0, B6 0, B7 0, C1 0, C2 0, C3 (S1) 0, C3 (S2) 0, C4 (S1) 0, C4 (S2) 0, D (S1) 0, D (S2) 0
- Use of non renewable secondary fuels (NRSF) [MJ]: A1-A3 0, A4 0, A5 0, B1 0, B2 0, B3 0, B4 0, B5 0, B6 0, B7 0, C1 0, C2 0, C3 (S1) 0, C3 (S2) 0, C4 (S1) 0, C4 (S2) 0, D (S1) 0, D (S2) 0
- Use of net fresh water (FW) [m^3]: A1-A3 0.0392, A4 0.00168, A5 0.00867, B1 0, B2 5.07e-5, B3 0, B4 0, B5 0, B6 0, B7 0, C1 0, C2 6.07e-5, C3 (S1) 0.000433, C3 (S2) 0.000433, C4 (S1) 0.000433, C4 (S2) 0.00118, D (S1) 0.00171, D (S2) 0.00171

## Outputs
- Hazardous waste disposed (HWD) [kg]: A1-A3 0.00052, A4 8.82e-7, A5 3.4e-5, B1 0, B2 5.84e-5, B3 0, B4 0, B5 0, B6 0, B7 0, C1 0, C2 3.24e-8, C3 (S1) 5.83e-8, C3 (S2) 0, C4 (S1) 0, C4 (S2) 1.32e-7, D (S1) -4.09e-8, D (S2) -3.44e-9
- Non hazardous waste disposed (NHWD) [kg]: A1-A3 0.101, A4 0.00102, A5 1.55, B1 0, B2 0.000786, B3 0, B4 0, B5 0, B6 0, B7 0, C1 0, C2 3.6e-5, C3 (S1) 0.000595, C3 (S2) 0, C4 (S1) 0, C4 (S2) 26.8, D (S1) -1.09, D (S2) -0.00705
- Radioactive waste disposed (RWD) [kg]: A1-A3 0.00195, A4 2.74e-5, A5 0.000397, B1 0, B2 2.68e-6, B3 0, B4 0, B5 0, B6 0, B7 0, C1 0, C2 6.12e-7, C3 (S1) 2.04e-5, C3 (S2) 0, C4 (S1) 0, C4 (S2) 8.06e-5, D (S1) -0.000299, D (S2) -0.00026
- Components for re-use (CRU) [kg]: A1-A3 0, A4 0, A5 0.079, B1 0, B2 0, B3 0, B4 0, B5 0, B6 0, B7 0, C1 0, C2 0, C3 (S1) 0, C3 (S2) 0, C4 (S1) 0, C4 (S2) 0
- Materials for recycling (MFR) [kg]: A1-A3 0, A4 0, A5 0.0147, B1 0, B2 0, B3 0, B4 0, B5 0, B6 0, B7 0, C1 0, C2 0, C3 (S1) 26.7, C3 (S2) 0, C4 (S1) 0, C4 (S2) 0
- Materials for energy recovery (MER) [kg]: A1-A3 0, A4 0, A5 0, B1 0, B2 0, B3 0, B4 0, B5 0, B6 0, B7 0, C1 0, C2 0, C3 (S1) 0, C3 (S2) 0, C4 (S1) 0, C4 (S2) 0
- Exported electrical energy (EEE) [MJ]: A1-A3 0, A4 0, A5 0.255, B1 0, B2 0, B3 0, B4 0, B5 0, B6 0, B7 0, C1 0, C2 0, C3 (S1) 0, C3 (S2) 0, C4 (S1) 0, C4 (S2) 0
- Exported thermal energy (EET) [MJ]: A1-A3 0, A4 0, A5 0.484, B1 0, B2 0, B3 0, B4 0, B5 0, B6 0, B7 0, C1 0, C2 0, C3 (S1) 0, C3 (S2) 0, C4 (S1) 0, C4 (S2) 0

## Impact indicators
- Global warming potential (GWP) [kg CO_(2)-Äq.]: A1-A3 165, A4 1.01, A5 2.77, B1 0, B2 0.00898, B3 0, B4 0, B5 0, B6 0, B7 0, C1 0, C2 0.031, C3 (S1) 0.0691, C3 (S2) 0, C4 (S1) 0, C4 (S2) 0.429, D (S1) -0.473, D (S2) -408
- Depletion potential of the stratospheric ozone layer (ODP) [kg CFC11-Äq.]: A1-A3 6.05e-10, A4 6.67e-12, A5 5.54e-11, B1 0, B2 5.07e-13, B3 0, B4 0, B5 0, B6 0, B7 0, C1 0, C2 1.42e-13, C3 (S1) 5.19e-12, C3 (S2) 0, C4 (S1) 0, C4 (S2) 4.72e-12, D (S1) -3.54e-11, D (S2) -3.34e-11
- Acidification potential of land and water (AP) [kg SO_(2)-Äq.]: A1-A3 0.0553, A4 0.0054, A5 0.0057, B1 0, B2 1.53e-5, B3 0, B4 0, B5 0, B6 0, B7 0, C1 0, C2 0.000136, C3 (S1) 0.000583, C3 (S2) 0, C4 (S1) 0, C4 (S2) 0.00257, D (S1) 0.000779, D (S2) 0.000478
- Eutrophication potential (EP) [kg PO_(4)^(3)-Äq.]: A1-A3 0.0107, A4 0.000646, A5 0.00123, B1 0, B2 2.71e-6, B3 0, B4 0, B5 0, B6 0, B7 0, C1 0, C2 3.33e-5, C3 (S1) 0.000117, C3 (S2) 0, C4 (S1) 0, C4 (S2) 0.00035, D (S1) 0.000131, D (S2) -6.91e-5
- Formation potential of tropospheric ozone photochemical oxidants (POCP) [kg Ethen-Äq.]: A1-A3 0.00367, A4 0.000306, A5 0.000406, B1 0, B2 5.3e-6, B3 0, B4 0, B5 0, B6 0, B7 0, C1 0, C2 -5.11e-5, C3 (S1) 7.73e-5, C3 (S2) 0, C4 (S1) 0, C4 (S2) 0.000247, D (S1) 0.000211, D (S2) 0.000175
- Abiotic depletion potential for non fossil resources (ADPE) [kg Sb-Äq.]: A1-A3 3.83e-6, A4 6.75e-8, A5 9.07e-6, B1 0, B2 3.71e-9, B3 0, B4 0, B5 0, B6 0, B7 0, C1 0, C2 2.06e-9, C3 (S1) 1.23e-7, C3 (S2) 0, C4 (S1) 0, C4 (S2) 1.48e-7, D (S1) -1.19e-7, D (S2) -9.71e-8
- Abiotic depletion potential for fossil resources (ADPF) [MJ]: A1-A3 246, A4 13.5, A5 23.3, B1 0, B2 0.231, B3 0, B4 0, B5 0, B6 0, B7 0, C1 0, C2 0.426, C3 (S1) 1.34, C3 (S2) 0, C4 (S1) 0, C4 (S2) 5.57, D (S1) -5.42, D (S2) -4.65

## Use advice
Scope:
In this EPD the LCA results of one average square meter of unglazed porcelain tiles

produced by Cipa Gres spa in the Italian production site Casalgrande di Reggio Emilia are declared.

The life cycle assessment was calculated with a tool developed by Confindustria Ceramica with support of thinkstep AG.
System boundary:
The entire life cycle of the product is considered (Type of EPD: cradle- to- grave) therefore every module described below is declared in this EPD.

Modules A1-A3 include those processes that provide energy and materials input for the system (A1), transport up to the factory gate of Meta spa plant (A2), manufacturing processes as well as waste processing (A3).

Module A4 includes the transport from the production site to the customer or to the point of installation of the tiles.

Module A5 considers all tile installation steps also packaging waste processing (recycling, incineration, disposal). Credits from energy substitution are declared in module D.

During this phase a ceramic material loss of 6,5% has been considered.

Module B1 considers the use of tiles. During the use of ceramic tiles no hazardous indoor emissions are expected to occur..

Module B2 includes the cleaning of the tiles.

Provision of water, cleaning agent for the cleaning of the tile, incl. waste water treatment are considered.

Modules B3-B4-B5 are related to the repair replacement and refurbishment of the tile. If the tile is properly installed no repair, replacement or refurbishment processes are necessary.

Modules B6-B7 consider energy use for operating building integrated technical systems (B6) and operational water use for technical building-related system. No operational energy or water use are considered. Cleaning water is declared under B2.

Module C1 regards demolition and de-construction processes of the tiles from the building.

Module C2 considers transportation of the discarded tiles to a recycling or disposal process.

Module C3 considers every process (collection,crushing process etc) for recycling of the tiles.

Module C4 includes all the landfill disposal process, including pre-treatment and management of the disposal site.

Module D includes benefits from all net flows in the end-of-life stage that leave the product boundary system after having passed the end-of-waste stage. Loads from packaging incineration and resulted energy credits (electricity and thermal energy) are declared within module D.

The life cycle assessment was calculated with a tool developed by Confindustria Ceramica with support of thinkstep AG.

## Data sources
- GaBi Database (all versions)
- GaBi database SP29 2016
