# Troldtekt 25mm Natural Wood - painted

Dataset: ILCD process, EPD, specific dataset
Geography: DK
Reference year: 2021
Valid until: 2026
Classification: OEKOBAU.DAT: Holz / Holzwerkstoffe / Holzzementplatten
Classification: IBUCategories: 02 Building products / Wood based panels / Wood cement - Mineral-bonded wooden composites
Method details: Wood cement - Mineral-bonded wooden composites.pdf
Generated by: Troldtekt A/S
Registration number: EPD-TRO-20210109-ICA1-EN
Owner: Troldtekt A/S
Compliance: DIN EN 15804; ISO 14025
Review: Accredited third party review by Institut Bauen und Umwelt e. V.
Amounts: rows without a unit in brackets have none in this file; such an amount is in the reference unit of its flow, which a separate flow dataset defines
copyright: true
licenseType: Free of charge for all users and uses
accessRestrictions: None

## General comment
Troldtekt Natural Wood acoustic panels are some of the leading and preferred solutions for creating a good indoor sound environment. They are sold in various thicknesses (20-35 mm) and dimensions (width: 600 mm, lengths: 600/1200/2400 mm or width: 625 mm, lengths: 625/1250/2500 mm). The panels can be unpainted or painted in a wide variety of colors.

For the placing on the market of the product in the European Union/European Free Trade Association (EU/EFTA) (with the exception of Switzerland) Regulation (EU) No. 305/2011 (CPR) applies. The product needs a declaration of performance taking into consideration EN 13964:2014, Suspended ceilings. Requirements and test methods, and the CE-marking.

For the application and use, the respective national provisions apply.

## Technology and included processes
Norway spruce logs from local forests (with a moisture content of about 65-70%) are received and the bark is removed. The wood is stored for approximately six months until the moisture content in the wood drops to 29%. The wood is then shredded to produce wool. The wood wool is mixed together with Portland cement, water, and additives. The mixture is cast and cured using a heat press and dried with a biomass-fired oven. The cast panel is milled to remove any material in excess and cut edges. After approximately 4 weeks of curing, the panel can be painted before being stored on a pallet and packaged to be transported to central distribution warehouses.
Technical data:
The table below indicates the technical specifications of the panels in accordance with EN 13168, the standard for cement-bonded wood wool and double-layer panels with cement-bonded wood wool, and EN 13964, the standard for suspended ceilings.
Declared unit:
The functional unit is 1 m2 of acoustic panel, in 25 mm thickness, corresponding to 11,73 kg of material with a painted finish, mounted on ceiling, with a reference service life of 50 years.

## Technical purpose
The panels are installed on the ceilings and walls in offices, businesses, schools, institutions, cultural sites, sports centers, swimming pools and private homes.

## Reference product
- Natural Wood, 25 mm, painted finish, delivered and used in Denmark (and Sweden and Germany): 1

## Inputs
- Renewable primary energy as energy carrier (PERE) [MJ]: A1-A3 65.4114, A4 0.0247, A5 0.16, B1 0, C1 0.0391, C2 0.0208, C4 8.45, D -1.76
- Renewable primary energy resources as material utilization (PERM) [MJ]: A1-A3 73.5886, A4 0, A5 0, B1 0, C1 0, C2 0, C4 0, D 0
- Total use of renewable primary energy resources (PERT) [MJ]: A1-A3 139, A4 0.0247, A5 0.16, B1 0, C1 0.0391, C2 0.0208, C4 8.45, D -1.76
- Non renewable primary energy as energy carrier (PENRE) [MJ]: A1-A3 80.9, A4 1.76, A5 0.458, B1 0, C1 0.0431, C2 1.49, C4 0.668, D -9.58
- Non renewable primary energy as material utilization (PENRM) [MJ]: A1-A3 0.153, A4 0, A5 0, B1 0, C1 0, C2 0, C4 0, D 0
- Total use of non renewable primary energy resources (PENRT) [MJ]: A1-A3 81, A4 1.76, A5 0.458, B1 0, C1 0.0431, C2 1.49, C4 0.668, D -9.58
- Use of secondary material (SM) [kg]: A1-A3 0.0223, A4 0, A5 0.031, B1 0, C1 0, C2 0, C4 0, D 0
- Use of renewable secondary fuels (RSF) [MJ]: A1-A3 0.000203, A4 0, A5 0, B1 0, C1 0, C2 0, C4 0, D 0
- Use of non renewable secondary fuels (NRSF) [MJ]: A1-A3 3.2e-5, A4 0, A5 0, B1 0, C1 0, C2 0, C4 0, D 0
- Use of net fresh water (FW) [m^3]: A1-A3 0.544, A4 0.000299, A5 0.00013, B1 0, C1 1.19e-5, C2 0.000252, C4 0.000281, D -0.000639

## Outputs
- Hazardous waste disposed (HWD) [kg]: A1-A3 0.0566, A4 0.00177, A5 0.00151, B1 0, C1 5.4e-5, C2 0.0015, C4 0.001478, D -0.05821
- Non hazardous waste disposed (NHWD) [kg]: A1-A3 1.72, A4 0.122, A5 0.115, B1 0, C1 0.00112, C2 0.103, C4 0.06204, D -1.984
- Radioactive waste disposed (RWD) [kg]: A1-A3 0.000101, A4 1.2e-5, A5 2.54e-6, B1 0, C1 5.78e-7, C2 1.01e-5, C4 4.981e-6, D -2.412e-5
- Components for re-use (CRU) [kg]: A1-A3 6.83e-6, A4 0, A5 0, B1 0, C1 0, C2 0, C4 0, D 0
- Materials for recycling (MFR) [kg]: A1-A3 0.0156, A4 0, A5 0, B1 0, C1 0, C2 0, C4 0, D 0
- Materials for energy recovery (MER) [kg]: A1-A3 0.0087, A4 0, A5 0, B1 0, C1 0, C2 0, C4 0, D 0
- Exported electrical energy (EEE) [MJ]: A1-A3 0, A4 0, A5 0, B1 0, C1 0, C2 0, C4 1.733, D 0
- Exported thermal energy (EET) [MJ]: A1-A3 0, A4 0, A5 0, B1 0, C1 0, C2 0, C4 5.57034, D 0

## Impact indicators
- Global warming potential (GWP) [kg CO_(2)-Äq.]: A1-A3 1.73474, A4 0.115, A5 0.0857333, B1 -0.733792, C1 0.00065, C2 0.0969, C4 7.99229, D -0.554
- Depletion potential of the stratospheric ozone layer (ODP) [kg CFC11-Äq.]: A1-A3 3.335e-7, A4 2.09e-8, A5 1.64e-9, B1 0, C1 2.81e-10, C2 1.77e-8, C4 6.41e-9, D -3.84e-8
- Acidification potential of land and water (AP) [kg SO_(2)-Äq.]: A1-A3 0.044754, A4 0.000232, A5 5.9e-5, B1 0, C1 1.59e-6, C2 0.000196, C4 0.0005297, D -0.000801
- Eutrophication potential (EP) [kg PO_(4)^(3)-Äq.]: A1-A3 0.0102136, A4 4.77e-5, A5 0.000103, B1 0, C1 8.86e-7, C2 4.03e-5, C4 0.0002299, D -0.000464
- Formation potential of tropospheric ozone photochemical oxidants (POCP) [kg Ethen-Äq.]: A1-A3 0.0027668, A4 1.53e-5, A5 2.58e-6, B1 0, C1 8.88e-8, C2 1.29e-5, C4 4.147e-5, D -6.62e-5
- Abiotic depletion potential for non fossil resources (ADPE) [kg Sb-Äq.]: A1-A3 7.001e-5, A4 3.13e-6, A5 2.09e-7, B1 0, C1 1.82e-8, C2 2.64e-6, C4 6.985e-7, D -1.31e-6
- Abiotic depletion potential for fossil resources (ADPF) [MJ]: A1-A3 77.7, A4 1.72, A5 0.293, B1 0, C1 0.00476, C2 1.46, C4 0.51, D -9.11

## Use advice
Scope:
This declaration represents the production, supply, mounting, use, dismantling and disposal of 1 m2 (25 mm thickness) of white cement-bonded wood wool acoustic panel "Natural Wood" with a painted finish, produced by Troldtekt A/S, with a reference service life of 50 years. The production facility is located in Jutland, Denmark. Three scenarios represent its use in indoor conditions in Denmark, Sweden and Germany.
System boundary:
Cradle to grave

## Data sources
- ecoinvent database (all versions)
- ecoinvent 3.6 database
