# Glass - Bundesverband Flachglas e.V. - Laminated safety glass

Dataset: ILCD process, EPD, template dataset
Geography: RER
Reference year: 2017
Valid until: 2022
Classification: Komponenten von Fenstern und Vorhangfassaden / Füllungen / Transparente Füllungen
Classification: OEKOBAU.DAT: Komponenten von Fenstern und Vorhangfassaden / Füllungen / Transparente Füllungen
Synonyms: ESG; Soda lime silicate glass; PVB-film; LSG
Method details: Produktkategorieregeln Teil A; Produktkategorieregeln Teil B – für Flachglas im Bauwesen; EPD Flat glass, toughened safety glass and laminated safety glass
Owner: Bundesverband Flachglas e.V.
Compliance: EN 15804
Review: Independent external review by Patrick Wortner
Amounts: rows without a unit in brackets have none in this file; such an amount is in the reference unit of its flow, which a separate flow dataset defines
copyright: true

## General comment
This dataset contains the results for the modules A1-A3 and the modules C1, C2, C3, C4, D according to the European Standard EN 15804 for Sustainable Construction. The comparison with other products is only permissible if the application in the building is comparable. In principle, a comparison or the evaluation of EPD data is only possible, if all compared datasets have been generated in accordance with EN 15804 and the building context or the product-specific performance characteristics are taken into account.

## Geography
This data set represents the situation of the member companies of the Bundesverband Flachglas e.V., with regard to the most important technologies and the legal framework.

## Time period
annual average

## Technology and included processes
The LCA results include the life cycle stages of the pre-products manufacture to the point of the raw material extraction and processing of secondary material input (e.g. recycling processes), their transport to the manufacturer as well as the maufacturing itself, including provision of all operating supplies, energy and the complete waste treatment or the landfill of residual waste during the stage of manufacture.
The modules A1, A2 and A3 are shown here as an aggregated module A1-A3. If further modules have been calculated for this dataset, these can be found separately and can be merged for consideration of the entire life cycle.

## Technical purpose
Laminated safety glass (LSG) for processing into insulating glass units and for use as glass for buildings (in the building envelope and for finishing of works / structures).

## Reference product
- Glass - Bundesverband Flachglas e.V. - Laminated safety glass: 1

## Inputs
- Use of net fresh water (FW) [m3]: A1-A3 0.310033, C1 0.00164932, C2 8.11092e-5, C3 0.00240306, C4 0.000442343, D -0.00487204
- Use of non renewable primary energy (PENRE) [MJ]: A1-A3 838.602, C1 3.22168, C2 0.798, C3 4.69398, C4 10.9554, D -33.8324
- Use of non renewable primary energy resources used as raw materials (PENRM) [MJ]: A1-A3 8.64, C1 0, C2 0, C3 0, C4 -8.64, D 0
- Use of non renewable secondary fuels (NRSF) [MJ]: A1-A3 2.00205e-19, C1 4.78724e-30, C2 6.53826e-29, C3 6.975e-30, C4 4.1212e-22, D -1.7036e-20
- Use of renewable primary energy (PERE) [MJ]: A1-A3 184.409, C1 1.21039, C2 0.0440143, C3 1.76353, C4 0.286736, D -2.26626
- Use of renewable primary energy resources used as raw materials (PERM) [MJ]: A1-A3 0, C1 0, C2 0, C3 0, C4 0, D 0
- Use of renewable secondary fuels (RSF) [MJ]: A1-A3 1.70442e-20, C1 0, C2 4.30901e-30, C3 0, C4 3.50853e-23, D -1.45034e-21
- Use of secondary material (SM) [kg]: A1-A3 0.73347, C1 0, C2 0, C3 0, C4 0, D 0
- Total use of non renewable primary energy resource (PENRT) [MJ]: A1-A3 847.242, C1 3.22168, C2 0.798, C3 4.69398, C4 2.31541, D -33.8324
- Total use of renewable primary energy resources (PERT) [MJ]: A1-A3 184.409, C1 1.21039, C2 0.0440143, C3 1.76353, C4 0.286736, D -2.26626

## Outputs
- Components for re-use (CRU) [kg]: A1-A3 0, C1 0, C2 0, C3 0, C4 0
- Exported electrical energy (EEE) [MJ]: A1-A3 1.71033, C1 0, C2 0, C3 0, C4 0
- Exported thermal energy (EET) [MJ]: A1-A3 3.20843, C1 0, C2 0, C3 0, C4 0
- Hazardous waste disposed (HWD) [kg]: A1-A3 8.53236e-7, C1 1.51112e-9, C2 4.6141e-8, C3 2.20171e-9, C4 3.98409e-8, D -3.53623e-8
- Materials for energy recovery (MER) [kg]: A1-A3 0, C1 0, C2 0, C3 0, C4 0
- Materials for recycling (MFR) [kg]: A1-A3 2.25678, C1 0, C2 0, C3 4.45842, C4 0
- Non hazardous waste dispose (NHWD) [kg]: A1-A3 19.3786, C1 0.00226936, C2 6.68484e-5, C3 0.00330646, C4 10.8608, D -0.311182
- Radioactive waste disposed (RWD) [kg]: A1-A3 0.0808236, C1 0.000533496, C2 1.09213e-6, C3 0.000777306, C4 3.35521e-5, D -0.0009435

## Impact indicators
- Abiotic depletion potential for non fossil resources (ADPE) [kg Sb-Äqv.]: A1-A3 0.000365014, C1 9.37056e-8, C2 4.79757e-9, C3 1.36529e-7, C4 6.62778e-8, D -5.01343e-6
- Abiotic depletion potential for fossil resources (ADPF) [MJ]: A1-A3 641.67, C1 1.87712, C2 0.795192, C3 2.73497, C4 2.2306, D -31.4541
- Acidification potential of soil and water (AP) [kg SO2-Äqv.]: A1-A3 0.294491, C1 0.000500785, C2 0.000339067, C3 0.000729642, C4 0.0010216, D -0.0126457
- Eutrophication potential (EP) [kg Phosphat-Äqv.]: A1-A3 0.0255527, C1 4.69238e-5, C2 8.71476e-5, C3 6.83682e-5, C4 0.000141045, D -0.00162874
- Global warming potential (GWP) [kg CO2-Äqv.]: A1-A3 47.5794, C1 0.176362, C2 0.0578074, C3 0.256959, C4 0.172656, D -2.31708
- Depletion potential of the stratospheric ozone layer (ODP) [kg R11 eq.]: A1-A3 4.56064e-8, C1 7.83978e-13, C2 1.59653e-15, C3 1.14226e-12, C4 3.91663e-14, D -1.34778e-12
- Formation potential of tropospheric ozone (POCP) [kg Ethen-Äqv.]: A1-A3 0.0176065, C1 3.13504e-5, C2 -0.000151797, C3 4.56776e-5, C4 7.94118e-5, D 0.00177356

## Use advice
A1-A3 as well as modules C1, C2, C3, C4, D. The environmental profile includes the life cycle stages cradle to gate with options.

The construction of the laminated safety glass refers to a glass thickness of 6 mm.

The model EPD obtains validity through the transfer to the manufacturer by the ift. Currently valid EPDs are to be taken from the list below and are published on www.ift-service.de/epd.
EPD number and declaration holder:
- M-EPD-FEV-002001, Semcoglas Holding GmbH, 26655 Westerstede
- M-EPD-FEV-002002, Q4Glass ABJ Investors Sp. z.o.o. Sp. k., 75-209 Koszalin
- M-EPD-FEV-002003, arcon Flachglas-Veredelung GmbH & Co. KG, 91555 Feuchtwangen
- M-EPD-FEV-002004, Pilkington Deutschland AG, 45966 Gladbeck
- M-EPD-FEV-002005, EUROGLAS GmbH, 39340 Haldensleben
- M-EPD-FEV-002006, Hero-Glas Veredelungs GmbH, 26906 Dersum
- M-EPD-FEV-002007, Glas Tech S.A., 62-020 Swarzedz
- M-EPD-FEV-002008, Opolglass Sp. z.o.o., 45-125 Opole
- M-EPD-FEV-002009, thermopor glas GmbH, 52399 Merzenich
- M-EPD-FEV-002011, Scheuten Glas Nederland Base Glass Unit, 5928 LN Venlo
- M-EPD-FEV-002012, Scheuten Glas Nederland Glass Tech Unit,5928 LN Venlo
- M-EPD-FEV-002013, Glas Trösch GmbH, 86720 Nördlingen
- M-EPD-FEV-002014, Flachglas Wernberg GmbH, 92533 Wernberg-Köblitz
- M-EPD-FEV-002015, OKALUX GmbH, 97828 Marktheidenfeld-Altfeld
- M-EPD-FEV-002016, Brakeler Thermo-Glas GmbH, 33034 Brakel
- M-EPD-FEV-GB-002017, Pilkington IGP Sp. O o.o, 27-600 Sandomierz
- M-EPD-FEV-GB-002018, PRESS GLASS SA, 42-262 Poczesna
- M-EPD-FEV-002019, Isophon glas GmbH, 34346 Hann. Münden
- M-EPD-FEV-002020, sedak GmbH & Co. KG, 86368 Gersthofen
- M-EPD-FEV-002021, Schollglas Holding und Geschäftsführungsgesell-schaft mbH, 30890 Barsinghausen
- M-EPD-FEV-GB-002022, REFLEX Gornja Radgona d.o.o., 9250 Gornja Radgona
- M-EPD-FEV-GB-002023, UNIGLAS GmbH & Co. KG, 56410 Montabaur

## Review details
The LCI method applied is in compliance with ISO 14040 and 14044. The documentation includes all relevant information in view of the data quality and scope of the application of the respective LCI result or data set. The dataset represents the state-of-the-art with regard to to the functional unit.

## Data sources
- GaBi database (general)
