# PU block foam

Dataset: ILCD process, EPD, average dataset
Geography: DE
Reference year: 2016
Valid until: 2022
Classification: OEKOBAU.DAT: Dämmstoffe / Polyurethan-Hartschaum (PU) / PU Blockschaum
Classification: IBUCategories: 02 Bauprodukte / Wärmedämmungsprodukte / Dämmstoffe aus Schaumkunststoffen
Method details: Dämmstoffe aus Schaumkunststoffen.pdf
Generated by: Sphera Solutions GmbH
Registration number: EPD-IVP-20160147-IBE1-DE
Owner: Industrieverband Polyurethan-Hartschaum e.V.
Compliance: DIN EN 15804; ISO 14025
Review: Accredited third party review by Institut Bauen und Umwelt e. V.
Amounts: rows without a unit in brackets have none in this file; such an amount is in the reference unit of its flow, which a separate flow dataset defines
copyright: false
licenseType: Free of charge for all users and uses
accessRestrictions: None

## General comment
Polyurethane rigid foam (PU) is a closed-cell foam and factory-made thermal insulating material, which is used in the form of insulation boards in building construction, as well as for insulation of building equipment and industrial installations. The polyurethane insulating material (PU) product family comprises the product variants polyurethane (PUR) and polyisocyanurate (PIR) - see /EN 13165/.PU insulating materials are produced as block foam and insulation boards with flexible facings.

This Product Declaration covers PU insulation boards without facings made of block foam. This EPD is based on weighted averages which have been determined on the basis of the single values originating from the factories of the aforementioned manufacturing companies (see section 3.1).

## Technology and included processes
Polyurethane rigid foam insulation boards made of block foam are produced on block units. In this manufacturing process, the polyurethane reaction mixture pours from a mixing head onto a paper base and foams up to a height of approx. 90 cm. After the cooling phase, the rigid foam blocks are cut to boards with the desired dimensions. Quality assurance The declared products as per /DIN EN 13165/ bear the quality mark of the “Überwachungsgemeinschaft Polyurethan-Hartschaum”. Quality assurance is based on surveillance and certification by independent Notified Bodies.
Technical data:
For determining technical data, testing methods as stated in /DIN 13165/ and /DIN EN 14308/ are used.
Declared unit:
The declared unit is 1 m² of installed PU thermal insulation board made of block foam and has the following specifications:

## Technical purpose
The scope of application of PU rigid foam insulation materials comprises thermal insulation in building construction (e.g. pitched roofs, flat roofs, floors, ceilings and exterior walls (inside and outside)). Furthermore, PU rigid foam is used for insulating building equipment and industrial installations.

## Reference product
- 1 m² installierte PU-Dämmplatte aus Blockschaumstoff: 1

## Inputs
- Renewable primary energy as energy carrier (PERE) [MJ]: A1-A3 16.3, A4 0.226, A5 0.238, C2 0.0446, C3 0.498, C4 0.227, D -8.87
- Renewable primary energy resources as material utilization (PERM) [MJ]: A1-A3 0, A4 0, A5 0, C2 0, C3 0, C4 0, D 0
- Total use of renewable primary energy resources (PERT) [MJ]: A1-A3 16.3, A4 0.226, A5 0.238, C2 0.0446, C3 0.498, C4 0.227, D -8.87
- Non renewable primary energy as energy carrier (PENRE) [MJ]: A1-A3 226, A4 3.98, A5 5.56, C2 0.788, C3 1.78, C4 2.33, D -67.2
- Non renewable primary energy as material utilization (PENRM) [MJ]: A1-A3 99, A4 0, A5 0, C2 0, C3 0, C4 0, D 0
- Total use of non renewable primary energy resources (PENRT) [MJ]: A1-A3 325, A4 3.98, A5 5.56, C2 0.788, C3 1.78, C4 2.33, D -67.2
- Use of secondary material (SM) [kg]: A1-A3 0, A4 0, A5 0, C2 0, C3 0, C4 0, D 0
- Use of renewable secondary fuels (RSF) [MJ]: A1-A3 0, A4 0, A5 0, C2 0, C3 0, C4 0, D 0
- Use of non renewable secondary fuels (NRSF) [MJ]: A1-A3 0, A4 0, A5 0, C2 0, C3 0, C4 0, D 0
- Use of net fresh water (FW) [m^3]: A1-A3 0.0947, A4 0.000565, A5 0.00226, C2 0.000112, C3 0.000769, C4 0.0202, D -0.0138

## Outputs
- Hazardous waste disposed (HWD) [kg]: A1-A3 1.46e-5, A4 3.01e-7, A5 2.55e-7, C2 5.96e-8, C3 1.13e-9, C4 1.3e-9, D -2.56e-8
- Non hazardous waste disposed (NHWD) [kg]: A1-A3 0.36, A4 0.000335, A5 0.00454, C2 6.62e-5, C3 0.00107, C4 0.00892, D -0.0233
- Radioactive waste disposed (RWD) [kg]: A1-A3 0.00765, A4 5.69e-6, A5 0.00013, C2 1.13e-6, C3 0.000269, C4 0.000106, D -0.00478
- Components for re-use (CRU) [kg]: A1-A3 0, A4 0, A5 0, C2 0, C3 0, C4 0, D 0
- Materials for recycling (MFR) [kg]: A1-A3 0, A4 0, A5 0, C2 0, C3 0, C4 0, D 0
- Materials for energy recovery (MER) [kg]: A1-A3 0, A4 0, A5 0, C2 0, C3 0, C4 0, D 4.04
- Exported electrical energy (EEE) [MJ]: A1-A3 0, A4 0, A5 0.509, C2 0, C3 0, C4 13.1, D 0
- Exported thermal energy (EET) [MJ]: A1-A3 0, A4 0, A5 1.164, C2 0, C3 0, C4 30.2, D 0

## Impact indicators
- Global warming potential (GWP) [kg CO_(2)-Äq.]: A1-A3 14.8, A4 0.289, A5 0.54, C2 0.0572, C3 0.102, C4 8.74, D -4
- Depletion potential of the stratospheric ozone layer (ODP) [kg CFC11-Äq.]: A1-A3 2.34e-5, A4 1.32e-12, A5 4e-7, C2 2.62e-13, C3 7.25e-11, C4 2.59e-11, D -1.29e-9
- Acidification potential of land and water (AP) [kg SO_(2)-Äq.]: A1-A3 0.0306, A4 0.00164, A5 0.000618, C2 0.000324, C3 0.000284, C4 0.00351, D -0.00626
- Eutrophication potential (EP) [kg PO_(4)^(3)-Äq.]: A1-A3 0.0049, A4 0.000409, A5 0.000108, C2 8.09e-5, C3 2.54e-5, C4 0.000891, D -0.000637
- Formation potential of tropospheric ozone photochemical oxidants (POCP) [kg Ethen-Äq.]: A1-A3 0.0196, A4 -0.000673, A5 0.000212, C2 -0.000133, C3 1.96e-5, C4 0.000236, D -0.000672
- Abiotic depletion potential for non fossil resources (ADPE) [kg Sb-Äq.]: A1-A3 2.88e-5, A4 1.92e-8, A5 4.89e-7, C2 3.8e-9, C3 3.34e-8, C4 6.87e-8, D -6.71e-7
- Abiotic depletion potential for fossil resources (ADPF) [MJ]: A1-A3 306, A4 3.97, A5 5.24, C2 0.785, C3 1.11, C4 2.07, D -55.2

## Use advice
Scope:
This Environmental Product Declaration applies to polyurethane insulation boards made of block foam as manufactured by the IVPU members Paul Brauder GmbH & Co. KG and puren GmbH.These IVPU members represent the majority of companies within the German polyurethane block foam market. This EPD is based on weighted averages which have been determined on the basis of the single values originating from the factories of the mentioned manufacturing companies (see section 3.1).
System boundary:
Type of EPD: cradle to gate - with options

The life-cycle assessment considers the following modules of the life cycle:

· production and provision of raw materials (A1)

· transporting raw materials (A2)

· production including packaging (A3)

· transport to construction site (A4)

· installation in buildings (recycling or thermal treatment of cutting leftovers and packaging waste) (A5)

· transport to End of Life (C2)

· waste treatment: energy for shredders (C3)

· thermal treatment in waste incineration plants (MVA) - (C4)

· use potential beyond the system's boundary due to energy substitution in the MVA (D).

## Data sources
- GaBi Database (all versions)
- GaBi database SP29 2016
