# Biogas (1 kg)

Dataset: ILCD process, EPD, generic dataset
Geography: DE
Reference year: 2021
Valid until: 2022
Classification: oekobau.dat: Sonstige / Energieträger - Bereitstellung frei Verbraucher / Biogas
Owner: Sphera Solutions GmbH
Compliance: EN 15804+A2
Review: Dependent internal review by Sphera Solutions GmbH; Independent external review by GaBi user forum
Amounts: rows without a unit in brackets have none in this file; such an amount is in the reference unit of its flow, which a separate flow dataset defines
copyright: true
licenseType: Free of charge for all users and uses
accessRestrictions: The license conditions as stated on https://www.oekobaudat.de/ apply.
accessRestrictions: Es gelten die Lizenzbedingungen wie sie auf https://www.oekobaudat.de/ genannt sind.

## General comment
This data set has been modeled according to the European Standard EN 15804+A2 for Sustainable Building. Results are depicted in modules that allow the structured expression of results over the entire life cycle.

## Geography
The data set represents the country specific situation in Germany, focusing on the main technologies, the region specific characteristics and / or import statistics.

## Time period
Annual average

## Technology and included processes
Biogas is obtained from different sources. The data set represent the so-called "consumption mix" in Germany. The stored mix contains 70.9% biogas through anaerobic fermentation of organic waste and energy crops to biogas through wet fermentation, 17.8% biogas from landfills with landfill gas generation and 11.3% biogas from sewage sludge. All essential process steps of biogas production such as transport, processing of the substrates, fermentation, exhaust gas cleaning and compression of the biogas are contained in the data set.

## Technical purpose
Biogas is mainly used to generate electrical and thermal energy.

## Safety margin
10 %. Product system almost completely covered. Good technological, temporal and geographic representativeness.

## Reference product
- Biogas (1 kg): 1

## Inputs
- Use of renewable primary energy as energy carrier (PERE) [MJ]: B6 46.0319
- Use of renewable primary energy resources used as raw materials (PERM) [MJ]: B6 0
- Total use of renewable primary energy (PERT) [MJ]: B6 46.0319
- Use of non renewable primary energy as energy carrier (PENRE) [MJ]: B6 2.11451
- Use of non renewable primary energy resources used as raw materials (PENRM) [MJ]: B6 0
- Total use of non renewable primary energy resource (PENRT) [MJ]: B6 2.11451
- Use of secondary material (SM) [kg]: B6 0
- Use of renewable secondary fuels (SF) [MJ]: B6 0
- Use of non renewable secondary fuels (NRSF) [MJ]: B6 0
- Net use of fresh water (FW) [m3]: B6 0.00970614

## Outputs
- Hazardous waste disposed (HWD) [kg]: B6 2.39596e-9
- Non harzardous waste disposed (NHWD) [kg]: B6 0.0310742
- Radioactive waste disposed (RWD) [kg]: B6 5.31183e-5
- Components for re-use (CRU) [kg]: B6 0
- Materials for recycling (MFR) [kg]: B6 0
- Materials for energy recovery (MER) [kg]: B6 0
- Exported electrical energy (EEE) [MJ]: B6 0
- Exported thermal energy (EET) [MJ]: B6 0

## Impact indicators
- Global Warming Potential - total (GWP-total) [kg CO2 eq.]: B6 -1.19536
- Global Warming Potential - fossil fuels (GWP-fossil) [kg CO2 eq.]: B6 0.265777
- Global Warming Potential - biogenic (GWP-biogenic) [kg CO2 eq.]: B6 -1.46685
- Global Warming Potential - land use and land use change (GWP-luluc) [kg CO2 eq.]: B6 0.00571417
- Depletion potenzial of the stratospheric ozone layer (ODP) [kg CFC-11 eq.]: B6 1.39113e-15
- Acidifcation potential, Accumulated Exceedance (AP) [Mole of H+ eq.]: B6 0.00328439
- Eutrophication potential - freshwater (EP-freshwater) [kg P eq.]: B6 8.12328e-5
- Eutrophication potential - marine (EP-marine) [kg N eq.]: B6 0.00151376
- Eutrophication potential - terrestrial (EP-terrestrial) [Mole of N eq.]: B6 0.0135348
- Photochemical Ozone Creation Potential (POCP) [kg NMVOC eq.]: B6 0.00174141
- Abiotic depletion potential - non-fossil resources (ADPE) [kg Sb eq.]: B6 1.19576e-6
- Abiotic depletion potential - fossil resources (ADPF) [MJ]: B6 2.06533
- Water (user) deprivation potential (WDP) [m³ world equiv.]: B6 0.0166894

## Use advice
This data set relates to the production of 1 kg of biogas. The calorific value is 36 MJ/kg. The methane content is 59%.
The data set does not contain any emissions from the combustion of the biogas, only the manufacturing processes including the storage of biogenic carbon. For a complete consideration, the emissions from the use of the biogas and the efficiencies at building level must be considered separately.

## Data sources
- Documentation of data quality management
- GaBi Database Edition 2021, CUP2021.01
- GaBi database (all versions)
