# Mauerziegel (Dämmstoff gefüllt)

Dataset: ILCD process, EPD, average dataset
Geography: DE
Reference year: 2015
Valid until: 2021
Classification: OEKOBAU.DAT: Mineralische Baustoffe / Steine und Elemente / Ziegel
Classification: IBUCategories: 02 Bauprodukte / Mauerwerk und Mörtel / Ziegel
Method details: Ziegel.pdf
Generated by: Sphera Solutions GmbH
Registration number: EPD-AMZ-20140245-ICG1-DE
Owner: Bundesverband der Deutschen Ziegelindustrie e.V.
Compliance: DIN EN 15804; ISO 14025
Review: Accredited third party review by Institut Bauen und Umwelt e. V.
Amounts: rows without a unit in brackets have none in this file; such an amount is in the reference unit of its flow, which a separate flow dataset defines
copyright: true
licenseType: Free of charge for all users and uses
accessRestrictions: None

## General comment
Mauerziegel sind ein Baustoff aus gebranntem Ton. Sie können mit Perlitekügelchen, Mineralwollstecklingen, Mineralwollgranulat oder Polystyrol verfüllt werden. Mauerziegel (Dämmstoff gefüllt) werden in Außenwänden von Gebäuden eingesetzt. Für Mauerziegel gibt es eine eigene EPD. Die Werte dieser EPD beziehen sich auf durchschnittlich gefüllte Ziegel, wobei die Füllung einen durchschnittlichen Mix aller genannten Füllmaterialien repräsentiert.

Grundlage der Ökobilanzergebnisse in dieser EPD ist eine Durchschnittsbildung, aller deutschen Werke, die als gewichteter Mittelwert bezogen auf den Anteil der einzelnen Produktionsstätten an der Gesamtjahresproduktion erfolgte. Als repräsentatives Produkt wurde ein Ziegel mit einer Rohdichte von 575 kg/m³ ausgewählt.

## Technology and included processes
Mauerziegel bestehen aus den Grundstoffen Ton/Lehm, ggf. Magerungsmitteln (z. B. Sand) und Wasser. Die Kammern der verfüllten Mauerziegel sind mit Perlitekügelchen, Mineralwollstecklingen, Mineralwollgranulat oder mit Polystyrol verfüllt. HERSTELLUNG: Nach dem Tonabbau im Tagebau erfolgt der Transport zur Zwischenlagerung auf dem Werksgelände. Die mechanische Aufbereitung der Tone, wie das Zerkleinern und Mischen, geschieht im Kollergang und den Walzwerken. Die o.g. Grundstoffe werden in bestimmten optimierten Verhältnissen zerkleinert (aufbereitet) gemischt und befeuchtet. Es folgt eine Lagerung im Sumpfhaus. Die Zugabe der Porosierungsmittel erfolgt vor oder nach der Lagerung im Sumpfhaus. Nach Durchlaufen des Feinwalzwerkes erfolgt die Formgebung der Rohlinge durch Strangpressen mit entsprechenden Mundstücken und nachgeschaltetem Abschneider. Das so geformte Material kommt in den Trockner, der im wesentlichen mit der Abwärme des Tunnelofens betrieben wird. Die Trocknungszeit variiert je nach Format und Rohdichte und beträgt in der Regel 24 Stunden. Danach werden die getrockneten Rohlinge bei ca. 950 °C innerhalb von bis zu maximal 24 Stunden im Tunnelofen gebrannt. Die Verbrennung der Porosierungsstoffe bewirkt eine Feinporosierung. Zur Herstellung von Planziegeln werden die Ziegel plangeschliffen. Die Ziegel werden gestapelt, in recyclebare PE-Folie eingeschweißt oder mit Polyester- oder Stahlbändern umreift. Der Energiebedarf für die Ziegelherstellung betrifft hauptsächlich den Brennvorgang und das Trocknen. Die elektrische Energie wird hauptsächlich in der Aufbereitung verbraucht. Verfüllung mit Perlit: Das geblähte Perlit wird nach der Anlieferung ins Werk in Großsilos zwischengelagert. Für die Verfüllung wird es aus den Silos abgezogen und mit einem Bindemittel auf Wasserbasis gemischt. Über einen Beschicker wird das Perlit in die zugeführten Ziegelrohlinge eingefüllt und verdichtet. Der mit hydrophobiertem Perlit gefüllte Ziegel durchläuft danach zwei Stationen, in denen je die Ober- und Unterseite des verfüllten Ziegels nachverdichtet, verfestigt und gereinigt werden. Die verfüllten Ziegel durchlaufen anschließend einen Trockner. Bei einer Temperatur von ca. 120°C wird die Dämmstofffüllung getrocknet.Verfüllung mit Mineralwollstecklingen: Als Basis zur Verfüllung der Lochung der Mauerziegel dienen konventionell hergestellte Platten aus Mineralwolle, die entsprechend der Lochgeometrie des Ziegels geschnitten werden. Die so hergestellten Plattenabschnitte (Stecklinge) werden in einer weiteren Station mit Greifern von einem Roboter aufgenommen und über eine Matrize in die Lochung der Mauerziegel eingeführt. Die verwendeten Mineralfaserplatten sind bereits bei Anlieferung hinsichtlich Rohdichte und Geometrie an die Verfüllung der Mauerziegel angepasst. So lässt sich u.a. Abfall durch Verschnitt gänzlich vermeiden. Verfüllung mit Mineralwollgranulat Bei dieser Art der Verfüllung wird ein Mineralwollgranulat in die Ziegel eingebracht. Verfüllung mit Polystyrol: Als Basis zur Verfüllung der Lochung der Mauerziegel dienen lose Styroporkugeln, die in die Ziegelkammern eingefüllt werden und mittels Wasserdampf und Druck kernfest verbunden werden. Bei der Verfüllung fallen keine Abfälle an. Typ der EPD: Wiege bis Bahre (Module A1-D)
Deklarierte Einheit:
Die Deklaration bezieht sich auf einen Kubikmeter Mauerziegel (Dämmstoff gefüllt) mit einer Rohdichte von 575 kg/m3 (Mittelwert der Rohdichtklasse 600 kg/m3). Grundlage der Ökobilanzergebnisse in dieser EPD ist eine Durchschnittsbildung, aller deutschen Werke, die als gewichteter Mittelwert bezogen auf den Anteil der einzelnen Produktionsstätten an der Gesamtjahresproduktion erfolgte.

## Technical purpose
Mauerziegel (Dämmstoff gefüllt) werden aufgrund ihrer guten Wärmedämmung in der Regel als tragendes Mauerwerk in Außenwänden von Gebäuden eingesetzt. Gefüllte Fassadenelemente werden als Vorsatzschalen für Außenwände oder als Innendämmung im Altbau verwendet.

## Reference product
- 1 m³ Mauerziegel (Dämmstoff gefüllt): 1

## Inputs
- Erneuerbare Primärenergie als Energieträger (PERE) [MJ]: A1-A3 287.095, A4 3.23544, A5 0.204042, B1 0, B2 0, B3 0, B4 0, B5 0, C1 0.188845, C2 1.73958, C3 1.56023, C4 0.362385, D -9.44498
- Erneuerbare Primärenergie zur stofflichen Nutzung (PERM) [MJ]: A1-A3 0, A4 0, A5 0, B1 0, B2 0, B3 0, B4 0, B5 0, C1 0, C2 0, C3 0, C4 0, D 0
- Total erneuerbare Primärenergie (PERT) [MJ]: A1-A3 287.095, A4 3.23544, A5 0.204042, B1 0, B2 0, B3 0, B4 0, B5 0, C1 0.188845, C2 1.73958, C3 1.56023, C4 0.362385, D -9.44498
- Nicht-erneuerbare Primärenergie als Energieträger (PENRE) [MJ]: A1-A3 1782.97, A4 54.5323, A5 2.42065, B1 0, B2 0, B3 0, B4 0, B5 0, C1 4.8079, C2 44.2888, C3 28.3192, C4 4.39321, D -101.791
- Nicht-erneuerbare Primärenergie zur stofflichen Nutzung (PENRM) [MJ]: A1-A3 0, A4 0, A5 0, B1 0, B2 0, B3 0, B4 0, B5 0, C1 0, C2 0, C3 0, C4 0, D 0
- Total nicht erneuerbare Primärenergie (PENRT) [MJ]: A1-A3 1782.97, A4 54.5323, A5 2.42065, B1 0, B2 0, B3 0, B4 0, B5 0, C1 4.8079, C2 44.2888, C3 28.3192, C4 4.39321, D -101.791
- Einsatz von Sekundärstoffen (SM) [kg]: A1-A3 114.857, A4 0, A5 0, B1 0, B2 0, B3 0, B4 0, B5 0, C1 0, C2 0, C3 0, C4 0, D 0
- Erneuerbare Sekundärbrennstoffe (RSF) [MJ]: A1-A3 0, A4 0, A5 0, B1 0, B2 0, B3 0, B4 0, B5 0, C1 0, C2 0, C3 0, C4 0, D 0
- Nicht erneuerbare Sekundärbrennstoffe (NRSF) [MJ]: A1-A3 0, A4 0, A5 0, B1 0, B2 0, B3 0, B4 0, B5 0, C1 0, C2 0, C3 0, C4 0, D 0
- Einsatz von Süßwasserressourcen (FW) [m^3]: A1-A3 0.218599, A4 0.00209299, A5 0.0188804, B1 0, B2 0, B3 0, B4 0, B5 0, C1 0.000133262, C2 0.00122757, C3 0.00698873, C4 -0.0132631, D -0.00463609

## Outputs
- Gefährlicher Abfall zur Deponie (HWD) [kg]: A1-A3 0.117929, A4 0.000241992, A5 0.000198944, B1 0, B2 0, B3 0, B4 0, B5 0, C1 1.09525e-5, C2 0.00010089, C3 0.000965772, C4 0.000199085, D -0.0103585
- Entsorgter nicht gefährlicher Abfall (NHWD) [kg]: A1-A3 37.8033, A4 0.0104047, A5 0.218576, B1 0, B2 0, B3 0, B4 0, B5 0, C1 0.000604627, C2 0.00556963, C3 0.0134837, C4 23.608, D -11.1649
- Entsorgter radioaktiver Abfall (RWD) [kg]: A1-A3 0.0454433, A4 7.60133e-5, A5 0.000131988, B1 0, B2 0, B3 0, B4 0, B5 0, C1 6.29503e-6, C2 5.79878e-5, C3 0.000370106, C4 7.65331e-5, D -0.00396203
- Komponenten für die Wiederverwendung (CRU) [kg]: A1-A3 0, A4 0, A5 0, B1 0, B2 0, B3 0, B4 0, B5 0, C1 0, C2 0, C3 0, C4 0
- Stoffe zum Recycling (MFR) [kg]: A1-A3 0, A4 0, A5 0, B1 0, B2 0, B3 0, B4 0, B5 0, C1 0, C2 0, C3 534.75, C4 0
- Stoffe für die Energierückgewinnung (MER) [kg]: A1-A3 0, A4 0, A5 0, B1 0, B2 0, B3 0, B4 0, B5 0, C1 0, C2 0, C3 0, C4 0
- Exportierte elektrische Energie (EEE) [MJ]: A1-A3 0, A4 0, A5 9.6025, B1 0, B2 0, B3 0, B4 0, B5 0, C1 0, C2 0, C3 0, C4 0
- Exportierte thermische Energie (EET) [MJ]: A1-A3 0, A4 0, A5 25.9325, B1 0, B2 0, B3 0, B4 0, B5 0, C1 0, C2 0, C3 0, C4 0

## Impact indicators
- Globales Erwärmungspotenzial (GWP) [kg CO_(2)-Äq.]: A1-A3 177, A4 3.98934, A5 7.38323, B1 0, B2 0, B3 0, B4 0, B5 0, C1 0.349834, C2 3.20918, C3 -10.0625, C4 0.319525, D -6.97447
- Abbau Potential der stratosphärischen Ozonschicht (ODP) [kg CFC11-Äq.]: A1-A3 2.20404e-9, A4 9.54671e-12, A5 2.56167e-11, B1 0, B2 0, B3 0, B4 0, B5 0, C1 1.66293e-12, C2 1.53184e-11, C3 1.94949e-11, C4 4.00697e-12, D -1.89709e-10
- Versauerungspotenzial von Boden und Wasser (AP) [kg SO_(2)-Äq.]: A1-A3 0.356827, A4 0.0252181, A5 0.00123459, B1 0, B2 0, B3 0, B4 0, B5 0, C1 0.00142256, C2 0.0188553, C3 0.0105996, C4 0.00203001, D -0.0194945
- Eutrophierungspotenzial (EP) [kg PO_(4)^(3)-Äq.]: A1-A3 0.0405602, A4 0.00620791, A5 0.000172425, B1 0, B2 0, B3 0, B4 0, B5 0, C1 0.000307373, C2 0.00446293, C3 0.00243115, C4 0.000278562, D -0.00382804
- Bildungspotential für troposphärisches Ozon (POCP) [kg Ethen-Äq.]: A1-A3 0.0271106, A4 -0.0103366, A5 5.88735e-5, B1 0, B2 0, B3 0, B4 0, B5 0, C1 0.000161711, C2 -0.00741135, C3 0.00147091, C4 0.000190615, D 0.0031577
- Potenzial für den abiotischen Abbau nicht fossiler Ressourcen (ADPE) [kg Sb-Äq.]: A1-A3 1.83443e-5, A4 1.87159e-7, A5 2.69561e-7, B1 0, B2 0, B3 0, B4 0, B5 0, C1 1.30902e-8, C2 1.20583e-7, C3 2.23795e-6, C4 1.20248e-7, D -7.07604e-7
- Potenzial für den abiotischen Abbau fossiler Brennstoffe (ADPF) [MJ]: A1-A3 1668.57, A4 54.3416, A5 2.08894, B1 0, B2 0, B3 0, B4 0, B5 0, C1 4.79211, C2 44.1434, C3 27.3873, C4 4.20053, D -91.8176

## Use advice
Gültigkeitsbereich:
Die Anwendung dieses Dokumentes ist auf gefüllte Hintermauerziegel beschränkt, die von Mitgliedsunternehmen der Arbeitsgemeinschaft Mauerziegel (AMZ) in Deutschland hergestellt werden. Für diese Deklaration wurden von 14 Mitgliedsunternehmen mit 17 Standorten Daten aus dem Jahr 2013 zur Verfügung gestellt. Diese Mitglieder repräsentieren nach Anzahl 98% der in der AMZ zusammengeschlossenen Hersteller von gefüllten Hintermauerziegeln. Das Produktionsvolumen dieser Firmen liegt - nach Produktionsmenge -bei etwa 99% des deutschen Marktes. Der zugrundeliegende Hintermauerziegel basiert auf einer EPD, an der 23 Mitgliedsfirmen der AMZ beteiligt waren.
Systemgrenze:
Typ der EPD: Wiege bis Bahre.

Die Ökobilanz berücksichtigt die Rohstoffgewinnung, die Rohstofftransporte und die eigentliche

Produktherstellung inklusive der Berücksichtigung der Verpackungsmaterialien (Module A1-A3).
Der Transport zur Baustelle (Modul A4) sowie die Behandlung der Verpackungsmaterialien in Müllverbrennungsanlagen nach dem Einbau des Produktes (Modul A5) sind ebenfalls Teil der Systemgrenzen.
Nach Ablauf der Nutzungsdauer wird das Produkt rückgebaut (Modul C1). Nach dem Transport des rückgebauten Produktes (Modul C2) ist für 4 % der Ziegel eine Deponierung auf einer Inertstoffdeponie vorgesehen (Modul C4), 96 % können weiterverwertet werden. Gutschriften infolge des Recyclings von Ziegelbruch sind in Modul D deklariert. Gutschriften für Strom und thermische Energie infolge der thermischen Verwertung der Verpackung innerhalb des Moduls A5 werden ebenfalls in Modul D berücksichtigt.
Das Nutzungsstadium (Modul B1-B5) wird in dieser Studie berücksichtigt. Es entstehen keine Umweltauswirkungen in diesen Modulen.
Da sich die Module B6 und B7 auf den Betrieb des Gebäudes beziehen und die Nutzung des Produkts in keinem Zusammenhang mit dem betrieblichen Energieeinsatz und Wassereinsatz im Gebäude steht, sind diese Module nicht relevant für Hintermauerziegel und haben damit keine Umweltauswirkungen.

## Data sources
- GaBi Database (all versions)
- GaBi database SP20 2013
