# Pumice stone (SFK-4)

Dataset: ILCD process, EPD, generic dataset
Geography: DE
Reference year: 2021
Valid until: 2022
Classification: oekobau.dat: Mineralische Baustoffe / Steine und Elemente / Leichtbeton
Owner: Sphera Solutions GmbH
Compliance: EN 15804+A2
Review: Dependent internal review by Sphera Solutions GmbH; Independent external review by GaBi user forum
Amounts: rows without a unit in brackets have none in this file; such an amount is in the reference unit of its flow, which a separate flow dataset defines
copyright: true
licenseType: Free of charge for all users and uses
accessRestrictions: The license conditions as stated on https://www.oekobaudat.de/ apply.
accessRestrictions: Es gelten die Lizenzbedingungen wie sie auf https://www.oekobaudat.de/ genannt sind.

## General comment
This data set has been modeled according to the European Standard EN 15804+A2 for Sustainable Building. Results are depicted in modules that allow the structured expression of results over the entire life cycle.

## Geography
The data set represents the country specific situation in Germany, focusing on the main technologies, the region specific characteristics and / or import statistics.

## Time period
Annual average

## Technology and included processes
Main raw materials are pumice and cement. These are mixed with water, introduced into molds, compacted and then stored for curing. The LCA results are dominated by the use of cement.

In the disposal phase, a mechanical dismantling (excavator) is assumed in module C1. The transport in module C2 to the treatment plant takes place with a truck (50km). In module C3, the material is processed, any reinforcement is fed to a sink (no loads, no credits). A treatment loss of 25% was assumed. This loss is fed to an inert material landfill within Module C3 (average landfill emissions). In Module D, a credit for the net amount of material (excluding reinforcement and treatment losses) for the substitution of natural gravel as backfill material is given.

## Technical purpose
Pumice stones are usually used in the outer wall area using thin-bed mortar (indoor use is also possible). The masonry must be protected from weather conditions by additional layers (such as plaster and paint).

## Safety margin
20 %. Product system depicted except for a few missing processes / flows. Technological, temporal and geographic representativeness partly given.

## Reference product
- Pumice stone (SFK-4): 1

## Inputs
- Use of renewable primary energy as energy carrier (PERE) [MJ]: A1-A3 126.672, C1 0.225032, C2 1.96755, C3 11.9045, D -4.66113
- Use of renewable primary energy resources used as raw materials (PERM) [MJ]: A1-A3 0, C1 0, C2 0, C3 0, D 0
- Total use of renewable primary energy (PERT) [MJ]: A1-A3 126.672, C1 0.225032, C2 1.96755, C3 11.9045, D -4.66113
- Use of non renewable primary energy as energy carrier (PENRE) [MJ]: A1-A3 465.098, C1 3.87731, C2 33.9009, C3 106.947, D -17.1178
- Use of non renewable primary energy resources used as raw materials (PENRM) [MJ]: A1-A3 0, C1 0, C2 0, C3 0, D 0
- Total use of non renewable primary energy resource (PENRT) [MJ]: A1-A3 465.098, C1 3.87731, C2 33.9009, C3 106.947, D -17.1178
- Use of secondary material (SM) [kg]: A1-A3 0, C1 0, C2 0, C3 0, D 0
- Use of renewable secondary fuels (SF) [MJ]: A1-A3 4.42814, C1 0, C2 0, C3 0, D 0
- Use of non renewable secondary fuels (NRSF) [MJ]: A1-A3 81.3784, C1 0, C2 0, C3 0, D 0
- Net use of fresh water (FW) [m3]: A1-A3 0.111435, C1 0.000199998, C2 0.00174866, C3 0.0270497, D -0.00282558

## Outputs
- Hazardous waste disposed (HWD) [kg]: A1-A3 6.14582e-8, C1 1.62059e-10, C2 1.41695e-9, C3 8.7513e-9, D -2.75795e-9
- Non harzardous waste disposed (NHWD) [kg]: A1-A3 0.824223, C1 0.000625887, C2 0.00547238, C3 262.173, D -11.3673
- Radioactive waste disposed (RWD) [kg]: A1-A3 0.00905818, C1 3.72079e-6, C2 3.25324e-5, C3 0.000943022, D -0.00050484
- Components for re-use (CRU) [kg]: A1-A3 0, C1 0, C2 0, C3 0, D 0
- Materials for recycling (MFR) [kg]: A1-A3 0, C1 0, C2 0, C3 654.75, D 0
- Materials for energy recovery (MER) [kg]: A1-A3 0, C1 0, C2 0, C3 0, D 0
- Exported electrical energy (EEE) [MJ]: A1-A3 0, C1 0, C2 0, C3 0, D 0
- Exported thermal energy (EET) [MJ]: A1-A3 0, C1 0, C2 0, C3 0, D 0

## Impact indicators
- Global Warming Potential - total (GWP-total) [kg CO2 eq.]: A1-A3 79.1955, C1 0.290075, C2 2.57504, C3 6.78342, D -1.30427
- Global Warming Potential - fossil fuels (GWP-fossil) [kg CO2 eq.]: A1-A3 78.5145, C1 0.288134, C2 2.55756, C3 6.84566, D -1.29719
- Global Warming Potential - biogenic (GWP-biogenic) [kg CO2 eq.]: A1-A3 0.572901, C1 6.2435e-5, C2 0.00105944, C3 -0.0896828, D -0.00115685
- Global Warming Potential - land use and land use change (GWP-luluc) [kg CO2 eq.]: A1-A3 0.108147, C1 0.0018786, C2 0.0164253, C3 0.0274399, D -0.00592595
- Depletion potenzial of the stratospheric ozone layer (ODP) [kg CFC-11 eq.]: A1-A3 3.34495e-13, C1 7.48465e-17, C2 6.54413e-16, C3 2.84042e-14, D -1.67492e-14
- Acidifcation potential, Accumulated Exceedance (AP) [Mole of H+ eq.]: A1-A3 0.110092, C1 0.00387938, C2 0.00725127, C3 0.055073, D -0.00429629
- Eutrophication potential - freshwater (EP-freshwater) [kg P eq.]: A1-A3 7.5788e-5, C1 6.01587e-7, C2 5.25992e-6, C3 1.32345e-5, D -3.60949e-6
- Eutrophication potential - marine (EP-marine) [kg N eq.]: A1-A3 0.0418371, C1 0.00176487, C2 0.00334051, C3 0.0206122, D -0.00167093
- Eutrophication potential - terrestrial (EP-terrestrial) [Mole of N eq.]: A1-A3 0.461154, C1 0.019405, C2 0.0373742, C3 0.2265, D -0.0183948
- Photochemical Ozone Creation Potential (POCP) [kg NMVOC eq.]: A1-A3 0.115501, C1 0.00528559, C2 0.00651406, C3 0.0608169, D -0.00395211
- Abiotic depletion potential - non-fossil resources (ADPE) [kg Sb eq.]: A1-A3 7.32214e-6, C1 2.54446e-8, C2 2.22472e-7, C3 3.55221e-6, D -2.64929e-7
- Abiotic depletion potential - fossil resources (ADPF) [MJ]: A1-A3 465.043, C1 3.87715, C2 33.8995, C3 106.916, D -17.1144
- Water (user) deprivation potential (WDP) [m³ world equiv.]: A1-A3 3.31637, C1 0.0011371, C2 0.00994211, C3 0.908241, D -0.0316206

## Use advice
This dataset refers to 1 m³ unfilled pumice stone (hollow block) for the production of masonry. Bulk density 900 kg/m³, thermal conductivity 0,34 - 0,37 W/mK. Compressive strength 4 N/mm². The data set can be used for the approximate estimation of other stone bulk densities of 500 - 1300 kg/m³.

The data set represents a cradle to gate inventory. It can be used to characterise the supply chain situation of the respective commodity in a representative manner. Combination with individual unit processes using this commodity enables the generation of user-specific (product) LCAs.

## Data sources
- GaBi databases
- Documentation of data quality management
- GaBi Database Edition 2021, CUP2021.01
- GaBi database (all versions)
