# 3- and 5-layer solid wood panel (German average)

Dataset: ILCD process, EPD, representative dataset
Geography: DE
Reference year: 2021
Valid until: 2026
Classification: OEKOBAU.DAT: Holz / Holzwerkstoffe / 3- und 5-Schichtplatten
Method details: EN 15804; ILCD format
Generated by: Thünen-Institut für Holzforschung
Owner: Thünen-Institut für Holzforschung
Compliance: EN 15804+A2; EN 16485
Review: Independent external review by Dr. Frank Werner - Umwelt & Entwicklung
Amounts: rows without a unit in brackets have none in this file; such an amount is in the reference unit of its flow, which a separate flow dataset defines
copyright: true

## General comment
Further information on the declared unit and the inventory analysis based on manufacturer information (input and output of material and energy flows) are available for download as an Excel file within the section “background info”.
The data set was created in 2021 as an update with identical foreground system. All background data sets are taken from the GaBi Professional Database with content version 2021.1. The modeling and calculation of the life cycle assessment is based on the European standards EN 15804:2012+A2:2019 and EN 16485:2014. For questions, please contact holzundklima@thuenen.de.

## Geography
Für die Ökobilanzierung von Schicht-Massivholzplatten wurden Daten von 2 Werken berücksichtigt (Rüter & Diederichs 2012). Für alle in Rüter & Diederichs (2012) angeführten Vollholzprodukte wurden von 2009 bis 2011 insgesamt 178 Prozesslinien erfasst. Im Verhältnis zu den vom Statistischen Bundesamt gemeldeten Produktionsmengen im selben Zeitraum entspricht die erreichte Abdeckung von Vollholzprodukten aus Nadelschnittholz 38 %.

## Time period
The data set is based on production data from the years 2009 to 2011 (foreground system).
The background system was updated in 2021.

## Technology and included processes
Massivholzplatten sind in der Regel symmetrisch aufgebaut und bestehen aus drei oder fünf recht-winklig zueinander verklebten Lagen aus Nadelschnittholz. Die Plattendicke beträgt normalerweise zwischen 12 und 100 mm. Die Verklebung von Massivholzplatten wird vornehmlich mittels Melamin-Harnstoff-Formaldehyd-Bindemittel durchgeführt. Für die Herstellung von Massivholzplatten werden Bretter und Bohlen aus Nadelholz zunächst auf weniger als 15 % Holzfeuchte getrocknet, gehobelt und mittels Schmalseitenverklebung zu einer Einschichtplatte verklebt. Diese werden nach der Aushärtung gehobelt, beleimt und anschließend in der Presse kreuzweise angeordnet. Nach dem Pressen und Aushärten wird der Rohling gehobelt, gefast, abgebunden und verpackt.
Die Holzfeuchte des Produktes liegt bei 12%

## Technical purpose
Solid wood panels with a 3 or 5-layer structure are industrially manufactured flat wooden products, used for interior construction, furniture construction or within the building construction sector.

## Scenarios
- energetisch (Modul D): therm. Verwertung
- stofflich (Modul D): stoffl. Verwertung
- Entsorgung Verpackung (Modul A5): Das Modul A5 enthält ausschließlich die Entsorgung der Verpackungsmaterialien

## Reference product
- 3- und 5 Schichtplatte: 1

## Inputs
- Use of renewable primary energy (PERE) [MJ]: A1 360.464, A2 20.1168, A3 1751.31, A1-A3 2131.89, A5 (Entsorgung Verpackung) 0.0909782, C2 0.414532, C3 100.439, D (energetisch) 6036.25, D (stofflich) -28.3757
- Use of renewable primary energy resources used as raw materials (PERM) [MJ]: A1 8476.73, A2 0, A3 0, A1-A3 8476.73, A5 (Entsorgung Verpackung) 0, C2 0, C3 -8476.73, D (energetisch) 0, D (stofflich) 0
- Total use of renewable primary energy resources (PERT) [MJ]: A1 8837.2, A2 20.1168, A3 1751.31, A1-A3 10608.6, A5 (Entsorgung Verpackung) 0.0909782, C2 0.414532, C3 -8376.3, D (energetisch) 6036.25, D (stofflich) -28.3757
- Use of non renewable primary energy (PENRE) [MJ]: A1 599.608, A2 336.556, A3 1090.88, A1-A3 2027.05, A5 (Entsorgung Verpackung) 0.415303, C2 7.43784, C3 153.986, D (energetisch) -4464.09, D (stofflich) -144.231
- Use of non renewable primary energy resources used as raw materials (PENRM) [MJ]: A1 178.382, A2 0, A3 27.612, A1-A3 205.994, A5 (Entsorgung Verpackung) -27.612, C2 0, C3 -178.382, D (energetisch) 0, D (stofflich) 0
- Total use of non renewable primary energy resource (PENRT) [MJ]: A1 777.99, A2 336.556, A3 1118.49, A1-A3 2233.04, A5 (Entsorgung Verpackung) -27.1967, C2 7.43784, C3 -24.3956, D (energetisch) -4464.09, D (stofflich) -144.231
- Use of secondary material (SM) [kg]: A1 0, A2 0, A3 0, A1-A3 0, A5 (Entsorgung Verpackung) 0, C2 0, C3 0, D (energetisch) 0, D (stofflich) 511.709
- Use of renewable secondary fuels (RSF) [MJ]: A1 22.108, A2 0, A3 87.2794, A1-A3 109.387, A5 (Entsorgung Verpackung) 0, C2 0, C3 0, D (energetisch) 0, D (stofflich) 0
- Use of non renewable secondary fuels (NRSF) [MJ]: A1 0, A2 0, A3 0, A1-A3 0, A5 (Entsorgung Verpackung) 0, C2 0, C3 0, D (energetisch) 0, D (stofflich) 0
- Use of net fresh water (FW) [m3]: A1 0.133903, A2 0.0186483, A3 0.325433, A1-A3 0.477984, A5 (Entsorgung Verpackung) 0.00405376, C2 0.000474497, C3 0.0472656, D (energetisch) 0.942661, D (stofflich) -0.015899

## Outputs
- Hazardous waste disposed (HWD) [kg]: A1 7.50565e-7, A2 1.51562e-8, A3 1.9441e-6, A1-A3 2.70982e-6, A5 (Entsorgung Verpackung) 8.92981e-11, C2 3.74788e-10, C3 5.59893e-8, D (energetisch) -1.6194e-6, D (stofflich) -2.31556e-7
- Non hazardous waste dispose (NHWD) [kg]: A1 0.439758, A2 0.0541117, A3 1.85688, A1-A3 2.35075, A5 (Entsorgung Verpackung) 0.0224398, C2 0.0011049, C3 0.11997, D (energetisch) 12.0979, D (stofflich) -0.0390549
- Radioactive waste disposed (RWD) [kg]: A1 0.00943232, A2 0.000444486, A3 0.0826234, A1-A3 0.0925002, A5 (Entsorgung Verpackung) 1.10716e-5, C2 8.997e-6, C3 0.0123357, D (energetisch) -0.286265, D (stofflich) -0.00286369
- Components for re-use (CRU) [kg]: A1 0, A2 0, A3 0, A1-A3 0, A5 (Entsorgung Verpackung) 0, C2 0, C3 0, D (energetisch) 0, D (stofflich) 0
- Materials for recycling (MFR) [kg]: A1 0, A2 0, A3 0, A1-A3 0, A5 (Entsorgung Verpackung) 0, C2 0, C3 511.709, D (energetisch) 0, D (stofflich) 0
- Materials for energy recovery (MER) [kg]: A1 0, A2 0, A3 0, A1-A3 0, A5 (Entsorgung Verpackung) 0, C2 0, C3 511.709, D (energetisch) 0, D (stofflich) 0
- Exported electrical energy (EEE) [MJ]: A1 0, A2 0, A3 0.399238, A1-A3 0.399238, A5 (Entsorgung Verpackung) 2.52043, C2 0, C3 0, D (energetisch) 0, D (stofflich) 0
- Exported thermal energy (EET) [MJ]: A1 0, A2 0, A3 0.927477, A1-A3 0.927477, A5 (Entsorgung Verpackung) 5.83316, C2 0, C3 0, D (energetisch) 0, D (stofflich) 0

## Impact indicators
- Global Warming Potential - total (GWP-total) [kg CO2-Äqv.]: A1 -763.89, A2 25.1403, A3 88.6932, A1-A3 -650.057, A5 (Entsorgung Verpackung) 0.872381, C2 0.536654, C3 818.566, D (energetisch) -247.944, D (stofflich) -11.1651
- Global Warming Potential - fossil fuels (GWP-fossil) [kg CO2-Äqv.]: A1 42.5381, A2 25.1403, A3 88.6932, A1-A3 156.372, A5 (Entsorgung Verpackung) 0.872381, C2 0.536654, C3 12.138, D (energetisch) -247.944, D (stofflich) -11.1651
- Global Warming Potential - biogenic (GWP-biogenic) [kg CO2-Äqv.]: A1 -806.428, A2 0, A3 0, A1-A3 -806.428, A5 (Entsorgung Verpackung) 0, C2 0, C3 806.428, D (energetisch) 0, D (stofflich) 0
- Depletion potential of the stratospheric ozone layer (ODP) [kg CFC 11-Äquiv.]: A1 2.904e-13, A2 9.18133e-15, A3 8.73514e-12, A1-A3 9.03473e-12, A5 (Entsorgung Verpackung) 3.69821e-16, C2 7.12915e-17, C3 4.15483e-13, D (energetisch) -9.63917e-12, D (stofflich) -9.50668e-14
- Acidification potential, Accumulated Exceedance (AP) [mol H+ eqv.]: A1 0.193707, A2 0.144952, A3 0.380696, A1-A3 0.719356, A5 (Entsorgung Verpackung) 0.00038401, C2 0.00323989, C3 0.0174679, D (energetisch) -0.302867, D (stofflich) -0.0646757
- Eutrophication potential - freshwater (EP-freshwater) [kg P eqv.]: A1 8.77361e-5, A2 5.77511e-5, A3 0.000400095, A1-A3 0.000545583, A5 (Entsorgung Verpackung) 6.01242e-8, C2 1.65645e-6, C3 5.08852e-5, D (energetisch) -0.00118301, D (stofflich) -2.72706e-5
- Eutrophication potential - marine (EP-marine) [kg N eqv.]: A1 0.112777, A2 0.0713414, A3 0.153637, A1-A3 0.337755, A5 (Entsorgung Verpackung) 0.000107411, C2 0.00158749, C3 0.00558653, D (energetisch) -0.109923, D (stofflich) -0.0308454
- Eutrophication potential - terrestrial (EP-terrestrial) [mol N eqv.]: A1 0.972133, A2 0.789564, A3 1.70422, A1-A3 3.46592, A5 (Entsorgung Verpackung) 0.00178433, C2 0.0175708, C3 0.0583261, D (energetisch) -0.863363, D (stofflich) -0.339653
- Versauerungspotenzial, kumulierte Überschreitung (AP) [kg NMVOC eqv.]: A1 0.248434, A2 0.134137, A3 0.459574, A1-A3 0.842145, A5 (Entsorgung Verpackung) 0.000280091, C2 0.00299392, C3 0.0138795, D (energetisch) -0.273905, D (stofflich) -0.0797928
- Abiotic depletion potential - non-fossil resources (ADPE) [kg Sb-Äqv.]: A1 9.42804e-6, A2 2.17497e-6, A3 3.85158e-5, A1-A3 5.01188e-5, A5 (Entsorgung Verpackung) 5.37505e-9, C2 4.24811e-8, C3 4.98206e-6, D (energetisch) -0.000120486, D (stofflich) -1.81457e-6
- Abiotic depletion potential - fossil resources (ADPF) [MJ]: A1 777.927, A2 336.44, A3 1090.55, A1-A3 2204.91, A5 (Entsorgung Verpackung) 0.415192, C2 7.42793, C3 153.938, D (energetisch) -4641.38, D (stofflich) -144.215
- Water (user) deprivation potential (WDP) [m3 world eqv.]: A1 0.133903, A2 0.0186483, A3 0.325433, A1-A3 0.477984, A5 (Entsorgung Verpackung) 0.00405376, C2 0.000474497, C3 0.0472656, D (energetisch) 0.942661, D (stofflich) -0.015899
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
## Use advice
Der Datensatz bildet die durchschnittlichen Produktionsverhältnisse und die damit verbundenen Umweltwirkungen repräsentativ für Deutschland ab. Liegen keine herstellerspezifischen Ökobilanzergebnisse des verwendeten Produkts vor, empfiehlt sich die Verwendung dieses Durchschnittsdatensatzes.

## Data sources
- Rüter S, Diederichs S (2012) Ökobilanz Basisdaten für Bauprodukte aus Holz, Hamburg, Johann Heinrich von Thünen Institut, Institut für Holztechnologie und Holzbiologie, Abschlussbericht
- GaBi database (general)
