# BauderTHERMOFOL U / M

Dataset: ILCD process, EPD, average dataset
Geography: DE
Reference year: 2016
Valid until: 2021
Classification: OEKOBAU.DAT: Kunststoffe / Dachbahnen / PVC-Dachbahnen
Classification: IBUCategories: 02 Bauprodukte / Abdichtungen / Dach- und Dichtungsbahnsysteme aus Kunststoffen und Elastomeren
Method details: Dach- und Dichtungsbahnsysteme aus Kunststoffen und Elastomeren.pdf
Owner: Paul Bauder GmbH & Co. KG
Compliance: DIN EN 15804; ISO 14025
Review: Accredited third party review by IBU
Amounts: rows without a unit in brackets have none in this file; such an amount is in the reference unit of its flow, which a separate flow dataset defines
copyright: true

## General comment
BauderTHERMOFOL are PVC-P-based synthetic roofing and waterproofing sheets reinforced with synthetic fibres. The product range comprises the following variants:

## Technology and included processes
PVC-P roofing and waterproofing sheets are manufactured in a dual-stage process. In a first step, the raw materials are blended and plasticised on an extruder. The synthetic mass is rolled out into foil on a calander. In a second step, the foils are reinforced with polyester fabric in the centre. Some PVC-P roofing and waterproofing sheets feature special fleece lamination on the underside. After cooling and final edge trimming, the products are packed. All production waste incurred is recycled in-plant and redirected to the manufacturing process.
Declared unit:
The declared unit is 1 m² average THERMOFOL roofing U (12/15/18/20/24), U (15/18/20) V and M (12/15/18/20) variants, mechanically fastened or fastened under load, sealed using hot air, including packaging materials.

## Technical purpose
PVC-P roofing and waterproofing sheets are applied in single layers and hot air-welded at the seams. They are safeguarded against wind suction by mechanical fastening, ballasting or adhesion.

Roof waterproofing

Single-layer waterproofing of flat and inclined used and unused roofs

Building waterproofing

Single-layer waterproofing of non-waterproof buildings and components against ground damp and non-pressurised water

Depending on the respective requirements, BauderTHERMOFOL roofing and waterproofing sheets are:

· fastened mechanically,

· laid under load or · adhered.

Application rules

Directive (EU) No. 305/2011 applies for placing the product on the market in the EU/EFTA (with the exception of Switzerland). The products require a Declaration of Performance taking consideration of /EN 13956/ and/or /EN 13967/, and CE marking.

Use in Germany is governed by the respective national regulations.

For roofing sheets

Application standard /DIN V 20000-201/:

· BauderTHERMOFOL U 12/15/18/20/24

DE/E1 PVC-P-NB-V-PG-1.2 (1.5/1.8/2.0/2.4)

· BauderTHERMOFOL U 15/18/20 V

DE/E1 PVC-P-NB-V-PG-K-KV-1.5 (1.8/2.0)

· BauderTHERMOFOL M 12/15/18/20

DE/E1 PVC-P-NB-V-PG-1.2 (1.5/1.8/2.0)

For waterproofing sheets

Application standard /DIN V 20000-202/:

· BauderTHERMOFOL U 12/15/18/20/24

BA PVC-P-NB-V-PG-1.2 (1.5/1.8/2.0/2.4)

· BauderTHERMOFOL U 15/18/20 V

BA PVC-P-NB-V-PG-K-KV-1.5 (1.8/2.0)

## Scenarios
- S1: Recycling
- S2: Incineration

## Reference product
- 1 m² BauderTHERMOFOL U (12/15/18/20/24), U (15/18/20) V und M (12/15/18/20): 1

## Inputs
- Erneuerbare Primärenergie als Energieträger (PERE) [MJ]: A1-A3 7.75, A4 0.0491, A5 0.484, C2 (S1) 0.0184, C2 (S2) 0.00643, C3 (S1) 0.0601, C3 (S2) 1.33, D (S1) -5.94, D (S2) -0.104
- Erneuerbare Primärenergie zur stofflichen Nutzung (PERM) [MJ]: A1-A3 1.46, A4 0, A5 0, C2 (S1) 0, C2 (S2) 0, C3 (S1) 0, C3 (S2) 0, D (S1) 0, D (S2) 0
- Total erneuerbare Primärenergie (PERT) [MJ]: A1-A3 9.22, A4 0.0491, A5 0.484, C2 (S1) 0.0184, C2 (S2) 0.00643, C3 (S1) 0.0601, C3 (S2) 1.33, D (S1) -5.94, D (S2) -0.104
- Nicht-erneuerbare Primärenergie als Energieträger (PENRE) [MJ]: A1-A3 81.3, A4 0.867, A5 1.79, C2 (S1) 0.325, C2 (S2) 0.113, C3 (S1) 0.215, C3 (S2) 8.63, D (S1) -86.7, D (S2) -19.8
- Nicht-erneuerbare Primärenergie zur stofflichen Nutzung (PENRM) [MJ]: A1-A3 43.2, A4 0, A5 0, C2 (S1) 0, C2 (S2) 0, C3 (S1) 0, C3 (S2) 0, D (S1) 0, D (S2) 0
- Total nicht erneuerbare Primärenergie (PENRT) [MJ]: A1-A3 124, A4 0.867, A5 1.79, C2 (S1) 0.325, C2 (S2) 0.113, C3 (S1) 0.215, C3 (S2) 8.63, D (S1) -86.7, D (S2) -19.8
- Einsatz von Sekundärstoffen (SM) [kg]: A1-A3 0.0805, A4 0, A5 0, C2 (S1) 0, C2 (S2) 0, C3 (S1) 0, C3 (S2) 0, D (S1) 0, D (S2) 0
- Erneuerbare Sekundärbrennstoffe (RSF) [MJ]: A1-A3 0, A4 0, A5 0, C2 (S1) 0, C2 (S2) 0, C3 (S1) 0, C3 (S2) 0, D (S1) 0, D (S2) 0
- Nicht erneuerbare Sekundärbrennstoffe (NRSF) [MJ]: A1-A3 0, A4 0, A5 0, C2 (S1) 0, C2 (S2) 0, C3 (S1) 0, C3 (S2) 0, D (S1) 0, D (S2) 0
- Einsatz von Süßwasserressourcen (FW) [m^3]: A1-A3 1.86, A4 0.000123, A5 0.00108, C2 (S1) 4.62e-5, C2 (S2) 1.61e-5, C3 (S1) 9.27e-5, C3 (S2) 0.00933, D (S1) -0.0148, D (S2) -0.000691

## Outputs
- Gefährlicher Abfall zur Deponie (HWD) [kg]: A1-A3 7.31e-5, A4 0, A5 0, C2 (S1) 0, C2 (S2) 0, C3 (S1) 0, C3 (S2) 0, D (S1) 0, D (S2) 0
- Entsorgter nicht gefährlicher Abfall (NHWD) [kg]: A1-A3 0.259, A4 7.29e-5, A5 0.0318, C2 (S1) 2.74e-5, C2 (S2) 9.53e-6, C3 (S1) 0.000129, C3 (S2) 2.79, D (S1) -0.0323, D (S2) -0.00225
- Entsorgter radioaktiver Abfall (RWD) [kg]: A1-A3 0.00205, A4 1.24e-6, A5 0.000257, C2 (S1) 4.65e-7, C2 (S2) 1.62e-7, C3 (S1) 3.24e-5, C3 (S2) 0.000329, D (S1) -0.00254, D (S2) -2.45e-5
- Komponenten für die Wiederverwendung (CRU) [kg]: A1-A3 0, A4 0, A5 0, C2 (S1) 0, C2 (S2) 0, C3 (S1) 0, C3 (S2) 0, D (S1) 0, D (S2) 0
- Stoffe zum Recycling (MFR) [kg]: A1-A3 0, A4 0, A5 0, C2 (S1) 0, C2 (S2) 0, C3 (S1) 1.67, C3 (S2) 0, D (S1) 0, D (S2) 0
- Stoffe für die Energierückgewinnung (MER) [kg]: A1-A3 0, A4 0, A5 0.0792, C2 (S1) 0, C2 (S2) 0, C3 (S1) 0, C3 (S2) 1.86, D (S1) 0, D (S2) 0
- Exportierte elektrische Energie (EEE) [MJ]: A1-A3 0, A4 0, A5 0.164, C2 (S1) 0, C2 (S2) 0, C3 (S1) 0, C3 (S2) 4.09, D (S1) 0, D (S2) 0
- Exportierte thermische Energie (EET) [MJ]: A1-A3 0, A4 0, A5 0.46, C2 (S1) 0, C2 (S2) 0, C3 (S1) 0, C3 (S2) 11.5, D (S1) 0, D (S2) 0

## Impact indicators
- Globales Erwärmungspotenzial (GWP) [kg CO_(2)-Äq.]: A1-A3 5.18, A4 0.0632, A5 0.242, C2 (S1) 0.0237, C2 (S2) 0.00827, C3 (S1) 0.0123, C3 (S2) 4.5, D (S1) -3.44, D (S2) -1.22
- Abbau Potential der stratosphärischen Ozonschicht (ODP) [kg CFC11-Äq.]: A1-A3 7.59e-8, A4 2.88e-13, A5 6.86e-11, C2 (S1) 1.08e-13, C2 (S2) 3.77e-14, C3 (S1) 8.74e-12, C3 (S2) 2.7e-11, D (S1) -9.53e-10, D (S2) -1.23e-12
- Versauerungspotenzial von Boden und Wasser (AP) [kg SO_(2)-Äq.]: A1-A3 0.0167, A4 0.000273, A5 0.000345, C2 (S1) 0.000147, C2 (S2) 5.14e-5, C3 (S1) 3.43e-5, C3 (S2) 0.006, D (S1) -0.00544, D (S2) -0.000837
- Eutrophierungspotenzial (EP) [kg PO_(4)^(3)-Äq.]: A1-A3 0.0142, A4 6.69e-5, A5 2.88e-5, C2 (S1) 3.69e-5, C2 (S2) 1.29e-5, C3 (S1) 3.07e-6, C3 (S2) 0.000206, D (S1) -0.0008, D (S2) -0.000126
- Bildungspotential für troposphärisches Ozon (POCP) [kg Ethen-Äq.]: A1-A3 0.00281, A4 -9.34e-5, A5 2.09e-5, C2 (S1) -6.17e-5, C2 (S2) -2.15e-5, C3 (S1) 2.36e-6, C3 (S2) 0.00013, D (S1) -0.00228, D (S2) -0.000155
- Potenzial für den abiotischen Abbau nicht fossiler Ressourcen (ADPE) [kg Sb-Äq.]: A1-A3 0.0131, A4 4.17e-9, A5 5.19e-8, C2 (S1) 1.57e-9, C2 (S2) 5.46e-10, C3 (S1) 3.82e-9, C3 (S2) 1.97e-6, D (S1) -1.42e-5, D (S2) -6.14e-8
- Potenzial für den abiotischen Abbau fossiler Brennstoffe (ADPF) [MJ]: A1-A3 118, A4 0.864, A5 1.14, C2 (S1) 0.324, C2 (S2) 0.113, C3 (S1) 0.133, C3 (S2) 7.8, D (S1) -80.3, D (S2) -19.8

## Use advice
Scope:
This document is valid for the following PVC-P roofing and waterproofing sheet systems:

· BauderTHERMOFOL U (12/15/18/20/24)

· BauderTHERMOFOL U (15/18/20) V

· BauderTHERMOFOL M (12/15/18/20)

manufactured in the German BAUDER production plant in Bernsdorf.
This document is translated from the German Environmental Product Declaration into English. It is based on the German original version EPD-BAU-20160220-IBC1-DE. The verifier has no influence on the quality of the translation.
System boundary:
Type of EPD: cradle to plant gate (with options)

In accordance with EN 15804, Modules A1-5, C2-3 and D are applied. The following items were considered when drawing up the LCA:

Module A1-3

All upstream chains associated with the raw materials used and procurement transport thereof Production processes including energy and waste flows (cradle to plant gate) Waste incurred is considered until it reaches End of Waste status.

Module A4-5

Transport to the construction site and average installation effort (hot air-welding and cuttings incurred) Recycling the packaging material

Fastening material is not a component of the product system under review. Reference should be made to the respective EPD in line with the product or material used (metal/plastic).

Module C2-1

Transport within the framework of the recycling route

Module C2-2

Transport within the framework of the incineration route

Module C3-1

Material utilisation (recycling) of the product including processing effort

Module C3-2

Thermal utilisation (incineration in an incineration plant) to reduce the volume of waste for landfilling

Modules D-1 and D-2

Credits arising from waste treatment in Modules A5, C3-1 and C3-2

## Data sources
- BauderTHERMOFOL.pdf
- GaBi Database (all versions)
- GaBi database SP28 2015
