# Pumice gravel; grain size 4/16

Dataset: ILCD process, EPD, generic dataset
Geography: DE
Reference year: 2018
Valid until: 2022
Classification: oekobau.dat: Mineralische Baustoffe / Zuschläge / Bims
Owner: thinkstep
Compliance: DIN EN 15804
Review: Dependent internal review by thinkstep, IABP-GaBi, IBP-GaBi; Independent external review by GaBi user forum, GaBi bug forum, GaBi user community
Amounts: rows without a unit in brackets have none in this file; such an amount is in the reference unit of its flow, which a separate flow dataset defines
copyright: true

## General comment
This data set has been modeled according to the European Standard EN 15804 for Sustainable Building. Results are depicted in modules that allow the structured expression of results over the entire life cycle.

## Geography
The data set represents the country specific situation in Germany, focusing on the main technologies, the region specific characteristics and / or import statistics.

## Time period
Annual average

## Technology and included processes
The loose, gravelly pumice stone is extracted from an open cast mine. Following the degradation, a processing machine subdivides the raw pumice into different mineral size classes. Firstly, the machine disposes of all metallic matter using a magnet. Then a primary sieve separates the raw pumice into two groups and each group has its own processing sequence. The grains larger than 2 mm are fed into a sieve jigger in which the raw pumice is separated into two quality grades on an impulse-driven water bed. The lighter, floating high-grade pumice is separated in a complex, 3-step process in which the light as well as the heavier parts with poor insulating properties are removed. In a separate processing of the fine material (= 2 mm), the pumice with a high purity level in this fraction can be separated from the heavier sand. The water required for this process is sent to its own reservoir where it is clarified and recirculated. Foreign bodies from the separation processes such as grit and sand can be used in road-building or can be used as abrasives.
Background system:
Electricity: Electricity is modelled according to the individual country-specific situations. The country-specific modelling is achieved on multiple levels. Firstly, individual energy carrier specific power plants and plants for renewable energy sources are modelled according to the current national electricity grid mix. Modelling the electricity consumption mix includes transmission / distribution losses and the own use by energy producers (own consumption of power plants and "other" own consumption e.g. due to pumped storage hydro power etc.), as well as imported electricity. Secondly, the national emission and efficiency standards of the power plants are modelled as well as the share of electricity plants and combined heat and power plants (CHP). Thirdly, the country-specific energy carrier supply (share of imports and / or domestic supply) including the country-specific energy carrier properties (e.g. element and energy content) are accounted for. Fourthly, the exploration, mining/production, processing and transport processes of the energy carrier supply chains are modelled according to the specific situation of each electricity producing country. The different production and processing techniques (emissions and efficiencies) in the different energy producing countries are considered, e.g. different crude oil production technologies or different flaring rates at the oil platforms.
Thermal energy, process steam: The thermal energy and process steam supply is modelled according to the individual country-specific situation with regard to emission standards and considered energy carriers. The thermal energy and process steam are produced at heat plants. Efficiencies for thermal energy production are by definition 100% in relation to the corresponding energy carrier input. For process steam the efficiency ranges from 85%, 90% to 95%. The energy carriers used for the generation of thermal energy and process steam are modelled according to the specific import situation (see electricity above).
Transports: All relevant and known transport processes are included. Ocean-going and inland ship transport as well as rail, truck and pipeline transport of bulk commodities are considered.
Energy carriers: The energy carriers are modelled according to the specific supply situation (see electricity above).
Refinery products: Diesel fuel, gasoline, technical gases, fuel oils, lubricants and residues such as bitumen are modelled with a parameterised country-specific refinery model. The refinery model represents the current national standard in refining techniques (e.g. emission level, internal energy consumption, etc.) as well as the individual country-specific product output spectrum, which can be quite different from country to country. The supply of crude oil is modelled, again, according to the country-specific situation with the respective properties of the resources.

## Technical purpose
This product can be used in construction.

## Safety margin
10 %. Product system almost completely covered. Good technological, temporal and geographic representativeness.

## Reference product
- Pumice gravel: 1

## Inputs
- Use of renewable primary energy (PERE) [MJ]: A1-A3 0.0154359
- Primary energy resources used as raw materials (PERM) [MJ]: A1-A3 0
- Total use of renewable primary energy resources (PERT) [MJ]: A1-A3 0.0154359
- Use of non-renewable primary energy (PENRE) [MJ]: A1-A3 0.117455
- Non-renewable primary energy resources used as raw materials (PENRM) [MJ]: A1-A3 0
- Total use of non-renewable primary energy resources (PENRT) [MJ]: A1-A3 0.117455
- Input of secondary material (SM) [kg]: A1-A3 0
- Use of renewable secondary fuels (RSF) [MJ]: A1-A3 0
- Use of non renewable secondary fuels (NRSF) [MJ]: A1-A3 0
- Use of net fresh water (FW) [m3]: A1-A3 9.92528e-6

## Outputs
- Hazardous waste disposed (HWD) [kg]: A1-A3 3.87026e-9
- Non-hazardous waste disposed (NHWD) [kg]: A1-A3 7.04808e-5
- Radioactive waste disposed (RWD) [kg]: A1-A3 1.25129e-6
- Components for re-use (CRU) [kg]: A1-A3 0
- Materials for Recycling (MFR) [kg]: A1-A3 0
- Material for Energy Recovery (MER) [kg]: A1-A3 0
- Exported electrical energy (EEE) [MJ]: A1-A3 0
- Exported thermal energy (EET) [MJ]: A1-A3 0

## Impact indicators
- Global warming potential (GWP) [kg CO2 eq.]: A1-A3 0.00871442
- Ozone Depletion Potential (ODP) [kg R11 eq.]: A1-A3 5.47905e-17
- Acidification potential (AP) [kg SO2 eq.]: A1-A3 5.488e-5
- Eutrophication potential (EP) [kg Phosphate eq.]: A1-A3 1.41211e-5
- Photochemical Ozone Creation Potential (POCP) [kg Ethene eq.]: A1-A3 -4.21734e-6
- Abiotic depletion potential for non fossil resources (ADPE) [kg Sb eq.]: A1-A3 1.14127e-9
- Abiotic depletion potential for fossil resources (ADPF) [MJ]: A1-A3 0.114293

## Use advice
The data set represents a cradle to gate inventory. It can be used to characterise the supply chain situation of the respective commodity in a representative manner. Combination with individual unit processes using this commodity enables the generation of user-specific (product) LCAs.

## Data sources
- Ökologische Bilanzierung von Baustoffen und Gebäuden, 2000
- Ganzheitliche Bilanzierung von Baustoffen und Gebäuden: Kurzbericht Bimsbaustoffe, 1996
- GaBi Database Edition 2020, SP40
- GaBi database (all versions)
