# Calcium sulfate screed

Dataset: ILCD process, EPD, generic dataset
Geography: DE
Reference year: 2021
Valid until: 2022
Classification: oekobau.dat: Mineralische Baustoffe / Mörtel und Beton / Estrich trocken
Owner: Sphera Solutions GmbH
Compliance: EN 15804+A2
Review: Dependent internal review by Sphera Solutions GmbH; Independent external review by GaBi user forum
Amounts: rows without a unit in brackets have none in this file; such an amount is in the reference unit of its flow, which a separate flow dataset defines
copyright: true
licenseType: Free of charge for all users and uses
accessRestrictions: The license conditions as stated on https://www.oekobaudat.de/ apply.
accessRestrictions: Es gelten die Lizenzbedingungen wie sie auf https://www.oekobaudat.de/ genannt sind.

## General comment
This data set has been modeled according to the European Standard EN 15804+A2 for Sustainable Building. Results are depicted in modules that allow the structured expression of results over the entire life cycle.

## Geography
The data set represents the country specific situation in Germany, focusing on the main technologies, the region specific characteristics and / or import statistics.

## Time period
Annual average

## Technology and included processes
Calcium sulfate screed is a mixture of various binding agents, aggregates and additives. The finely ground aggregates and the binding agents have a relevant impact on the LCA. Both dry and fresh screed were considered (50/50 mix), with only the dry matter being balanced for the LCA.

In the disposal phase, a manual dismantling (no loads) is assumed in module C1. The transport in module C2 to the landfill site takes place with a truck (50km). In C3, if relevant, a packaging with PE foil is taken into account (for example, for mineral fiber products. 0.0125 kg foil per kg of discarded material). In module C4 the average landfill emissions corresponding to the product (reference country Germany) are shown. The use of landfill gas is not taken into account.

## Technical purpose
Calcium sulfate screed is used as leveling and base layer in the floor structure. Frequently, calcium sulfate screed is used as floating screed, which allows seamless laying without additional effort for compacting or smoothing.

## Safety margin
10 %. Product system almost completely covered. Good technological, temporal and geographic representativeness.

## Reference product
- Calcium sulfate screed: 1

## Inputs
- Use of renewable primary energy as energy carrier (PERE) [MJ]: A1-A3 0.153529, C2 0.00250352, C4 0.0298181
- Use of renewable primary energy resources used as raw materials (PERM) [MJ]: A1-A3 0, C2 0, C4 0
- Total use of renewable primary energy (PERT) [MJ]: A1-A3 0.153529, C2 0.00250352, C4 0.0298181
- Use of non renewable primary energy as energy carrier (PENRE) [MJ]: A1-A3 1.53082, C2 0.0431358, C4 0.220791
- Use of non renewable primary energy resources used as raw materials (PENRM) [MJ]: A1-A3 0, C2 0, C4 0
- Total use of non renewable primary energy resource (PENRT) [MJ]: A1-A3 1.53082, C2 0.0431358, C4 0.220791
- Use of secondary material (SM) [kg]: A1-A3 0, C2 0, C4 0
- Use of renewable secondary fuels (SF) [MJ]: A1-A3 0, C2 0, C4 0
- Use of non renewable secondary fuels (NRSF) [MJ]: A1-A3 0, C2 0, C4 0
- Net use of fresh water (FW) [m3]: A1-A3 0.000793979, C2 2.22501e-6, C4 5.43855e-5

## Outputs
- Hazardous waste disposed (HWD) [kg]: A1-A3 3.37701e-10, C2 1.80294e-12, C4 2.34898e-11
- Non harzardous waste disposed (NHWD) [kg]: A1-A3 0.0182815, C2 6.9631e-6, C4 1.10108
- Radioactive waste disposed (RWD) [kg]: A1-A3 2.21074e-5, C2 4.13944e-8, C4 2.27928e-6
- Components for re-use (CRU) [kg]: A1-A3 0, C2 0, C4 0
- Materials for recycling (MFR) [kg]: A1-A3 0, C2 0, C4 0
- Materials for energy recovery (MER) [kg]: A1-A3 0, C2 0, C4 0
- Exported electrical energy (EEE) [MJ]: A1-A3 0, C2 0, C4 0
- Exported thermal energy (EET) [MJ]: A1-A3 0, C2 0, C4 0

## Impact indicators
- Global Warming Potential - total (GWP-total) [kg CO2 eq.]: A1-A3 0.109153, C2 0.00328302, C4 0.0162553
- Global Warming Potential - fossil fuels (GWP-fossil) [kg CO2 eq.]: A1-A3 0.108672, C2 0.00326065, C4 0.0166455
- Global Warming Potential - biogenic (GWP-biogenic) [kg CO2 eq.]: A1-A3 0.000413379, C2 1.47059e-6, C4 -0.000439177
- Global Warming Potential - land use and land use change (GWP-luluc) [kg CO2 eq.]: A1-A3 6.73851e-5, C2 2.08997e-5, C4 4.89387e-5
- Depletion potenzial of the stratospheric ozone layer (ODP) [kg CFC-11 eq.]: A1-A3 5.73055e-16, C2 8.3268e-19, C4 6.53135e-17
- Acidifcation potential, Accumulated Exceedance (AP) [Mole of H+ eq.]: A1-A3 0.000222219, C2 1.02241e-5, C4 0.000118483
- Eutrophication potential - freshwater (EP-freshwater) [kg P eq.]: A1-A3 1.242e-7, C2 6.69276e-9, C4 2.80155e-8
- Eutrophication potential - marine (EP-marine) [kg N eq.]: A1-A3 6.67227e-5, C2 4.77293e-6, C4 3.07591e-5
- Eutrophication potential - terrestrial (EP-terrestrial) [Mole of N eq.]: A1-A3 0.000728363, C2 5.32938e-5, C4 0.00033794
- Photochemical Ozone Creation Potential (POCP) [kg NMVOC eq.]: A1-A3 0.000181798, C2 9.20431e-6, C4 9.32028e-5
- Abiotic depletion potential - non-fossil resources (ADPE) [kg Sb eq.]: A1-A3 7.37076e-8, C2 2.83075e-10, C4 1.57775e-9
- Abiotic depletion potential - fossil resources (ADPF) [MJ]: A1-A3 1.53068, C2 0.043134, C4 0.220674
- Water (user) deprivation potential (WDP) [m³ world equiv.]: A1-A3 0.0293265, C2 1.26504e-5, C4 0.00178142

## Use advice
This dataset refers to the production of 1 kg calcium sulfate screed. The bulk density is 1500 kg/m³. The compressive strength depends on the specific construction. The dataset can be used approximately for the estimation of bulk densities of 1400 - 1600 kg.

The data set represents a cradle to gate inventory. It can be used to characterise the supply chain situation of the respective commodity in a representative manner. Combination with individual unit processes using this commodity enables the generation of user-specific (product) LCAs.

## Data sources
- GaBi databases
- Documentation of data quality management
- GaBi Database Edition 2021, CUP2021.01
- GaBi database (all versions)
