# Flachglas - Guardian - Verbundsicherheitsglas (VSG); 1 m² Fläche, 1 mm Dicke

Dataset: ILCD process, EPD, specific dataset
Geography: EU-27
Reference year: 2016
Valid until: 2021
Classification: OEKOBAU.DAT: Komponenten von Fenstern und Vorhangfassaden / Füllungen / Transparente Füllungen
Method details: EPD Unbeschichtetes Flachglas, Verbundsicherheitsglas und beschichtetes Flachglas; Produktkategorieregeln Teil A; Produktkategorieregeln Teil B – für Flachglas im Bauwesen
Owner: Guardian Europe S.à r.l.
Compliance: EN 15804
Review: Independent external review by Patrick Wortner
Amounts: rows without a unit in brackets have none in this file; such an amount is in the reference unit of its flow, which a separate flow dataset defines
copyright: true

## General comment
A1-A3. Das Umweltprofil beinhaltet die Aufwendungen für die Lebenszyklus-Stadien cradle to gate mit Optionen (Modul A1-A3).

## Geography
Dieser Datensatz repräsentiert die Situation des Unternehmens Guardian Europe S.à r.l., Luxembourg im Hinblick auf die wichtigsten Technologien und die gesetzlichen Rahmenbedingungen.

## Time period
jährlicher Durchschnitt

## Technology and included processes
Die Ökobilanzergebnisse umfassen die Lebenszyklusstadien für die Herstellung der Vorprodukte bis hin zur Rohstoffgewinnung und Verarbeitungsprozesse von als Input dienenden Sekundärstoffen (z.B. Recyclingprozesse), deren Transporte zum Werk sowie die Produktion selbst, einschließlich der Bereitstellung von allen Hilfs- und Betriebsstoffen, Energie, sowie die vollständige Abfallbehandlung oder die Deponierung der Restabfälle während des Stadiums der Produktion. Die Module A1, A2 und A3 sind hier als ein aggregiertes Modul A1-A3 ausgewiesen. Falls für diesen Datensatz weitere Module berechnet wurden, sind diese separat zu finden und können für eine Betrachtung des gesamten Lebenszyklus zusammengeführt werden.

## Technical purpose
Unbeschichtetes Flachglas, Verbundsicherheitsglas und beschichtetes Flachglas für die Weiterverarbeitung zu Mehrscheiben-Isolierglas sowie Anwendungen als Glas für das Bauwesen und anderen Bauwerken (Buskabinen, Schallschutzpanele…)
Verbundsicherheitsglas besteht aus min. zwei übereinander liegenden Flachglasscheiben (unbeschichtet und/oder beschichtet) sowie einer oder mehreren Lagen einer reißfesten und zähelastischen Folie zwischen den Glasscheiben, welche üblicherweise aus Polyvinyl-Butyral (PVB) besteht.

## Reference product
- Flachglas - Guardian - Verbundsicherheitsglas (VSG): 1

## Inputs
- Use of net fresh water (FW) [m3]: A1-A3 0.01
- Use of non renewable primary energy (PENRE) [MJ]: A1-A3 38.01
- Use of non renewable primary energy resources used as raw materials (PENRM) [MJ]: A1-A3 4.81
- Use of non renewable secondary fuels (NRSF) [MJ]: A1-A3 0.00522
- Use of renewable primary energy (PERE) [MJ]: A1-A3 2.39
- Use of renewable primary energy resources used as raw materials (PERM) [MJ]: A1-A3 0
- Use of renewable secondary fuels (RSF) [MJ]: A1-A3 0.000392
- Use of secondary material (SM) [kg]: A1-A3 0
- Total use of non renewable primary energy resource (PENRT) [MJ]: A1-A3 42.82
- Total use of renewable primary energy resources (PERT) [MJ]: A1-A3 2.39

## Outputs
- Components for re-use (CRU) [kg]: A1-A3 0
- Exported electrical energy (EEE) [MJ]: A1-A3 0
- Exported thermal energy (EET) [MJ]: A1-A3 0
- Hazardous waste disposed (HWD) [kg]: A1-A3 1.23e-7
- Materials for energy recovery (MER) [kg]: A1-A3 0
- Materials for recycling (MFR) [kg]: A1-A3 0.000284
- Non hazardous waste dispose (NHWD) [kg]: A1-A3 0.14
- Radioactive waste disposed (RWD) [kg]: A1-A3 0.00104

## Impact indicators
- Abiotic depletion potential for non fossil resources (ADPE) [kg Sb-Äqv.]: A1-A3 2.27e-5
- Abiotic depletion potential for fossil resources (ADPF) [MJ]: A1-A3 40.2
- Acidification potential of soil and water (AP) [kg SO2-Äqv.]: A1-A3 0.01
- Eutrophication potential (EP) [kg Phosphat-Äqv.]: A1-A3 0.00104
- Global warming potential (GWP) [kg CO2-Äqv.]: A1-A3 2.78
- Depletion potential of the stratospheric ozone layer (ODP) [kg CFC 11 eq.]: A1-A3 3.65e-10
- Formation potential of tropospheric ozone (POCP) [kg Ethen-Äqv.]: A1-A3 0.000583

## Use advice
Dieser Datensatz beinhaltet die Ergebnisse für die Module A1-A3 gemäß EN 15804. Ein Vergleich mit anderen Produkten ist nur mit einer vergleichbaren Anwendung im Gebäude zulässig. Grundsätzlich ist eine Gegenüberstellung oder die Bewertung von EPD Daten nur möglich, wenn alle zu vergleichenden Datensätze nach EN 15804 erstellt wurden und der Gebäudekontext, bzw. die produktspezifischen Leistungsmerkmale berücksichtigt werden.

## Review details
Die angewendete LCI Methode ist in Übereinstimmung mit ISO 14040 und 14044. Die Dokumentation enthält alle relevanten Informationen im Hinblick auf die Datenqualität und den Umfang der Anwendung der jeweiligen LCI Ergebnisse bzw. der Datensätze. Der Datensatz repräsentiert den Stand der Technik bezogen auf die funktionelle Einheit.

## Data sources
- GaBi database (all versions)
