# Synthetic resin screed

Dataset: ILCD process, EPD, generic dataset
Geography: DE
Reference year: 2021
Valid until: 2022
Classification: oekobau.dat: Mineralische Baustoffe / Mörtel und Beton / Estrich trocken
Owner: Sphera Solutions GmbH
Compliance: EN 15804+A2
Review: Dependent internal review by Sphera Solutions GmbH; Independent external review by GaBi user forum
Amounts: rows without a unit in brackets have none in this file; such an amount is in the reference unit of its flow, which a separate flow dataset defines
copyright: true
licenseType: Free of charge for all users and uses
accessRestrictions: The license conditions as stated on https://www.oekobaudat.de/ apply.
accessRestrictions: Es gelten die Lizenzbedingungen wie sie auf https://www.oekobaudat.de/ genannt sind.

## General comment
This data set has been modeled according to the European Standard EN 15804+A2 for Sustainable Building. Results are depicted in modules that allow the structured expression of results over the entire life cycle.

## Geography
The data set represents the country specific situation in Germany, focusing on the main technologies, the region specific characteristics and / or import statistics.

## Time period
Annual average

## Technology and included processes
Synthetic resin screed is a mixture of sand and epoxy resin in a mass ratio of about 25:1. The use of epoxy resin has a significant impact on the LCA results.

In the disposal phase, a manual dismantling (no loads) is assumed in module C1. The transport in module C2 to the landfill site takes place with a truck (50km). In C3, if relevant, a packaging with PE foil is taken into account (for example, for mineral fiber products. 0.0125 kg foil per kg of discarded material). In module C4 the average landfill emissions corresponding to the product (reference country Germany) are shown. The use of landfill gas is not taken into account.

## Technical purpose
Synthetic resin screed is used as leveling and base layer in the floor structure. Fast readiness for covering (after approx. 24 hours).

## Safety margin
20 %. Product system depicted except for a few missing processes / flows. Technological, temporal and geographic representativeness partly given.

## Reference product
- Synthetic resin screed: 1

## Inputs
- Use of renewable primary energy as energy carrier (PERE) [MJ]: A1-A3 0.660427, C2 0.00273112, C4 0.0325289
- Use of renewable primary energy resources used as raw materials (PERM) [MJ]: A1-A3 0, C2 0, C4 0
- Total use of renewable primary energy (PERT) [MJ]: A1-A3 0.660427, C2 0.00273112, C4 0.0325289
- Use of non renewable primary energy as energy carrier (PENRE) [MJ]: A1-A3 6.55319, C2 0.0470572, C4 0.240862
- Use of non renewable primary energy resources used as raw materials (PENRM) [MJ]: A1-A3 0, C2 0, C4 0
- Total use of non renewable primary energy resource (PENRT) [MJ]: A1-A3 6.55319, C2 0.0470572, C4 0.240862
- Use of secondary material (SM) [kg]: A1-A3 0, C2 0, C4 0
- Use of renewable secondary fuels (SF) [MJ]: A1-A3 0, C2 0, C4 0
- Use of non renewable secondary fuels (NRSF) [MJ]: A1-A3 0, C2 0, C4 0
- Net use of fresh water (FW) [m3]: A1-A3 0.00172382, C2 2.42728e-6, C4 5.93297e-5

## Outputs
- Hazardous waste disposed (HWD) [kg]: A1-A3 1.26461e-9, C2 1.96684e-12, C4 2.56252e-11
- Non harzardous waste disposed (NHWD) [kg]: A1-A3 0.00492796, C2 7.59611e-6, C4 1.20118
- Radioactive waste disposed (RWD) [kg]: A1-A3 8.24629e-5, C2 4.51576e-8, C4 2.48649e-6
- Components for re-use (CRU) [kg]: A1-A3 0, C2 0, C4 0
- Materials for recycling (MFR) [kg]: A1-A3 0, C2 0, C4 0
- Materials for energy recovery (MER) [kg]: A1-A3 0, C2 0, C4 0
- Exported electrical energy (EEE) [MJ]: A1-A3 0, C2 0, C4 0
- Exported thermal energy (EET) [MJ]: A1-A3 0, C2 0, C4 0

## Impact indicators
- Global Warming Potential - total (GWP-total) [kg CO2 eq.]: A1-A3 0.335586, C2 0.00358134, C4 0.017773
- Global Warming Potential - fossil fuels (GWP-fossil) [kg CO2 eq.]: A1-A3 0.32838, C2 0.00355707, C4 0.0181588
- Global Warming Potential - biogenic (GWP-biogenic) [kg CO2 eq.]: A1-A3 0.00693205, C2 1.47059e-6, C4 -0.000439177
- Global Warming Potential - land use and land use change (GWP-luluc) [kg CO2 eq.]: A1-A3 0.000273634, C2 2.27997e-5, C4 5.33877e-5
- Depletion potenzial of the stratospheric ozone layer (ODP) [kg CFC-11 eq.]: A1-A3 2.67148e-15, C2 9.08378e-19, C4 7.12511e-17
- Acidifcation potential, Accumulated Exceedance (AP) [Mole of H+ eq.]: A1-A3 0.000475904, C2 1.11536e-5, C4 0.000129255
- Eutrophication potential - freshwater (EP-freshwater) [kg P eq.]: A1-A3 1.67079e-6, C2 7.30119e-9, C4 3.05624e-8
- Eutrophication potential - marine (EP-marine) [kg N eq.]: A1-A3 0.000180139, C2 5.20684e-6, C4 3.35553e-5
- Eutrophication potential - terrestrial (EP-terrestrial) [Mole of N eq.]: A1-A3 0.00195996, C2 5.81387e-5, C4 0.000368662
- Photochemical Ozone Creation Potential (POCP) [kg NMVOC eq.]: A1-A3 0.000568896, C2 1.00411e-5, C4 0.000101676
- Abiotic depletion potential - non-fossil resources (ADPE) [kg Sb eq.]: A1-A3 5.19582e-8, C2 3.08809e-10, C4 1.72118e-9
- Abiotic depletion potential - fossil resources (ADPF) [MJ]: A1-A3 6.55187, C2 0.0470553, C4 0.240735
- Water (user) deprivation potential (WDP) [m³ world equiv.]: A1-A3 0.0385588, C2 1.38005e-5, C4 0.00194337

## Use advice
This dataset refers to the production of 1 kg synthetic resin screed. The density is 1800 kg/m³. Thermal conductivity 1.2 W/mK, the compressive strength is 25 N/mm² depending on the specific structure. The data set can be used approximately for the estimation of bulk densities of 1600 - 2000 kg.

The data set represents a cradle to gate inventory. It can be used to characterise the supply chain situation of the respective commodity in a representative manner. Combination with individual unit processes using this commodity enables the generation of user-specific (product) LCAs.

## Data sources
- GaBi databases
- Documentation of data quality management
- GaBi Database Edition 2021, CUP2021.01
- GaBi database (all versions)
