# Sun protection (metal blinds)

Dataset: ILCD process, EPD, generic dataset
Geography: DE
Reference year: 2021
Valid until: 2022
Classification: oekobau.dat: Komponenten von Fenstern und Vorhangfassaden / Füllungen / Opake Füllungen
Owner: Sphera Solutions GmbH
Compliance: EN 15804+A2
Review: Dependent internal review by Sphera Solutions GmbH; Independent external review by GaBi user forum
Amounts: rows without a unit in brackets have none in this file; such an amount is in the reference unit of its flow, which a separate flow dataset defines
copyright: true
licenseType: Free of charge for all users and uses
accessRestrictions: The license conditions as stated on https://www.oekobaudat.de/ apply.
accessRestrictions: Es gelten die Lizenzbedingungen wie sie auf https://www.oekobaudat.de/ genannt sind.

## General comment
This data set has been modeled according to the European Standard EN 15804+A2 for Sustainable Building. Results are depicted in modules that allow the structured expression of results over the entire life cycle.

## Geography
The data set represents the country specific situation in Germany, focusing on the main technologies, the region specific characteristics and / or import statistics.

## Time period
Annual average

## Technology and included processes
Foreground system
The system boundaries comprise the cradle to gate life cycle of this sun protection. The LCI dataset consider a window size of 240 x 160 cm. Extruded and powder coated aluminium is used for producing the blinds and the tracks. A 2 kg motor of 200W is also included to allow the movement of the blinds. Transportation processes for the raw materials are accounted for as far as data on average transport distances were available. All relevant energy and energy flow are included in the system. Life cycle impacts of production equipment and infrastructure were not included in the system as no evidence could be justified that these are to any extent relevant and thus fell under the cut-off criteria. In mass production the impact of production equipment and infrastructure normally is in orders of magnitude lower than the impacts of material and energy supply.

In the disposal phase, mechanical dismantling is accounted for in module C1 for steel products (excavator), for all other metals a manual dismantling is assumed (no loads). Collecting losses are neglected. It is assumed that all metals reach the end of the waste status immediately after dismantling. This means that the loads for processing and the credits for the substitution of primary material are shown in Module D.
The transport in module C2 to the treatment plant takes place with a truck (50km).
Module D includes loads for sorting, remelting, slag treatment, landfill, filtration of dusts and dross treatment. Credits are given for the net scrap amount (amount returned minus secondary material content, minus processing losses) for the average material mix (from different alloys).

## Technical purpose
This product can be used in construction.

## Safety margin
10 %. Product system almost completely covered. Good technological, temporal and geographic representativeness.

## Reference product
- Sun protection (metal blinds): 1

## Inputs
- Use of renewable primary energy as energy carrier (PERE) [MJ]: A1-A3 99.5349, C1 0.000119413, C2 0.00457109, D -54.843
- Use of renewable primary energy resources used as raw materials (PERM) [MJ]: A1-A3 0, C1 0, C2 0, D 0
- Total use of renewable primary energy (PERT) [MJ]: A1-A3 99.5349, C1 0.000119413, C2 0.00457109, D -54.843
- Use of non renewable primary energy as energy carrier (PENRE) [MJ]: A1-A3 320.504, C1 0.00205749, C2 0.07876, D -174.044
- Use of non renewable primary energy resources used as raw materials (PENRM) [MJ]: A1-A3 0, C1 0, C2 0, D 0
- Total use of non renewable primary energy resource (PENRT) [MJ]: A1-A3 320.504, C1 0.00205749, C2 0.07876, D -174.044
- Use of secondary material (SM) [kg]: A1-A3 0, C1 0, C2 0, D 0
- Use of renewable secondary fuels (SF) [MJ]: A1-A3 0, C1 0, C2 0, D 0
- Use of non renewable secondary fuels (NRSF) [MJ]: A1-A3 0, C1 0, C2 0, D 0
- Net use of fresh water (FW) [m3]: A1-A3 0.180105, C1 1.06128e-7, C2 4.06256e-6, D -0.117846

## Outputs
- Hazardous waste disposed (HWD) [kg]: A1-A3 4.25194e-8, C1 8.59964e-14, C2 3.29191e-12, D 1.89481e-8
- Non harzardous waste disposed (NHWD) [kg]: A1-A3 4.86421, C1 3.32126e-7, C2 1.27137e-5, D -2.959
- Radioactive waste disposed (RWD) [kg]: A1-A3 0.0210836, C1 1.97443e-9, C2 7.55805e-8, D -0.0131365
- Components for re-use (CRU) [kg]: A1-A3 0, C1 0, C2 0, D 0
- Materials for recycling (MFR) [kg]: A1-A3 0, C1 2.281, C2 0, D 0
- Materials for energy recovery (MER) [kg]: A1-A3 0, C1 0, C2 0, D 0
- Exported electrical energy (EEE) [MJ]: A1-A3 0, C1 0, C2 0, D 0
- Exported thermal energy (EET) [MJ]: A1-A3 0, C1 0, C2 0, D 0

## Impact indicators
- Global Warming Potential - total (GWP-total) [kg CO2 eq.]: A1-A3 23.7288, C1 0.000153931, C2 0.00598267, D -13.4557
- Global Warming Potential - fossil fuels (GWP-fossil) [kg CO2 eq.]: A1-A3 23.6275, C1 0.000152898, C2 0.00594183, D -13.426
- Global Warming Potential - biogenic (GWP-biogenic) [kg CO2 eq.]: A1-A3 0.0889126, C1 3.61429e-8, C2 2.6851e-6, D -0.0272791
- Global Warming Potential - land use and land use change (GWP-luluc) [kg CO2 eq.]: A1-A3 0.0123911, C1 9.96875e-7, C2 3.816e-5, D -0.00238775
- Depletion potenzial of the stratospheric ozone layer (ODP) [kg CFC-11 eq.]: A1-A3 3.03107e-13, C1 3.97172e-20, C2 1.52036e-18, D 3.592e-12
- Acidifcation potential, Accumulated Exceedance (AP) [Mole of H+ eq.]: A1-A3 0.0832572, C1 2.05859e-6, C2 1.68464e-5, D -0.0490338
- Eutrophication potential - freshwater (EP-freshwater) [kg P eq.]: A1-A3 7.57249e-5, C1 3.19231e-10, C2 1.22201e-8, D -4.01695e-6
- Eutrophication potential - marine (EP-marine) [kg N eq.]: A1-A3 0.0148521, C1 9.36526e-7, C2 7.7608e-6, D -0.00771536
- Eutrophication potential - terrestrial (EP-terrestrial) [Mole of N eq.]: A1-A3 0.153595, C1 1.02972e-5, C2 8.68292e-5, D -0.084018
- Photochemical Ozone Creation Potential (POCP) [kg NMVOC eq.]: A1-A3 0.0426046, C1 2.80479e-6, C2 1.51337e-5, D -0.0234113
- Abiotic depletion potential - non-fossil resources (ADPE) [kg Sb eq.]: A1-A3 0.000278421, C1 1.35021e-11, C2 5.16856e-10, D -1.01198e-6
- Abiotic depletion potential - fossil resources (ADPF) [MJ]: A1-A3 320.17, C1 0.0020574, C2 0.0787567, D -173.791
- Water (user) deprivation potential (WDP) [m³ world equiv.]: A1-A3 5.02888, C1 6.03399e-7, C2 2.30979e-5, D -0.763486

## Use advice
The data set represents a cradle to gate inventory. It can be used to characterise the supply chain situation of the respective commodity in a representative manner. Combination with individual unit processes using this commodity enables the generation of user-specific (product) LCAs.

## Data sources
- Documentation of data quality management
- GaBi Database Edition 2021, CUP2021.01
- GaBi database (all versions)
