# Laminat-Fußbodenbeläge

Dataset: ILCD process, EPD, average dataset
Geography: DE
Reference year: 2019
Valid until: 2024
Classification: OEKOBAU.DAT: Holz / Holzböden / Laminat
Classification: IBUCategories: 02 Bauprodukte / Bodenbeläge / Bodenbeläge
Method details: Bodenbeläge.pdf
Registration number: EPD-PAR-20180193-IBC1-DE
Owner: Parador GmbH
Compliance: DIN EN 15804; ISO 14025
Review: Accredited third party review by Institut Bauen und Umwelt e. V.
Amounts: rows without a unit in brackets have none in this file; such an amount is in the reference unit of its flow, which a separate flow dataset defines
copyright: true

## General comment
Parador Laminatböden gehören zur Gruppe der Hartbodenelemente, zeichnen sich durch eine hochabriebfeste Deckschicht aus und können durch eine patentierte Klickverbindung schwimmend, also ohne Verklebung, verlegt werden. Eine individuelle Optik wird durch das bedruckte und imprägnierte Dekorpapier erreicht. Eine spezielle Herstellungsweise verleiht der Oberfläche eine entsprechende Struktur. Die Laminatböden sind in verschiedenen Dielenformaten erhältlich, die an den Längs- wie Kopfkanten mit einer hochpräzisen Klickverbindung profiliert sind. Die fertigen Dielen werden zum Schutz vor Beschädigung vom Werk aus in Kartons und Folie verpackt. Alle am Standort Coesfeld produzierten Laminat-Bodenbeläge fließen mit deren jeweiligen Produktionsanteilen in die Durchschnittsbildung mit ein.

## Technology and included processes
Abbildung des Direct Pressed Laminate (DPL) – Herstellungsprozesses: Die Materialien Overlay, Dekorpapier, Trägerplatte (HDF) und der Gegenzug werden in einem Arbeitsschritt in einer Kurztaktpresse thermisch miteinander verpresst. Durch eine unumkehrbare Polykondensationsreaktion während der Verpressung wird das Imprägnierharz (Melamin-Harnstoff-Formaldehyd) unter Wärmezuführung dreidimensional vernetzt. Die chemisch stabilen Bindemittel sind somit fest im Holz gebunden. Nach dem Verpressen werden die Halbformate klimatisiert. Nach der Klimatisierungszeit werden diese Halbformate entsprechend der verschiedenen Produktformate aufgetrennt und mit einem Längs- und Querprofil versehen. Nach der Qualitätskontrolle der einzelnen Laminatbodenelemente werden diese in Halbschalen-Kartons abgepackt und in Schrumpffolie verpackt. Diese einzelnen Verpackungseinheiten werden entsprechend der unterschiedlichen Formate auf Paletten gestapelt. Alle Prozesse werden im Rahmen der werkseigenen Factory Production Control (FPC) kontinuierlich überprüft und dokumentiert.
Deklarierte Einheit:
Die deklarierte Einheit ist 1 m2 (ein Quadratmeter) des nach der Produktionsmenge gewichteten Mittels der Laminat-Fußbodenbeläge inklusive Verpackungsmaterialien.

## Technical purpose
Laminatböden sind zur schwimmenden Verlegung im Innenbereich in Neubauten wie auch für Renovierungen geeignet. Dabei können sie neben Estrich auch auf anderen mineralischen Unterböden, Holz oder PVC verlegt werden. Die Grundsätze ordnungsgemäßer Verlegung können einer mitgelieferten Verlegeanleitung bzw. der Broschüre "/Indoor Ratgeber Laminat/" entnommen werden.

## Reference product
- Laminat-Fußbodenbeläge: 1

## Inputs
- Erneuerbare Primärenergie als Energieträger (PERE) [MJ]: A1-A3 6.53433, A4 0.21852, A5 1.54076, C2 0.033359, C3 142.842, D -12.438
- Erneuerbare Primärenergie zur stofflichen Nutzung (PERM) [MJ]: A1-A3 144.376, A4 0, A5 -1.53367, C2 0, C3 -142.842, D 0
- Total erneuerbare Primärenergie (PERT) [MJ]: A1-A3 150.91, A4 0.21852, A5 0.0070861, C2 0.033359, C3 0.49957, D -12.438
- Nicht-erneuerbare Primärenergie als Energieträger (PENRE) [MJ]: A1-A3 129.558, A4 4.5556, A5 0.63704, C2 0.48744, C3 3.7533, D -63.901
- Nicht-erneuerbare Primärenergie zur stofflichen Nutzung (PENRM) [MJ]: A1-A3 0.592274, A4 0, A5 -0.592274, C2 0, C3 0, D 0
- Total nicht erneuerbare Primärenergie (PENRT) [MJ]: A1-A3 130.15, A4 4.5556, A5 0.044766, C2 0.48744, C3 3.7533, D -63.901
- Einsatz von Sekundärstoffen (SM) [kg]: A1-A3 0, A4 0, A5 0, C2 0, C3 0, D 0
- Erneuerbare Sekundärbrennstoffe (RSF) [MJ]: A1-A3 0, A4 0, A5 0, C2 0, C3 0, D 0
- Nicht erneuerbare Sekundärbrennstoffe (NRSF) [MJ]: A1-A3 0, A4 0, A5 0, C2 0, C3 0, D 0
- Einsatz von Süßwasserressourcen (FW) [m^3]: A1-A3 1.8391, A4 0.00025458, A5 0.00046316, C2 3.8486e-5, C3 0.030822, D -0.016958

## Outputs
- Gefährlicher Abfall zur Deponie (HWD) [kg]: A1-A3 1.3339e-7, A4 1.9941e-7, A5 7.0239e-11, C2 3.1043e-8, C3 2.1183e-9, D -2.6074e-8
- Entsorgter nicht gefährlicher Abfall (NHWD) [kg]: A1-A3 0.05378, A4 0.0002538, A5 0.0032566, C2 3.825e-5, C3 0.0287, D -0.027563
- Entsorgter radioaktiver Abfall (RWD) [kg]: A1-A3 0.0066687, A4 6.638e-6, A5 2.756e-6, C2 7.6728e-7, C3 0.00019901, D -0.0054684
- Komponenten für die Wiederverwendung (CRU) [kg]: A1-A3 0, A4 0, A5 0, C2 0, C3 0, D 0
- Stoffe zum Recycling (MFR) [kg]: A1-A3 0, A4 0, A5 0, C2 0, C3 0, D 0
- Stoffe für die Energierückgewinnung (MER) [kg]: A1-A3 0, A4 0, A5 0, C2 0, C3 0, D 0
- Exportierte elektrische Energie (EEE) [MJ]: A1-A3 0, A4 0, A5 0.28, C2 0, C3 25.14, D 0
- Exportierte thermische Energie (EET) [MJ]: A1-A3 1.651, A4 0, A5 0.51, C2 0, C3 46.39, D 0

## Impact indicators
- Globales Erwärmungspotenzial (GWP) [kg CO_(2)-Äq.]: A1-A3 -5.2721, A4 0.34921, A5 0.16948, C2 0.035914, C3 13.496, D -3.6488
- Abbau Potential der stratosphärischen Ozonschicht (ODP) [kg CFC11-Äq.]: A1-A3 4.4453e-7, A4 8.802e-15, A5 3.9355e-15, C2 9.7812e-16, C3 2.8444e-13, D -8.0225e-12
- Versauerungspotenzial von Boden und Wasser (AP) [kg SO_(2)-Äq.]: A1-A3 0.019598, A4 0.0044463, A5 2.9174e-5, C2 0.00021457, C3 0.0044293, D -0.0061791
- Eutrophierungspotenzial (EP) [kg PO_(4)^(3)-Äq.]: A1-A3 0.0066825, A4 0.00059519, A5 5.611e-6, C2 5.4734e-5, C3 0.0011054, D -0.00066663
- Bildungspotential für troposphärisches Ozon (POCP) [kg Ethen-Äq.]: A1-A3 0.0053593, A4 -0.00019863, A5 1.9981e-6, C2 -9.6937e-5, C3 0.00028265, D -0.00048227
- Potenzial für den abiotischen Abbau nicht fossiler Ressourcen (ADPE) [kg Sb-Äq.]: A1-A3 3.0883e-6, A4 2.7804e-8, A5 2.8651e-9, C2 3.849e-9, C3 1.4067e-7, D -1.0416e-6
- Potenzial für den abiotischen Abbau fossiler Brennstoffe (ADPF) [MJ]: A1-A3 105.29, A4 4.5387, A5 0.037818, C2 0.48548, C3 3.2516, D -50.119

## Use advice
Gültigkeitsbereich:
Die vorliegende EPD gilt für die Produktion der Laminat-Fußbodenbeläge in dem deutschen Produktionswerk der Parador GmbH in Coesfeld. Dabei wurden alle im Zeitraum 01.01. - 31.12.2017 gefertigten Produkttypen berücksichtigt.
Systemgrenze:
Typ der EPD: Wiege bis Werkstor - mit Optionen. Die Systemgrenzen umfassen für Modul A1-3 alle

Rohstoffgewinnungsprozesse, sowohl für die Stoff- als auch für die Energieflüsse, die von der Wiege bis zum Werkstor eingesetzt werden, deren Weiterverarbeitung zu Vor- und Zwischenprodukten bis zur Herstellung der Laminat-Fußbodenbeläge.

Module A4 und A5 beinhalten den Transport und die Installation des Bauprodukts auf der Baustelle sowie die Entsorgung der Verpackungsabfälle.

Die Module C2 und C3 umfassen den Transport und die energetische Verwertung des Produkts im End of Life.

## Data sources
- Laminat-Fußbodenbeläge.pdf
- GaBi Database (all versions)
- GaBi database SP35 2018
