# MAX Compactplatten

Dataset: ILCD process, EPD, specific dataset
Geography: GLO
Reference year: 2019
Valid until: 2024
Classification: OEKOBAU.DAT: Komposite / Systembauteile / Aussenwände
Classification: IBUCategories: 02 Bauprodukte / Fassaden / Schichtpressstoffe
Method details: Schichtpressstoffe.pdf
Registration number: EPD-FMX-20190036-IBA2-DE
Owner: thinkstep GmbH
Compliance: DIN EN 15804; ISO 14025
Review: Accredited third party review by Institut Bauen und Umwelt e. V.
Amounts: rows without a unit in brackets have none in this file; such an amount is in the reference unit of its flow, which a separate flow dataset defines
copyright: true

## General comment
FunderMax Compactplatten sind dekorative Hochdruck-Schichtpressstoffplatten (HPL) nach /EN 438 Teil 4/ (MAX Compact Interior) und /EN 438 Teil 6/ (MAX Compact Exterior) für die Verwendung als Wand- und Deckenbekleidung sowie als Möbelplatte in der Innen- und Außenanwendung.

Dekorative Hochdruck-Schichtpressstoffplatten werden aus Zellulose-Faserstoffbahnen und härtbaren Harzen gefertigt. Sie können in unterschiedlichen Farben und Mustern in verschiedenen Oberflächenstrukturen produziert werden.

MAX Compact Interior und MAX Compact Exterior können auf Unterkonstruktionen aus Metall und Holz geklebt, geschraubt oder genietet werden. Darüber hinaus ist eine Vielzahl weitere Befestigungs- und Verbindungsmittel anwendbar.

## Technology and included processes
Dekorative Hochdruck-Schichtpressstoffplatten HPL nach EN 438, bestehend aus dekorativen Oberflächenschichten und Kernschichten, die durch ein Hochdruckverfahren miteinander verbunden werden. Typische Werte für das Hochdruckverfahren sind eine Temperatur von ≥ 120 °C und ein Druck von ≥ 5 MPa. Oberflächenschicht : oberste dekorative Lage aus einer oder mehreren Lagen eines faserhaltigen Materials (in der Regel Papier),imprägniert mit aminoplastischen, wärmehärtbaren Harzen (in der Regel Melaminharze) oder anderen härtbaren Harzen, eventuell mit geeigneter Außenschicht oder Beschichtung zur Verbesserung der Eigenschaften im Hinblick auf Wetter-und Lichtbeständigkeit Kernschicht faserhaltiges Material (in der Regel Papier), imprägniert mit wärmehärtbaren Harzen (in der Regel Phenolharze) oder anderen geeigneten härtbaren Harzen
Technische Daten:
Für die Leistungswerte des Produkts gelten die Daten der Leistungserklärung.
Deklarierte Einheit:
Die deklarierte Einheit ist ein Quadratmeter FunderMax Compactplatte (8,21 mm Dicke und circa 1450 kg/m3 Dichte).

Gemäß PCR, besteht die deklarierte Einheit aus einer Compactplatte (ohne Verpackung) mit einem Flächengewicht von 11,9 kg/m2.

Die Verpackung und Transport der Verpackung ist bilanziert aber nicht Teil der deklarierten Einheit.

## Technical purpose
Compactplatten können sowohl im privaten als auch öffentlichen Bereich eingesetzt werden. Sie sind besonders geeignet für den Wohnbereich, Krankenhäuser, öffentliche Gebäude, Bahnhöfe und Flughäfen, für den öffentlichen Verkehr, Hotels, Schulen, Geschäftsräume, Sportstätten und industrielle Anwendungen. Die speziellen Eigenschaften erlauben den Einsatz von HPL im Innenbereich als Wandverkleidung, Geländerfüllungen, Möbel, Tische, Säulenverkleidungen, Laboreinrichtungen, Kabinen, Decken, Fensterbänke, Arbeitsplatten, Geschäftspulte, Waschtische, usw.

## Reference product
- Compactplatte: 1

## Inputs
- Erneuerbare Primärenergie als Energieträger (PERE) [MJ]: A1-A3 141, C3 1.23, D -10.2
- Erneuerbare Primärenergie zur stofflichen Nutzung (PERM) [MJ]: A1-A3 134, C3 0, D 0
- Total erneuerbare Primärenergie (PERT) [MJ]: A1-A3 275, C3 1.23, D -10.2
- Nicht-erneuerbare Primärenergie als Energieträger (PENRE) [MJ]: A1-A3 404, C3 16, D -149
- Nicht-erneuerbare Primärenergie zur stofflichen Nutzung (PENRM) [MJ]: A1-A3 135, C3 0, D 0
- Total nicht erneuerbare Primärenergie (PENRT) [MJ]: A1-A3 539, C3 16, D -149
- Einsatz von Sekundärstoffen (SM) [kg]: A1-A3 0, C3 0, D 0
- Erneuerbare Sekundärbrennstoffe (RSF) [MJ]: A1-A3 0, C3 0, D 0
- Nicht erneuerbare Sekundärbrennstoffe (NRSF) [MJ]: A1-A3 0, C3 0, D 0
- Einsatz von Süßwasserressourcen (FW) [m^3]: A1-A3 0.127, C3 0.0579, D -0.0139

## Outputs
- Gefährlicher Abfall zur Deponie (HWD) [kg]: A1-A3 4.99e-6, C3 3.34e-8, D -5.44e-8
- Entsorgter nicht gefährlicher Abfall (NHWD) [kg]: A1-A3 1.75, C3 1.19, D -0.0358
- Entsorgter radioaktiver Abfall (RWD) [kg]: A1-A3 0.00673, C3 0.00026, D -0.00442
- Komponenten für die Wiederverwendung (CRU) [kg]: A1-A3 0, C3 0
- Stoffe zum Recycling (MFR) [kg]: A1-A3 0, C3 0
- Stoffe für die Energierückgewinnung (MER) [kg]: A1-A3 0, C3 11.9
- Exportierte elektrische Energie (EEE) [MJ]: A1-A3 0, C3 0, D -12.6
- Exportierte thermische Energie (EET) [MJ]: A1-A3 0, C3 0, D -110

## Impact indicators
- Globales Erwärmungspotenzial (GWP) [kg CO_(2)-Äq.]: A1-A3 20.9, C3 18.9, D -8.74
- Abbau Potential der stratosphärischen Ozonschicht (ODP) [kg CFC11-Äq.]: A1-A3 1.29e-10, C3 2.95e-13, D -6.44e-12
- Versauerungspotenzial von Boden und Wasser (AP) [kg SO_(2)-Äq.]: A1-A3 0.0437, C3 0.0172, D -0.00828
- Eutrophierungspotenzial (EP) [kg PO_(4)^(3)-Äq.]: A1-A3 0.00976, C3 0.00452, D -0.00112
- Bildungspotential für troposphärisches Ozon (POCP) [kg Ethen-Äq.]: A1-A3 0.00533, C3 0.0011, D -0.000896
- Potenzial für den abiotischen Abbau nicht fossiler Ressourcen (ADPE) [kg Sb-Äq.]: A1-A3 1.01e-5, C3 2.32e-6, D -1.1e-6
- Potenzial für den abiotischen Abbau fossiler Brennstoffe (ADPF) [MJ]: A1-A3 522, C3 15.3, D -138

## Use advice
Gültigkeitsbereich:
Die Ökobilanz beruht auf den Daten des Geschäftsjahres 2017 und wurde im Werk Wiener Neudorf erhoben.
Systemgrenze:
Es handelt sich um eine EPD vom Typ: "Wiege bis Werkstor, – mit Optionen". Diese Ökobilanz adressiert die Lebenszyklusstadien A1– A3, C3 und D gemäß /EN15804/.

Das Produktstadium umfasst die Produktion aller notwendigen Rohstoffe inklusive aller Vorketten sowie der CO2-Aufnahme der Rohstoffe (Holzwachstum durch Photosynthese). Die weiteren Prozesse sind die Produktion der Compactplatte inklusive der Energiebereitstellung unter Berücksichtigung der entsprechenden Vorketten. Alle notwendigen dazugehörigen Transporte der Roh- und Hilfsstoffe sind in der Ökobilanz berücksichtigt.

In Modul C3 werden die Emission des im Produkt gebundenen biogenen CO2 aufgeführt, damit wird innerhalb des Produktsystems die CO2-Neutralität sichergestellt.

Nach der Nutzung wird das Produkt in einer Mullverbrennungsanlage entsorgt welche thermische Energie und Elektrizität erzeugt. Daraus entstehende Wirkungen sind in Modul C3 deklariert und die potentielle Energiesubstitution wird in Modul D deklariert.

## Data sources
- MAX Compactplatten.pdf
- GaBi Database (all versions)
- GaBi database SP39 2019
