# Parthos Operable wall

Dataset: ILCD process, EPD, specific dataset
Geography: NL
Reference year: 2018
Valid until: 2023
Classification: OEKOBAU.DAT: Komposite / Systembauteile / Innenwände
Classification: IBUCategories: 02 Bauprodukte / Raumtrennsysteme / Raumtrennsysteme
Method details: Raumtrennsysteme.pdf
Generated by: brands and values GmbH
Registration number: EPD-PAR-20180063-IBC1-DE
Owner: Parthos Deutschland GmbH
Compliance: DIN EN 15804; ISO 14025
Review: Accredited third party review by Institut Bauen und Umwelt e. V.
Amounts: rows without a unit in brackets have none in this file; such an amount is in the reference unit of its flow, which a separate flow dataset defines
copyright: true
licenseType: Free of charge for all users and uses
accessRestrictions: None

## General comment
The operable wall Palace 110SI is a non-supporting internal wall, acoustically doubled on both sides. It comprises individual, wall-high elements which are mounted in a track system using one or two trolleys. The elements can be moved independently of each other. Depending on the design of the track system, this makes it possible to realise a wide variety of room partition options.

Depending on the respective design, various levels of sound insulation are achieved. By using acoustically effective surfaces, sound insulation values can also be achieved in accordance with requirements.

## Technology and included processes
The elements are manufactured in a type of series production at several work stations, each of which is equipped with the respective requirements. The vertical profiles are cut to size and punched as required. The upper and lower sealing profiles are compiled using prefabricated moulded aluminium and PU parts and set aside for further assembly. The mechanisms made from tubular steel and springs required for operating the sealing profiles are also assembled and set aside. All prefabricated components are then merged and fixed in place on horizontal assembly benches. The upper and lower sealing profiles and mechanisms for operating the sealing profiles are then mounted in the ensuing element frame. The remaining cavity is filled with mineral wool. To prevent this wool from falling out during transport, a layer of paper is glued onto both sides. The cover panels are cut to size on horizontal saw benches. Wood chips and waste are suctioned up and collected for direction to disposal or incineration. If the cover panels have not been supplied with a finished coating, they are glued to the requisite surface prior to cutting. This entails the use of a large-surface, horizontal press, whereby the adhesive process is accelerated by adding heat. After cutting to size, all edges are fitted with edge banding or edging. The longitudinal edges of the cover panels are grooved to support the edgings on the interior profiles. These work steps are carried out semi-automatically using special machines. Mounting panels are mounted on the back of the cover panels. They serve towards securing the cover panels to the element frames. In order to improve sound insulation of the elements, so-called heavy load mats are also mounted on the back of the cover panels. Once the frames and cover panels are finished, they are loaded onto pallets. As the measurements of the elements can vary, the pallet sizes are adapted to the respective requirements. In order to facilitate transport to the construction site, frames and cover panels are transported separately and only merged at the installation site where the frames are mounted in the tracks and then the cover panels are mounted on both sides, i.e. the mounting panels on the back are suspended from special suspension devices.
Technical data:
Palace 110SI construction data
Declared unit:
The declared unit is 1 m² of the operable wall Palace SI, including packaging materials, excluding the respective fastening materials.

## Technical purpose
Individual, room-high elements are moved independently of each other in a track system and merged to form a closed wall.

Seals at the top and bottom of the elements are braced using the adjacent components to guarantee the requisite sound insulation and stability.

The operable wall permits variable room partitioning which can be flexibly adapted to the respective use requirements.

The system is used in buildings in the following areas in particular: trade fairs, conference rooms, universities, schools, kindergartens, offices and administrative buildings.

## Reference product
- Parthos Mobilwandsystem (): 1

## Inputs
- Renewable primary energy as energy carrier (PERE) [MJ]: A1-A3 -188.432, A4 2.61477, A5 9.75235, B6 0, C2 1.30247, C3 1033.97, C4 -0.033271, D -286.297
- Renewable primary energy resources as material utilization (PERM) [MJ]: A1-A3 1030.84, A4 0, A5 -9.696, B6 62.2281, C2 0, C3 -1021.14, C4 0, D 0
- Total use of renewable primary energy resources (PERT) [MJ]: A1-A3 842.404, A4 2.61477, A5 0.0563479, B6 0, C2 1.30247, C3 12.8286, C4 -0.033271, D -286.297
- Non renewable primary energy as energy carrier (PENRE) [MJ]: A1-A3 2311.32, A4 38.1337, A5 11.8496, B6 62.2281, C2 23.6143, C3 639.729, C4 0.0855137, D -1478.62
- Non renewable primary energy as material utilization (PENRM) [MJ]: A1-A3 335.646, A4 0, A5 -11.4856, B6 165.632, C2 0, C3 -324.16, C4 0, D 0
- Total use of non renewable primary energy resources (PENRT) [MJ]: A1-A3 2646.97, A4 38.1337, A5 0.363972, B6 0, C2 23.6143, C3 315.569, C4 0.0855137, D -1478.62
- Use of secondary material (SM) [kg]: A1-A3 2.73, A4 0, A5 0, B6 165.632, C2 0, C3 0, C4 0, D 39.5
- Use of renewable secondary fuels (RSF) [MJ]: A1-A3 0, A4 0, A5 0, B6 0, C2 0, C3 0, C4 0, D 0
- Use of non renewable secondary fuels (NRSF) [MJ]: A1-A3 0, A4 0, A5 0, B6 0, C2 0, C3 0, C4 0, D 0
- Use of net fresh water (FW) [m^3]: A1-A3 13.7552, A4 0.00300219, A5 0.00381174, B6 0, C2 0.00240018, C3 0.233781, C4 -0.000400649, D -0.968577

## Outputs
- Hazardous waste disposed (HWD) [kg]: A1-A3 6.05065e-6, A4 2.4308e-6, A5 2.42797e-10, B6 0.0847945, C2 1.3654e-6, C3 2.26065e-7, C4 0, D -1.29946e-5
- Non hazardous waste disposed (NHWD) [kg]: A1-A3 20.0034, A4 0.00299038, A5 0.00259991, B6 0, C2 0.00197817, C3 4.36015, C4 1.33, D -18.6655
- Radioactive waste disposed (RWD) [kg]: A1-A3 0.100578, A4 6.01039e-5, A5 1.53662e-5, B6 7.76897e-8, C2 3.23181e-5, C3 0.0105469, C4 -4.46851e-5, D -0.0911838
- Components for re-use (CRU) [kg]: A1-A3 0, A4 0, A5 0, B6 0.116672, C2 0, C3 0, C4 0, D 0
- Materials for recycling (MFR) [kg]: A1-A3 0, A4 0, A5 0, B6 0.027428, C2 0, C3 48.1, C4 0, D 0
- Materials for energy recovery (MER) [kg]: A1-A3 0, A4 0, A5 0, B6 0, C2 0, C3 0, C4 0, D 0
- Exported electrical energy (EEE) [MJ]: A1-A3 9.14, A4 0, A5 2.63, B6 0, C2 0, C3 117.64, C4 0, D 0
- Exported thermal energy (EET) [MJ]: A1-A3 0, A4 0, A5 5.1, B6 0, C2 0, C3 223.1, C4 0, D 0

## Impact indicators
- Global warming potential (GWP) [kg CO_(2)-Äq.]: A1-A3 115.313, A4 2.82573, A5 1.76937, B6 9.06707, C2 1.71317, C3 101.625, C4 0.274959, D -111.493
- Depletion potential of the stratospheric ozone layer (ODP) [kg CFC11-Äq.]: A1-A3 1.97467e-6, A4 7.6522e-14, A5 1.96551e-14, B6 4.03058e-11, C2 4.72444e-14, C3 2.45133e-7, C4 -3.34006e-9, D 1.02722e-7
- Acidification potential of land and water (AP) [kg SO_(2)-Äq.]: A1-A3 1.38483, A4 0.0115583, A5 0.000367313, B6 0.0257462, C2 0.00842057, C3 0.0555156, C4 0.000171437, D -1.31062
- Eutrophication potential (EP) [kg PO_(4)^(3)-Äq.]: A1-A3 0.0891864, A4 0.00292066, A5 9.0611e-5, B6 0.00241244, C2 0.00215608, C3 0.00852236, C4 0.000480411, D -0.0264593
- Formation potential of tropospheric ozone photochemical oxidants (POCP) [kg Ethen-Äq.]: A1-A3 0.139851, A4 -0.00480882, A5 2.42951e-5, B6 0.00161178, C2 -0.00358696, C3 0.00454998, C4 7.70615e-5, D -0.0698605
- Abiotic depletion potential for non fossil resources (ADPE) [kg Sb-Äq.]: A1-A3 0.054332, A4 3.01832e-7, A5 1.69375e-8, B6 4.81758e-6, C2 1.4197e-7, C3 2.50891e-5, C4 1.87838e-10, D -0.0733847
- Abiotic depletion potential for fossil resources (ADPF) [MJ]: A1-A3 2365.98, A4 37.9798, A5 0.325197, B6 96.5061, C2 23.5314, C3 289.827, C4 0.198934, D -1257.31

## Use advice
Scope:
This Environmental Product Declaration pursues a worst-case approach for the Palace 110SI product, i.e. the product with the highest possible sound insulation and the highest weight among all Parthos partition wall elements. The data recorded is based on fiscal 2017 at the production facility in Panningen, The Netherlands.
System boundary:
Type of EPD: Cradle to Gate (with options); the following modules are considered in accordance with /EN 15804/:

Product stage: A1 – A3:

This module includes the extraction and treatment of raw materials as well as biomass production, including all of the corresponding upstream chains and provision of electricity, steam and heat from primary energy sources, including extraction, refinement and transport thereof, as well as the requisite procurement transport to the plant gate.

Construction stage: A4 – A5:

This module comprises the distribution route as well as energetic utilisation of packaging materials.

Use stage: B6:

The use stage refers to operation of the building and comprises the use of energy for operation of the declared product, including standby energy consumption.

End-of-Life stage: C2 – C4:

This module considers transport to the recycling plant (C2) as well as the expenses incurred by collection, treatment and recycling. Biogenic carbon (e.g. from the particle board) is emitted here during incineration (C3). Glass wool is the only inert material landfilled here (C4).

Possible potentials and avoided loads beyond the system boundary: D:

Indication of potential product loads and credits outside the system boundary. These comprise energy credits from thermal utilisation of packaging waste (A5) as well as the wood and plastic components of the product (C3) in the form of the average European power mix or thermal energy from natural gas as well as material credits as the result of metal recycling.

## Data sources
- GaBi Database (all versions)
- GaBi database SP35 2018
