# Stainless Steel Rebar

Dataset: ILCD process, EPD, average dataset
Geography: GB
Reference year: 2019
Valid until: 2024
Classification: OEKOBAU.DAT: Metalle / Edelstahl / Edelstahlprofile
Classification: IBUCategories: 02 Building products / Metallic products and ancillaries / Structural steels
Method details: Structural steels.pdf
Generated by: Sphera Solutions GmbH
Registration number: EPD-OTO-20190108-IBC1-EN
Owner: Outokumpu
Compliance: DIN EN 15804; ISO 14025
Review: Accredited third party review by Institut Bauen und Umwelt e. V.
Amounts: rows without a unit in brackets have none in this file; such an amount is in the reference unit of its flow, which a separate flow dataset defines
copyright: true
licenseType: Free of charge for all users and uses
accessRestrictions: None

## General comment
This EPD describes stainless steel rebar produced by Outokumpu. Stainless steel rebar is supplied as coil, cut lengths, shapes or welded mesh. Stainless steel rebar is available in a wide range of sizes in both standard and special grades. The data have been provided by a representative mix of three manufacturing plants in the UK.

## Technology and included processes
The steel scrap is melted in an electric arc furnace to obtain a steel melt. The liquid steel is further refined (adjustment of sulfur, carbon and phosphorous) and alloyed to give the stainless steel the required characteristics. The molten steel is then cast into billets before being sent to the rolling mill where they are rolled to the required dimensions. After hot rolling the steel is pickled and coiled to rod. The stainless steel rebar rod coil can be cut to straightened lengths or bent to shape. Quality management are in accordance with /ISO 9001/.
Declared unit:
The declaration applies to one ton of stainless steel rebar. The declared unit is the production and recycling of one ton of stainless steel rebar.

## Technical purpose
Stainless steel rebar is used as reinforcement in concrete. Stainless rebar replaces ordinary carbon steel rebar where non-magnetic reinforcement is required or as a durability solution for long-life design buildings or in aggressive environments (marine or other construction sites exposed to high chloride concentrations).

## Reference product
- Stainless Steel Rebar (): 1

## Inputs
- Renewable primary energy as energy carrier (PERE) [MJ]: A1-A3 8226, C3 11.98, D -2202
- Renewable primary energy resources as material utilization (PERM) [MJ]: A1-A3 0, C3 0, D 0
- Total use of renewable primary energy resources (PERT) [MJ]: A1-A3 8226, C3 11.98, D -2202
- Non renewable primary energy as energy carrier (PENRE) [MJ]: A1-A3 44510, C3 40.73, D -14030
- Non renewable primary energy as material utilization (PENRM) [MJ]: A1-A3 0, C3 0, D 0
- Total use of non renewable primary energy resources (PENRT) [MJ]: A1-A3 44510, C3 40.73, D -14030
- Use of secondary material (SM) [kg]: A1-A3 721.5, C3 0, D 0
- Use of renewable secondary fuels (RSF) [MJ]: A1-A3 0, C3 0, D 0
- Use of non renewable secondary fuels (NRSF) [MJ]: A1-A3 0, C3 0, D 0
- Use of net fresh water (FW) [m^3]: A1-A3 39, C3 0.01654, D -16.13

## Outputs
- Hazardous waste disposed (HWD) [kg]: A1-A3 0.04012, C3 3.282e-7, D -0.1446
- Non hazardous waste disposed (NHWD) [kg]: A1-A3 265.5, C3 50.11, D 15.27
- Radioactive waste disposed (RWD) [kg]: A1-A3 2.44, C3 0.004795, D -0.1183
- Components for re-use (CRU) [kg]: A1-A3 0, C3 0, D 0
- Materials for recycling (MFR) [kg]: A1-A3 0, C3 950, D 0
- Materials for energy recovery (MER) [kg]: A1-A3 0, C3 0, D 0
- Exported electrical energy (EEE) [MJ]: A1-A3 0, C3 0, D 0
- Exported thermal energy (EET) [MJ]: A1-A3 0, C3 0, D 0

## Impact indicators
- Global warming potential (GWP) [kg CO_(2)-Äq.]: A1-A3 3777, C3 2.481, D -1148
- Depletion potential of the stratospheric ozone layer (ODP) [kg CFC11-Äq.]: A1-A3 4.423e-9, C3 6.998e-12, D -8.86e-13
- Acidification potential of land and water (AP) [kg SO_(2)-Äq.]: A1-A3 25.86, C3 0.009606, D -7.241
- Eutrophication potential (EP) [kg PO_(4)^(3)-Äq.]: A1-A3 1.29, C3 0.00119, D -0.4003
- Formation potential of tropospheric ozone photochemical oxidants (POCP) [kg Ethen-Äq.]: A1-A3 1.164, C3 0.0006985, D -0.4326
- Abiotic depletion potential for non fossil resources (ADPE) [kg Sb-Äq.]: A1-A3 0.2394, C3 1.136e-6, D -0.06318
- Abiotic depletion potential for fossil resources (ADPF) [MJ]: A1-A3 38560, C3 28.65, D -13780

## Use advice
Scope:
The declaration applies to 1 ton of stainless steel rebar produced by Outokumpu.

The Life Cycle Assessment is based on data from the following Outokumpu production plants:

- Outokumpu Stainless Ltd, Sheffield, UK

Production has been modeled using annual production data from 2017. Where required averaging is based on production output from each site.
System boundary:
This EPD is cradle-to-gate with options, and includes the following process steps:
Upstream production of raw materials, fuels and energy and all relevant upstream transport and packaging processes.
Production/manufacturing of the stainless steel product.
Waste water and treatment of wastes generated on site including swarf, dusts, scrap, slag, and waste water.
End-of-life (recycling, remelting or disposal of steel scrap).

## Data sources
- GaBi Database (all versions)
- GaBi database SP36 2018
