# TECU Patina

Dataset: ILCD process, EPD, specific dataset
Geography: DE
Reference year: 2019
Valid until: 2024
Classification: OEKOBAU.DAT: Metalle / Kupfer / Kupferbleche
Classification: IBUCategories: 02 Bauprodukte / Metallbauprodukte und Zubehör / Baumetalle
Method details: Baumetalle.pdf
Generated by: SUSTAINUM Institut für zukunftsfähiges Wirtschaften Berlin eG
Registration number: EPD-KME-20190041-IBA1-DE
Owner: KME Germany GmbH & Co. KG
Compliance: DIN EN 15804; ISO 14025
Review: Accredited third party review by Institut Bauen und Umwelt e. V.
Amounts: rows without a unit in brackets have none in this file; such an amount is in the reference unit of its flow, which a separate flow dataset defines
copyright: true
licenseType: Free of charge for all users and uses
accessRestrictions: None

## General comment
The material TECU® Patina consists of 100 % by mass of CU-DHP according to /DIN EN 1172/, i.e. oxygen-free Phosphorus-deoxidized copper with limited residual phosphorus content. The material designation is Cu-DHP CW024A. TECU® Patina sheets are one-sided patinated. The different nuances and shades of the patina surface, which are characteristic of this process, are largely reminiscent of the typical appearance of copper due to weathering.

## Technology and included processes
TECU® Patina manufacturing process consists of 10 steps: Pouring The highly pure Cu-DHP is poured into slabs, i.e. extruded blocks. Warming up The slabs are heated in a furnace to a hot-roll temperature of approx. 900°C. Hot-rolling On a roll stand with a top and bottom rolls (Reversier duo) the slabs are rolled down in several passes i.e. the thickness is reduced by decreasing the gap between the rolls. Afterwards it is wound up into a coil at the end. Milling Due to the thermal oxidation and high temperatures during warming up and hot-rolling, a scale layer develops on the surface of the copper, which is removed by milling before further steps. In this process, few tenths of millimetres are removed from each side. Cold pre-rolling On a reverse quartet (four-high rolling mill stand), the TECU® copper strips are rolled down with more passes, during which they solidify by forming. Intermediate annealing For further processing, a heat treatment is carried out by intermediate annealing, which causes a targeted softening of the copper. This process is carried out in a protected atmosphere to prevent a renewed thermal oxidation of the surface. Finish rolling The final thickness is mostly 0.6 mm - 0.7 mm. The desired strength of R240 semi-hard is achieved in the stability or condition rolling process. Surface finishing/ Patination The copper strips are first cut into sheets and then, in a patented mechanical-chemical-thermal process, a green patina is generated directly from the copper surface. Stretch straightening On a stretch straightening unit, the tolerances with regard to straightness and flatness is further reduced. Packaging Finally the on one side patinated TECU® Patina products are packed.
Technical data:
The following technical data and standards apply for TECU® Patina:

/DIN EN ISO 6507-1:2005/, /DIN EN ISO 6507-2:2005/, /DIN EN ISO 6892-1:2009/, /ISO 1811-2:1988-10/, /ISO 4739-1985-05/.
Declared unit:
The declaration applies to copper alloys. The declared unit is 1 kg copper sheet, patinated (TECU® Patina).

## Technical purpose
TECU® Patina sheets are used for roofing, wall cladding and roof drainage systems (roof gutters, pipes and equipment).

## Reference product
- TECU Patina Kupfertafel (): 1

## Inputs
- Renewable primary energy as energy carrier (PERE) [MJ]: A1-A3 3.548, C2 0.00666, C3 0, C4 0.000338, D 0.0713
- Renewable primary energy resources as material utilization (PERM) [MJ]: A1-A3 0, C2 0, C3 0, C4 0, D 0
- Total use of renewable primary energy resources (PERT) [MJ]: A1-A3 3.548, C2 0.00666, C3 0, C4 0.000338, D 0.0713
- Non renewable primary energy as energy carrier (PENRE) [MJ]: A1-A3 13.644, C2 0.0988, C3 0, C4 0.00457, D 0.43
- Non renewable primary energy as material utilization (PENRM) [MJ]: A1-A3 0, C2 0, C3 0, C4 0, D 0
- Total use of non renewable primary energy resources (PENRT) [MJ]: A1-A3 13.644, C2 0.0988, C3 0, C4 0.00457, D 0.43
- Use of secondary material (SM) [kg]: A1-A3 1.152, C2 0, C3 0, C4 0, D 0
- Use of renewable secondary fuels (RSF) [MJ]: A1-A3 0, C2 0, C3 0, C4 0, D 0
- Use of non renewable secondary fuels (NRSF) [MJ]: A1-A3 0, C2 0, C3 0, C4 0, D 0
- Use of net fresh water (FW) [m^3]: A1-A3 0.0035874, C2 7.72e-6, C3 0, C4 -2.15e-9, D 0.000604

## Outputs
- Hazardous waste disposed (HWD) [kg]: A1-A3 2.43787e-8, C2 0, C3 0, C4 2.7866e-9, D 0
- Non hazardous waste disposed (NHWD) [kg]: A1-A3 2.29815, C2 0.000532769, C3 0, C4 3.12647, D 0
- Radioactive waste disposed (RWD) [kg]: A1-A3 0.000475131, C2 1.19334e-7, C3 0, C4 6.72801e-6, D 0
- Components for re-use (CRU) [kg]: A1-A3 0, C2 0, C3 0, C4 0, D 0
- Materials for recycling (MFR) [kg]: A1-A3 0, C2 0, C3 -0.00994, C4 0, D 0
- Materials for energy recovery (MER) [kg]: A1-A3 0, C2 0, C3 0, C4 0, D 0
- Exported electrical energy (EEE) [MJ]: A1-A3 0, C2 0, C3 0, C4 0, D 0
- Exported thermal energy (EET) [MJ]: A1-A3 0, C2 0, C3 0, C4 0, D 0

## Impact indicators
- Global warming potential (GWP) [kg CO_(2)-Äq.]: A1-A3 0.9575, C2 0.00731, C3 0, C4 0.000304, D 0.0369
- Depletion potential of the stratospheric ozone layer (ODP) [kg CFC11-Äq.]: A1-A3 1.93935e-12, C2 1.55e-16, C3 0, C4 8.05e-17, D 8.53e-15
- Acidification potential of land and water (AP) [kg SO_(2)-Äq.]: A1-A3 0.0011805, C2 2.8e-5, C3 0, C4 8.56e-7, D 0.000259
- Eutrophication potential (EP) [kg PO_(4)^(3)-Äq.]: A1-A3 0.00020118, C2 7.1e-6, C3 0, C4 1.08e-7, D 1.55e-5
- Formation potential of tropospheric ozone photochemical oxidants (POCP) [kg Ethen-Äq.]: A1-A3 6.298e-5, C2 -1.05e-5, C3 0, C4 7.6e-8, D 1.42e-5
- Abiotic depletion potential for non fossil resources (ADPE) [kg Sb-Äq.]: A1-A3 4.6652e-7, C2 7.63e-10, C3 0, C4 6.56e-11, D 4.1e-5
- Abiotic depletion potential for fossil resources (ADPF) [MJ]: A1-A3 11.753, C2 0.0985, C3 0, C4 0.00441, D 0.414

## Use advice
Scope:
This document refers to TECU® Patina copper sheets produced by KME Germany GmbH & Co. KG in Osnabrück, Germany. The declared unit is 1 kg copper sheet, patinated. The data for the production of the declared product was collected on a plant-specific basis with current annual data from 2017. The declarant is responsible for the underlying data and their verification.
System boundary:
The Life Cycle Assessment considers the system boundaries "cradle to gate - with options" and follows the modular construction system described by /EN 15804/. The LCA takes into account the following

modules:

A1-A3: Raw material supply, Transport,Manufacturing
C2: Transport to waste-processing facility
C4: Disposal
D: Potential for reuse, recovery and/or recycling as net flows and benefit

## Data sources
- GaBi Database (all versions)
- GaBi database SP36 2018
