# Plastic profile EPDM; EPDM

Dataset: ILCD process, EPD, generic dataset
Geography: DE
Reference year: 2021
Valid until: 2022
Classification: oekobau.dat: Kunststoffe / Profile / Kunststoffprofile elastisch
Owner: Sphera Solutions GmbH
Compliance: EN 15804+A2
Review: Dependent internal review by Sphera Solutions GmbH; Independent external review by GaBi user forum
Amounts: rows without a unit in brackets have none in this file; such an amount is in the reference unit of its flow, which a separate flow dataset defines
copyright: true
licenseType: Free of charge for all users and uses
accessRestrictions: The license conditions as stated on https://www.oekobaudat.de/ apply.
accessRestrictions: Es gelten die Lizenzbedingungen wie sie auf https://www.oekobaudat.de/ genannt sind.

## General comment
This data set has been modeled according to the European Standard EN 15804+A2 for Sustainable Building. Results are depicted in modules that allow the structured expression of results over the entire life cycle.

## Geography
The data set represents the country specific situation in Germany, focusing on the main technologies, the region specific characteristics and / or import statistics.

## Time period
Annual average

## Technology and included processes
The life cycle analysis of the EPDM plastic profile includes the life cycle phases cradle to gate. The system boundary is the product (ready for sale). Transports from the factory to the mounting location are not taken into account and have to be incorporated in a system approach if necessary. EPDM production: EPDM is produced by the copolymerization of ethylene and propylene. The polymerization is carried out in solution. The process is run at 10- 50°C and 1- 20 bar in a single continuous stirred tank reactor, a catalyst is used. Because the polymerization is strongly exothermal, cooling is required. Organic solvents like hexane are used. Unreacted propene is recycled and reintroduced into the reactor. The solvent is also recovered. Downstream of the reactor, the reaction is shortstopped with water, alcohol or other polar liquids. The polymer solution is mixed with sodium hydroxide to remove catalyst residues. After adding chemicals like extender oil, the polymer solution is stripped with steam and hot water to remove unreacted monomers and solvents. Antiagglomerants and antifoaming agents may be added to control crumb agglomeration of the rubber product. The product is then passed over a screen and dried.

In module C1, a manual dismantling (no loads) is assumed, collecting losses are neglected.
The transport in module C2 to the recycling plant takes place with a truck (50km).
Module C3 takes into account the grinding and thermal treatment (combustion) of the material. When calculating combustion emissions and credits, the specific calorific value of each material and the material composition are taken into account.
In module D credits for the substitution of electricity (German electricity mix) and thermal energy (from natural gas) are given.

## Technical purpose
This product can be used in construction.

## Safety margin
10 %. Product system almost completely covered. Good technological, temporal and geographic representativeness.

## Reference product
- Plastic profile EPDM: 1

## Inputs
- Use of renewable primary energy as energy carrier (PERE) [MJ]: A1-A3 8.15996, C2 0.00200398, C3 0.141502, D -7.76397
- Use of renewable primary energy resources used as raw materials (PERM) [MJ]: A1-A3 0, C2 0, C3 0, D 0
- Total use of renewable primary energy (PERT) [MJ]: A1-A3 8.15996, C2 0.00200398, C3 0.141502, D -7.76397
- Use of non renewable primary energy as energy carrier (PENRE) [MJ]: A1-A3 69.0411, C2 0.0345287, C3 47.8656, D -22.8552
- Use of non renewable primary energy resources used as raw materials (PENRM) [MJ]: A1-A3 43, C2 0, C3 -43, D 0
- Total use of non renewable primary energy resource (PENRT) [MJ]: A1-A3 112.041, C2 0.0345287, C3 4.86563, D -22.8552
- Use of secondary material (SM) [kg]: A1-A3 0, C2 0, C3 0, D 0
- Use of renewable secondary fuels (SF) [MJ]: A1-A3 0, C2 0, C3 0, D 0
- Use of non renewable secondary fuels (NRSF) [MJ]: A1-A3 0, C2 0, C3 0, D 0
- Net use of fresh water (FW) [m3]: A1-A3 0.0142105, C2 1.78104e-6, C3 0.00738314, D -0.00288794

## Outputs
- Hazardous waste disposed (HWD) [kg]: A1-A3 2.03348e-7, C2 1.44319e-12, C3 1.24703e-10, D -7.9414e-9
- Non harzardous waste disposed (NHWD) [kg]: A1-A3 0.0676935, C2 5.57372e-6, C3 0.0374094, D -0.0120775
- Radioactive waste disposed (RWD) [kg]: A1-A3 0.00101227, C2 3.31348e-8, C3 1.72504e-5, D -0.000835025
- Components for re-use (CRU) [kg]: A1-A3 0, C2 0, C3 0, D 0
- Materials for recycling (MFR) [kg]: A1-A3 0, C2 0, C3 0, D 0
- Materials for energy recovery (MER) [kg]: A1-A3 0, C2 0, C3 1, D 0
- Exported electrical energy (EEE) [MJ]: A1-A3 0, C2 0, C3 5.70153, D 0
- Exported thermal energy (EET) [MJ]: A1-A3 0, C2 0, C3 12.9903, D 0

## Impact indicators
- Global Warming Potential - total (GWP-total) [kg CO2 eq.]: A1-A3 4.35165, C2 0.00262283, C3 2.8787, D -1.47025
- Global Warming Potential - fossil fuels (GWP-fossil) [kg CO2 eq.]: A1-A3 4.31574, C2 0.00260492, C3 2.87841, D -1.45371
- Global Warming Potential - biogenic (GWP-biogenic) [kg CO2 eq.]: A1-A3 0.0331702, C2 1.17716e-6, C3 0.000229855, D -0.0143948
- Global Warming Potential - land use and land use change (GWP-luluc) [kg CO2 eq.]: A1-A3 0.00273782, C2 1.67295e-5, C3 5.63547e-5, D -0.00214454
- Depletion potenzial of the stratospheric ozone layer (ODP) [kg CFC-11 eq.]: A1-A3 3.28197e-14, C2 6.66532e-19, C3 5.77435e-16, D -3.38948e-14
- Acidifcation potential, Accumulated Exceedance (AP) [Mole of H+ eq.]: A1-A3 0.00492174, C2 7.38555e-6, C3 0.000395932, D -0.00149412
- Eutrophication potential - freshwater (EP-freshwater) [kg P eq.]: A1-A3 6.88285e-6, C2 5.35732e-9, C3 1.11292e-7, D -3.56781e-6
- Eutrophication potential - marine (EP-marine) [kg N eq.]: A1-A3 0.00160327, C2 3.40237e-6, C3 8.18571e-5, D -0.00054919
- Eutrophication potential - terrestrial (EP-terrestrial) [Mole of N eq.]: A1-A3 0.0170878, C2 3.80663e-5, C3 0.00186694, D -0.00585013
- Photochemical Ozone Creation Potential (POCP) [kg NMVOC eq.]: A1-A3 0.00493532, C2 6.6347e-6, C3 0.000219189, D -0.00143793
- Abiotic depletion potential - non-fossil resources (ADPE) [kg Sb eq.]: A1-A3 1.56817e-6, C2 2.26592e-10, C3 8.12612e-9, D -4.57435e-7
- Abiotic depletion potential - fossil resources (ADPF) [MJ]: A1-A3 116.334, C2 0.0345273, C3 0.56546, D -22.8519
- Water (user) deprivation potential (WDP) [m³ world equiv.]: A1-A3 -0.14325, C2 1.01262e-5, C3 0.316407, D -0.0175308

## Use advice
The data set represents a cradle to gate inventory. It can be used to characterise the supply chain situation of the respective commodity in a representative manner. Combination with individual unit processes using this commodity enables the generation of user-specific (product) LCAs.

## Data sources
- Plastics Europe Association of Plastics Manufacturers, 2006
- ULLMANN'S Encyclopedia of Industrial Chemistry
- Documentation of data quality management
- GaBi Database Edition 2021, CUP2021.01
- GaBi database (all versions)
