# WrapTec

Dataset: ILCD process, EPD, average dataset
Geography: DE
Reference year: 2018
Valid until: 2023
Classification: OEKOBAU.DAT: Kunststoffe / Folien und Vliese / Folien zur Abdichtung
Classification: IBUCategories: 02 Bauprodukte / Abdichtungen / Dach- und Dichtungsbahnsysteme aus Kunststoffen und Elastomeren
Method details: Dach- und Dichtungsbahnsysteme aus Kunststoffen und Elastomeren.pdf
Generated by: SUSTAINUM Institut für zukunftsfähiges Wirtschaften Berlin eG
Registration number: EPD-MRC-20170174-IBB1-DE
Owner: Monier Roofing Components GmbH
Compliance: DIN EN 15804; ISO 14025
Review: Accredited third party review by Institut Bauen und Umwelt e. V.
Amounts: rows without a unit in brackets have none in this file; such an amount is in the reference unit of its flow, which a separate flow dataset defines
copyright: true
licenseType: Free of charge for all users and uses
accessRestrictions: None

## General comment
WrapTec is an universal cladding product for technically insulated pipe systems. It is composed of two-layer laminate consisting of Polyisobutylene (PIB), including color pigments and stabilizers against UV exposure and aging.

For the use and application of the product the respective national provisions at the place of use apply, in Germany for example the Building Codes of the countries and the corresponding national specifications.

## Technology and included processes
WrapTec is produced in 3 process steps: Semi-finished production All ingredients are blended in a kneader. Excesses from previous productions and edge off-cuts are added to the production components. Subsequently, the kneading compound is shaped into a film form by means of an extruder. The film is coated with color pigments and UV stabilizers. Lamination application The WrapTec film, which is now functional, is applied with sealing adhesives - over the entire surface for later welding of overlapping films - and a release film (removable protective film for transport). Edge trimming and packaging After the edge trimming, the WrapTec film passes a measuring station in order to be tailored to the desired finishing. The films are then rolled up over a winding system.
Declared unit:
This declaration applies to 1 m2 of WrapTec cladding material. WrapTec is self-adhesive and self-welding, therefore no additional loads are required.

## Technical purpose
WrapTec is applicable as a UV- and weather-resistant, self-sealing covering material in the area of technical insulation, such as pre-insulated pipes of Domestic Services, heating, ventilation and air conditioning (HVAC) ducts and process engineering installations.

## Reference product
- 1 m2 WrapTec: 1

## Inputs
- Renewable primary energy as energy carrier (PERE) [MJ]: A1 4.93639, A2 0.0990051, A3 1.57581, C2 0.0100851, C3 1.98989, D -2.06173
- Renewable primary energy resources as material utilization (PERM) [MJ]: A1 1.782, A2 0, A3 0, C2 0, C3 -1.782, D 0
- Total use of renewable primary energy resources (PERT) [MJ]: A1 6.71839, A2 0.0990051, A3 1.57581, C2 0.0100851, C3 0.207889, D -2.06173
- Non renewable primary energy as energy carrier (PENRE) [MJ]: A1 34.4523, A2 1.50099, A3 3.65642, C2 0.152901, C3 31.4064, D -10.9804
- Non renewable primary energy as material utilization (PENRM) [MJ]: A1 30.294, A2 0, A3 0, C2 0, C3 -30.294, D 0
- Total use of non renewable primary energy resources (PENRT) [MJ]: A1 64.7463, A2 1.50099, A3 3.65642, C2 0.152901, C3 1.11238, D -10.9804
- Use of secondary material (SM) [kg]: A1 0, A2 0, A3 0, C2 0, C3 0, D 0
- Use of renewable secondary fuels (RSF) [MJ]: A1 0, A2 0, A3 0, C2 0, C3 0, D 0
- Use of non renewable secondary fuels (NRSF) [MJ]: A1 0, A2 0, A3 0, C2 0, C3 0, D 0
- Use of net fresh water (FW) [m^3]: A1 0.0119401, A2 0.000115455, A3 0.00107014, C2 1.17574e-5, C3 0, D -0.00140276

## Outputs
- Hazardous waste disposed (HWD) [kg]: A1 0.00196435, A2 9.46188e-8, A3 2.40023e-9, C2 9.63739e-9, C3 5.40024e-9, D -3.94443e-9
- Non hazardous waste disposed (NHWD) [kg]: A1 4.42002, A2 0.00827246, A3 1.70445, C2 0.000842591, C3 0.378711, D -2.23205
- Radioactive waste disposed (RWD) [kg]: A1 0.000801442, A2 1.72438e-6, A3 0.000336252, C2 1.75637e-7, C3 4.36678e-5, D -0.000439804
- Components for re-use (CRU) [kg]: A1 0, A2 0, A3 0, C2 0, C3 0, D 0
- Materials for recycling (MFR) [kg]: A1 0, A2 0, A3 0, C2 0, C3 0, D 0
- Materials for energy recovery (MER) [kg]: A1 0, A2 0, A3 0, C2 0, C3 0, D 0
- Exported electrical energy (EEE) [MJ]: A1 0, A2 0, A3 0, C2 0, C3 2.2, D 0
- Exported thermal energy (EET) [MJ]: A1 0, A2 0, A3 0, C2 0, C3 5.81, D 0

## Impact indicators
- Global warming potential (GWP) [kg CO_(2)-Äq.]: A1 2.57462, A2 0.110314, A3 0.287649, C2 0.0112507, C3 2.35095, D -0.762293
- Depletion potential of the stratospheric ozone layer (ODP) [kg CFC11-Äq.]: A1 0.000340316, A2 1.39914e-14, A3 1.08669e-12, C2 1.42448e-15, C3 1.32513e-13, D -1.42416e-12
- Acidification potential of land and water (AP) [kg SO_(2)-Äq.]: A1 0.00632014, A2 0.000467975, A3 0.000428845, C2 4.4302e-5, C3 0.000915245, D -0.000812992
- Eutrophication potential (EP) [kg PO_(4)^(3)-Äq.]: A1 0.000859909, A2 0.000115921, A3 6.85604e-5, C2 1.095e-5, C3 0.000173128, D -0.000128325
- Formation potential of tropospheric ozone photochemical oxidants (POCP) [kg Ethen-Äq.]: A1 0.00139075, A2 -0.000174026, A3 2.97236e-5, C2 -1.61479e-5, C3 5.61079e-5, D -8.49716e-5
- Abiotic depletion potential for non fossil resources (ADPE) [kg Sb-Äq.]: A1 4.86567e-6, A2 1.14674e-8, A3 1.45138e-7, C2 1.16803e-9, C3 2.03926e-7, D -2.07582e-7
- Abiotic depletion potential for fossil resources (ADPF) [MJ]: A1 62.7662, A2 1.49667, A3 2.80865, C2 0.152449, C3 1.00226, D -9.87154

## Use advice
Scope:
This document applies to WrapTec - universal cladding and jacketing material manufactured by MONIER Roofing Components GmbH in Berlin, Germany. The declared unit is 1 m2. The data collection is based on the annual production data from 2016 collected by MONIER. The declarant is responsible for the underlying data and their verification.
System boundary:
The Life Cycle Assessment consideres the system boundaries "cradle to gate - with options" and follows the modular construction system described by /EN 15804/. The LCA takes into account the following modules:

A1-A3: Manufacturing of pre-products, packaging, ancillary materials, transport to the factory, production including energy supply and waste handling
C2: Transport to waste-processing facility
C3: Waste processing for reuse, recovery and/or recycling
D: Potential for reuse, recovery and/or recycling as net flows and benefit

## Data sources
- GaBi Database (all versions)
- GaBi database SP29 2016
