# Rolling shutter (plastics)

Dataset: ILCD process, EPD, generic dataset
Geography: DE
Reference year: 2021
Valid until: 2022
Classification: oekobau.dat: Komponenten von Fenstern und Vorhangfassaden / Füllungen / Opake Füllungen
Owner: Sphera Solutions GmbH
Compliance: EN 15804+A2
Review: Dependent internal review by Sphera Solutions GmbH; Independent external review by GaBi user forum
Amounts: rows without a unit in brackets have none in this file; such an amount is in the reference unit of its flow, which a separate flow dataset defines
copyright: true
licenseType: Free of charge for all users and uses
accessRestrictions: The license conditions as stated on https://www.oekobaudat.de/ apply.
accessRestrictions: Es gelten die Lizenzbedingungen wie sie auf https://www.oekobaudat.de/ genannt sind.

## General comment
This data set has been modeled according to the European Standard EN 15804+A2 for Sustainable Building. Results are depicted in modules that allow the structured expression of results over the entire life cycle.

## Geography
The data set represents the country specific situation in Germany, focusing on the main technologies, the region specific characteristics and / or import statistics.

## Time period
Annual average

## Technology and included processes
Foreground system
The system boundaries comprise the cradle to gate life cycle of a roller shutter made of PVC. This dataset is based on a window size of 148*123 cm and is scaled to 1m², tracks are in Aluminium in U-form. This roller shutter is manual driven with a polypropylene belt, roller tube is in steel (1,5 mm thick) , roller shutter in PVC. The LCI dataset consider the production and assembly of the of the PVC parts with Aluminium tracks, Steel tube as well as the manual drive made of polypropylene. Transportation processes for the raw materials are accounted for as far as data on average transport distances were available. All relevant energy and energy flow are included in the system. Life cycle impacts of production equipment and infrastructure were not included in the system as no evidence could be justified that these are to any extent relevant and thus fell under the cut-off criteria. In mass production the impact of production equipment and infrastructure normally is in orders of magnitude lower than the impacts of material and energy supply.

In module C1, a manual dismantling (no loads) is assumed, collecting losses are neglected.
The transport in module C2 to the recycling plant takes place with a truck (50km).
Module C3 takes into account the grinding and thermal treatment (combustion) of the material. When calculating combustion emissions and credits, the specific calorific value of each material and the material composition are taken into account.
In module D credits for the substitution of electricity (German electricity mix) and thermal energy (from natural gas) are given.

## Technical purpose
This product can be used in construction.

## Safety margin
10 %. Product system almost completely covered. Good technological, temporal and geographic representativeness.

## Reference product
- Rolling shutter (plastics): 1

## Inputs
- Use of renewable primary energy as energy carrier (PERE) [MJ]: A1-A3 89.5292, C1 0.000350675, C2 0.0123445, C3 7.87157, D -29.8054
- Use of renewable primary energy resources used as raw materials (PERM) [MJ]: A1-A3 0, C1 0, C2 0, C3 0, D 0
- Total use of renewable primary energy (PERT) [MJ]: A1-A3 89.5292, C1 0.000350675, C2 0.0123445, C3 7.87157, D -29.8054
- Use of non renewable primary energy as energy carrier (PENRE) [MJ]: A1-A3 333.774, C1 0.00604215, C2 0.212697, C3 104.675, D -112.905
- Use of non renewable primary energy resources used as raw materials (PENRM) [MJ]: A1-A3 72, C1 0, C2 0, C3 -72, D 0
- Total use of non renewable primary energy resource (PENRT) [MJ]: A1-A3 405.774, C1 0.00604215, C2 0.212697, C3 32.6751, D -112.905
- Use of secondary material (SM) [kg]: A1-A3 0.266264, C1 0, C2 0, C3 0, D 0
- Use of renewable secondary fuels (SF) [MJ]: A1-A3 0, C1 0, C2 0, C3 0, D 0
- Use of non renewable secondary fuels (NRSF) [MJ]: A1-A3 0, C1 0, C2 0, C3 0, D 0
- Net use of fresh water (FW) [m3]: A1-A3 0.109446, C1 3.11663e-7, C2 1.09712e-5, C3 0.0244691, D -0.0479697

## Outputs
- Hazardous waste disposed (HWD) [kg]: A1-A3 5.01651e-6, C1 2.52542e-13, C2 8.89004e-12, C3 5.43954e-9, D -5.13975e-9
- Non harzardous waste disposed (NHWD) [kg]: A1-A3 1.86803, C1 9.75341e-7, C2 3.43341e-5, C3 7.89875, D -1.1065
- Radioactive waste disposed (RWD) [kg]: A1-A3 0.0137523, C1 5.79823e-9, C2 2.0411e-7, C3 0.000947405, D -0.00575723
- Components for re-use (CRU) [kg]: A1-A3 0, C1 0, C2 0, C3 0, D 0
- Materials for recycling (MFR) [kg]: A1-A3 0, C1 2.16, C2 0, C3 0, D 0
- Materials for energy recovery (MER) [kg]: A1-A3 0, C1 0, C2 0, C3 4, D 0
- Exported electrical energy (EEE) [MJ]: A1-A3 0, C1 0, C2 0, C3 8.81035, D 0
- Exported thermal energy (EET) [MJ]: A1-A3 0, C1 0, C2 0, C3 20.8164, D 0

## Impact indicators
- Global Warming Potential - total (GWP-total) [kg CO2 eq.]: A1-A3 23.437, C1 0.000452042, C2 0.0161566, C3 12.4326, D -9.09383
- Global Warming Potential - fossil fuels (GWP-fossil) [kg CO2 eq.]: A1-A3 23.2784, C1 0.000449009, C2 0.0160463, C3 12.4246, D -9.06119
- Global Warming Potential - biogenic (GWP-biogenic) [kg CO2 eq.]: A1-A3 0.132903, C1 1.06139e-7, C2 7.25129e-6, C3 0.00404828, D -0.0284203
- Global Warming Potential - land use and land use change (GWP-luluc) [kg CO2 eq.]: A1-A3 0.0257798, C1 2.92748e-6, C2 0.000103054, C3 0.00398923, D -0.00421685
- Depletion potenzial of the stratospheric ozone layer (ODP) [kg CFC-11 eq.]: A1-A3 6.31771e-10, C1 1.16636e-19, C2 4.10583e-18, C3 3.17367e-14, D 1.23351e-12
- Acidifcation potential, Accumulated Exceedance (AP) [Mole of H+ eq.]: A1-A3 0.0521675, C1 6.04537e-6, C2 4.5495e-5, C3 0.00354421, D -0.0253123
- Eutrophication potential - freshwater (EP-freshwater) [kg P eq.]: A1-A3 4.52593e-5, C1 9.37473e-10, C2 3.30011e-8, C3 4.58046e-6, D -7.29496e-6
- Eutrophication potential - marine (EP-marine) [kg N eq.]: A1-A3 0.0125935, C1 2.75026e-6, C2 2.09586e-5, C3 0.00115405, D -0.00474975
- Eutrophication potential - terrestrial (EP-terrestrial) [Mole of N eq.]: A1-A3 0.136744, C1 3.02394e-5, C2 0.000234488, C3 0.0153291, D -0.0514614
- Photochemical Ozone Creation Potential (POCP) [kg NMVOC eq.]: A1-A3 0.0483353, C1 8.23671e-6, C2 4.08697e-5, C3 0.00342166, D -0.0144044
- Abiotic depletion potential - non-fossil resources (ADPE) [kg Sb eq.]: A1-A3 0.00015362, C1 3.96511e-11, C2 1.39581e-9, C3 4.25055e-7, D -1.03073e-6
- Abiotic depletion potential - fossil resources (ADPF) [MJ]: A1-A3 412.607, C1 0.0060419, C2 0.212688, C3 25.47, D -112.646
- Water (user) deprivation potential (WDP) [m³ world equiv.]: A1-A3 -0.497574, C1 1.77198e-6, C2 6.23775e-5, C3 0.887407, D -0.260063

## Use advice
The data set represents a cradle to gate inventory. It can be used to characterise the supply chain situation of the respective commodity in a representative manner. Combination with individual unit processes using this commodity enables the generation of user-specific (product) LCAs.

## Data sources
- Documentation of data quality management
- GaBi Database Edition 2021, CUP2021.01
- GaBi database (all versions)
