# THERMATEX Basic & Standard, Pontarlier

Dataset: ILCD process, EPD, average dataset
Geography: FR
Reference year: 2021
Valid until: 2026
Classification: OEKOBAU.DAT: Mineralische Baustoffe / Steine und Elemente / Deckenplatten
Classification: IBUCategories: 02 Building products / Internal and external wall and ceiling finishes / Mineral panels
Method details: Mineral panels.pdf
Generated by: Daxner & Merl GmbH
Registration number: EPD-KNA-20210114-IBD1-EN
Owner: Knauf Ceiling Solutions GmbH & Co. KG
Compliance: DIN EN 15804+A2; ISO 14025
Review: Accredited third party review by Institut Bauen und Umwelt e. V.
Amounts: rows without a unit in brackets have none in this file; such an amount is in the reference unit of its flow, which a separate flow dataset defines
copyright: true
licenseType: Free of charge for all users and uses
accessRestrictions: None

## General comment
The ceiling tiles are manufactured using a wet felt process and consist of biosoluble mineral wool, perlite, clay and starch. The ceiling tiles meet the requirements of DIN 18177 and EN 13964.

The AMF and Armstrong mineral tiles are available in a wide range of different surface designs and product properties. Depending on the design, the ceiling tiles are available in different formats and edge finishes.

This EPD applies to the following products:

Basic Range:
Armstrong Bajkal, Armstrong Feria, Armstrong Savanna, Armstrong Aleria L, Armstrong Atlas, Armstrong Retail, Armstrong Scala, Armstrong Oasis, Armstrong Etna, ECOMIN Orbit, ECOMIN Orbit micro, ECOMIN Planet, ECOMIN Filigran

Standard Range:
Armstrong Bioguard Plain, Armstrong Plain, Armstrong Casa, Armstrong Cortega, Armstrong Dune, Armstrong Dune NG, Armstrong Dune eVo, Armstrong Dune eVo dB, Armstrong Dune Supreme, Armstrong Retail, Armstrong Sahara, Armstrong Sahara Max, Armstrong Tatra, Armstrong Cortega, Armstrong Fine Fissured, THERMATEX Schlicht, THERMATEX Star, THERMATEX Mercure, THERMATEX Feinstratos, THERMATEX Feinstrator micro, THERMATEX Fresko, THERMATEX Feinfresko

Please be aware of the limited representativity of the declared impacts for the products Sahara A1 and Dune NG.

## Technology and included processes
The mineral tiles are produced in the traditional wet process (wet-felt). The raw materials are mixed with water to form a homogeneous suspension, which is pumped onto a belt conveyor (Fourdrinier). The water is removed mechanically (gravity and vacuum) and by evaporation in the drying oven. As far as possible, the process water is reused. It is treated accordingly and fed back into the process water circuit. Depending on the desired appearance the panels can be sanded, colour-treated, patterned, eroded or embossed. Production waste and dust are reused in the process in the sense of an internal cycle. The manufacturing plant is certified according to ISO 9001, ISO 14001 and OHSAS 18001.
Technical data:
Mineral boards (wet-felt) are regulated by EN 13964 and have corresponding labelling and declaration of performance. The following data provide an overview of results:
Declared unit:
This EPD refers to a declared unit of 1 m² THERMATEX/Armstrong Standard Range ceiling tiles with an average surface weight of 3,25 kg/m².

## Technical purpose
Mineral tiles (wet-felt) are typically used as lay in for suspended ceiling constructions. They are primarily used as optical cladding, but also for sound absorption and sound insulation, for fire resistance and against fire spreading, for cleanrooms and high hygiene requirements.

## Reference product
- THERMATEX/Armstrong Standard Range mineral ceiling tiles (): 1

## Inputs
- Renewable primary energy as energy carrier (PERE) [MJ]: A1-A3 0.276025, A4 0.0968835, A5 0.0187023, C1 0, C2 0.0103068, C3 0, C4 0.084682, D -0.0267317
- Renewable primary energy resources as material utilization (PERM) [MJ]: A1-A3 9.51, A4 0, A5 0.4755, C1 0, C2 0, C3 0, C4 0, D 0
- Total use of renewable primary energy resources (PERT) [MJ]: A1-A3 9.78603, A4 0.0968835, A5 0.494202, C1 0, C2 0.0103068, C3 0, C4 0.084682, D -0.0267317
- Non renewable primary energy as energy carrier (PENRE) [MJ]: A1-A3 73.6545, A4 1.1985, A5 3.7186, C1 0, C2 0.1275, C3 0, C4 0.647025, D -0.257637
- Non renewable primary energy as material utilization (PENRM) [MJ]: A1-A3 0.38, A4 0, A5 0.019, C1 0, C2 0, C3 0, C4 0, D 0
- Total use of non renewable primary energy resources (PENRT) [MJ]: A1-A3 74.0345, A4 1.1985, A5 3.7376, C1 0, C2 0.1275, C3 0, C4 0.647025, D -0.257637
- Use of secondary material (SM) [kg]: A1-A3 0.438466, A4 0, A5 0.0219233, C1 0, C2 0, C3 0, C4 0, D 0
- Use of renewable secondary fuels (RSF) [MJ]: A1-A3 0, A4 0, A5 0, C1 0, C2 0, C3 0, C4 0, D 0
- Use of non renewable secondary fuels (NRSF) [MJ]: A1-A3 0, A4 0, A5 0, C1 0, C2 0, C3 0, C4 0, D 0
- Use of net fresh water (FW) [m^3]: A1-A3 0.00354726, A4 0.000155066, A5 0.000248115, C1 0, C2 1.64964e-5, C3 0, C4 0.000163087, D -6.28996e-5

## Outputs
- Hazardous waste disposed (HWD) [kg]: A1-A3 2.04641e-6, A4 1.50153e-7, A5 1.02816e-7, C1 0, C2 1.59737e-8, C3 0, C4 9.86264e-9, D -5.9174e-11
- Non hazardous waste disposed (NHWD) [kg]: A1-A3 0.259838, A4 0.00025571, A5 0.175767, C1 0, C2 2.72032e-5, C3 0, C4 3.25321, D -7.23275e-5
- Radioactive waste disposed (RWD) [kg]: A1-A3 0.00422438, A4 5.78502e-6, A5 0.000211792, C1 0, C2 6.15427e-7, C3 0, C4 7.34918e-6, D -4.66613e-5
- Components for re-use (CRU) [kg]: A1-A3 0, A4 0, A5 0, C1 0, C2 0, C3 0, C4 0, D 0
- Materials for recycling (MFR) [kg]: A1-A3 0, A4 0, A5 0.143542, C1 0, C2 0, C3 0, C4 0, D 0
- Materials for energy recovery (MER) [kg]: A1-A3 0, A4 0, A5 0, C1 0, C2 0, C3 0, C4 0, D 0
- Exported electrical energy (EEE) [MJ]: A1-A3 0, A4 0, A5 0.0617834, C1 0, C2 0, C3 0, C4 0, D 0
- Exported thermal energy (EET) [MJ]: A1-A3 0, A4 0, A5 0.109859, C1 0, C2 0, C3 0, C4 0, D 0

## Impact indicators
- Global Warming Potential total (GWP-total) [kg CO_(2)-Äq.]: A1-A3 3.21043, A4 0.0911234, A5 0.223294, C1 0, C2 0.00969398, C3 0, C4 0.676028, D -0.00894787
- Global Warming Potential fossil fuels (GWP-fossil) [kg CO_(2)-Äq.]: A1-A3 3.83413, A4 0.0922853, A5 0.223141, C1 0, C2 0.00981759, C3 0, C4 0.0492936, D -0.00894415
- Global Warming Potential biogenic (GWP-biogenic) [kg CO_(2)-Äq.]: A1-A3 -0.625891, A4 -0.00226044, A5 3.55428e-5, C1 0, C2 -0.000240472, C3 0, C4 0.626592, D -1.11217e-6
- Global Warming Potential luluc (GWP-luluc) [kg CO_(2)-Äq.]: A1-A3 0.0021976, A4 0.0010985, A5 0.000117133, C1 0, C2 0.000116862, C3 0, C4 0.000141878, D -2.60936e-6
- Depletion potential of the stratospheric ozone layer (ODP) [kg CFC11-Äq.]: A1-A3 8.75193e-11, A4 1.48589e-17, A5 4.37597e-12, C1 0, C2 1.58073e-18, C3 0, C4 1.82673e-16, D -6.96288e-17
- Acidification potential of land and water (AP) [mol H^(+)-Äq.]: A1-A3 0.00954554, A4 0.000329231, A5 0.000497876, C1 0, C2 3.50245e-5, C3 0, C4 0.000353656, D -8.34701e-6
- Eutrophication potential aquatic freshwater (EP-freshwater) [kg PO_(4)-Äq.]: A1-A3 6.89376e-5, A4 6.35484e-7, A5 3.45141e-6, C1 0, C2 6.76047e-8, C3 0, C4 8.46592e-8, D -5.66269e-9
- Eutrophication potential aquatic marine (EP-marine) [kg N-Äq.]: A1-A3 0.003012, A4 0.000143614, A5 0.000155759, C1 0, C2 1.5278e-5, C3 0, C4 9.10232e-5, D -3.00878e-6
- Eutrophication potential terrestrial (EP-terrestrial) [mol N-Äq.]: A1-A3 0.0333651, A4 0.00164142, A5 0.00173183, C1 0, C2 0.00017462, C3 0, C4 0.00100019, D -3.20077e-5
- Formation potential of tropospheric ozone photochemical oxidants (POCP) [kg NMVOC-Äq.]: A1-A3 0.00601425, A4 0.000278894, A5 0.000316307, C1 0, C2 2.96696e-5, C3 0, C4 0.000275643, D -8.59401e-6
- Abiotic depletion potential for non fossil resources (ADPE) [kg Sb-Äq.]: A1-A3 4.08905e-7, A4 8.62965e-9, A5 2.06986e-8, C1 0, C2 9.18048e-10, C3 0, C4 4.4263e-9, D -1.22684e-9
- Abiotic depletion potential for fossil resources (ADPF) [MJ]: A1-A3 74.0109, A4 1.19099, A5 3.7364, C1 0, C2 0.126701, C3 0, C4 0.646721, D -0.257621
- Water use (WDP) [m^(3) world-Äq. deprived]: A1-A3 0.136664, A4 0.00135706, A5 0.00976395, C1 0, C2 0.000144369, C3 0, C4 0.00516661, D -0.000551694
- Incidence of disease due to PM emissions (PM) [Disease incidence]: A1-A3 1.08206e-7, A4 1.92193e-9, A5 5.64648e-9, C1 0, C2 2.04461e-10, C3 0, C4 4.37799e-9, D -7.06735e-11
- Human exposure efficiency relative to U235 (IR) [kBq U235-Äq.]: A1-A3 1.03652, A4 0.0013364, A5 0.0518963, C1 0, C2 0.00014217, C3 0, C4 0.00075523, D -0.0118852
- Comparative toxic unit for ecosystems (ETP-fw) [CTUe]: A1-A3 23.9393, A4 0.987387, A5 1.21705, C1 0, C2 0.105041, C3 0, C4 0.369529, D -0.0685845
- Comparative toxic unit for humans (carcinogenic) (HTP-c) [CTUh]: A1-A3 1.29267e-9, A4 2.21271e-11, A5 6.75562e-11, C1 0, C2 2.35394e-12, C3 0, C4 5.47617e-11, D -1.47409e-12
- Comparative toxic unit for humans (noncarcinogenic) (HTP-nc) [CTUh]: A1-A3 3.39509e-8, A4 1.43032e-9, A5 2.00491e-9, C1 0, C2 1.52162e-10, C3 0, C4 6.03274e-9, D -5.42131e-11
- Soil quality index (SQP) [SQP]: A1-A3 65.6607, A4 0.845246, A5 3.29077, C1 0, C2 0.0899198, C3 0, C4 0.134821, D -0.0128358

## Use advice
Scope:
This document refers to 1 m² THERMATEX/ARMSTRONG Standard Range mineral ceiling tiles with an average recipe and an average surface weight of 3,25 kg/m², manufactured at the production facility in Pontarlier, France under the brand names THERMATEX and ARMSTRONG.
System boundary:
The life cycle assessment of average THERMATEX/Armstrong Standard Range mineral ceiling tiles includes a cradle-to-gate analysis of the products’ environmental impacts with options. Subsequent life cycle phases are part of the analysis:

Module A1–A3 | Production stage

The production stage includes the upstream burdens of raw material supply, their transports and the manufacturing plant of Knauf Ceiling Solutions located in Pontarlier (France). Mineral ceiling tiles are produced in the wet-felt process. Main raw material inputs, therefore, refer to mineral wool, perlite, clay and starch. The production site is supplied with electricity from the French power grid and thermal energy from natural gas.

Module A4 | Transport from the gate to the site

Module A4 includes transport to the construction site. For this purpose, transport by truck over a distance of 470 km is used as a representative scenario.

Module A5 | Assembly at the site

For installation in the building, a scenario of 5 % loss is declared in this EPD. The losses during installation in the building are strongly dependent on the building geometry and the specific application. Thus, the percentage of waste can vary greatly in the building context and must be adjusted accordingly at the building level according to the actual conditions. In addition to the losses during installation in the building, Module A5 includes the environmental impacts from the End-of-Life of the packaging of the products.

Module C1 | Deconstruction and demolition

Disassembly of the product is done either manually or

using smaller tools. Referring energy demand is considered to be negligible.

Modul C2 | Transport to disposal

The transport to the disposal of the material is estimated declaring a 50 km radius to the landfill. In reality, this scenario may vary depending on the actual location of deconstruction and referring waste treatment.

Module C3 | Waste processing

The declared scenario assumes landfilling of the product. Referring environmental impacts are accounted for in module C4.

Module C4 | Disposal

Module C4 refers to the emissions from the disposal of the mineral ceiling tiles. The chosen scenario, therefore, includes the environmental burdens of landfilling of the product.

Module D | Benefits and loads beyond the system boundaryThe declared scenario assumes landfilling of the product. Referring environmental impacts are accounted for in module C4. Module D declares the substitution potential from energy recovery of the incineration of packaging waste in module A5.

## Data sources
- GaBi Database (all versions)
- GaBi database SP40 2020
