# Natural stone slab, flexible, indoor usage, thickness 20 mm; 52 kg/m2

Dataset: ILCD process, EPD, generic dataset
Geography: DE
Reference year: 2021
Valid until: 2022
Classification: oekobau.dat: Mineralische Baustoffe / Steine und Elemente / Naturwerkstein
Owner: Sphera Solutions GmbH
Compliance: EN 15804+A2
Review: Dependent internal review by Sphera Solutions GmbH; Independent external review by GaBi user forum
Amounts: rows without a unit in brackets have none in this file; such an amount is in the reference unit of its flow, which a separate flow dataset defines
copyright: true
licenseType: Free of charge for all users and uses
accessRestrictions: The license conditions as stated on https://www.oekobaudat.de/ apply.
accessRestrictions: Es gelten die Lizenzbedingungen wie sie auf https://www.oekobaudat.de/ genannt sind.

## General comment
This data set has been modeled according to the European Standard EN 15804+A2 for Sustainable Building. Results are depicted in modules that allow the structured expression of results over the entire life cycle.

## Geography
The data set represents the country specific situation in Germany, focusing on the main technologies, the region specific characteristics and / or import statistics.

## Time period
Annual average

## Technology and included processes
The LCA of natural stone slabs used for indoor floors covers the cradle-to-gate phase, that is, the extraction of limestone and the further processing (grid, grinding road, multi-blade saw). Between the location of extraction and the processing location an average distance of 20 km is defined. The observation is based on a mix of origin: 50% of natural stones are from China, 7% from Germany and 43% from the rest of Europe. The respective import transports are considered. The system boundaries are represented by the finished product, a 2 cm limestone slab for indoor floors (density 2600kg/m3).

In the disposal phase, a mechanical dismantling (excavator) is assumed in module C1. The transport in module C2 to the treatment plant takes place with a truck (50km). In module C3, the material is processed, any reinforcement is fed to a sink (no loads, no credits). A treatment loss of 25% was assumed. This loss is fed to an inert material landfill within Module C3 (average landfill emissions). In Module D, a credit for the net amount of material (excluding reinforcement and treatment losses) for the substitution of natural gravel as backfill material is given.

## Technical purpose
This product can be used in construction.

## Safety margin
10 %. Product system almost completely covered. Good technological, temporal and geographic representativeness.

## Reference product
- Natural stone slab, flexible, indoor usage, thickness 20 mm: 1

## Inputs
- Use of renewable primary energy as energy carrier (PERE) [MJ]: A1-A3 62.0812, A4 8.76941, C1 0.0119184, C2 0.104207, C3 0.630495, D -0.293792
- Use of renewable primary energy resources used as raw materials (PERM) [MJ]: A1-A3 0, A4 0, C1 0, C2 0, C3 0, D 0
- Total use of renewable primary energy (PERT) [MJ]: A1-A3 62.0812, A4 8.76941, C1 0.0119184, C2 0.104207, C3 0.630495, D -0.293792
- Use of non renewable primary energy as energy carrier (PENRE) [MJ]: A1-A3 190.227, A4 78.2801, C1 0.205354, C2 1.79549, C3 5.66422, D -1.07894
- Use of non renewable primary energy resources used as raw materials (PENRM) [MJ]: A1-A3 0, A4 0, C1 0, C2 0, C3 0, D 0
- Total use of non renewable primary energy resource (PENRT) [MJ]: A1-A3 190.227, A4 78.2801, C1 0.205354, C2 1.79549, C3 5.66422, D -1.07894
- Use of secondary material (SM) [kg]: A1-A3 0, A4 0, C1 0, C2 0, C3 0, D 0
- Use of renewable secondary fuels (SF) [MJ]: A1-A3 0, A4 0, C1 0, C2 0, C3 0, D 0
- Use of non renewable secondary fuels (NRSF) [MJ]: A1-A3 0, A4 0, C1 0, C2 0, C3 0, D 0
- Net use of fresh water (FW) [m3]: A1-A3 0.103188, A4 0.00370214, C1 1.05925e-5, C2 9.26142e-5, C3 0.00143263, D -0.000178097

## Outputs
- Hazardous waste disposed (HWD) [kg]: A1-A3 3.36768e-8, A4 4.88695e-9, C1 8.58314e-12, C2 7.50458e-11, C3 4.63495e-10, D -1.73835e-10
- Non harzardous waste disposed (NHWD) [kg]: A1-A3 8.68706, A4 0.0153524, C1 3.31488e-5, C2 0.000289834, C3 13.8855, D -0.716486
- Radioactive waste disposed (RWD) [kg]: A1-A3 0.0128717, A4 0.000956909, C1 1.97064e-7, C2 1.72301e-6, C3 4.99453e-5, D -3.18202e-5
- Components for re-use (CRU) [kg]: A1-A3 0, A4 0, C1 0, C2 0, C3 0, D 0
- Materials for recycling (MFR) [kg]: A1-A3 0, A4 0, C1 0, C2 0, C3 37.83, D 0
- Materials for energy recovery (MER) [kg]: A1-A3 0, A4 0, C1 0, C2 0, C3 0, D 0
- Exported electrical energy (EEE) [MJ]: A1-A3 0, A4 0, C1 0, C2 0, C3 0, D 0
- Exported thermal energy (EET) [MJ]: A1-A3 0, A4 0, C1 0, C2 0, C3 0, D 0

## Impact indicators
- Global Warming Potential - total (GWP-total) [kg CO2 eq.]: A1-A3 15.1267, A4 5.74301, C1 0.0153635, C2 0.136387, C3 0.358838, D -0.0822026
- Global Warming Potential - fossil fuels (GWP-fossil) [kg CO2 eq.]: A1-A3 15.0495, A4 5.72142, C1 0.0152604, C2 0.135456, C3 0.362567, D -0.0817623
- Global Warming Potential - biogenic (GWP-biogenic) [kg CO2 eq.]: A1-A3 0.0560724, A4 0.0158917, C1 3.60735e-6, C2 6.12122e-5, C3 -0.00518167, D -6.68405e-5
- Global Warming Potential - land use and land use change (GWP-luluc) [kg CO2 eq.]: A1-A3 0.0211035, A4 0.00569324, C1 9.94962e-5, C2 0.000869935, C3 0.0014533, D -0.000373515
- Depletion potenzial of the stratospheric ozone layer (ODP) [kg CFC-11 eq.]: A1-A3 1.86036e-13, A4 3.652e-14, C1 3.96409e-18, C2 3.46596e-17, C3 1.50437e-15, D -1.05571e-15
- Acidifcation potential, Accumulated Exceedance (AP) [Mole of H+ eq.]: A1-A3 0.0440837, A4 0.171388, C1 0.000205464, C2 0.000384049, C3 0.00291683, D -0.000270796
- Eutrophication potential - freshwater (EP-freshwater) [kg P eq.]: A1-A3 1.93038e-5, A4 5.78776e-6, C1 3.18618e-8, C2 2.78581e-7, C3 7.00937e-7, D -2.27508e-7
- Eutrophication potential - marine (EP-marine) [kg N eq.]: A1-A3 0.0101823, A4 0.0461646, C1 9.34729e-5, C2 0.000176923, C3 0.00109168, D -0.000105319
- Eutrophication potential - terrestrial (EP-terrestrial) [Mole of N eq.]: A1-A3 0.110128, A4 0.505533, C1 0.00102775, C2 0.00197945, C3 0.0119961, D -0.00115943
- Photochemical Ozone Creation Potential (POCP) [kg NMVOC eq.]: A1-A3 0.0297132, A4 0.127441, C1 0.00027994, C2 0.000345004, C3 0.00322104, D -0.000249103
- Abiotic depletion potential - non-fossil resources (ADPE) [kg Sb eq.]: A1-A3 2.38966e-6, A4 6.11713e-7, C1 1.34762e-9, C2 1.17828e-8, C3 1.88136e-7, D -1.66985e-8
- Abiotic depletion potential - fossil resources (ADPF) [MJ]: A1-A3 190.187, A4 78.1911, C1 0.205346, C2 1.79542, C3 5.66257, D -1.07873
- Water (user) deprivation potential (WDP) [m³ world equiv.]: A1-A3 3.53607, A4 0.0282351, C1 6.02241e-5, C2 0.000526564, C3 0.0481031, D -0.00199305

## Use advice
The data set represents a cradle to gate inventory. It can be used to characterise the supply chain situation of the respective commodity in a representative manner. Combination with individual unit processes using this commodity enables the generation of user-specific (product) LCAs.

## Data sources
- DNV - persönliche Kommunikation zum Energieverbrauch, 2008
- Documentation of data quality management
- GaBi Database Edition 2021, CUP2021.01
- GaBi database (all versions)
