# Coniferous lumber - kiln dried (German average)

Dataset: ILCD process, EPD, representative dataset
Geography: DE
Reference year: 2021
Valid until: 2026
Classification: OEKOBAU.DAT: Holz / Vollholz / Bau-Schnittholz
Method details: ILCD format; EN 15804
Generated by: Thünen-Institut für Holzforschung
Owner: Thünen-Institut für Holzforschung
Compliance: EN 15804+A2; EN 16485
Review: Independent external review by Dr. Frank Werner - Umwelt & Entwicklung
Amounts: rows without a unit in brackets have none in this file; such an amount is in the reference unit of its flow, which a separate flow dataset defines
copyright: true

## General comment
Further information on the declared unit and the inventory analysis based on manufacturer information (input and output of material and energy flows) are available for download as an Excel file within the section “background info”.
The data set was created in 2021 as an update with identical foreground system. All background data sets are taken from the GaBi Professional Database with content version 2021.1. The modeling and calculation of the life cycle assessment is based on the European standards EN 15804:2012+A2:2019 and EN 16485:2014. For questions, please contact holzundklima@thuenen.de.

## Geography
Für die Ökobilanzierung von kammergetrocknetem Nadelschnittholz wurden Daten von 38 Werken berücksichtigt (Rüter & Diederichs 2012). Im Rahmen der den Daten zugrunde liegenden Ökobilanzstudie wurden insgesamt 178 Prozesslinien für Vollholzprodukte erfasst. Im Verhältnis zu den vom Statistischen Bundesamt gemeldeten Produktionsmengen im selben Zeitraum entspricht die erreichte Abdeckung von Vollholzprodukten aus Nadelschnittholz 38 %.

## Time period
The data set is based on production data from the years 2009 to 2011 (foreground system).
The background system was updated in 2021.

## Technology and included processes
Die Holzrohstoffe werden durchschnittlich 111 km transportiert. Der größte Anteil der Rohstoffe ist Rundholz in Rinde. Zur Herstellung des Produktes wird frisches Nadelschnittholz in Paketen voll- oder halbautomatisch gebündelt und getrocknet. Dabei kommen bis auf sehr wenige Ausnahmen Trockenkammern mit der Arbeitsweise der Frischluft-Ablufttrocknung zur Anwendung. Das enthaltene Wasser wir langsam und kontrolliert an die umgebende Luft abgegeben. Dabei spielt die Zuführung von Wasser und Wärmeenergie in Form von erhitzter Luft eine zentrale Rolle. Die Trocknung kann je nach Dimension und gewünschter Endfeuchte mehrere Tage dauern. Tunneltrockner arbeiten nach dem gleichen Prinzip, sind aber meist bei Schnittholzveredlern in Gebrauch, da eine gleichmäßige Produktdimensionierung vorausgesetzt wird. Nach der Trocknung wird das Produkt für den Transport gestapelt und verpackt. Das Produkt wird nicht mit Holzschutzmitteln behandelt.
Die Holzfeuchte des Produktes liegt bei 12%

## Technical purpose
Kiln dried coniferous lumber comes in all typical dimensions as a beam, plank, square timber or lath. It is used in the construction sector and for furniture manufacturing. In the construction sector, timber houses, roof trusses, windows and doors as well as floors (floorboards, parquet or laminate) are made from coniferous lumber.

## Scenarios
- energetisch (Modul D): therm. Verwertung
- stofflich (Modul D): stoffl. Verwertung
- Entsorgung Verpackung (Modul A5): Das Modul A5 enthält ausschließlich die Entsorgung der Verpackungsmaterialien

## Reference product
- Nadelschnittholz - kammergetrocknet (Durchschnitt DE): 1

## Inputs
- Use of renewable primary energy (PERE) [MJ]: A1 26.1212, A2 5.04741, A3 1958.42, A1-A3 1989.59, A5 (Entsorgung Verpackung) 0.241296, C2 0.388441, C3 100.439, D (energetisch) 5902.75, D (stofflich) -34.9929
- Use of renewable primary energy resources used as raw materials (PERM) [MJ]: A1 8336.44, A2 0, A3 33.6354, A1-A3 8370.08, A5 (Entsorgung Verpackung) -33.6354, C2 0, C3 -8336.44, D (energetisch) 0, D (stofflich) 0
- Total use of renewable primary energy resources (PERT) [MJ]: A1 8362.56, A2 5.04741, A3 1992.06, A1-A3 10359.7, A5 (Entsorgung Verpackung) -33.3941, C2 0.388441, C3 -8236, D (energetisch) 5902.75, D (stofflich) -34.9929
- Use of non renewable primary energy (PENRE) [MJ]: A1 185.573, A2 83.5488, A3 434.02, A1-A3 703.142, A5 (Entsorgung Verpackung) 1.25375, C2 6.9697, C3 153.986, D (energetisch) -4573.88, D (stofflich) -170.245
- Use of non renewable primary energy resources used as raw materials (PENRM) [MJ]: A1 0, A2 0, A3 11.232, A1-A3 11.232, A5 (Entsorgung Verpackung) -11.232, C2 0, C3 0, D (energetisch) 0, D (stofflich) 0
- Total use of non renewable primary energy resource (PENRT) [MJ]: A1 185.573, A2 83.5488, A3 445.252, A1-A3 714.374, A5 (Entsorgung Verpackung) -9.97825, C2 6.9697, C3 153.986, D (energetisch) -4573.88, D (stofflich) -170.245
- Use of secondary material (SM) [kg]: A1 0, A2 0, A3 0, A1-A3 0, A5 (Entsorgung Verpackung) 0, C2 0, C3 0, D (energetisch) 0, D (stofflich) 484.445
- Use of renewable secondary fuels (RSF) [MJ]: A1 0, A2 0, A3 151.619, A1-A3 151.619, A5 (Entsorgung Verpackung) 0, C2 0, C3 0, D (energetisch) 0, D (stofflich) 0
- Use of non renewable secondary fuels (NRSF) [MJ]: A1 0, A2 0, A3 0, A1-A3 0, A5 (Entsorgung Verpackung) 0, C2 0, C3 0, D (energetisch) 0, D (stofflich) 0
- Use of net fresh water (FW) [m3]: A1 0.0162626, A2 0.00442934, A3 0.096245, A1-A3 0.116937, A5 (Entsorgung Verpackung) 0.0136902, C2 0.000444632, C3 0.0472656, D (energetisch) 0.765096, D (stofflich) -0.0195775

## Outputs
- Hazardous waste disposed (HWD) [kg]: A1 5.235e-7, A2 3.62523e-9, A3 4.4435e-7, A1-A3 9.71475e-7, A5 (Entsorgung Verpackung) 2.25627e-10, C2 3.51199e-10, C3 5.59893e-8, D (energetisch) -1.58066e-6, D (stofflich) -2.27724e-7
- Non hazardous waste dispose (NHWD) [kg]: A1 0.0467874, A2 0.0136655, A3 1.54262, A1-A3 1.60307, A5 (Entsorgung Verpackung) 0.046887, C2 0.00103536, C3 0.11997, D (energetisch) 2.15062, D (stofflich) -0.0384086
- Radioactive waste disposed (RWD) [kg]: A1 0.00214175, A2 0.000108057, A3 0.023623, A1-A3 0.0258728, A5 (Entsorgung Verpackung) 5.97614e-5, C2 8.43072e-6, C3 0.0123357, D (energetisch) -0.280218, D (stofflich) -0.00368304
- Components for re-use (CRU) [kg]: A1 0, A2 0, A3 0, A1-A3 0, A5 (Entsorgung Verpackung) 0, C2 0, C3 0, D (energetisch) 0, D (stofflich) 0
- Materials for recycling (MFR) [kg]: A1 0, A2 0, A3 0, A1-A3 0, A5 (Entsorgung Verpackung) 0, C2 0, C3 484.445, D (energetisch) 0, D (stofflich) 0
- Materials for energy recovery (MER) [kg]: A1 0, A2 0, A3 0, A1-A3 0, A5 (Entsorgung Verpackung) 1.74539, C2 0, C3 484.445, D (energetisch) 0, D (stofflich) 0
- Exported electrical energy (EEE) [MJ]: A1 0, A2 0, A3 0.158457, A1-A3 0.158457, A5 (Entsorgung Verpackung) 8.8556, C2 0, C3 0, D (energetisch) 0, D (stofflich) 0
- Exported thermal energy (EET) [MJ]: A1 0, A2 0, A3 0.368113, A1-A3 0.368113, A5 (Entsorgung Verpackung) 17.1524, C2 0, C3 0, D (energetisch) 0, D (stofflich) 0

## Impact indicators
- Global Warming Potential - total (GWP-total) [kg CO2-Äqv.]: A1 -778.252, A2 6.27221, A3 32.9366, A1-A3 -739.044, A5 (Entsorgung Verpackung) 4.62013, C2 0.502877, C3 805.22, D (energetisch) -337.132, D (stofflich) -13.1565
- Global Warming Potential - fossil fuels (GWP-fossil) [kg CO2-Äqv.]: A1 14.8292, A2 6.27221, A3 36.1365, A1-A3 57.2379, A5 (Entsorgung Verpackung) 1.42024, C2 0.502877, C3 12.138, D (energetisch) -337.132, D (stofflich) -13.1565
- Global Warming Potential - biogenic (GWP-biogenic) [kg CO2-Äqv.]: A1 -793.082, A2 0, A3 -3.19988, A1-A3 -796.282, A5 (Entsorgung Verpackung) 3.19988, C2 0, C3 793.082, D (energetisch) 0, D (stofflich) 0
- Depletion potential of the stratospheric ozone layer (ODP) [kg CFC 11-Äquiv.]: A1 6.98948e-14, A2 2.50893e-15, A3 7.86423e-13, A1-A3 8.58826e-13, A5 (Entsorgung Verpackung) 7.92635e-16, C2 6.68043e-17, C3 4.15483e-13, D (energetisch) -9.43494e-12, D (stofflich) -1.22311e-13
- Acidification potential, Accumulated Exceedance (AP) [mol H+ eqv.]: A1 0.110623, A2 0.0366674, A3 0.363344, A1-A3 0.510634, A5 (Entsorgung Verpackung) 0.000861266, C2 0.00303596, C3 0.0174679, D (energetisch) -0.307385, D (stofflich) -0.06682
- Eutrophication potential - freshwater (EP-freshwater) [kg P eqv.]: A1 3.3329e-5, A2 1.31999e-5, A3 0.00014345, A1-A3 0.000189979, A5 (Entsorgung Verpackung) 1.20761e-7, C2 1.55219e-6, C3 5.08852e-5, D (energetisch) -0.00115942, D (stofflich) -3.08041e-5
- Eutrophication potential - marine (EP-marine) [kg N eqv.]: A1 0.0531965, A2 0.0180949, A3 0.154901, A1-A3 0.226193, A5 (Entsorgung Verpackung) 0.000252228, C2 0.00148757, C3 0.00558653, D (energetisch) -0.109604, D (stofflich) -0.0312654
- Eutrophication potential - terrestrial (EP-terrestrial) [mol N eqv.]: A1 0.586037, A2 0.200212, A3 1.75149, A1-A3 2.53774, A5 (Entsorgung Verpackung) 0.00409709, C2 0.0164649, C3 0.0583261, D (energetisch) -0.893489, D (stofflich) -0.343993
- Versauerungspotenzial, kumulierte Überschreitung (AP) [kg NMVOC eqv.]: A1 0.149385, A2 0.0339558, A3 0.461807, A1-A3 0.645148, A5 (Entsorgung Verpackung) 0.000676052, C2 0.00280548, C3 0.0138795, D (energetisch) -0.274286, D (stofflich) -0.0811191
- Abiotic depletion potential - non-fossil resources (ADPE) [kg Sb-Äqv.]: A1 1.97084e-6, A2 5.54931e-7, A3 2.71095e-5, A1-A3 2.96352e-5, A5 (Entsorgung Verpackung) 1.21763e-8, C2 3.98073e-8, C3 4.98206e-6, D (energetisch) -0.000118037, D (stofflich) -2.20574e-6
- Abiotic depletion potential - fossil resources (ADPF) [MJ]: A1 185.555, A2 83.5419, A3 433.856, A1-A3 702.953, A5 (Entsorgung Verpackung) 1.25315, C2 6.96041, C3 153.938, D (energetisch) -4572.77, D (stofflich) -170.182
- Water (user) deprivation potential (WDP) [m3 world eqv.]: A1 0.0162626, A2 0.00442934, A3 0.096245, A1-A3 0.116937, A5 (Entsorgung Verpackung) 0.0136902, C2 0.000444632, C3 0.0472656, D (energetisch) 0.765096, D (stofflich) -0.0195775
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
## Use advice
Aufgrund der hohen Abdeckung bildet der Datensatz die durchschnittlichen Produktionsverhältnisse und die damit verbundenen Umweltwirkungen repräsentativ für Deutschland ab. Liegen keine herstellerspezifischen Ökobilanzergebnisse des verwendeten Produkts vor, empfiehlt sich die Verwendung dieses Durchschnittsdatensatzes.

## Data sources
- Rüter S, Diederichs S (2012) Ökobilanz Basisdaten für Bauprodukte aus Holz, Hamburg, Johann Heinrich von Thünen Institut, Institut für Holztechnologie und Holzbiologie, Abschlussbericht
- GaBi database (general)
