# PIPELANE pipe sections +A2

Dataset: ILCD process, EPD, specific dataset
Geography: CH
Reference year: 2021
Valid until: 2026
Classification: OEKOBAU.DAT: Dämmstoffe / Mineralwolle / Glaswolle
Classification: IBUCategories: 02 Bauprodukte / Wärmedämmungsprodukte / Mineralische Dämmstoffe
Method details: Mineralische Dämmstoffe.pdf
Generated by: Dr. Frank Werner - Umwelt & Entwicklung
Registration number: EPD-SAR-20200271-CBA1-DE
Owner: Sager AG
Compliance: DIN EN 15804+A2; ISO 14025
Review: Accredited third party review by Institut Bauen und Umwelt e. V.
Amounts: rows without a unit in brackets have none in this file; such an amount is in the reference unit of its flow, which a separate flow dataset defines
copyright: true
licenseType: Free of charge for all users and uses
accessRestrictions: None

## General comment
The product declaration refers to pipe sections made of glass wool. Glass wool consists of man-made monofilament mineral fibres of non-crystalline structure. The average fibre diameter is between 3 and 6 μm. The production is monitored and certified by RAL and EUCEB. The glass wool complies with the definition of glass wool according to German legislation on hazardous substances. The density of PIPELANE products varies from 45 to 100 kg/m3.

The products are marketed under the name PIPELANE.

## Technology and included processes
Declared unit:
The declared values refer to 1 kg of uncoated, phenolic resin-bonded PIPELANE pipe sections made of glass wool.

## Technical purpose
PIPELANE pipe sections are used as sheathing for pipelines as thermal and sound insulation and to minimise heat radiation losses. They are mainly used for the insulation of building services and operational industrial plants.

If the pipes require particularly impact-resistant surfaces or a vapour control layer, the PIPELANE pipe shells can be coated.

## Reference product
- PIPELAN Rohrschalen aus Glaswolle, phenolharzgebunden (): 1

## Inputs
- Renewable primary energy as energy carrier (PERE) [MJ]: A1-A3 4.43539, A4 0.00558015, A5 0.0899274, C1 0, C2 0.000479581, C3 0, C4 0.00172066, D -0.157734
- Renewable primary energy resources as material utilization (PERM) [MJ]: A1-A3 0, A4 0, A5 0, C1 0, C2 0, C3 0, C4 0, D 0
- Total use of renewable primary energy resources (PERT) [MJ]: A1-A3 4.43539, A4 0.00558015, A5 0.0899274, C1 0, C2 0.000479581, C3 0, C4 0.00172066, D -0.157734
- Non renewable primary energy as energy carrier (PENRE) [MJ]: A1-A3 33.6332, A4 0.37972, A5 0.745, C1 0, C2 0.0326347, C3 0, C4 0.183967, D -1.45898
- Non renewable primary energy as material utilization (PENRM) [MJ]: A1-A3 0, A4 0, A5 0, C1 0, C2 0, C3 0, C4 0, D 0
- Total use of non renewable primary energy resources (PENRT) [MJ]: A1-A3 33.6332, A4 0.37972, A5 0.745, C1 0, C2 0.0326347, C3 0, C4 0.183967, D -1.45898
- Use of secondary material (SM) [kg]: A1-A3 0.75, A4 0, A5 0.015, C1 0, C2 0, C3 0, C4 0, D 0
- Use of renewable secondary fuels (RSF) [MJ]: A1-A3 0, A4 0, A5 0, C1 0, C2 0, C3 0, C4 0, D 0
- Use of non renewable secondary fuels (NRSF) [MJ]: A1-A3 0, A4 0, A5 0, C1 0, C2 0, C3 0, C4 0, D 0
- Use of net fresh water (FW) [m^3]: A1-A3 0.0355375, A4 0.00017718, A5 0.000813864, C1 0, C2 1.52275e-5, C3 0, C4 0.000198592, D -0.000682451

## Outputs
- Hazardous waste disposed (HWD) [kg]: A1-A3 2.58375e-5, A4 4.30182e-7, A5 7.09458e-7, C1 0, C2 3.69716e-8, C3 0, C4 6.2557e-8, D -5.04602e-7
- Non hazardous waste disposed (NHWD) [kg]: A1-A3 0.197947, A4 0.00335433, A5 0.0296666, C1 0, C2 0.000288284, C3 0, C4 0.999438, D -0.00156169
- Radioactive waste disposed (RWD) [kg]: A1-A3 0.000251833, A4 4.23744e-7, A5 5.11919e-6, C1 0, C2 3.64183e-8, C3 0, C4 1.31905e-7, D -1.47232e-5
- Components for re-use (CRU) [kg]: A1-A3 0, A4 0, A5 0, C1 0, C2 0, C3 0, C4 0, D 0
- Materials for recycling (MFR) [kg]: A1-A3 0, A4 0, A5 0, C1 0, C2 0, C3 0, C4 0, D 0
- Materials for energy recovery (MER) [kg]: A1-A3 0, A4 0, A5 0, C1 0, C2 0, C3 0, C4 0, D 0
- Exported electrical energy (EEE) [MJ]: A1-A3 0, A4 0, A5 0.338926, C1 0, C2 0, C3 0, C4 0, D 0
- Exported thermal energy (EET) [MJ]: A1-A3 0, A4 0, A5 0.65076, C1 0, C2 0, C3 0, C4 0, D 0

## Impact indicators
- Global Warming Potential total (GWP-total) [kg CO_(2)-Äq.]: A1-A3 2.12213, A4 0.0372629, A5 0.342783, C1 0, C2 0.00206842, C3 0, C4 0.00727657, D -0.0315394
- Global Warming Potential fossil fuels (GWP-fossil) [kg CO_(2)-Äq.]: A1-A3 2.34297, A4 0.0372709, A5 0.0516643, C1 0, C2 0.00206887, C3 0, C4 0.00727591, D -0.0314853
- Global Warming Potential biogenic (GWP-biogenic) [kg CO_(2)-Äq.]: A1-A3 -0.223337, A4 -1.0439e-5, A5 0.291069, C1 0, C2 -5.79456e-7, C3 0, C4 2.09426e-7, D -3.09391e-5
- Global Warming Potential luluc (GWP-luluc) [kg CO_(2)-Äq.]: A1-A3 0.00249872, A4 2.37496e-6, A5 5.02094e-5, C1 0, C2 1.31831e-7, C3 0, C4 4.50182e-7, D -2.31782e-5
- Depletion potential of the stratospheric ozone layer (ODP) [kg CFC11-Äq.]: A1-A3 2.8185e-7, A4 1.90032e-9, A5 5.95603e-9, C1 0, C2 1.05485e-10, C3 0, C4 7.96287e-10, D -4.98411e-9
- Acidification potential of land and water (AP) [mol H^(+)-Äq.]: A1-A3 0.0104717, A4 0.000265693, A5 0.000251965, C1 0, C2 1.47483e-5, C3 0, C4 5.71999e-5, D -3.9677e-5
- Eutrophication potential aquatic freshwater (EP-freshwater) [kg PO_(4)-Äq.]: A1-A3 7.8574e-5, A4 5.04046e-7, A5 1.62725e-6, C1 0, C2 2.7979e-8, C3 0, C4 6.18739e-8, D -4.89608e-7
- Eutrophication potential aquatic marine (EP-marine) [kg N-Äq.]: A1-A3 0.00150517, A4 0.000113504, A5 5.02355e-5, C1 0, C2 6.30049e-6, C3 0, C4 2.37825e-5, D -8.34118e-6
- Eutrophication potential terrestrial (EP-terrestrial) [mol N-Äq.]: A1-A3 0.0351578, A4 0.00124758, A5 0.00091929, C1 0, C2 6.92515e-5, C3 0, C4 0.000261579, D -9.19328e-5
- Formation potential of tropospheric ozone photochemical oxidants (POCP) [kg NMVOC-Äq.]: A1-A3 0.00521173, A4 0.000353593, A5 0.000158752, C1 0, C2 1.96275e-5, C3 0, C4 7.79052e-5, D -3.15262e-5
- Abiotic depletion potential for non fossil resources (ADPE) [kg Sb-Äq.]: A1-A3 3.30725e-6, A4 8.66784e-8, A5 7.07624e-8, C1 0, C2 4.81142e-9, C3 0, C4 6.77967e-9, D -9.37649e-9
- Abiotic depletion potential for fossil resources (ADPF) [MJ]: A1-A3 57.6079, A4 0.587756, A5 1.21028, C1 0, C2 0.0326256, C3 0, C4 0.183929, D -0.852924
- Water use (WDP) [m^(3) Welt-Äq. entzogen]: A1-A3 1437.32, A4 1.77055, A5 28.9576, C1 0, C2 0.0982811, C3 0, C4 0.360233, D -22.6888
- Incidence of disease due to PM emissions (PM) [Krankheitsfälle]: A1-A3 8.45061e-8, A4 2.83018e-9, A5 2.2172e-9, C1 3.9591e-9, C2 1.571e-10, C3 0, C4 1.07237e-9, D -1.52736e-10
- Human exposure efficiency relative to U235 (IR) [kBq U235-Äq.]: A1-A3 0.883693, A4 0.00104899, A5 0.0177762, C1 0, C2 5.82284e-5, C3 0, C4 0.000211245, D -0.0141112
- Comparative toxic unit for ecosystems (ETP-fw) [CTUe]: A1-A3 23.8761, A4 0.260381, A5 0.518075, C1 0, C2 0.0144534, C3 0, C4 0.0614294, D -0.124096
- Comparative toxic unit for humans (carcinogenic) (HTP-c) [CTUh]: A1-A3 1.86681e-9, A4 2.22755e-11, A5 4.47422e-11, C1 0, C2 1.23649e-12, C3 0, C4 2.5326e-12, D -3.33544e-12
- Comparative toxic unit for humans (noncarcinogenic) (HTP-nc) [CTUh]: A1-A3 1.35299e-8, A4 4.11276e-10, A5 7.27164e-10, C1 0, C2 2.28295e-11, C3 0, C4 6.48724e-11, D -6.73848e-11
- Soil quality index (SQP) [SQP]: A1-A3 18.0181, A4 0.0747128, A5 0.372457, C1 0, C2 0.00414722, C3 0, C4 0.322854, D -0.00658184

## Use advice
Scope:
The declaration refers to PIPELANE pipe sections made of glass wool, which are manufactured at the Sager AG site in Dürrenäsch/CH.
System boundary:
Type of EPD: Cradle to factory gate - with options

Modules A1-A3 cover all material and energy flows required for the production of PIPELANE glass wool; the system boundary for waste glass is assumed to be at the point where it is sorted by type.

Module A4 includes transport to the construction site.

Module A5 involves the incineration of the transport packaging in a waste incineration plant (MWIP), with the recovered energy being exported to Module D.

In addition, 2% waste is assumed in accordance with EN 16783, which means that a corresponding production quantity including packaging and transport to the construction site and its disposal (waste and its packaging) are also inventoried in module A5.

Module C1: dust emissions are inventoried during deconstruction.

Module C2 comprises the transport of the deconstructed glass wool to a landfill for inert materials.

In Module C3, due to the assumed disposal scenario in an inert landfill, no environmental impacts occur in this module.

Module C4 covers the landfilling process of glass wool without taking into account the energetic utilisation of the landfill gas from the (small) organic components.

Module D includes the benefits from the production of electricity and heat generated from the thermal treatment of the packaging waste from the installation of the glass wool on the construction site (incl. 2 % of the packaging offcuts) from Module A5 in a MWIP.

## Data sources
- ecoinvent database (all versions)
- ecoinvent 2.2 database
