# Clay plaster; 1600 kg/m3

Dataset: ILCD process, EPD, generic dataset
Geography: DE
Reference year: 2021
Valid until: 2022
Classification: oekobau.dat: Mineralische Baustoffe / Mörtel und Beton / Putz und Putzmörtel
Owner: Sphera Solutions GmbH
Compliance: EN 15804+A2
Review: Dependent internal review by Sphera Solutions GmbH; Independent external review by GaBi user forum
Amounts: rows without a unit in brackets have none in this file; such an amount is in the reference unit of its flow, which a separate flow dataset defines
copyright: true
licenseType: Free of charge for all users and uses
accessRestrictions: The license conditions as stated on https://www.oekobaudat.de/ apply.
accessRestrictions: Es gelten die Lizenzbedingungen wie sie auf https://www.oekobaudat.de/ genannt sind.

## General comment
This data set has been modeled according to the European Standard EN 15804+A2 for Sustainable Building. Results are depicted in modules that allow the structured expression of results over the entire life cycle.

## Geography
The data set represents the country specific situation in Germany, focusing on the main technologies, the region specific characteristics and / or import statistics.

## Time period
Annual average

## Technology and included processes
Mineral plasters and mortars are mainly based on inorganic raw materials, such as limestone, sand and quartz. Lime, cement and plaster are used as a mineral binder. According to their composition, the individual components are weighed, measured out, mixed and then packed in silos and sacks. The system boundary of the finished product is represented by the factory gate. Transports from the factory to the building site are not considered and must be included according to the system boundaries.

"During the disposal phase, manual dismantling is taken into account in Module C1 for plasters, mortar and construction boards made of clay, and a mechanical dismantling for staple walls and clay masonry.
The transport in module C2 to the treatment plant takes place with a truck (50km).
In module C3 a treatment of the clay product is accounted for, whereby 3% material is lost.
In Module D, a credit for the net amount of material (amount recovered minus treatment losses, including possible fiber reinforcements) for the substitution of clay powder."

## Technical purpose
This product can be used in construction.

## Safety margin
20 %. Product system depicted except for a few missing processes / flows. Technological, temporal and geographic representativeness partly given.

## Reference product
- Clay plaster: 1

## Inputs
- Use of renewable primary energy as energy carrier (PERE) [MJ]: A1-A3 143.183, C2 1.96755, C3 4.80503, D -0.883156
- Use of renewable primary energy resources used as raw materials (PERM) [MJ]: A1-A3 0, C2 0, C3 0, D 0
- Total use of renewable primary energy (PERT) [MJ]: A1-A3 143.183, C2 1.96755, C3 4.80503, D -0.883156
- Use of non renewable primary energy as energy carrier (PENRE) [MJ]: A1-A3 955.979, C2 33.9009, C3 54.3785, D -15.2168
- Use of non renewable primary energy resources used as raw materials (PENRM) [MJ]: A1-A3 0, C2 0, C3 0, D 0
- Total use of non renewable primary energy resource (PENRT) [MJ]: A1-A3 955.979, C2 33.9009, C3 54.3785, D -15.2168
- Use of secondary material (SM) [kg]: A1-A3 0, C2 0, C3 0, D 0
- Use of renewable secondary fuels (SF) [MJ]: A1-A3 0, C2 0, C3 0, D 0
- Use of non renewable secondary fuels (NRSF) [MJ]: A1-A3 0, C2 0, C3 0, D 0
- Net use of fresh water (FW) [m3]: A1-A3 0.703663, C2 0.00174866, C3 0.014101, D -0.000784905

## Outputs
- Hazardous waste disposed (HWD) [kg]: A1-A3 2.12512e-7, C2 1.41695e-9, C3 3.15859e-9, D -6.36013e-10
- Non harzardous waste disposed (NHWD) [kg]: A1-A3 4.57424, C2 0.00547238, C3 0.0156596, D -0.00245634
- Radioactive waste disposed (RWD) [kg]: A1-A3 0.0154859, C2 3.25324e-5, C3 0.000400347, D -1.46025e-5
- Components for re-use (CRU) [kg]: A1-A3 0, C2 0, C3 0, D 0
- Materials for recycling (MFR) [kg]: A1-A3 0, C2 0, C3 872.939, D 0
- Materials for energy recovery (MER) [kg]: A1-A3 0, C2 0, C3 0, D 0
- Exported electrical energy (EEE) [MJ]: A1-A3 0, C2 0, C3 0, D 0
- Exported thermal energy (EET) [MJ]: A1-A3 0, C2 0, C3 0, D 0

## Impact indicators
- Global Warming Potential - total (GWP-total) [kg CO2 eq.]: A1-A3 98.6229, C2 2.57504, C3 3.11447, D -1.1381
- Global Warming Potential - fossil fuels (GWP-fossil) [kg CO2 eq.]: A1-A3 93.0652, C2 2.55756, C3 2.88252, D -1.13037
- Global Warming Potential - biogenic (GWP-biogenic) [kg CO2 eq.]: A1-A3 5.4296, C2 0.00105944, C3 0.216168, D -0.000357365
- Global Warming Potential - land use and land use change (GWP-luluc) [kg CO2 eq.]: A1-A3 0.128067, C2 0.0164253, C3 0.0157881, D -0.0073727
- Depletion potenzial of the stratospheric ozone layer (ODP) [kg CFC-11 eq.]: A1-A3 5.63204e-13, C2 6.54413e-16, C3 1.28537e-14, D -2.93741e-16
- Acidifcation potential, Accumulated Exceedance (AP) [Mole of H+ eq.]: A1-A3 0.179794, C2 0.00725127, C3 0.0268632, D -0.0126956
- Eutrophication potential - freshwater (EP-freshwater) [kg P eq.]: A1-A3 0.000232745, C2 5.25992e-6, C3 6.56423e-6, D -2.36097e-6
- Eutrophication potential - marine (EP-marine) [kg N eq.]: A1-A3 0.0749615, C2 0.00334051, C3 0.0132887, D -0.00646801
- Eutrophication potential - terrestrial (EP-terrestrial) [Mole of N eq.]: A1-A3 0.811966, C2 0.0373742, C3 0.14604, D -0.0711367
- Photochemical Ozone Creation Potential (POCP) [kg NMVOC eq.]: A1-A3 0.186176, C2 0.00651406, C3 0.0386262, D -0.0187199
- Abiotic depletion potential - non-fossil resources (ADPE) [kg Sb eq.]: A1-A3 1.02273e-5, C2 2.22472e-7, C3 3.17657e-6, D -9.98591e-8
- Abiotic depletion potential - fossil resources (ADPF) [MJ]: A1-A3 955.744, C2 33.8995, C3 54.3752, D -15.2162
- Water (user) deprivation potential (WDP) [m³ world equiv.]: A1-A3 28.4463, C2 0.00994211, C3 0.484101, D -0.00446263

## Use advice
The data set represents a cradle to gate inventory. It can be used to characterise the supply chain situation of the respective commodity in a representative manner. Combination with individual unit processes using this commodity enables the generation of user-specific (product) LCAs.

## Data sources
- Documentation of data quality management
- GaBi Database Edition 2021, CUP2021.01
- GaBi database (all versions)
