# Gussglas - Glasfabrik Lamberts GmbH & Co. KG - LINIT Profilbauglas, veredelt

Dataset: ILCD process, EPD, specific dataset
Geography: DE
Reference year: 2017
Valid until: 2022
Classification: Komponenten von Fenstern und Vorhangfassaden / Füllungen / Transparente Füllungen
Classification: OEKOBAU.DAT: Komponenten von Fenstern und Vorhangfassaden / Füllungen / Transparente Füllungen
Synonyms: thermisch vorgespannt; farbemailliert; sandgestrahlt; U-Form; Glas
Method details: EPD Ornament-, Draht-, Solar- und Profilbauglas; Produktkategorieregeln Teil A; Produktkategorieregeln Teil B – für Flachglas im Bauwesen
Owner: Glasfabrik Lamberts GmbH & Co. KG
Compliance: EN 15804
Review: Independent external review by Patrick Wortner
Amounts: rows without a unit in brackets have none in this file; such an amount is in the reference unit of its flow, which a separate flow dataset defines
copyright: true

## General comment
A1-A3 sowie Module C3, C4, D. Das Umweltprofil beinhaltet die Aufwendungen für die Lebenszyklus-Stadien cradle to gate mit Optionen (Modul A1-A3). Die Herstellung der Verpackung wurde innerhalb der Module A1-A3 berücksichtigt.

## Geography
Dieser Datensatz repräsentiert die Situation des Unternehmens Glasfabrik Lamberts GmbH & Co. KG in 95632 Wunsiedel Holenbrunn, im Hinblick auf die wichtigsten Technologien und die gesetzlichen Rahmenbedingungen.

## Time period
jährlicher Durchschnitt

## Technology and included processes
Die Ökobilanzergebnisse umfassen die Lebenszyklusstadien der Herstellung der Vorprodukte bis hin zur Rohstoffgewinnung und Verarbeitungsprozesse von als Input dienenden Sekundärstoffen (z.B. Recyclingprozesse), deren Transporte zum Werk sowie die Produktion selbst, einschließlich der Bereitstellung von allen Hilfs- und Betriebsstoffen, Energie, sowie die vollständige Abfallbehandlung oder die Deponierung der Restabfälle während des Stadiums der Produktion. Die Module A1, A2 und A3 sind hier als ein aggregiertes Modul A1-A3 ausgewiesen. Falls für diesen Datensatz weitere Module berechnet wurden, sind diese separat zu finden und können für eine Betrachtung des gesamten Lebenszyklus zusammengeführt werden.

## Technical purpose
Architektur und Fassadenbau

## Scenarios
- Scenario 1: C4 = 100%-Szenario Deponie
- Scenario 2: C3 + D = 100%-Szenario Recycling und Gutschrift

## Reference product
- Gussglas - Glasfabrik Lamberts GmbH & Co. KG - LINIT Profilbauglas, veredelt: 1

## Inputs
- Use of net fresh water (FW) [m3]: A1-A3 0.05, C3 (Scenario 2) 7.5e-5, C4 (Scenario 1) 0.00206, D (Scenario 2) -0.00322
- Use of non renewable primary energy (PENRE) [MJ]: A1-A3 55.3, C3 (Scenario 2) 0.17, C4 (Scenario 1) 4.74, D (Scenario 2) -21.7
- Use of non renewable primary energy resources used as raw materials (PENRM) [MJ]: A1-A3 0.02, C3 (Scenario 2) -0.02, C4 (Scenario 1) -0.02, D (Scenario 2) 0
- Use of non renewable secondary fuels (NRSF) [MJ]: A1-A3 0, C3 (Scenario 2) 0, C4 (Scenario 1) 0, D (Scenario 2) 0
- Use of renewable primary energy (PERE) [MJ]: A1-A3 39.2, C3 (Scenario 2) 0.05, C4 (Scenario 1) 1.43, D (Scenario 2) -1.47
- Use of renewable primary energy resources used as raw materials (PERM) [MJ]: A1-A3 0, C3 (Scenario 2) 0, C4 (Scenario 1) 0, D (Scenario 2) 0
- Use of renewable secondary fuels (RSF) [MJ]: A1-A3 0, C3 (Scenario 2) 0, C4 (Scenario 1) 0, D (Scenario 2) 0
- Use of secondary material (SM) [kg]: A1-A3 0.81, C3 (Scenario 2) 0, C4 (Scenario 1) 0, D (Scenario 2) 0
- Total use of non renewable primary energy resource (PENRT) [MJ]: A1-A3 55.3, C3 (Scenario 2) 0.15, C4 (Scenario 1) 4.72, D (Scenario 2) -21.72
- Total use of renewable primary energy resources (PERT) [MJ]: A1-A3 39.2, C3 (Scenario 2) 0.05, C4 (Scenario 1) 1.43, D (Scenario 2) -1.47

## Outputs
- Components for re-use (CRU) [kg]: A1-A3 0, C3 (Scenario 2) 0, C4 (Scenario 1) 0
- Exported electrical energy (EEE) [MJ]: A1-A3 0, C3 (Scenario 2) 0, C4 (Scenario 1) 0
- Exported thermal energy (EET) [MJ]: A1-A3 0, C3 (Scenario 2) 0, C4 (Scenario 1) 0
- Hazardous waste disposed (HWD) [kg]: A1-A3 1.34e-7, C3 (Scenario 2) 6.26e-11, C4 (Scenario 1) 1.4e-8, D (Scenario 2) -1.87e-8
- Materials for energy recovery (MER) [kg]: A1-A3 0, C3 (Scenario 2) 0, C4 (Scenario 1) 0
- Materials for recycling (MFR) [kg]: A1-A3 1.77e-6, C3 (Scenario 2) 2.83, C4 (Scenario 1) 0
- Non hazardous waste dispose (NHWD) [kg]: A1-A3 0.16, C3 (Scenario 2) 0.000102, C4 (Scenario 1) 3.65, D (Scenario 2) -0.2
- Radioactive waste disposed (RWD) [kg]: A1-A3 0.000936, C3 (Scenario 2) 2.4e-5, C4 (Scenario 1) 0.000623, D (Scenario 2) -0.000642

## Impact indicators
- Abiotic depletion potential for non fossil resources (ADPE) [kg Sb-Äqv.]: A1-A3 2.14e-5, C3 (Scenario 2) 3.52e-9, C4 (Scenario 1) 1.11e-7, D (Scenario 2) -3.21e-6
- Abiotic depletion potential for fossil resources (ADPF) [MJ]: A1-A3 53, C3 (Scenario 2) 0.09, C4 (Scenario 1) 3.16, D (Scenario 2) -20.11
- Acidification potential of soil and water (AP) [kg SO2-Äqv.]: A1-A3 0.01, C3 (Scenario 2) 2.52e-5, C4 (Scenario 1) 0.000989, D (Scenario 2) -0.01
- Eutrophication potential (EP) [kg Phosphat-Äqv.]: A1-A3 0.00107, C3 (Scenario 2) 2.28e-6, C4 (Scenario 1) 0.000105, D (Scenario 2) -0.00104
- Global warming potential (GWP) [kg CO2-Äqv.]: A1-A3 1.81, C3 (Scenario 2) 0.01, C4 (Scenario 1) 0.28, D (Scenario 2) -1.51
- Depletion potential of the stratospheric ozone layer (ODP) [kg CFC 11 eq.]: A1-A3 9.65e-8, C3 (Scenario 2) 3.91e-13, C4 (Scenario 1) 1e-11, D (Scenario 2) -1.03e-11
- Formation potential of tropospheric ozone (POCP) [kg Ethen-Äqv.]: A1-A3 0.000647, C3 (Scenario 2) 1.61e-6, C4 (Scenario 1) 6.83e-5, D (Scenario 2) 0.00108

## Use advice
Dieser Datensatz beinhaltet die Ergebnisse für die Module A1-A3 sowie die Module C3, C4, D gemäß EN 15804. Ein Vergleich mit anderen Produkten ist nur mit einer vergleichbaren Anwendung im Gebäude zulässig. Grundsätzlich ist eine Gegenüberstellung oder die Bewertung von EPD Daten nur möglich, wenn alle zu vergleichenden Datensätze nach EN 15804 erstellt wurden und der Gebäudekontext, bzw. die produktspezifischen Leistungsmerkmale berücksichtigt werden.

## Review details
Die angewendete LCI Methode ist in Übereinstimmung mit ISO 14040 und 14044. Die Dokumentation enthält alle relevanten Informationen im Hinblick auf die Datenqualität und den Umfang der Anwendung der jeweiligen LCI Ergebnisse bzw. der Datensätze. Der Datensatz repräsentiert den Stand der Technik bezogen auf die funktionelle Einheit.

## Data sources
- GaBi database (all versions)
