# Transparente Bauelemente - Rodeca GmbH - Lichtbauelement 30 mm

Dataset: ILCD process, EPD, specific dataset
Geography: DE
Reference year: 2017
Valid until: 2024
Classification: Komponenten von Fenstern und Vorhangfassaden / Füllungen / Transparente Füllungen
Classification: OEKOBAU.DAT: Komponenten von Fenstern und Vorhangfassaden / Füllungen / Transparente Füllungen
Synonyms: Polycarbonat; Paneel
Method details: EN 15804; EPD Lichtbauelemente
Owner: Rodeca GmbH
Compliance: EN 15804
Review: Independent external review by Susanne Volz
Amounts: rows without a unit in brackets have none in this file; such an amount is in the reference unit of its flow, which a separate flow dataset defines
copyright: true

## General comment
Dieser Datensatz beinhaltet die Ergebnisse für die Module A1-A3 sowie die Module A4, A5, C2, C3, D gemäß EN 15804. Ein Vergleich mit anderen Produkten ist nur mit einer vergleichbaren Anwendung im Gebäude zulässig. Grundsätzlich ist eine Gegenüberstellung oder die Bewertung von EPD Daten nur möglich, wenn alle zu vergleichenden Datensätze nach EN 15804 erstellt wurden und der Gebäudekontext, bzw. die produktspezifischen Leistungsmerkmale berücksichtigt werden.

## Geography
Dieser Datensatz repräsentiert die Situation des Unternehmens Rodeca GmbH in 45473 Mülheim an der Ruhr, im Hinblick auf die wichtigsten Technologien und die gesetzlichen Rahmenbedingungen.

## Time period
jährlicher Durchschnitt

## Technology and included processes
Die Ökobilanzergebnisse umfassen die Lebenszyklusstadien der Herstellung der Vorprodukte bis hin zur Rohstoffgewinnung und Verarbeitungsprozesse von als Input dienenden Sekundärstoffen (z.B. Recyclingprozesse), deren Transporte zum Werk sowie die Produktion selbst, einschließlich der Bereitstellung von allen Hilfs- und Betriebsstoffen, Energie, sowie die vollständige Abfallbehandlung oder die Deponierung der Restabfälle während des Stadiums der Produktion. Die Module A1, A2 und A3 sind hier als ein aggregiertes Modul A1-A3 ausgewiesen. Falls für diesen Datensatz weitere Module berechnet wurden, sind diese separat zu finden und können für eine Betrachtung des gesamten Lebenszyklus zusammengeführt werden.

## Technical purpose
Eignen sich für den Einsatz in Fassaden und Dächern und können zudem als Innentrennwände im Messebau sowie als Raumteiler in größeren Firmen genutzt werden.

## Scenarios
- Scenario 1: Recycling PC-Anteile
- Scenario 2: Thermische Verwertung PC-Anteile

## Reference product
- Transparente Bauelemente - Rodeca GmbH - Lichtbauelement 30 mm: 1

## Inputs
- Use of net fresh water (FW) [m3]: A1-A3 0.074, A4 2.99e-5, A5 0.000121, C2 (Scenario 2) 2.91e-5, C2 (Scenario 1) 0.000161, C3 (Scenario 2) 0.019, C3 (Scenario 1) 0.015, D (Scenario 1) -0.054, D (Scenario 2) -0.028
- Use of non renewable primary energy (PENRE) [MJ]: A1-A3 214, A4 0.38, A5 0.69, C2 (Scenario 2) 0.37, C2 (Scenario 1) 2.04, C3 (Scenario 2) 89.7, C3 (Scenario 1) 31.3, D (Scenario 1) -285, D (Scenario 2) -73.2
- Use of non renewable primary energy resources used as raw materials (PENRM) [MJ]: A1-A3 87.4, A4 0, A5 -0.68, C2 (Scenario 2) 0, C2 (Scenario 1) 0, C3 (Scenario 2) -86.7, C3 (Scenario 1) -1.07, D (Scenario 1) 0, D (Scenario 2) 0
- Use of non renewable secondary fuels (NRSF) [MJ]: A1-A3 0, A4 0, A5 0, C2 (Scenario 2) 0, C2 (Scenario 1) 0, C3 (Scenario 2) 0, C3 (Scenario 1) 0, D (Scenario 1) 0, D (Scenario 2) 0
- Use of renewable primary energy (PERE) [MJ]: A1-A3 45.5, A4 0.026, A5 0.052, C2 (Scenario 2) 0.025, C2 (Scenario 1) 0.14, C3 (Scenario 2) 0.26, C3 (Scenario 1) 10.8, D (Scenario 1) -30.7, D (Scenario 2) -16.8
- Use of renewable primary energy resources used as raw materials (PERM) [MJ]: A1-A3 0.05, A4 0, A5 -0.05, C2 (Scenario 2) 0, C2 (Scenario 1) 0, C3 (Scenario 2) 0, C3 (Scenario 1) 0, D (Scenario 1) 0, D (Scenario 2) 0
- Use of renewable secondary fuels (RSF) [MJ]: A1-A3 0, A4 0, A5 0, C2 (Scenario 2) 0, C2 (Scenario 1) 0, C3 (Scenario 2) 0, C3 (Scenario 1) 0, D (Scenario 1) 0, D (Scenario 2) 0
- Use of secondary material (SM) [kg]: A1-A3 0.62, A4 0, A5 0, C2 (Scenario 2) 0, C2 (Scenario 1) 0, C3 (Scenario 2) 0, C3 (Scenario 1) 0, D (Scenario 1) 3.05, D (Scenario 2) 0.09
- Total use of non renewable primary energy resource (PENRT) [MJ]: A1-A3 301, A4 0.38, A5 0.00727, C2 (Scenario 2) 0.37, C2 (Scenario 1) 2.04, C3 (Scenario 2) 2.94, C3 (Scenario 1) 30.3, D (Scenario 1) -285, D (Scenario 2) -73.2
- Total use of renewable primary energy resources (PERT) [MJ]: A1-A3 45.6, A4 0.026, A5 0.00118, C2 (Scenario 2) 0.025, C2 (Scenario 1) 0.14, C3 (Scenario 2) 0.26, C3 (Scenario 1) 10.8, D (Scenario 1) -30.7, D (Scenario 2) -16.8

## Outputs
- Components for re-use (CRU) [kg]: A1-A3 0, A4 0, A5 0, C2 (Scenario 2) 0, C2 (Scenario 1) 0, C3 (Scenario 2) 0, C3 (Scenario 1) 0, D (Scenario 1) 0, D (Scenario 2) 0
- Exported electrical energy (EEE) [MJ]: A1-A3 0, A4 0, A5 0.11, C2 (Scenario 2) 0, C2 (Scenario 1) 0, C3 (Scenario 2) 15.3, C3 (Scenario 1) 0.15, D (Scenario 1) 0, D (Scenario 2) 0
- Exported thermal energy (EET) [MJ]: A1-A3 0, A4 0, A5 0.2, C2 (Scenario 2) 0, C2 (Scenario 1) 0, C3 (Scenario 2) 27.4, C3 (Scenario 1) 0.31, D (Scenario 1) 0, D (Scenario 2) 0
- Hazardous waste disposed (HWD) [kg]: A1-A3 5.31e-7, A4 2.42e-8, A5 5.79e-12, C2 (Scenario 2) 2.36e-8, C2 (Scenario 1) 1.3e-7, C3 (Scenario 2) 7.09e-10, C3 (Scenario 1) 1.34e-8, D (Scenario 1) -2.52e-7, D (Scenario 2) -3.68e-8
- Materials for energy recovery (MER) [kg]: A1-A3 0, A4 0, A5 0, C2 (Scenario 2) 0, C2 (Scenario 1) 0, C3 (Scenario 2) 0, C3 (Scenario 1) 0, D (Scenario 1) 0, D (Scenario 2) 0
- Materials for recycling (MFR) [kg]: A1-A3 0, A4 0, A5 0, C2 (Scenario 2) 0, C2 (Scenario 1) 0, C3 (Scenario 2) 0.21, C3 (Scenario 1) 3.61, D (Scenario 1) 0, D (Scenario 2) 0
- Non hazardous waste dispose (NHWD) [kg]: A1-A3 0.37, A4 2.98e-5, A5 0.000165, C2 (Scenario 2) 2.9e-5, C2 (Scenario 1) 0.00016, C3 (Scenario 2) 0.031, C3 (Scenario 1) 0.042, D (Scenario 1) -0.34, D (Scenario 2) -0.26
- Radioactive waste disposed (RWD) [kg]: A1-A3 0.00711, A4 5.99e-7, A5 4.85e-7, C2 (Scenario 2) 5.84e-7, C2 (Scenario 1) 3.22e-6, C3 (Scenario 2) 0.00014, C3 (Scenario 1) 0.00479, D (Scenario 1) -0.00623, D (Scenario 2) -0.00601

## Impact indicators
- Abiotic depletion potential for non fossil resources (ADPE) [kg Sb-Äqv.]: A1-A3 4.47e-5, A4 3.01e-9, A5 3.74e-10, C2 (Scenario 2) 2.93e-9, C2 (Scenario 1) 1.62e-8, C3 (Scenario 2) 1.92e-7, C3 (Scenario 1) 9.64e-7, D (Scenario 1) -4.25e-5, D (Scenario 2) -2.03e-6
- Abiotic depletion potential for fossil resources (ADPF) [MJ]: A1-A3 283, A4 0.38, A5 0.00605, C2 (Scenario 2) 0.37, C2 (Scenario 1) 2.04, C3 (Scenario 2) 2.6, C3 (Scenario 1) 18.2, D (Scenario 1) -270, D (Scenario 2) -58
- Acidification potential of soil and water (AP) [kg SO2-Äqv.]: A1-A3 0.023, A4 2.43e-5, A5 4.04e-6, C2 (Scenario 2) 2.37e-5, C2 (Scenario 1) 0.000118, C3 (Scenario 2) 0.000756, C3 (Scenario 1) 0.00463, D (Scenario 1) -0.02, D (Scenario 2) -0.0099
- Eutrophication potential (EP) [kg Phosphat-Äqv.]: A1-A3 0.0035, A4 5.41e-6, A5 8.43e-7, C2 (Scenario 2) 5.28e-6, C2 (Scenario 1) 2.54e-5, C3 (Scenario 2) 0.000138, C3 (Scenario 1) 0.000434, D (Scenario 1) -0.00306, D (Scenario 2) -0.00088
- Global warming potential (GWP) [kg CO2-Äqv.]: A1-A3 14, A4 0.028, A5 0.054, C2 (Scenario 2) 0.028, C2 (Scenario 1) 0.15, C3 (Scenario 2) 9.58, C3 (Scenario 1) 1.74, D (Scenario 1) -13.1, D (Scenario 2) -4.41
- Depletion potential of the stratospheric ozone layer (ODP) [kg CFC 11 eq.]: A1-A3 6.77e-10, A4 7.62e-16, A5 7.01e-16, C2 (Scenario 2) 7.43e-16, C2 (Scenario 1) 4.1e-15, C3 (Scenario 2) 1.42e-9, C3 (Scenario 1) 1.43e-9, D (Scenario 1) -2.32e-10, D (Scenario 2) -2.33e-10
- Formation potential of tropospheric ozone (POCP) [kg Ethen-Äqv.]: A1-A3 0.00208, A4 -7.43e-7, A5 3.8e-7, C2 (Scenario 2) -7.25e-7, C2 (Scenario 1) 1.31e-6, C3 (Scenario 2) 7.18e-5, C3 (Scenario 1) 0.000296, D (Scenario 1) -0.00247, D (Scenario 2) -0.000696

## Use advice
A1-A3 sowie Module A4, A5, C2, C3, D. Das Umweltprofil beinhaltet die Aufwendungen für die Lebenszyklus-Stadien cradle to gate mit Optionen (Modul A1-A3). Die Herstellung der Verpackung wurde innerhalb der Module A1-A3 berücksichtigt.

## Review details
Die angewendete LCI Methode ist in Übereinstimmung mit ISO 14040 und 14044. Die Dokumentation enthält alle relevanten Informationen im Hinblick auf die Datenqualität und den Umfang der Anwendung der jeweiligen LCI Ergebnisse bzw. der Datensätze. Der Datensatz repräsentiert den Stand der Technik bezogen auf die funktionelle Einheit.

## Data sources
- GaBi database (all versions)
- EPD Lichtbauelemente
