# Use - 1 kWh of final energy from gas low-temperature (according to EnEV)

Dataset: ILCD process, EPD, generic dataset
Geography: DE
Reference year: 2021
Valid until: 2022
Classification: oekobau.dat: Gebäudetechnik / Nutzung / Nutzung Wärmeerzeuger (EnEV)
Owner: Sphera Solutions GmbH
Compliance: EN 15804+A2
Review: Dependent internal review by Sphera Solutions GmbH; Independent external review by GaBi user forum
Amounts: rows without a unit in brackets have none in this file; such an amount is in the reference unit of its flow, which a separate flow dataset defines
copyright: true
licenseType: Free of charge for all users and uses
accessRestrictions: The license conditions as stated on https://www.oekobaudat.de/ apply.
accessRestrictions: Es gelten die Lizenzbedingungen wie sie auf https://www.oekobaudat.de/ genannt sind.

## General comment
This data set has been modeled according to the European Standard EN 15804+A2 for Sustainable Building. Results are depicted in modules that allow the structured expression of results over the entire life cycle.

## Geography
The data set represents the country specific situation in Germany, focusing on the main technologies, the region specific characteristics and / or import statistics.

## Time period
Annual average

## Technology and included processes
This dataset includes natural gas production, transportation and combustion. Since final energy gem. EnEV is provided as a reference, a boiler efficiency of 100% was modelled. Usually occurring system losses, as well as power supply and power consumption in relation to boiler operation are not included in this data set. The life cycle assessment is dominated by the combustion process.

## Technical purpose
Thermal energy from natural gas is used for heating a building or technical processes (e.g. drying).

## Safety margin
0 %.

## Reference product
- Use - 1 kWh of final energy from gas low-temperature (according to EnEV): 3.6

## Inputs
- Use of renewable primary energy as energy carrier (PERE) [MJ]: B6 0.00949658
- Use of renewable primary energy resources used as raw materials (PERM) [MJ]: B6 0
- Total use of renewable primary energy (PERT) [MJ]: B6 0.00949658
- Use of non renewable primary energy as energy carrier (PENRE) [MJ]: B6 4.29953
- Use of non renewable primary energy resources used as raw materials (PENRM) [MJ]: B6 0
- Total use of non renewable primary energy resource (PENRT) [MJ]: B6 4.29953
- Use of secondary material (SM) [kg]: B6 0
- Use of renewable secondary fuels (SF) [MJ]: B6 0
- Use of non renewable secondary fuels (NRSF) [MJ]: B6 0
- Net use of fresh water (FW) [m3]: B6 1.34567e-5

## Outputs
- Hazardous waste disposed (HWD) [kg]: B6 1.21733e-9
- Non harzardous waste disposed (NHWD) [kg]: B6 0.00087206
- Radioactive waste disposed (RWD) [kg]: B6 9.46816e-7
- Components for re-use (CRU) [kg]: B6 0
- Materials for recycling (MFR) [kg]: B6 0
- Materials for energy recovery (MER) [kg]: B6 0
- Exported electrical energy (EEE) [MJ]: B6 0
- Exported thermal energy (EET) [MJ]: B6 0

## Impact indicators
- Global Warming Potential - total (GWP-total) [kg CO2 eq.]: B6 0.243173
- Global Warming Potential - fossil fuels (GWP-fossil) [kg CO2 eq.]: B6 0.242308
- Global Warming Potential - biogenic (GWP-biogenic) [kg CO2 eq.]: B6 0.000853919
- Global Warming Potential - land use and land use change (GWP-luluc) [kg CO2 eq.]: B6 1.11637e-5
- Depletion potenzial of the stratospheric ozone layer (ODP) [kg CFC-11 eq.]: B6 1.7726e-17
- Acidifcation potential, Accumulated Exceedance (AP) [Mole of H+ eq.]: B6 0.000121753
- Eutrophication potential - freshwater (EP-freshwater) [kg P eq.]: B6 2.41875e-8
- Eutrophication potential - marine (EP-marine) [kg N eq.]: B6 5.43534e-5
- Eutrophication potential - terrestrial (EP-terrestrial) [Mole of N eq.]: B6 0.00059356
- Photochemical Ozone Creation Potential (POCP) [kg NMVOC eq.]: B6 0.000156982
- Abiotic depletion potential - non-fossil resources (ADPE) [kg Sb eq.]: B6 1.92605e-8
- Abiotic depletion potential - fossil resources (ADPF) [MJ]: B6 4.29948
- Water (user) deprivation potential (WDP) [m³ world equiv.]: B6 0.000138474

## Use advice
This dataset refers to the production of 1 kWh of thermal energy from natural gas low-temperature. The data set is intended for the use of final energy acc. EnEV as reference. The final energy acc. EnEV already takes into account system losses and system efficiency as well as power supply and power consumption, which is why this is not included in this data set. Therefore, the combustion process is calculated with 100% efficiency. To calculate the life cycle assessment results at building level, the indicator results have to be multiplied with the final energy demand acc. EnEV.
Note: the calorific value technology has higher methane emissions than the low temperature technology. With the same efficiency, this results in a slightly lower global warming potential for low-temperature technology compared to calorific value technology.

## Data sources
- DIN 2003
- DIN 2007
- PFEIFFER 2000
- GaBi database (all versions)
- Documentation of data quality management
- GaBi Database Edition 2021, CUP2021.01
