# Polyester resin laminated part (GFRP, 30% glass fibres)

Dataset: ILCD process, EPD, generic dataset
Geography: DE
Reference year: 2018
Valid until: 2022
Classification: oekobau.dat: Kunststoffe / Profile / Kunststoffprofile hart
Owner: thinkstep
Compliance: DIN EN 15804
Review: Dependent internal review by thinkstep, IABP-GaBi, IBP-GaBi; Independent external review by GaBi user forum, GaBi bug forum, GaBi user community
Amounts: rows without a unit in brackets have none in this file; such an amount is in the reference unit of its flow, which a separate flow dataset defines
copyright: true

## General comment
This data set has been modeled according to the European Standard EN 15804 for Sustainable Building. Results are depicted in modules that allow the structured expression of results over the entire life cycle.

## Geography
The data set represents the country specific situation in Germany, focusing on the main technologies, the region specific characteristics and / or import statistics.

## Time period
annual average

## Technology and included processes
For the production of the GFRP, the fibers (either loose or connected as tissue) are soaked with EP and cured. Subsequently, another layer of fibers can be applied, soaked and cured. By doing so, the fiber-reinforced plastic is built up layer by layer. This construction can be done by mechanically or by hand (hand lamination). The resin shows a significant impact on the LCA. The production of molds for the production of complex geometries was not considered.

Background system:
Electricity: Electricity from renewable and non- renewable powerplants is modelled so that it represents a countrys specific consumption mix including transmission / distribution losses, own consumption, imports, emissions and efficiency standards, and energy carrier properties. Several factors are taken into account. (1) Energy carrier production - The exploration, mining / production, processing, and transportation of energy carrier supply chains are modelled for each country. The models account for differences among countries in production and processing, including crude oil production technologies, flaring rates, production efficiencies, emissions, etc. (2) Energy carrier supply - Each countrys specific energy carrier supply is modelled, taking into account domestic supply versus imports from abroad. Energy carrier properties (e.g. carbon and energy content), which can vary depending from where an energy carrier is sourced, are adjusted accordingly. (3) Power plants - Models are created to represent energy carrier-specific power plants and electricity generation facilities specific to different renewable energy resources. Energy carrier production and supply models are used to represent power plant inputs. Combined heat and power (CHP) plants are also considered. (4) Electricity grid - Models representing the electricity generation facilities are combined into a larger model that reflects a countrys consumption mix. The larger model accounts for a countrys production mix, internal consumption (e.g. pumped storage for hydro power), transmission / distribution losses, and imported electricity. The country model is also adjusted according to national power plant emission and efficiency standards, as well as the countrys share of electricity plants versus CHP facilities.
Thermal energy, process steam: The thermal energy and process steam supply is modelled to reflect each countrys emission standards and typical energy carriers (e.g., coal, natural gas, etc.) Both thermal energy and process steam are assumed to be produced at heat plants. Thermal energy datasets assume energy carrier inputs are converted to thermal energy with 100% efficiency; process steam datasets assume conversion efficiencies of 85%, 90% to 95%. The energy carriers used for the generation of thermal energy and process steam are modelled according to each countrys import situation (see electricity above).
Transportation: All relevant and known transportation processes are included. Ocean-going and inland ship transport as well as rail, truck and pipeline transport of bulk commodities are considered.
Energy carriers: The energy carriers and their respective properties are modelled according to the specific supply situation (see electricity above).
Refinery products: Diesel fuel, gasoline, technical gases, fuel oils, lubricants and residues such as bitumen are modelled with a parameterised country-specific refinery model. The refinery model aims to represent each countrys refining processes (e.g. emissions levels, internal energy consumption, etc.), as well as the countrys product output spectrum, which can vary significantly among countries. The supply of crude oil is likewise modelled according to the country-specific situation and accounts for differences in resource properties (e.g., crude oil energy content).

## Technical purpose
GFRP is used in bridge constructions, facade constructions, shaft covers or cable ducts. Essential characteristics are high compressive strenght, high impact resistance and high load-bearing strength, low thermal conductivity and weight, as well as very good chemical resistance.

## Safety margin
20 %. Product system depicted except for a few missing processes / flows. Technological, temporal and geographic representativeness partly given.

## Reference product
- Polyester resin laminated part: 1

## Inputs
- Use of renewable primary energy (PERE) [MJ]: A1-A3 4.55251, C1 0, C2 0.00152544, C3 0.202279, D -3.09269
- Primary energy resources used as raw materials (PERM) [MJ]: A1-A3 0, C1 0, C2 0, C3 0, D 0
- Total use of renewable primary energy resources (PERT) [MJ]: A1-A3 4.55251, C1 0, C2 0.00152544, C3 0.202279, D -3.09269
- Use of non-renewable primary energy (PENRE) [MJ]: A1-A3 84.5406, C1 0, C2 0.0262031, C3 0.758537, D -10.7945
- Non-renewable primary energy resources used as raw materials (PENRM) [MJ]: A1-A3 0, C1 0, C2 0, C3 0, D 0
- Total use of non-renewable primary energy resources (PENRT) [MJ]: A1-A3 84.5406, C1 0, C2 0.0262031, C3 0.758537, D -10.7945
- Input of secondary material (SM) [kg]: A1-A3 0, C1 0, C2 0, C3 0, D 0
- Use of renewable secondary fuels (RSF) [MJ]: A1-A3 0, C1 0, C2 0, C3 0, D 0
- Use of non renewable secondary fuels (NRSF) [MJ]: A1-A3 0, C1 0, C2 0, C3 0, D 0
- Use of net fresh water (FW) [m3]: A1-A3 0.0136524, C1 0, C2 1.36616e-6, C3 0.00392232, D -0.00144262

## Outputs
- Hazardous waste disposed (HWD) [kg]: A1-A3 2.68192e-8, C1 0, C2 9.79183e-10, C3 2.84004e-9, D -5.70948e-9
- Non-hazardous waste disposed (NHWD) [kg]: A1-A3 0.142642, C1 0, C2 4.5991e-6, C3 0.166316, D -0.00508419
- Radioactive waste disposed (RWD) [kg]: A1-A3 0.000653767, C1 0, C2 2.75865e-8, C3 2.8891e-5, D -0.000373646
- Components for re-use (CRU) [kg]: A1-A3 0, C1 0, C2 0, C3 0, D 0
- Materials for Recycling (MFR) [kg]: A1-A3 0, C1 0, C2 0, C3 0, D 0
- Material for Energy Recovery (MER) [kg]: A1-A3 0, C1 0.84, C2 0, C3 0, D 0
- Exported electrical energy (EEE) [MJ]: A1-A3 0, C1 0, C2 0, C3 2.96562, D 0
- Exported thermal energy (EET) [MJ]: A1-A3 0, C1 0, C2 0, C3 6.80884, D 0

## Impact indicators
- Global warming potential (GWP) [kg CO2 eq.]: A1-A3 3.73108, C1 0, C2 0.00194954, C3 1.59357, D -0.737851
- Ozone Depletion Potential (ODP) [kg R11 eq.]: A1-A3 2.52427e-14, C1 0, C2 6.45307e-19, C3 1.12943e-15, D -1.71013e-14
- Acidification potential (AP) [kg SO2 eq.]: A1-A3 0.00714906, C1 0, C2 3.93787e-6, C3 0.000178284, D -0.000623298
- Eutrophication potential (EP) [kg Phosphate eq.]: A1-A3 0.000679417, C1 0, C2 9.3614e-7, C3 3.96864e-5, D -0.000118128
- Photochemical Ozone Creation Potential (POCP) [kg Ethene eq.]: A1-A3 0.000637975, C1 0, C2 -1.17978e-6, C3 1.65144e-5, D -6.34634e-5
- Abiotic depletion potential for non fossil resources (ADPE) [kg Sb eq.]: A1-A3 5.49328e-7, C1 0, C2 1.64056e-10, C3 1.17344e-8, D -1.83531e-7
- Abiotic depletion potential for fossil resources (ADPF) [MJ]: A1-A3 82.89, C1 0, C2 0.0261326, C3 0.685607, D -9.85125

## Use advice
This dataset refers to the production of 1 kg plastic part made of laminated polyester resin with a glass fiber content of 30% (GFRP). The bulk density is 1400 kg/m³. The data set can be used approximately for the estimation of laminated parts of polyester resin with a higher fiber content (worst-case estimation). For lower fiber parts, scaling of the data set is not possible.

The data set represents a cradle to gate inventory. It can be used to characterise the supply chain situation of the respective commodity in a representative manner. Combination with individual unit processes using this commodity enables the generation of user-specific (product) LCAs.

## Data sources
- GaBi databases
- GaBi Database Edition 2020, SP40
- GaBi database (all versions)
