# SikaRoof AT

Dataset: ILCD process, EPD, specific dataset
Geography: DE
Reference year: 2020
Valid until: 2025
Classification: OEKOBAU.DAT: Kunststoffe / Dachbahnen / TPO-Dachbahnen (FPO)
Classification: IBUCategories: 02 Bauprodukte / Abdichtungen / Dach- und Dichtungsbahnsysteme aus Kunststoffen und Elastomeren
Method details: Dach- und Dichtungsbahnsysteme aus Kunststoffen und Elastomeren.pdf
Generated by: Sika Services AG
Registration number: EPD-SIK-20200171-IBA1-DE
Owner: Sika Services AG
Compliance: DIN EN 15804; ISO 14025
Review: Accredited third party review by Institut Bauen und Umwelt e. V.
Amounts: rows without a unit in brackets have none in this file; such an amount is in the reference unit of its flow, which a separate flow dataset defines
copyright: true
licenseType: Free of charge for all users and uses
accessRestrictions: None

## General comment
SikaRoof® AT Kunststoffabdichtungsbahnen bestehen aus flexiblen Polyolefinen (FPO) und werden zusätz-lich mit UV-Lichtschutzmittel ausgerüstet. Als Verstär-kung dient eine innenliegende Kombination aus Glas-vlies und Polyestergewebe. Unterseitig ist die Bahn mit einem Polypropylenvlies ausgestattet (max. 70 g/m²).

Die SikaRoof® AT Kunststoffabdichtungsbahnen sind

in folgenden Dicken erhältlich:

1,5 mm (SikaRoof® AT-15)
1,8 mm (SikaRoof® AT-18)
2,0 mm (SikaRoof® AT-20)
2,5 mm (SikaRoof® AT-25)

## Technology and included processes
The manufacturing process of the SikaRoof® AT synthetic waterproofing membranes takes place on specially developed production systems in the following steps: Melting of the plastic components and their additives in extruders Dispersing the melted materials Application of the layers to the carrier or the reinforcement, so that a homogeneous embedding takes place Cooling the plastic waterproofing membrane Winding the plastic sealing membrane onto roll cores made from waste paper cardboard Packing of the individual rolls The Sarnen plant has had a certified quality management system in accordance with ISO 9001 since 1993.

## Technical purpose
SikaRoof® AT Kunststoffabdichtungsbahnen dienen hauptsächlich der Abdichtung von Flachdächern. Die Dachbahnen können auf Dächern bis zu einer Dach-neigung von < 20° lose verlegt und mechanisch befes-tigt werden. Die Verlegung auf Dächern mit Auflast und Begrünung ist ebenfalls möglich.

## Scenarios
- S0: Szenario 0
- S1: 100% recycling
- S2: 100% thermal energy recovery

## Reference product
- Dachbahn (): 1

## Inputs
- Renewable primary energy as energy carrier (PERE) [MJ]: A1-A3 7.83, A4 0.0708, A5 1.02, C1 0, C2 (S1) 0.0286, C2 (S2) 0.00572, C3 (S1) 0.721, C3 (S2) 0.138, C4 0, D (S1) -5.67, D (S2) -6.31
- Renewable primary energy resources as material utilization (PERM) [MJ]: A1-A3 1.99, A4 0, A5 -0.159, C1 0, C2 (S1) 0, C2 (S2) 0, C3 (S1) 0, C3 (S2) 0, C4 0, D (S1) 0, D (S2) 0
- Total use of renewable primary energy resources (PERT) [MJ]: A1-A3 9.81, A4 0.0708, A5 0.859, C1 0, C2 (S1) 0.0286, C2 (S2) 0.00572, C3 (S1) 0.721, C3 (S2) 0.138, C4 0, D (S1) -5.67, D (S2) -6.31
- Non renewable primary energy as energy carrier (PENRE) [MJ]: A1-A3 54.9, A4 1.17, A5 4.67, C1 0, C2 (S1) 0.493, C2 (S2) 0.0986, C3 (S1) 52, C3 (S2) 51.4, C4 0, D (S1) -110, D (S2) -130
- Non renewable primary energy as material utilization (PENRM) [MJ]: A1-A3 47.9, A4 0, A5 3.81, C1 0, C2 (S1) 0, C2 (S2) 0, C3 (S1) -50.6, C3 (S2) -50.6, C4 0, D (S1) 0, D (S2) 0
- Total use of non renewable primary energy resources (PENRT) [MJ]: A1-A3 103, A4 1.17, A5 8.47, C1 0, C2 (S1) 0.493, C2 (S2) 0.0986, C3 (S1) 1.38, C3 (S2) 0.778, C4 0, D (S1) -110, D (S2) -130
- Use of secondary material (SM) [kg]: A1-A3 0.0625, A4 0, A5 0.005, C1 0, C2 (S1) 0, C2 (S2) 0, C3 (S1) 0, C3 (S2) 0, C4 0, D (S1) -1.88, D (S2) 0
- Use of renewable secondary fuels (RSF) [MJ]: A1-A3 0, A4 0, A5 0, C1 0, C2 (S1) 0, C2 (S2) 0, C3 (S1) 0, C3 (S2) 0, C4 0, D (S1) 0, D (S2) 0
- Use of non renewable secondary fuels (NRSF) [MJ]: A1-A3 0, A4 0, A5 0, C1 0, C2 (S1) 0, C2 (S2) 0, C3 (S1) 0, C3 (S2) 0, C4 0, D (S1) 0, D (S2) 0
- Use of net fresh water (FW) [m^3]: A1-A3 0.0168, A4 8.12e-5, A5 0.00181, C1 0, C2 (S1) 4.84e-5, C2 (S2) 9.67e-6, C3 (S1) 0.000753, C3 (S2) 0.0134, C4 0, D (S1) -0.0127, D (S2) -0.0146

## Outputs
- Hazardous waste disposed (HWD) [kg]: A1-A3 2.4e-6, A4 6.63e-8, A5 1.98e-7, C1 0, C2 (S1) 2.75e-8, C2 (S2) 5.51e-9, C3 (S1) 1.33e-9, C3 (S2) 6.19e-10, C4 0, D (S1) -2.75e-8, D (S2) -2.01e-8
- Non hazardous waste disposed (NHWD) [kg]: A1-A3 0.419, A4 7.81e-5, A5 0.0355, C1 0, C2 (S1) 4.01e-5, C2 (S2) 8.02e-6, C3 (S1) 0.0185, C3 (S2) 0.0246, C4 0, D (S1) -0.0147, D (S2) -0.0321
- Radioactive waste disposed (RWD) [kg]: A1-A3 0.00206, A4 1.38e-6, A5 0.000177, C1 0, C2 (S1) 6.69e-7, C2 (S2) 1.34e-7, C3 (S1) 0.000127, C3 (S2) 4.99e-5, C4 0, D (S1) -0.00108, D (S2) -0.00542
- Components for re-use (CRU) [kg]: A1-A3 0, A4 0, A5 0, C1 0, C2 (S1) 0, C2 (S2) 0, C3 (S1) 0, C3 (S2) 0, C4 0, D (S1) 0, D (S2) 0
- Materials for recycling (MFR) [kg]: A1-A3 0, A4 0, A5 0, C1 0, C2 (S1) 0, C2 (S2) 0, C3 (S1) 1.88, C3 (S2) 0, C4 0, D (S1) 0, D (S2) 0
- Materials for energy recovery (MER) [kg]: A1-A3 0, A4 0, A5 0, C1 0, C2 (S1) 0, C2 (S2) 0, C3 (S1) 0, C3 (S2) 0, C4 0, D (S1) 0, D (S2) 0
- Exported electrical energy (EEE) [MJ]: A1-A3 0, A4 0, A5 0.354, C1 0, C2 (S1) 0, C2 (S2) 0, C3 (S1) 0.493, C3 (S2) 13.6, C4 0, D (S1) 0, D (S2) 0
- Exported thermal energy (EET) [MJ]: A1-A3 0, A4 0, A5 0.631, C1 0, C2 (S1) 0, C2 (S2) 0, C3 (S1) 0.892, C3 (S2) 24.2, C4 0, D (S1) 0, D (S2) 0

## Impact indicators
- Global warming potential (GWP) [kg CO_(2)-Äq.]: A1-A3 3.44, A4 0.0869, A5 0.474, C1 0, C2 (S1) 0.0363, C2 (S2) 0.00726, C3 (S1) 0.228, C3 (S2) 6.21, C4 0, D (S1) -2.61, D (S2) -2.22
- Depletion potential of the stratospheric ozone layer (ODP) [kg CFC11-Äq.]: A1-A3 7.33e-9, A4 2.96e-17, A5 5.87e-10, C1 0, C2 (S1) 5.99e-18, C2 (S2) 1.2e-18, C3 (S1) 4.36e-15, C3 (S2) 5.77e-16, C4 0, D (S1) -2.41e-9, D (S2) -2.41e-9
- Acidification potential of land and water (AP) [kg SO_(2)-Äq.]: A1-A3 0.0108, A4 0.000193, A5 0.000915, C1 0, C2 (S1) 8.45e-5, C2 (S2) 1.69e-5, C3 (S1) 0.00021, C3 (S2) 0.0004, C4 0, D (S1) -0.00423, D (S2) -0.00319
- Eutrophication potential (EP) [kg PO_(4)^(3)-Äq.]: A1-A3 0.00125, A4 4.81e-5, A5 0.00011, C1 0, C2 (S1) 2.11e-5, C2 (S2) 4.23e-6, C3 (S1) 3.51e-5, C3 (S2) 8.47e-5, C4 0, D (S1) -0.000587, D (S2) -0.000358
- Formation potential of tropospheric ozone photochemical oxidants (POCP) [kg Ethen-Äq.]: A1-A3 0.00127, A4 -6.83e-5, A5 9.79e-5, C1 0, C2 (S1) -2.82e-5, C2 (S2) -5.65e-6, C3 (S1) 1.35e-5, C3 (S2) 4.1e-5, C4 0, D (S1) -0.000766, D (S2) -0.000344
- Abiotic depletion potential for non fossil resources (ADPE) [kg Sb-Äq.]: A1-A3 6.27e-6, A4 8.2e-9, A5 5.08e-7, C1 0, C2 (S1) 2.79e-9, C2 (S2) 5.59e-10, C3 (S1) 4.86e-8, C3 (S2) 3.4e-8, C4 0, D (S1) -6.91e-7, D (S2) -6.21e-7
- Abiotic depletion potential for fossil resources (ADPF) [MJ]: A1-A3 97.2, A4 1.16, A5 7.99, C1 0, C2 (S1) 0.491, C2 (S2) 0.0983, C3 (S1) 1.06, C3 (S2) 0.652, C4 0, D (S1) -108, D (S2) -32.6

## Use advice
Gültigkeitsbereich:
Dieses Dokument bezieht sich auf die von der Sika AG in CH-6060 Sarnen (Schweiz) hergestellten SikaRoof® AT Kunststoffabdichtungsbahnen in den Dicken 1,5, 1,8, 2,0 und 2,5 mm.

Die EPD umfasst die Produktion der Dachbahn, den Transport des Produkts zur Baustelle, die Installation der Dachbahn, die Entsorgung sowie Potenziale und Lasten außerhalb der Systemgrenze. Das Modell wur-de auf Basis der Produktionsdaten aus dem Jahr 2018 von der Sika Technology AG für die Dicke von 1,8 mm modelliert.
Systemgrenze:
Typ der EPD: Wiege bis Werkstor - mit Optionen

Die Systemgrenze der EPD folgt dem modularen Auf-bau gemäß EN 15804. In der Ökobilanz werden die folgenden Module berücksichtigt:

A1–A3: Gewinnung, Verarbeitung und Transport von Rohstoffen (u.a. Polymere, Pigmente, Verar-beitungshilfsmittel, Stabilisatoren, Füllstoffe, Flammschutzmittel und Trägermaterialien), die für die Herstellung der Vorprodukte und der Dachbah-nen verwendet werden sowie der Verpackungs-materialien, die zum Verpacken der Dachbahnen verwendet werden, wie z. B. Holzpaletten, Karton und PE-Folie, zum Werk.
Abfallverarbeitung von Produktionsabfällen (Rand-beschnitt), die bei der Herstellung der Dachbah-nen anfallen. A4: Transport der Kunststoffabdichtungsbahnen zur Baustelle A5: Einbau der Kunststoffabdichtungsbahnen ins Gebäude mittels Heißluftschweißen (inkl. Schweißenergie und Wasserverbrauch), Entsor-gung bzw. stoffliches Recycling von Verpackung und Verschnitt der Dachbahn C1: Manueller Rückbau der DachabdichtungC2: Transport der rückgebauten Abdichtungs-bahnen zur Abfallbewirtschaftung C3: Abfallverarbeitung der rückgebauten Abdich-tungsbahnen über stoffliches Recycling (Szenario 1 - C3/1) oder thermische Verwertung (Szenario 2 - C3/2)C4: Abfallentsorgung der rückgebauten Abdich-tungsbahnen auf DeponienD: Wiederverwendungs-, Rückgewinnungs- und Recyclingpotenziale (aus der thermischen Verwer-tung und dem stofflichen Recycling der Kunststoff-abdichtungsbahnen sowie der Wiederverwendung der Holzpaletten)

## Data sources
- GaBi Database (all versions)
- GaBi database SP39 2019
