# Cellulose air injected insulation STEICOfloc and STEICOfloc NB

Dataset: ILCD process, EPD, average dataset
Geography: RER
Reference year: 2021
Valid until: 2026
Classification: OEKOBAU.DAT: Dämmstoffe / Zellulosefaser / Zellulose-Einblas-Dämmstoff
Classification: IBUCategories: 02 Bauprodukte / Wärmedämmungsprodukte / Einblasdämmstoffe aus Zellulose- und Holzfasern
Method details: Einblasdämmstoffe aus Zellulose- und Holzfasern.pdf
Generated by: Thünen-Institut für Holzforschung
Registration number: EPD-STE-20210139-IBC1-DE
Owner: STEICO SE
Compliance: DIN EN 15804; ISO 14025
Review: Accredited third party review by Institut Bauen und Umwelt e. V.
Amounts: rows without a unit in brackets have none in this file; such an amount is in the reference unit of its flow, which a separate flow dataset defines
copyright: true
licenseType: Free of charge for all users and uses
accessRestrictions: None

## General comment
STEICOfloc ist eine lose Zellulose-Einblasdämmung

aus natürlicher Zellulosefaser und ist als STEICOfloc NB auch in einer borfreien Variante erhältlich.

Die Produkte dienen zur Dämmung von Hohlräumen aller Größen und Dicken bei schneller maschineller Verarbeitung, das Ergebnis ist fugen- und verschnittfrei. Ferner kann STEICOfloc auch offen aufgeblasen zur Dämmung der obersten Geschossdecke eingesetzt werden.

STEICO Einblasdämmung eignet sich sowohl für Einzelobjekte als auch für die Vorfertigung. Durch besonders lange Papierfasern kann bei vergleichsweise geringem Materialeinsatz eine dauerhafte Setzungssicherheit schon ab einer Rohdichte von 38 kg pro Kubikmeter erzielt werden.

## Technology and included processes
STEICOfloc / STEICOfloc NB is produced from sorted waste paper using a modern eddy current mill in the following steps: Raw material storage and incoming goods inspection Loosening of the pressed bales of waste paper including mixing for high-quality, homogeneous quality Visual control of quality and removal of impurities Coarse pre-shredding of the waste paper in the shredder Eddy current mill: fiberization of the raw material into high-quality cellulose fiber Addition of fire retardants - both for standard quality (STEICOfloc) and for the boron-free version (STEICOfloc NB) Fully automatic bagging system Fully automatic palletizing All residual materials generated during production are fed to an internal energy recovery system. Quality assurance systems: Quality management system according to ISO 9001 Environmental management system according to ISO 14001 CE marking according to ETA-16/0141, MPA North Rhine-Westphalia, D FSC certificate CU-COC-841217 PEFC certificate CU-PEFC-841217

## Technical purpose
STEICOfloc / STEICOfloc NB eignet sich sowohl als Dämmstoff für die industrielle Vorfertigung (z. B. von kompletten Wandelementen) als auch für Sanierungsarbeiten von Neubau, Altbau, Fachwerk und Holzbau. Zur Erzeugung der Dämmschicht wird das Fasermaterial unter hohem Druck in die geschlossenen Gefache eingeblasen. Das Material passt sich dort exakt den begrenzenden Bauteilen an und füllt sämtliche Hohlräume vollständig aus. Auch Installationselemente in den Gefachen werden beim Einblasen ohne langwierige Handarbeit exakt umschlossen. Somit spielt es keine Rolle, ob die Gefache auf gängige Dämmstoffgrößen abgestimmt sind, mit STEICOfloc / STEICOfloc NB wird eine homogene und fugenfreie Füllung selbst bei kompliziertesten Konstruktionen erreicht.

Neben der Einblasdämmung lässt sich STEICOfloc / STEICOfloc NB auch als Aufblasdämmung verwenden. Das Aufblasverfahren kommt zum Einsatz, wenn STEICOfloc / STEICOfloc NB als freiliegender Wärmedämmstoff auf horizontalen, gewölbten oder mäßig geneigten Flächen zwischen Bindern oder Balken von Dachstühlen aufgeblasen wird.

## Reference product
- STEICOfloc und STEICOfloc NB (): 1

## Inputs
- Renewable primary energy as energy carrier (PERE) [MJ]: A1 0.049737, A2 0.0305062, A3 0.334548, A5 0.012742, C2 0.00225642, C3 0.106689, D -2.34016
- Renewable primary energy resources as material utilization (PERM) [MJ]: A1 0, A2 0, A3 1.37836, A5 -1.37836, C2 0, C3 0, D 0
- Total use of renewable primary energy resources (PERT) [MJ]: A1 0.049737, A2 0.0305062, A3 1.71291, A5 -1.36562, C2 0.00225642, C3 0.106689, D -2.34016
- Non renewable primary energy as energy carrier (PENRE) [MJ]: A1 0.786593, A2 0.543245, A3 1.99505, A5 0.668698, C2 0.0401815, C3 0.484326, D -9.24758
- Non renewable primary energy as material utilization (PENRM) [MJ]: A1 0, A2 0, A3 0.6066, A5 -0.6066, C2 0, C3 0, D 0
- Total use of non renewable primary energy resources (PENRT) [MJ]: A1 0.786593, A2 0.543245, A3 2.60165, A5 0.0620983, C2 0.0401815, C3 0.484326, D -9.24758
- Use of secondary material (SM) [kg]: A1 0.92, A2 0, A3 0, A5 0, C2 0, C3 0, D 0
- Use of renewable secondary fuels (RSF) [MJ]: A1 0, A2 0, A3 0, A5 0, C2 0, C3 0, D 0
- Use of non renewable secondary fuels (NRSF) [MJ]: A1 0, A2 0, A3 0, A5 0, C2 0, C3 0, D 0
- Use of net fresh water (FW) [m^3]: A1 0.000169769, A2 3.53241e-5, A3 0.00153001, A5 0.000543666, C2 2.61277e-6, C3 0.00412016, D -1.27671

## Outputs
- Hazardous waste disposed (HWD) [kg]: A1 1.39005e-9, A2 2.52809e-8, A3 7.87691e-9, A5 2.08039e-10, C2 1.86992e-9, C3 7.60548e-10, D -4.86754e-9
- Non hazardous waste disposed (NHWD) [kg]: A1 0.0289204, A2 8.31372e-5, A3 0.00136966, A5 0.0053146, C2 6.1493e-6, C3 0.0298441, D -0.00437867
- Radioactive waste disposed (RWD) [kg]: A1 1.01068e-5, A2 6.72394e-7, A3 3.33402e-5, A5 2.02039e-6, C2 4.97341e-8, C3 1.54179e-5, D -0.000339411
- Components for re-use (CRU) [kg]: A1 0, A2 0, A3 0, A5 0, C2 0, C3 0, D 0
- Materials for recycling (MFR) [kg]: A1 0, A2 0, A3 0, A5 0, C2 0, C3 0, D 0
- Materials for energy recovery (MER) [kg]: A1 0, A2 0, A3 0, A5 0, C2 0, C3 0, D 0
- Exported electrical energy (EEE) [MJ]: A1 0, A2 0, A3 0, A5 0.314846, C2 0, C3 1.74622, D 0
- Exported thermal energy (EET) [MJ]: A1 0, A2 0, A3 0, A5 0.68757, C2 0, C3 4.0723, D 0

## Impact indicators
- Global warming potential (GWP) [kg CO_(2)-Äq.]: A1 -1.4586, A2 0.0392312, A3 0.097456, A5 0.17651, C2 0.00290176, C3 1.55837, D -0.635554
- Depletion potential of the stratospheric ozone layer (ODP) [kg CFC11-Äq.]: A1 2.60556e-16, A2 6.5305e-18, A3 1.86946e-15, A5 6.88633e-17, C2 4.83033e-19, C3 6.02841e-16, D -1.33177e-14
- Acidification potential of land and water (AP) [kg SO_(2)-Äq.]: A1 0.000348884, A2 0.000164376, A3 0.000428738, A5 3.19946e-5, C2 1.21582e-5, C3 0.000322279, D -0.000606488
- Eutrophication potential (EP) [kg PO_(4)^(3)-Äq.]: A1 4.90721e-5, A2 4.13517e-5, A3 6.2938e-5, A5 5.75253e-6, C2 3.0586e-6, C3 6.51626e-5, D -0.000108083
- Formation potential of tropospheric ozone photochemical oxidants (POCP) [kg Ethen-Äq.]: A1 1.892e-5, A2 -6.91261e-5, A3 0.000203503, A5 1.49822e-6, C2 -5.11296e-6, C3 1.97137e-5, D -5.46223e-5
- Abiotic depletion potential for non fossil resources (ADPE) [kg Sb-Äq.]: A1 2.8002e-5, A2 3.30344e-9, A3 5.16137e-8, A5 5.09157e-9, C2 2.44341e-10, C3 4.61884e-8, D -1.51641e-7
- Abiotic depletion potential for fossil resources (ADPF) [MJ]: A1 0.759427, A2 0.541528, A3 2.51775, A5 0.0570003, C2 0.0400545, C3 0.445406, D -8.39082

## Use advice
Gültigkeitsbereich:
Diese Umwelt-Produktdeklaration gilt für die Zellulose-Einblasdämmung STEICOfloc und STEICOfloc NB, welche in folgendem Werk hergestellt wird:
STEICO Sp. z o.o.
ul. Przemysłowa 2
64700
Czarnków
Systemgrenze:
Der Deklarationstyp entspricht einer EPD „Wiege bis Werkstor – mit Optionen“. Inhalte sind das Stadium der Produktion, d. h. von der Bereitstellung der Rohstoffe bis zum Werkstor der Produktion („cradle-to-gate", Module A1 bis A3), sowie das Modul A5 und Teile des Endes des Lebensweges (Modul C2 und C3). Darüber hinaus erfolgt eine Betrachtung der potenziellen Nutzen und Lasten über den Lebensweg des Produktes hinaus (Modul D).

Das Modul A1 umfasst die Bereitstellung des Altpapiers sowie die Bereitstellung der Zusatzstoffe. Der Rohstoff Altpapier ist ein Sekundärmaterial und steht somit lastenfrei zur Verfügung. Die Transporte der Roh- und Zusatzstoffe werden in Modul A2 berücksichtigt. Modul A3 beinhaltet die Aufwendungen der Herstellung des Produktes, wie die Bereitstellung von Energie und Betriebsmitteln, sowie die Verpackung des Produktes.

In Modul A5 wird ausschließlich die Entsorgung der Produktverpackung abgedeckt, welche den Ausgang des enthaltenen biogenen Kohlenstoffs sowie der enthaltenen Primärenergie (PERM und PENRM) einschließt.

Modul C2 berücksichtigt den Transport zum Entsorger und in Modul C3 wird die thermische Verwertung des Produktes am Ende seines Lebenswegs bilanziert.

Modul D beinhaltet die daraus resultierenden potenziellen Nutzen und Lasten in Form einer Systemerweiterung.

## Data sources
- GaBi Database (all versions)
- GaBi database SP40 2020
