# Steel forging part; steel forged part

Dataset: ILCD process, EPD, generic dataset
Geography: DE
Reference year: 2018
Valid until: 2022
Classification: oekobau.dat: Metalle / Stahl und Eisen / Guss- und Schmiedeteile aus Stahl und Eisen
Owner: thinkstep
Compliance: DIN EN 15804
Review: Dependent internal review by thinkstep, IABP-GaBi, IBP-GaBi; Independent external review by GaBi user forum, GaBi bug forum, GaBi user community
Amounts: rows without a unit in brackets have none in this file; such an amount is in the reference unit of its flow, which a separate flow dataset defines
copyright: true

## General comment
This data set has been modeled according to the European Standard EN 15804 for Sustainable Building. Results are depicted in modules that allow the structured expression of results over the entire life cycle.

## Geography
The data set represents the country specific situation in Germany, focusing on the main technologies, the region specific characteristics and / or import statistics.

## Time period
Annual average

## Technology and included processes
The data set represents the steel production in Germany based on the main production steps which take place within an integrated steel plant. These production steps as well as the main upstream process steps are described in the following. The main primary products are iron ore, pellets and hard coal. The import mix for the German steel production concerning iron ore and pellets is: Canada 50%, Brazil 25%, Australia 25%. The import mix for the German steel production concerning hard coal is: 100% Canada. The iron ore mining is explained in detail in the respective documentation file (please see link below). The preparation of the iron ore includes mainly the crushing. The average iron content in the iron ore is 60%. Pellets are small crystallized balls of iron ore. The pelletisation process consists of grinding and drying, balling and induration followed by screening and handling. The provision of hard coal is described in the respective documentation file (please see link below). For every fraction the transport to Germany is considered in the data set. The transportation includes all necessary transportation means like ship and where required railway. The coke oven produces as main product coke out of hard coal. The main by-product resulting from this operation is coke oven gas (COG gas) which is used as energy carrier within the steel production. Further by-products as tar, benzene and sulphur are sold and therefore excluded from the system by allocation to (net) calorific value. In the sinter plant sinter feed is produced based on the major inputs coke, iron ore and additives. Sintering is an agglomeration process which takes place under high temperatures. The raw materials (fine iron ore, coke breeze, additives) are blended, then the coke breeze is ignited. The result of the sinter process is the so-called sinter cake which has to be broken up, screened and cooled down. The blast furnace is a closed system into which iron bearing materials (iron ore lump, sinter and / or pellets), additives (slag formers such as limestone) and reducing agents (coke) are continuously fed from the top of the furnace shaft through a charging system. A hot air blast, enriched with oxygen and auxiliary reducing agents (e.g. pulverized coal) is injected providing a counter-current of reducing gases. The air blast reacts with the reducing agents to produce mainly carbon monoxide which in turn reduces iron oxides to metal iron. The main products of the blast furnace operation are hot metal, blast furnace gas (BF gas) and blast furnace slag (BF slag). The BF gas is used as fuel for heating comparable to the COG gas or for electricity production. The objective in oxygen steelmaking is to burn (i.e., oxidise) the undesirable impurities contained in the metallic feedstock. The main elements thus converted into oxides are carbon, silicon, manganese, phosphorus and sulphur. The purpose of this oxidation process, therefore, are to reduce the carbon content to a specified level to adjust the contents of desirable foreign elements and to remove undesirable impurities to the greatest possible extent. The production of steel by the basic oxygen furnace (BOF) process is a discontinuous process which involves the following steps: transfer and storage of hot metal, pre-treatment of hot metal (desulphurisation), oxidation in the BOF (decarburisation and oxidation of impurities) and secondary metallurgical treatment (e.g. vacuum treatment and adding alloying elements). Within the main step of the oxygen steelmaking, the hot metal feeds together with steel scrap the converter. The main products of the converter are the liquid steel, the converter gas or basic oxygen furnace gas (BOF gas) and the BOF slag. The gas is as well used as energy carrier within the steel production. Afterwards the continuous casting takes place whereby the liquid steel is cast in continuous strand. The output of the continuous casting process is the slab. The following operations are two rolling processes: the hot strip mill and the cold rolling mill. In the hot rolling mill the slab is reshaped above the recrystallization temperature. The qualities obtained in this process are e.g. strength and surface quality. During the rolling process the material passes through the furnace and the rolling line. In the furnace the metal is preheated by natural gas. There is no need for an additional warming, if the hot slabs are directly charged into the rolling mill. The forming is done in various rolling frames until the final shape is obtained. The steel scrap in this process are directly recycled. In the cold rolling mill the material is reshaped below the recrystallization temperature. Thereby a enhanced surface quality, an improved dimensional accuracy as well as a higher strength are achieved. The different process steps are: pickling, the rolling line and the heat treatment. The cold rolled sheet is transferred to the hot-dip galvanising. The zinc coating is applied by dipping the sheet steel into a hot zinc bath. During the hot-dip galvanising the cold rolled sheet passes the following process steps: preheating furnace (organic impurities are burned off), reduction zone (the sheet is heated to cause recrystallization), cooling and homogenization as well as metal bath (coating of the sheet) and finishing stand.
Background system:
Electricity: Electricity is modelled according to the individual country-specific situations. The country-specific modelling is achieved on multiple levels. Firstly, individual energy carrier specific power plants and plants for renewable energy sources are modelled according to the current national electricity grid mix. Modelling the electricity consumption mix includes transmission / distribution losses and the own use by energy producers (own consumption of power plants and "other" own consumption e.g. due to pumped storage hydro power etc.), as well as imported electricity. Secondly, the national emission and efficiency standards of the power plants are modelled as well as the share of electricity plants and combined heat and power plants (CHP). Thirdly, the country-specific energy carrier supply (share of imports and / or domestic supply) including the country-specific energy carrier properties (e.g. element and energy content) are accounted for. Fourthly, the exploration, mining/production, processing and transport processes of the energy carrier supply chains are modelled according to the specific situation of each electricity producing country. The different production and processing techniques (emissions and efficiencies) in the different energy producing countries are considered, e.g. different crude oil production technologies or different flaring rates at the oil platforms.
Thermal energy, process steam: The thermal energy and process steam supply is modelled according to the individual country-specific situation with regard to emission standards and considered energy carriers. The thermal energy and process steam are produced at heat plants. Efficiencies for thermal energy production are by definition 100% in relation to the corresponding energy carrier input. For process steam the efficiency ranges from 85%, 90% to 95%. The energy carriers used for the generation of thermal energy and process steam are modelled according to the specific import situation (see electricity above).
Transports: All relevant and known transport processes are included. Ocean-going and inland ship transport as well as rail, truck and pipeline transport of bulk commodities are considered.
Energy carriers: The energy carriers are modelled according to the specific supply situation (see electricity above).
Refinery products: Diesel fuel, gasoline, technical gases, fuel oils, lubricants and residues such as bitumen are modelled with a parameterised country-specific refinery model. The refinery model represents the current national standard in refining techniques (e.g. emission level, internal energy consumption, etc.) as well as the individual country-specific product output spectrum, which can be quite different from country to country. The supply of crude oil is modelled, again, according to the country-specific situation with the respective properties of the resources.

## Technical purpose
This product can be used in construction.

## Safety margin
20 %. Product system depicted except for a few missing processes / flows. Technological, temporal and geographic representativeness partly given.

## Reference product
- Steel forging part (St): 1

## Inputs
- Use of renewable primary energy (PERE) [MJ]: A1-A3 4.11969, C1 0.000566453, C2 0.0021792, D 1.31074
- Primary energy resources used as raw materials (PERM) [MJ]: A1-A3 0, C1 0, C2 0, D 0
- Total use of renewable primary energy resources (PERT) [MJ]: A1-A3 4.11969, C1 0.000566453, C2 0.0021792, D 1.31074
- Use of non-renewable primary energy (PENRE) [MJ]: A1-A3 25.3985, C1 0.0097302, C2 0.037433, D -11.4874
- Non-renewable primary energy resources used as raw materials (PENRM) [MJ]: A1-A3 0, C1 0, C2 0, D 0
- Total use of non-renewable primary energy resources (PENRT) [MJ]: A1-A3 25.3985, C1 0.0097302, C2 0.037433, D -11.4874
- Input of secondary material (SM) [kg]: A1-A3 0.2436, C1 0, C2 0, D 0
- Use of renewable secondary fuels (RSF) [MJ]: A1-A3 0, C1 0, C2 0, D 0
- Use of non renewable secondary fuels (NRSF) [MJ]: A1-A3 0, C1 0, C2 0, D 0
- Use of net fresh water (FW) [m3]: A1-A3 0.00468042, C1 5.07306e-7, C2 1.95166e-6, D -0.00103481

## Outputs
- Hazardous waste disposed (HWD) [kg]: A1-A3 2.30589e-8, C1 3.63607e-10, C2 1.39883e-9, D -9.72927e-9
- Non-hazardous waste disposed (NHWD) [kg]: A1-A3 0.0318935, C1 1.70782e-6, C2 6.57015e-6, D -0.0218772
- Radioactive waste disposed (RWD) [kg]: A1-A3 0.000499807, C1 1.02439e-8, C2 3.94093e-8, D 0.000208436
- Components for re-use (CRU) [kg]: A1-A3 0, C1 0, C2 0, D 0
- Materials for Recycling (MFR) [kg]: A1-A3 0, C1 1.2, C2 0, D 0
- Material for Energy Recovery (MER) [kg]: A1-A3 0, C1 0, C2 0, D 0
- Exported electrical energy (EEE) [MJ]: A1-A3 0, C1 0, C2 0, D 0
- Exported thermal energy (EET) [MJ]: A1-A3 0, C1 0, C2 0, D 0

## Impact indicators
- Global warming potential (GWP) [kg CO2 eq.]: A1-A3 2.80793, C1 0.000718871, C2 0.00278506, D -1.51902
- Ozone Depletion Potential (ODP) [kg R11 eq.]: A1-A3 2.04691e-14, C1 2.39627e-19, C2 9.21867e-19, D 9.33093e-15
- Acidification potential (AP) [kg SO2 eq.]: A1-A3 0.00601155, C1 2.50738e-6, C2 5.62553e-6, D -0.00350387
- Eutrophication potential (EP) [kg Phosphate eq.]: A1-A3 0.000599221, C1 5.91605e-7, C2 1.33734e-6, D -0.000291058
- Photochemical Ozone Creation Potential (POCP) [kg Ethene eq.]: A1-A3 0.000860494, C1 2.47755e-7, C2 -1.6854e-6, D -0.00045761
- Abiotic depletion potential for non fossil resources (ADPE) [kg Sb eq.]: A1-A3 2.84651e-7, C1 6.09201e-11, C2 2.34365e-10, D 3.61548e-8
- Abiotic depletion potential for fossil resources (ADPF) [MJ]: A1-A3 24.1386, C1 0.00970402, C2 0.0373323, D -12.0153

## Use advice
The data set represents a cradle to gate inventory. It can be used to characterise the supply chain situation of the respective commodity in a representative manner. Combination with individual unit processes using this commodity enables the generation of user-specific (product) LCAs.

## Data sources
- GaBi Database Edition 2020, SP40
- GaBi database (all versions)
