# Compact fluorescent lamp 18W (excluding control gear); 1 piece

Dataset: ILCD process, EPD, generic dataset
Geography: DE
Reference year: 2021
Valid until: 2022
Classification: oekobau.dat: Gebäudetechnik / Elektro / Beleuchtung
Owner: Sphera Solutions GmbH
Compliance: EN 15804+A2
Review: Dependent internal review by Sphera Solutions GmbH; Independent external review by GaBi user forum
Amounts: rows without a unit in brackets have none in this file; such an amount is in the reference unit of its flow, which a separate flow dataset defines
copyright: true
licenseType: Free of charge for all users and uses
accessRestrictions: The license conditions as stated on https://www.oekobaudat.de/ apply.
accessRestrictions: Es gelten die Lizenzbedingungen wie sie auf https://www.oekobaudat.de/ genannt sind.

## General comment
This data set has been modeled according to the European Standard EN 15804+A2 for Sustainable Building. Results are depicted in modules that allow the structured expression of results over the entire life cycle.

## Geography
The data set represents the country specific situation in Germany, focusing on the main technologies, the region specific characteristics and / or import statistics.

## Time period
Annual average

## Technology and included processes
Compact fluorescent lamp (Low-pressure gas discharge lamp) consisting of a bulb coated with phosphor, filled with mercury vapor and a gas (e.g. Argon), and two melted-down electrodes. Through applying a potential ultraviolet radiation is produced by the discharge of the gas-vapor mixture. This ultraviolet radiation is converted into visible light by the phosphor coating. Halophosphates or three-band phosphors are used as phosphors. Gas-discharge lamps are run with ballasts used to limit electricity through the lamp in the moment of discharge, which otherwise would destroy the lamp. The life span of a fluorescent lamp is given by the rated life in use and, depending on type of lamp and ballast, is ca. 7.000 bis 20.000 operating hours (See Table for rated life)
It is expected, that the recycling quote of big appliances like boilers, air conditioning, and ventilation systems is 95%. For pipes or cables which are often flush-mounted a 90% recycling quote is expected. The quotes are only related to metals and plastics. For mineral materials like mineral wool, concrete or ceramics inert landfilling is assumed, as well as for 5-10% of metals and plastics (e.g. cable waste and pipe pieces) that are not recycled. Plastics that are not recycled are introduced to the municipal waste incineration. For the MWI a European model with average emission values and energy production rates was used. Depending on the incinerated type of plastic, different processes with corresponding elemental compositions were used. Then dataset were set up in collaboration with the Confederation of European Waste-to-Energy Plants (CEWEP) and are available on the website of the European Platform on LCA [EC 2008]. Power and thermal energy produced in the MWI are accounted to the European power- and thermal energy mix. The credits for the metal recycling and the energetic recovery of plastics, as well as the emission and resource consumptions (energy for remelting, incineration emissions, landfilling) are included in the datasets. Iron materials (steel sheet, pipes, grey cast iron) already use a share of steel scrap at the production. These values are deducted from the recycled steel material before introduced to the melting to avoid a overvaluation of the credits. For the credits primary steel was used. Credits for the recycling of rare earth or mercury emissions from fluorescent lamps are not considered due to a lack of information. The assumed transport distance from building to recycling plant/landfilling site or MWI are 50km using a truck. The assumed distance to the steel, copper, and aluminium plant is 200km by train.

Background system:
Electricity: Electricity is modelled according to the individual country-specific situations. The country-specific modelling is achieved on multiple levels. Firstly, individual energy carrier specific power plants and plants for renewable energy sources are modelled according to the current national electricity grid mix. Modelling the electricity consumption mix includes transmission / distribution losses and the own use by energy producers (own consumption of power plants and "other" own consumption e.g. due to pumped storage hydro power etc.), as well as imported electricity. Secondly, the national emission and efficiency standards of the power plants are modelled as well as the share of electricity plants and combined heat and power plants (CHP). Thirdly, the country-specific energy carrier supply (share of imports and / or domestic supply) including the country-specific energy carrier properties (e.g. element and energy content) are accounted for. Fourthly, the exploration, mining/production, processing and transport processes of the energy carrier supply chains are modelled according to the specific situation of each electricity producing country. The different production and processing techniques (emissions and efficiencies) in the different energy producing countries are considered, e.g. different crude oil production technologies or different flaring rates at the oil platforms.
Thermal energy, process steam: The thermal energy and process steam supply is modelled according to the individual country-specific situation with regard to emission standards and considered energy carriers. The thermal energy and process steam are produced at heat plants. Efficiencies for thermal energy production are by definition 100% in relation to the corresponding energy carrier input. For process steam the efficiency ranges from 85%, 90% to 95%. The energy carriers used for the generation of thermal energy and process steam are modelled according to the specific import situation (see electricity above).
Transports: All relevant and known transport processes are included. Ocean-going and inland ship transport as well as rail, truck and pipeline transport of bulk commodities are considered.
Energy carriers: The energy carriers are modelled according to the specific supply situation (see electricity above).
Refinery products: Diesel fuel, gasoline, technical gases, fuel oils, lubricants and residues such as bitumen are modelled with a parameterised country-specific refinery model. The refinery model represents the current national standard in refining techniques (e.g. emission level, internal energy consumption, etc.) as well as the individual country-specific product output spectrum, which can be quite different from country to country. The supply of crude oil is modelled, again, according to the country-specific situation with the respective properties of the resources.

## Technical purpose
This product can be used in construction.

## Safety margin
20 %. Product system depicted except for a few missing processes / flows. Technological, temporal and geographic representativeness partly given.

## Reference product
- Compact fluorescent lamp 18W (excluding control gear): 1

## Inputs
- Use of renewable primary energy as energy carrier (PERE) [MJ]: A1-A3 0.701736, C2 0.000292268, C3 0.00359018, C4 -6.32718e-5, D -0.0524481
- Use of renewable primary energy resources used as raw materials (PERM) [MJ]: A1-A3 0, C2 0, C3 0, C4 0, D 0
- Total use of renewable primary energy (PERT) [MJ]: A1-A3 0.701736, C2 0.000292268, C3 0.00359018, C4 -6.32718e-5, D -0.0524481
- Use of non renewable primary energy as energy carrier (PENRE) [MJ]: A1-A3 4.68497, C2 0.0044978, C3 0.0127335, C4 0.0096266, D -0.161421
- Use of non renewable primary energy resources used as raw materials (PENRM) [MJ]: A1-A3 0, C2 0, C3 0, C4 0, D 0
- Total use of non renewable primary energy resource (PENRT) [MJ]: A1-A3 4.68497, C2 0.0044978, C3 0.0127335, C4 0.0096266, D -0.161421
- Use of secondary material (SM) [kg]: A1-A3 0.000957437, C2 0, C3 0, C4 0, D 0
- Use of renewable secondary fuels (SF) [MJ]: A1-A3 0, C2 0, C3 0, C4 0, D 0
- Use of non renewable secondary fuels (NRSF) [MJ]: A1-A3 0, C2 0, C3 0, C4 0, D 0
- Net use of fresh water (FW) [m3]: A1-A3 0.00298475, C2 2.42338e-7, C3 6.70586e-5, C4 1.8742e-6, D -2.06902e-5

## Outputs
- Hazardous waste disposed (HWD) [kg]: A1-A3 8.61814e-10, C2 2.03401e-13, C3 2.73179e-12, C4 6.60593e-13, D -5.38813e-11
- Non harzardous waste disposed (NHWD) [kg]: A1-A3 0.00832359, C2 7.52934e-7, C3 0.00285112, C4 0.0467549, D -5.66422e-5
- Radioactive waste disposed (RWD) [kg]: A1-A3 9.60657e-5, C2 7.87466e-9, C3 4.34189e-7, C4 -3.94903e-8, D -5.60959e-6
- Components for re-use (CRU) [kg]: A1-A3 0, C2 0, C3 0, C4 0, D 0
- Materials for recycling (MFR) [kg]: A1-A3 0, C2 0, C3 0, C4 0, D 0
- Materials for energy recovery (MER) [kg]: A1-A3 0, C2 0, C3 0, C4 0, D 0
- Exported electrical energy (EEE) [MJ]: A1-A3 0, C2 0, C3 0.042366, C4 0, D 0
- Exported thermal energy (EET) [MJ]: A1-A3 0, C2 0, C3 0.0972692, C4 0, D 0

## Impact indicators
- Global Warming Potential - total (GWP-total) [kg CO2 eq.]: A1-A3 0.305002, C2 0.000337093, C3 0.0274354, C4 0.00430142, D -0.0107278
- Global Warming Potential - fossil fuels (GWP-fossil) [kg CO2 eq.]: A1-A3 0.303456, C2 0.000334747, C3 0.0274311, C4 0.000952203, D -0.0106073
- Global Warming Potential - biogenic (GWP-biogenic) [kg CO2 eq.]: A1-A3 0.00129903, C2 1.76418e-7, C3 2.65572e-6, C4 0.00334754, D -0.000105628
- Global Warming Potential - land use and land use change (GWP-luluc) [kg CO2 eq.]: A1-A3 0.000246621, C2 2.17004e-6, C3 1.67215e-6, C4 1.67978e-6, D -1.49352e-5
- Depletion potenzial of the stratospheric ozone layer (ODP) [kg CFC-11 eq.]: A1-A3 2.51674e-15, C2 2.32315e-19, C3 1.454e-17, C4 -2.16776e-18, D -2.28342e-16
- Acidifcation potential, Accumulated Exceedance (AP) [Mole of H+ eq.]: A1-A3 0.00144313, C2 2.73758e-6, C3 4.73762e-6, C4 5.56436e-6, D -1.29259e-5
- Eutrophication potential - freshwater (EP-freshwater) [kg P eq.]: A1-A3 5.82918e-7, C2 7.07071e-10, C3 2.11821e-9, C4 8.82813e-8, D -2.45244e-8
- Eutrophication potential - marine (EP-marine) [kg N eq.]: A1-A3 0.000296388, C2 1.37469e-6, C3 1.06667e-6, C4 2.12481e-6, D -4.15741e-6
- Eutrophication potential - terrestrial (EP-terrestrial) [Mole of N eq.]: A1-A3 0.00340354, C2 1.51722e-5, C3 2.18706e-5, C4 1.66241e-5, D -4.43316e-5
- Photochemical Ozone Creation Potential (POCP) [kg NMVOC eq.]: A1-A3 0.000840383, C2 2.56988e-6, C3 2.97234e-6, C4 5.8327e-6, D -1.11912e-5
- Abiotic depletion potential - non-fossil resources (ADPE) [kg Sb eq.]: A1-A3 8.59899e-6, C2 3.09721e-11, C3 1.98306e-10, C4 2.8397e-12, D -4.97151e-8
- Abiotic depletion potential - fossil resources (ADPF) [MJ]: A1-A3 4.66978, C2 0.0044976, C3 0.0127305, C4 0.00962207, D -0.161348
- Water (user) deprivation potential (WDP) [m³ world equiv.]: A1-A3 0.0643056, C2 1.38174e-6, C3 0.00280661, C4 8.10013e-5, D -0.000143728

## Use advice
The data set represents a cradle to gate inventory. It can be used to characterise the supply chain situation of the respective commodity in a representative manner. Combination with individual unit processes using this commodity enables the generation of user-specific (product) LCAs.

## Data sources
- VAN TICHELEN 2007
- LEWY (2007)
- ZVEI 2005
- KROBAN 2007
- BORN 2006
- FRANZ 2005
- MCGILL 2005
- VAN DEN HOEK 2005
- Documentation of data quality management
- GaBi Database Edition 2021, CUP2021.01
- GaBi database (all versions)
