# Ceramic tiles

Dataset: ILCD process, EPD, average dataset
Geography: DE
Reference year: 2016
Valid until: 2022
Classification: OEKOBAU.DAT: Mineralische Baustoffe / Steine und Elemente / Fliesen und Platten
Classification: IBUCategories: 02 Bauprodukte / Innen-, Außenwand und Deckenbekleidungen / Keramische Fliesen und Platten
Method details: Keramische Fliesen und Platten.pdf
Generated by: Sphera Solutions GmbH
Registration number: EPD-BKF-20160002-IBE2-DE
Owner: Bundesverband Keramische Fliesen e. V.
Compliance: DIN EN 15804; ISO 14025
Review: Accredited third party review by Institut Bauen und Umwelt e. V.
Amounts: rows without a unit in brackets have none in this file; such an amount is in the reference unit of its flow, which a separate flow dataset defines
copyright: true
licenseType: Free of charge for all users and uses
accessRestrictions: None

## General comment
Ceramic tiles are produced by extrusion or dry-pressing techniques. They are formed, dried and then fired once or twice in order to develop the desired and required characteristics.

The products under review here involve wall and floor tiles in all formats, surface finishes (e.g. glazed and/or coated and unglazed) and colours as well as all defined classification and evaluation groups. Ceramic tiles are generally classified as earthenware, stoneware, porcelain tiles and split tiles. Earthenware is more porous and displays a higher degree of water absorption. It is glazed and largely used in interior applications while stoneware and porcelain tiles have essentially low water absorption. This makes them more resistant to frost as well as being particularly durable as floor coverings. The situation is similar for split tiles, i.e. extruded products.

## Technology and included processes
The products considered here comprise wall and floor tiles in all formats, surfaces (eg glazed or tempered and unglazed) and colors as well as all defined classification and assessment groups. production: The manufacturing process for ceramic tiles and tiles is divided into various process steps such as the preparation of the starting materials, the shaping, the drying, if necessary glazing, and the firing of the tiles and tiles Plate blanks. Ceramic raw materials are mainly clay, kaolin, quartz and feldspar. The starting materials are first comminuted and ground, weighed according to the prescription, mixed with water in the mixer and homogenized (ceramic Dimensions). In shaping, two different methods are distinguished. In the so-called dry pressing process, the raw material mass is pressed as granulate into the future tile shape; During the extrusion, the paste is worked up Raw material mass by means of molding stencils. The molded blanks are then dried, if desired, and fired with or without a glaze. After the fire, the tiles are sorted and packaged. Raw materials: Ceramic tiles and tiles are produced from a raw material consisting of the following essential ingredients: clays about 50%, feldspar approx. 25%, kaolin about 7%, limestone about 3%, sand about 3% and glazes / Compensation about 4%.
Technical data:
The following section outlines details on product performance in terms of their essential characteristics in accordance with EN 14411, where included and specified in the Declaration of Performance.

As no specific values can be provided for the average product declared in this EPD, the requirements are outlined below in accordance with a defined product class.

1. Water absorption

Ceramic tiles are classified in groups I to III with regard to water absorption and design. Water absorption as a mass percentage is >0.5% to <10% depending on the group and measured in accordance with /DIN EN ISO 10545-3/.

2. Breaking load (requirements in accordance with /DIN EN 14411/):

dependant on tile application and classification group

- Breaking load for tile thickness ≥ 7.5 mm: min. 600 – min. 1,300 N

- Breaking load for tile thickness < 7.5 mm: min. 200 – min. 600 N

3. Bending strength (requirements in accordance with /DIN EN 14411/): dependant on tile application and classification group:

- Bending strength: min. 8 – min. 30 N/mm²

4. Resistance to surface wear

EN ISO 10454-7 (PEI Test): friction classes II, III, IV and V

5. Resistance to freeze-thaw cycles: EN ISO 10545-12 where applicable

6. Non-slip properties: as indicated
Declared unit:
The Declaration is based on the production of 1 m² average ceramic tiles. Please refer to the table for conversion factors.

## Technical purpose
Ceramic tiles are largely used as wall and floor coverings in interior and exterior applications. Apart from applications in living areas, e.g. bathrooms, kitchens, hallways and porches as well as in living rooms and bedrooms, on balconies and patios, they are also used in commercial and industrial areas, in public buildings, indoor swimming pools and on facades etc. on account of the possibilities offered in terms of combining design and durability.

## Scenarios
- S1: 100% material recycling
- S2: 100% landfill

## Reference product
- 1 m² durchschnittliche Fliese (18,65 kg/m²): 1

## Inputs
- Renewable primary energy as energy carrier (PERE) [MJ]: A1-A3 17.568, A4 0.267, A5 0.663, B1 0, B2 0.00668, B3 0, B4 0, B5 0, B6 0, B7 0, C1 0.0104, C2 0.0177, C3 (S1) 0.0674, C3 (S2) 0, C4 (S1) 0, C4 (S2) 0, D (S1) -0.211, D (S2) -0.0968
- Renewable primary energy resources as material utilization (PERM) [MJ]: A1-A3 0.66, A4 0, A5 -0.66, B1 0, B2 0, B3 0, B4 0, B5 0, B6 0, B7 0, C1 0, C2 0, C3 (S1) 0, C3 (S2) 0, C4 (S1) 0, C4 (S2) 0, D (S1) 0, D (S2) 0
- Total use of renewable primary energy resources (PERT) [MJ]: A1-A3 18.228, A4 0.267, A5 0.003, B1 0, B2 0.00668, B3 0, B4 0, B5 0, B6 0, B7 0, C1 0.0104, C2 0.0177, C3 (S1) 0.0674, C3 (S2) 0, C4 (S1) 0, C4 (S2) 0.402, D (S1) -0.211, D (S2) -0.0968
- Non renewable primary energy as energy carrier (PENRE) [MJ]: A1-A3 219.88, A4 3.5, A5 0.405, B1 0, B2 0.0436, B3 0, B4 0, B5 0, B6 0, B7 0, C1 0.137, C2 0.232, C3 (S1) 0.959, C3 (S2) 0, C4 (S1) 0, C4 (S2) 0, D (S1) -1.38, D (S2) -0.749
- Non renewable primary energy as material utilization (PENRM) [MJ]: A1-A3 0.38, A4 0, A5 -0.38, B1 0, B2 0, B3 0, B4 0, B5 0, B6 0, B7 0, C1 0, C2 0, C3 (S1) 0, C3 (S2) 0, C4 (S1) 0, C4 (S2) 0, D (S1) 0, D (S2) 0
- Total use of non renewable primary energy resources (PENRT) [MJ]: A1-A3 220.26, A4 3.5, A5 0.0248, B1 0, B2 0.0436, B3 0, B4 0, B5 0, B6 0, B7 0, C1 0.137, C2 0.232, C3 (S1) 0.959, C3 (S2) 0, C4 (S1) 0, C4 (S2) 4.09, D (S1) -1.38, D (S2) -0.749
- Use of secondary material (SM) [kg]: A1-A3 0.10512, A4 0, A5 0, B1 0, B2 0, B3 0, B4 0, B5 0, B6 0, B7 0, C1 0, C2 0, C3 (S1) 0, C3 (S2) 0, C4 (S1) 0, C4 (S2) 0, D (S1) 18.55, D (S2) 0
- Use of renewable secondary fuels (RSF) [MJ]: A1-A3 0, A4 0, A5 0, B1 0, B2 0, B3 0, B4 0, B5 0, B6 0, B7 0, C1 0, C2 0, C3 (S1) 0, C3 (S2) 0, C4 (S1) 0, C4 (S2) 0, D (S1) 0, D (S2) 0
- Use of non renewable secondary fuels (NRSF) [MJ]: A1-A3 0, A4 0, A5 0, B1 0, B2 0, B3 0, B4 0, B5 0, B6 0, B7 0, C1 0, C2 0, C3 (S1) 0, C3 (S2) 0, C4 (S1) 0, C4 (S2) 0, D (S1) 0, D (S2) 0
- Use of net fresh water (FW) [m^3]: A1-A3 0.032735, A4 0.00015, A5 0.00026, B1 0, B2 1.11e-5, B3 0, B4 0, B5 0, B6 0, B7 0, C1 6.03e-6, C2 1.02e-5, C3 (S1) 0.000239, C3 (S2) 0, C4 (S1) 0, C4 (S2) 0.000774, D (S1) -0.000227, D (S2) -0.000102

## Outputs
- Hazardous waste disposed (HWD) [kg]: A1-A3 0.00012942, A4 2.82e-6, A5 1.33e-8, B1 0, B2 7.6e-9, B3 0, B4 0, B5 0, B6 0, B7 0, C1 1.1e-7, C2 1.87e-7, C3 (S1) 5.22e-7, C3 (S2) 0, C4 (S1) 0, C4 (S2) 1.27e-6, D (S1) -8.27e-7, D (S2) -3.72e-7
- Non hazardous waste disposed (NHWD) [kg]: A1-A3 0.416, A4 0.000874, A5 0.000196, B1 0, B2 3.48e-5, B3 0, B4 0, B5 0, B6 0, B7 0, C1 3.42e-5, C2 5.79e-5, C3 (S1) 0.000513, C3 (S2) 0, C4 (S1) 0, C4 (S2) 18.7, D (S1) -0.754, D (S2) -0.000286
- Radioactive waste disposed (RWD) [kg]: A1-A3 0.0051541, A4 4.65e-6, A5 9.87e-7, B1 0, B2 7.24e-7, B3 0, B4 0, B5 0, B6 0, B7 0, C1 1.82e-7, C2 3.08e-7, C3 (S1) 1.07e-5, C3 (S2) 0, C4 (S1) 0, C4 (S2) 6.5e-5, D (S1) -6.85e-5, D (S2) -3.64e-5
- Components for re-use (CRU) [kg]: A1-A3 0, A4 0, A5 0, B1 0, B2 0, B3 0, B4 0, B5 0, B6 0, B7 0, C1 0, C2 0, C3 (S1) 0, C3 (S2) 0, C4 (S1) 0, C4 (S2) 0, D (S1) 0, D (S2) 0
- Materials for recycling (MFR) [kg]: A1-A3 0, A4 0, A5 0, B1 0, B2 0, B3 0, B4 0, B5 0, B6 0, B7 0, C1 0, C2 0, C3 (S1) 18.65, C3 (S2) 0, C4 (S1) 0, C4 (S2) 0, D (S1) 0, D (S2) 0
- Materials for energy recovery (MER) [kg]: A1-A3 0, A4 0, A5 0, B1 0, B2 0, B3 0, B4 0, B5 0, B6 0, B7 0, C1 0, C2 0, C3 (S1) 0, C3 (S2) 0, C4 (S1) 0, C4 (S2) 0, D (S1) 0, D (S2) 0
- Exported electrical energy (EEE) [MJ]: A1-A3 0, A4 0, A5 0.151, B1 0, B2 0, B3 0, B4 0, B5 0, B6 0, B7 0, C1 0, C2 0, C3 (S1) 0, C3 (S2) 0, C4 (S1) 0, C4 (S2) 0, D (S1) 0, D (S2) 0
- Exported thermal energy (EET) [MJ]: A1-A3 0, A4 0, A5 0.371, B1 0, B2 0, B3 0, B4 0, B5 0, B6 0, B7 0, C1 0, C2 0, C3 (S1) 0, C3 (S2) 0, C4 (S1) 0, C4 (S2) 0, D (S1) 0, D (S2) 0

## Impact indicators
- Global warming potential (GWP) [kg CO_(2)-Äq.]: A1-A3 12.939, A4 0.256, A5 0.109, B1 0, B2 0.001184, B3 0, B4 0, B5 0, B6 0, B7 0, C1 0.0101, C2 0.017, C3 (S1) 0.0493, C3 (S2) 0, C4 (S1) 0, C4 (S2) 0.301, D (S1) -0.096, D (S2) -0.05
- Depletion potential of the stratospheric ozone layer (ODP) [kg CFC11-Äq.]: A1-A3 5.6568e-10, A4 3.2e-13, A5 7e-14, B1 0, B2 6.68e-14, B3 0, B4 0, B5 0, B6 0, B7 0, C1 1.2e-14, C2 2.1e-14, C3 (S1) 7.7e-13, C3 (S2) 0, C4 (S1) 0, C4 (S2) 4.81e-12, D (S1) -4.9e-12, D (S2) -2.6e-12
- Acidification potential of land and water (AP) [kg SO_(2)-Äq.]: A1-A3 0.024192, A4 0.00065, A5 1.1e-5, B1 0, B2 4.72e-6, B3 0, B4 0, B5 0, B6 0, B7 0, C1 3.9e-5, C2 4.3e-5, C3 (S1) 0.00035, C3 (S2) 0, C4 (S1) 0, C4 (S2) 0.00183, D (S1) -0.00028, D (S2) -6e-5
- Eutrophication potential (EP) [kg PO_(4)^(3)-Äq.]: A1-A3 0.0026892, A4 0.00018, A5 2.4e-6, B1 0, B2 1.63e-6, B3 0, B4 0, B5 0, B6 0, B7 0, C1 1.1e-5, C2 1.2e-5, C3 (S1) 8.7e-5, C3 (S2) 0, C4 (S1) 0, C4 (S2) 0.00025, D (S1) -5.3e-5, D (S2) -8.2e-6
- Formation potential of tropospheric ozone photochemical oxidants (POCP) [kg Ethen-Äq.]: A1-A3 0.0021046, A4 -0.00019, A5 5.2e-7, B1 0, B2 1.46e-6, B3 0, B4 0, B5 0, B6 0, B7 0, C1 4.4e-6, C2 -1.2e-5, C3 (S1) 5e-5, C3 (S2) 0, C4 (S1) 0, C4 (S2) 0.00017, D (S1) -3.1e-5, D (S2) -6.2e-6
- Abiotic depletion potential for non fossil resources (ADPE) [kg Sb-Äq.]: A1-A3 0.00011729, A4 1.3e-8, A5 1e-9, B1 0, B2 9.84e-10, B3 0, B4 0, B5 0, B6 0, B7 0, C1 5.2e-10, C2 8.8e-10, C3 (S1) 8.4e-8, C3 (S2) 0, C4 (S1) 0, C4 (S2) 1.1e-7, D (S1) -1.8e-8, D (S2) -7.4e-9
- Abiotic depletion potential for fossil resources (ADPF) [MJ]: A1-A3 207.28, A4 3.49, A5 0.022, B1 0, B2 0.0416, B3 0, B4 0, B5 0, B6 0, B7 0, C1 0.137, C2 0.231, C3 (S1) 0.932, C3 (S2) 0, C4 (S1) 0, C4 (S2) 3.93, D (S1) -1.21, D (S2) -0.658

## Use advice
Scope:
This document refers to ceramic tiles by the Bundesverband Keramische Fliesen e. V.

The LCA data was recorded in 2014 in member plants of the association. The LCA is representative for 9 companies and 11 plants in the association which manufacture around 70% of the total domestic production volume.
System boundary:
The following life cycle phases are considered: product stage, construction of the building structure, use stage, end-of-life stage, benefits and loads beyond the system boundaries.

The EPD system boundaries follow the modular approach outlined in the /EN 15804/. The declared modules are outlined briefly below.

Type of EPD: “cradle to grave”

Modules A1 to A3 comprise the manufacturing phase:
A1 Raw material supply and processing and poss. finishing processes for secondary materials serving as input (e.g. recycling processes)
A2 Transport to manufacturer
A3 Production

The data on energy, material and waste flows is queried within the framework of data collation in the plants.

The possible recycling of product waste incurred during production is allocated as zero to the benefit of a conservative calculation approach. It does not have any noteworthy market value nor does it cause any acceptance costs and can therefore be regarded as a by-product. Integration of biogenic CO2 in the wooden pallets is included. Consideration is only taken of defective pallets which are in fact disposed of. The paper and/or cardboard used primarily comprises recycled fibres with a low percentage of primary fibres for technical reasons. Disposed of paper/cardboard is not therefore attributed a credit, e.g. for energy use during thermal utilisation.

Module A4 includes transport to the customer and/or construction site. This data is also collected in the plants and refers to domestic transport.

Module A5 includes the assembly expenses incl. disposal of packaging. This EPD exclusively analyses the influence of plastic and paper packaging disposal incl. transporting packaging for disposal. Thermal processing in a plant with R1<0.6 is assumed for the packaging (with the exception of paper/cardboard). The loads from the incineration process are declared in Module A5; the remaining credits are declared in Module D.

The material expenses associated with tile adhesive and grouting mortar as well as cuttings are not analysed in this LCA as there can be major differences in volumes depending on the respective application. The material expenses associated with tile adhesive and grouting mortar are outlined in the Declaration for a typical standard application but are not included in the LCA.

Module B1 concerns the use of tiles with regard to emissions into the environment. The module is declared. No indoor emissions presenting a hazard for health can be anticipated when using tiles.

Module B2 includes the expenses associated with cleaning using water and cleaning agents. A typical cleaning cycle must be indicated separately for floor and wall tiles in the EPD. The environmental impact of annual expenses associated with cleaning 1 m² wall tiles is indicated in the LCA. If the sum is divided by 4 (wall tiles cleaned 4 times a year) and then multiplied by the number of cleaning processes per year for floor tiles, the planner can calculate the total impact of cleaning, including concerning floor tiles.

Modules B3 to B5 concern the repair, substitution and full replacement of tiled floors. These modules are considered in the study and declared in the EPD. When installed as designated, no repair, replacement or substitution is necessary.

Modules B6 and B7 are considered in the study and declared in the EPD. There are no environmental impacts here as the product does not require water or electricity in order to work. The expenses associated with cleaning are declared in B2.

The C Modules and Module D refer to analysis of tile disposal following use where maximum two scenarios (both 100%) are taken as a basis for calculation. EoL scenario 1 refers to material utilisation as mineral filling materials in the construction industry. EoL scenario 2 outlines disposal at a building rubble landfill.

Details on modules concerning subsequent use:

Module C1 includes the expenses associated with de-construction, primarily diesel consumption by demolition machines.

Module C2 includes transport to the landfill and/or to recycling.

Module C3 comprises processing building materials for later use as mineral bulk goods.

Module C4 involves waste disposal, i.e. disposal in the building rubble landfill.

Module D includes the credit for expenses saved, i.e. savings in primary material and primary energy by using recycled grit and by thermal utilisation of packaging.

Waste impact is considered in the modules in which such waste is incurred.

Machinery, plants and infrastructure required in the manufacturing process are ignored.

## Data sources
- GaBi Database (all versions)
- GaBi database SP27 2015
