# CLIMAFLEX® STABIL / EXZENTROFLEX® COMPACT made of NMC NATUREFOAM®

Dataset: ILCD process, EPD, average dataset
Geography: BE
Reference year: 2017
Valid until: 2022
Classification: OEKOBAU.DAT: Dämmstoffe / Polyethylen / Schaum
Classification: IBUCategories: 02 Bauprodukte / Wärmedämmungsprodukte / Dämmstoffe aus Schaumkunststoffen
Method details: Dämmstoffe aus Schaumkunststoffen.pdf
Registration number: EPD-NMC-20170102-IBD3-DE
Owner: NMC S.A.
Compliance: DIN EN 15804; ISO 14025
Review: Accredited third party review by Institut Bauen und Umwelt e. V.
Amounts: rows without a unit in brackets have none in this file; such an amount is in the reference unit of its flow, which a separate flow dataset defines
copyright: true

## General comment
CLIMAFLEX® STABIL / EXZENTROFLEX® COMPACT made of NMC NATUREFOAM® is the Professional Polyethylene-based closed-cell foam pipe insulation with a robust PE protective coating for continues energy saving and condensation control purposes. CLIMAFLEX® STABIL NMC NATUREFOAM® provides solutions that follow all necessary guidelines for any type of installation. EXZENTROFLEX® COMPACT NMC NATUREFOAM® With its rectangular and thin design, it is used in flooring.

## Technology and included processes
The manufacturing process consists of a continuous extrusion. Solid pellets of thermoplastic resin are fed to a melting zone in which the resin is melted, to form a flowable thermoplastic mass. The thermoplastic mass is then metered to a mixing zone where the thermoplastic mass is thoroughly mixed with a blowing agent under pressure. The mixture of thermoplastic resin and blowing agent is then forced through a die, which imparts a shape to the thermoplastic mass, into a zone of lower pressure, such as atmospheric pressure. The blowing agent expands to form the cells of the foam and the thermoplastic foam is cooled trough an inline water cooler. The protection coating "skin" is applied by co-extrusion. The "skin" is made with solid pellets of thermoplastic resin and some additives, which is, with the help of an extruder, applied around the foam. There's no a foaming agent used in this case. The die is positioned around the "naked" foam and deposes a small thickness (± 0.1 mm) of PE film on the foam. At the end of this process the profiles are cut at dimension. Quality assurance : The manufacture is certified /ISO 9001/ for the quality management. The product corresponds to the product standard /EN 14313/ and have a Declaration of Performance according the /CPR/ : DOP no. W1PEF300 ; W1PEF400 (see www.nmc.eu/dop)
Declared unit:
The declaration refers to 1 m³ of produced insulation product. For the LCA calculations, as the product is foam and have some tolerances, the density declared is the average between the product categories. The thermal conductivity coefficient (Lambda-value) and R-value per 25 mm thickness per product brand is provided below as additional information and support for installers.

## Technical purpose
CLIMAFLEX® STABIL made of NMC NATUREFOAM® is used to insulate pipes for heating and plumbing. EXZENTROFLEX® COMPACT made of NMC NATUREFOAM® is used in flooring
Polyethylene foam is a cost-efficient material with good insulating properties.

Products made of PE foam yield an excellent cost/performance ratio.

Heat loss control and noise reduction in fresh-and waste water and heating systems

## Reference product
- CLIMAFLEX® STABIL / EXZENTROFLEX® COMPACT aus NMC NATUREFOAM®/M³: 1

## Inputs
- Renewable primary energy as energy carrier (PERE) [MJ]: A1-A3 2494.29, A4 4.89254, A5 0, C2 0.198352, C3 0, C4 3.20407, D 0
- Renewable primary energy resources as material utilization (PERM) [MJ]: A1-A3 987.966, A4 0, A5 0, C2 0, C3 0, C4 -987.966, D 0
- Total use of renewable primary energy resources (PERT) [MJ]: A1-A3 3482.25, A4 4.89254, A5 0, C2 0.198352, C3 0, C4 3.20407, D 0
- Non renewable primary energy as energy carrier (PENRE) [MJ]: A1-A3 1138.8, A4 95.2613, A5 0, C2 3.86206, C3 0, C4 43.7261, D 0
- Non renewable primary energy as material utilization (PENRM) [MJ]: A1-A3 101.66, A4 0, A5 0, C2 0, C3 0, C4 -101.66, D 0
- Total use of non renewable primary energy resources (PENRT) [MJ]: A1-A3 1240.45, A4 95.2613, A5 0, C2 3.86206, C3 0, C4 43.7261, D 0
- Use of secondary material (SM) [kg]: A1-A3 19.5, A4 0, A5 0, C2 0, C3 0, C4 0, D 0
- Use of renewable secondary fuels (RSF) [MJ]: A1-A3 0, A4 0, A5 0, C2 0, C3 0, C4 0, D 0
- Use of non renewable secondary fuels (NRSF) [MJ]: A1-A3 0, A4 0, A5 0, C2 0, C3 0, C4 0, D 0
- Use of net fresh water (FW) [m^3]: A1-A3 0.3799, A4 0.00905294, A5 0, C2 0.000367022, C3 0, C4 0.000104672, D 0

## Outputs
- Hazardous waste disposed (HWD) [kg]: A1-A3 0.000627942, A4 4.96785e-6, A5 0, C2 2.01405e-7, C3 0, C4 1.69068e-7, D 0
- Non hazardous waste disposed (NHWD) [kg]: A1-A3 10.6045, A4 0.0075415, A5 0, C2 0.000305745, C3 0, C4 40.8433, D 0
- Radioactive waste disposed (RWD) [kg]: A1-A3 0.167998, A4 0.000196919, A5 0, C2 7.98344e-6, C3 0, C4 0.000662312, D 0
- Components for re-use (CRU) [kg]: A1-A3 0, A4 0, A5 0, C2 0, C3 0, C4 0, D 0
- Materials for recycling (MFR) [kg]: A1-A3 0, A4 0, A5 0, C2 0, C3 0, C4 0, D 0
- Materials for energy recovery (MER) [kg]: A1-A3 0, A4 0, A5 0, C2 0, C3 0, C4 0, D 0
- Exported electrical energy (EEE) [MJ]: A1-A3 0, A4 0, A5 0, C2 0, C3 0, C4 0, D 0
- Exported thermal energy (EET) [MJ]: A1-A3 0, A4 0, A5 0, C2 0, C3 0, C4 0, D 0

## Impact indicators
- Global warming potential (GWP) [kg CO_(2)-Äq.]: A1-A3 -21.0775, A4 6.86868, A5 0, C2 0.278315, C3 0, C4 2.9328, D 0
- Depletion potential of the stratospheric ozone layer (ODP) [kg CFC11-Äq.]: A1-A3 1.03965e-7, A4 5.58914e-12, A5 0, C2 2.26593e-13, C3 0, C4 7.20169e-12, D 0
- Acidification potential of land and water (AP) [kg SO_(2)-Äq.]: A1-A3 1.22354, A4 0.0325327, A5 0, C2 0.00122357, C3 0, C4 0.00810258, D 0
- Eutrophication potential (EP) [kg PO_(4)^(3)-Äq.]: A1-A3 0.863831, A4 0.00816222, A5 0, C2 0.000305723, C3 0, C4 0.00803134, D 0
- Formation potential of tropospheric ozone photochemical oxidants (POCP) [kg Ethen-Äq.]: A1-A3 0.244499, A4 -0.0134232, A5 0, C2 -0.000496855, C3 0, C4 0.000924248, D 0
- Abiotic depletion potential for non fossil resources (ADPE) [kg Sb-Äq.]: A1-A3 0.0470466, A4 6.21043e-7, A5 0, C2 2.51781e-8, C3 0, C4 6.06872e-7, D 0
- Abiotic depletion potential for fossil resources (ADPF) [MJ]: A1-A3 712.09, A4 94.7599, A5 0, C2 3.84173, C3 0, C4 42.0438, D 0

## Use advice
Scope:
Product line CLIMAFLEX® STABIL / EXZENTROFLEX® COMPACT made of NMC NATUREFOAM®

Thermal insulation products for building equipment and industrial insulations made of Polyethylene-based, closed-cell foam pipe insulation with a robust protective coating (PEF) according to /EN14313/. This declaration is an Environmental Product Declaration according to /ISO14025/ describing the specific environmental performance of the product produced in Belgium. The only difference between the two CLIMAFLEX® STABIL made of NMC NATUREFOAM® and EXZENTROFLEX® COMPACT made of NMC NATUREFOAM® is the shape chemically they are identical. CLIMAFLEX® STABIL made of NMC NATUREFOAM® has a circular shape while EXZENTROFLEX® COMPACT NMC NATUREFOAM® is rectangular and thus more suitable for the insulation of heating pipes in a concrete floor
System boundary:
The Data collection refers to the yearly production in 2016.

Module A1 to A3: The LCA calculation covers the production of the raw materials, transport of these to the plant, the mixing of raw materials according to the respective recipes, manufacturing of the foam product and packaging for dispatch. All production takes place exclusively in Eynatten, Belgium.
Module A4: Transport of the final product to the application site. The average transport distance has been calculated based on a weighted value for NMC’s main customers representing more than 50% of the sales volume in 2016. Capacity utilisation by volume is 100%. However, given the low density of the product, capacity utilisation by mass has been estimated as 10%.

Module A5: The products can be placed end to end and the remaining pieces can be reused on other pipes. The calculations do not contain any installation waste. Cardboard as packaging material is assumed to be recycled. As input material cardboard made of waste paper is considered. Thus, environmental burden for packaging material are considered already in A1-A3. The value of the environmental impact for A5 is declared as “0”.

Module B1-B7:The foam insulation products do not require maintenance, replacement or refurbishment while in use. The information modules B1 – B7 are not declared.

Using insulation material influences the energy consumption of the overall heating and cooling equipment. This is not taken into account, as the EPD refer to the product 'insulation material'.

Module C1:Disassembly is done manually. There are no impacts associated with C1. The information module is not declared.

Module C2:For the transport at end-of-life stage an average distance to landfill is assumed to be 100 km.

Module C3:The chosen scenario of 100% landfilling does not require any waste processing. Module C3 is not declared.

Module C4: The environmental burden for the chosen scenario of 100% landfilling is declared in module C4.

The product contains raw materials from renewable sources. By calculating the environmental burden for the production process the sequestration of CO2 from atmosphere has taken into account.

The environmental effects of (bio-)plastic on a landfill site in the next 100 years cannot be foreseen as a full picture today. In this declaration it is assumed, that the sequestered CO2 is still integrated in a solid matrix.

Module D: The end-of-life scenarios for packaging material and product do not deliver any benefits for the next system. Recycling of cardboard is a closed cycle with the production process.

The product is landfilled; energy or material gain cannot be expected.

## Data sources
- CLIMAFLEX® STABIL / EXENTROFLEX® COMPACT aus NMC NATUREFOAM®.pdf
- GaBi Database (all versions)
- GaBi database SP29 2016
