# Insulation board made of Neopor® Plus

Dataset: ILCD process, EPD, specific dataset
Geography: DE
Reference year: 2019
Valid until: 2024
Classification: OEKOBAU.DAT: Dämmstoffe / Expandiertes Polystyrol (EPS) / EPS grau
Classification: IBUCategories: 02 Bauprodukte / Wärmedämmungsprodukte / Dämmstoffe aus Schaumkunststoffen
Method details: Dämmstoffe aus Schaumkunststoffen.pdf
Registration number: EPD-BAS-20180142-IBA1-DE
Owner: BASF SE
Compliance: DIN EN 15804; ISO 14025
Review: Accredited third party review by Institut Bauen und Umwelt e. V.
Amounts: rows without a unit in brackets have none in this file; such an amount is in the reference unit of its flow, which a separate flow dataset defines
copyright: true

## General comment
Insulation boards made of Neopor® Plus are expandable polystyrenes (EPS) with polymer flame retardants (Polymer FR).

## Technology and included processes
Production of insulation boards made of Neopor® Plus entails a multi-stage process. The granulate is initially produced at the BASF SE site in Ludwigshafen followed by the foaming process at the Karl Bachl Kunststoffverarbeitung GmbH & Co. KG site in Röhrnbach. The conversion process of EPS granulate to foamed insulation boards consists of the following manufacturing stages: pre-foaming, interim storage and foaming. During the pre-foaming stage, the granulate is foamed with the aid of steam and the blowing agent pentane. Subsequently, the expanded granulate is stored in air-permeable silos. Thanks to the diffusing air, the EPS foam particles receive the necessary stability for further processing. The most commonly used method of producing insulation boards is block foaming followed by cutting. For this purpose, the EPS foam particles are filled into cuboid block moulds and foamed with steam at 110 °C to 120 °C. After a short cooling time, the blocks are demoulded and deposited. Then the blocks are cut into boards using mechanical or thermal cutting equipment. Production waste is fully reused for the production of primary material.
Technical data:
Performance data of the product in accordance with the Declaration of Performance with respect to its essential characteristics according to /EN 13163:2012/+A1:2015 – Thermal insulation materials for buildings – Factory-made expanded polystyrene (EPS) products – Specification
Declared unit:
The declared unit is 1 m³ insulation board made of Neopor® Plus. The conversion factors are listed in the following table.

## Technical purpose
Insulation boards made of Neopor® Plus are suitable for use in many applications. The product described in this document is used in applications such as wall insulation, pitched roof insulation, External Thermal Insulation Composite System (ETICS), cavity wall insulation, ceiling insulation, insulation for building equipment, and industrial installations.

## Reference product
- Neopor® Plus Platte: 1

## Inputs
- Renewable primary energy as energy carrier (PERE) [MJ]: A1-A3 45.15, A4 0.59, A5 0.64, C2 0.2, C4 1.14, D -75.38
- Renewable primary energy resources as material utilization (PERM) [MJ]: A1-A3 0, A4 0, A5 0, C2 0, C4 0, D 0
- Total use of renewable primary energy resources (PERT) [MJ]: A1-A3 45.15, A4 0.59, A5 0.64, C2 0.2, C4 1.14, D -75.38
- Non renewable primary energy as energy carrier (PENRE) [MJ]: A1-A3 823.26, A4 11.22, A5 29.29, C2 3.74, C4 593.25, D -353.83
- Non renewable primary energy as material utilization (PENRM) [MJ]: A1-A3 596.14, A4 0, A5 -9.77, C2 0, C4 -586.38, D 0
- Total use of non renewable primary energy resources (PENRT) [MJ]: A1-A3 1419.4, A4 11.22, A5 19.52, C2 3.74, C4 6.87, D -353.83
- Use of secondary material (SM) [kg]: A1-A3 0, A4 0, A5 0, C2 0, C4 0, D 0
- Use of renewable secondary fuels (RSF) [MJ]: A1-A3 0, A4 0, A5 0, C2 0, C4 0, D 0
- Use of non renewable secondary fuels (NRSF) [MJ]: A1-A3 0, A4 0, A5 0, C2 0, C4 0, D 0
- Use of net fresh water (FW) [m^3]: A1-A3 0.144, A4 0.00108, A5 0.00385, C2 0.000359, C4 0.0945, D -0.0481

## Outputs
- Hazardous waste disposed (HWD) [kg]: A1-A3 7.82e-7, A4 5.92e-7, A5 2.15e-9, C2 1.97e-7, C4 5.12e-9, D -1.99e-7
- Non hazardous waste disposed (NHWD) [kg]: A1-A3 2.57, A4 0.000901, A5 0.0358, C2 0.0003, C4 0.0534, D -0.192
- Radioactive waste disposed (RWD) [kg]: A1-A3 0.00832, A4 2.34e-5, A5 0.000117, C2 7.81e-6, C4 0.00024, D -0.0159
- Components for re-use (CRU) [kg]: A1-A3 0, A4 0, A5 0, C2 0, C4 0, D 0
- Materials for recycling (MFR) [kg]: A1-A3 0, A4 0, A5 0, C2 0, C4 0, D 0
- Materials for energy recovery (MER) [kg]: A1-A3 0, A4 0, A5 0, C2 0, C4 0, D 0
- Exported electrical energy (EEE) [MJ]: A1-A3 0, A4 0, A5 1.55, C2 0, C4 76.5, D 0
- Exported thermal energy (EET) [MJ]: A1-A3 0, A4 0, A5 3.57, C2 0, C4 176.47, D 0

## Impact indicators
- Global warming potential (GWP) [kg CO_(2)-Äq.]: A1-A3 47.59, A4 0.82, A5 1.62, C2 0.27, C4 49.98, D -24.27
- Depletion potential of the stratospheric ozone layer (ODP) [kg CFC11-Äq.]: A1-A3 4.51e-9, A4 3.41e-14, A5 6.1e-11, C2 1.14e-14, C4 2.74e-13, D -1.83e-11
- Acidification potential of land and water (AP) [kg SO_(2)-Äq.]: A1-A3 0.088, A4 0.00246, A5 0.00131, C2 0.00082, C4 0.00391, D -0.0236
- Eutrophication potential (EP) [kg PO_(4)^(3)-Äq.]: A1-A3 0.00963, A4 0.000605, A5 1.59e-5, C2 0.000201, C4 0.00088, D -0.00412
- Formation potential of tropospheric ozone photochemical oxidants (POCP) [kg Ethen-Äq.]: A1-A3 0.293, A4 -0.000919, A5 0.00395, C2 -0.000306, C4 0.000282, D -0.00222
- Abiotic depletion potential for non fossil resources (ADPE) [kg Sb-Äq.]: A1-A3 7.5e-5, A4 6.69e-8, A5 1.05e-7, C2 2.23e-8, C4 1.32e-7, D -8.47e-6
- Abiotic depletion potential for fossil resources (ADPF) [MJ]: A1-A3 1397.83, A4 11.16, A5 19.22, C2 3.72, C4 6.26, D -313.68

## Use advice
Scope:
This EPD describes an insulation board made of Neopor® Plus. The granulate is manufactured at the BASF SE site in Ludwigshafen and further processing as boards is carried out by Karl Bachl Kunststoffverarbeitung GmbH & Co. KG in Röhrnbach.
System boundary:
Type of EPD: Cradle-to-Gate – with Options

Modules considered in the Life Cycle Assessment:

A1: Raw material supply

A2: Transport to manufacturer

A3: Manufacture

A4: Transport to site

A5: Assembly

C2: Transport to waste treatment

C4: Disposal

D: Reuse, recovery or recycling potential

The analysis of the product life cycle comprises the production and transport of base materials, manufacturing of the product and packaging materials, and is declared in Modules A1-A3. Production residue from A3 such as blanks or edge profiles are reused in the production process. This was taken into consideration when calculating the LCA parameters.

Transport of the product is considered in Module A4. Disposal of the packaging materials as well as the production, transport and disposal of offcuts incurred on the construction site are considered in Module A5. Energy gained from incineration processes are declared in Module D, beyond the system boundary.

The use phase is not taken into consideration in the LCA calculations.

The EoL scenarios include transport to the End-of-Life stage (C2) and disposal of the product via incineration (C4).

## Data sources
- Dämmplatte mit Neopor® Plus.pdf
- GaBi Database (all versions)
- GaBi database SP35 2018
