# Cement (CEM III 42,5); CEM III 42.5

Dataset: ILCD process, EPD, generic dataset
Geography: DE
Reference year: 2021
Valid until: 2022
Classification: oekobau.dat: Mineralische Baustoffe / Bindemittel / Zement
Owner: Sphera Solutions GmbH
Compliance: EN 15804+A2
Review: Dependent internal review by Sphera Solutions GmbH; Independent external review by GaBi user forum
Amounts: rows without a unit in brackets have none in this file; such an amount is in the reference unit of its flow, which a separate flow dataset defines
copyright: true
licenseType: Free of charge for all users and uses
accessRestrictions: The license conditions as stated on https://www.oekobaudat.de/ apply.
accessRestrictions: Es gelten die Lizenzbedingungen wie sie auf https://www.oekobaudat.de/ genannt sind.

## General comment
This data set has been modeled according to the European Standard EN 15804+A2 for Sustainable Building. Results are depicted in modules that allow the structured expression of results over the entire life cycle.

## Geography
The data set represents the country specific situation in Germany, focusing on the main technologies, the region specific characteristics and / or import statistics.

## Time period
Annual average

## Technology and included processes
The main processes in cement production consist of raw material extraction, production of clinker, and cement grinding. The extraction of the main raw material from the quarry normally takes place in the immediate area of the cement works. Portland cement (CEM I) is primarily made up of finely ground clinker cement and a smaller amount of ground materials. Other cements may also include constituents such as slag sand (CEM III), natural puzzolan such as trass (CEM IV), fly ash, oil shale burn-out or limestone. The most important agent is the blast furnace cement (CEM III). Coagulation is controlled with the help of minor constituents, such as calcium sulphate to facilitate its optimal processing in the concrete production. Clinker cement is made up of a mixture of primary products of mainly calcium oxide, silica, aluminium oxide, and iron oxide. Limestone, chalk and clay (or their naturally occurring mixture of limestone marl) provide these chemical constituents. The raw material mixture is heated to approximately 1450°C in a rotary furnace until sintering. New bonds are created from the source material, these are known as the clinker phases. These are specific calcium silicates and calcium aluminates that give the cement its characteristic property of hardening in the presence of water.
Secondary fuels for cement production are modelled with a "cut-off approach", i.e. the materials have no environmental burden.

## Technical purpose
This product can be used in construction.

## Safety margin
20 %. Product system depicted except for a few missing processes / flows. Technological, temporal and geographic representativeness partly given.

## Reference product
- Cement (CEM III 42,5): 1

## Inputs
- Use of renewable primary energy as energy carrier (PERE) [MJ]: A1-A3 0.748501
- Use of renewable primary energy resources used as raw materials (PERM) [MJ]: A1-A3 0
- Total use of renewable primary energy (PERT) [MJ]: A1-A3 0.748501
- Use of non renewable primary energy as energy carrier (PENRE) [MJ]: A1-A3 1.33718
- Use of non renewable primary energy resources used as raw materials (PENRM) [MJ]: A1-A3 0
- Total use of non renewable primary energy resource (PENRT) [MJ]: A1-A3 1.33718
- Use of secondary material (SM) [kg]: A1-A3 0
- Use of renewable secondary fuels (SF) [MJ]: A1-A3 0.0513024
- Use of non renewable secondary fuels (NRSF) [MJ]: A1-A3 0.942812
- Net use of fresh water (FW) [m3]: A1-A3 0.000365572

## Outputs
- Hazardous waste disposed (HWD) [kg]: A1-A3 3.99802e-10
- Non harzardous waste disposed (NHWD) [kg]: A1-A3 0.00185482
- Radioactive waste disposed (RWD) [kg]: A1-A3 8.02044e-5
- Components for re-use (CRU) [kg]: A1-A3 0
- Materials for recycling (MFR) [kg]: A1-A3 0
- Materials for energy recovery (MER) [kg]: A1-A3 0
- Exported electrical energy (EEE) [MJ]: A1-A3 0
- Exported thermal energy (EET) [MJ]: A1-A3 0

## Impact indicators
- Global Warming Potential - total (GWP-total) [kg CO2 eq.]: A1-A3 0.386244
- Global Warming Potential - fossil fuels (GWP-fossil) [kg CO2 eq.]: A1-A3 0.385084
- Global Warming Potential - biogenic (GWP-biogenic) [kg CO2 eq.]: A1-A3 0.000904742
- Global Warming Potential - land use and land use change (GWP-luluc) [kg CO2 eq.]: A1-A3 0.000255501
- Depletion potenzial of the stratospheric ozone layer (ODP) [kg CFC-11 eq.]: A1-A3 3.24793e-15
- Acidifcation potential, Accumulated Exceedance (AP) [Mole of H+ eq.]: A1-A3 0.000395851
- Eutrophication potential - freshwater (EP-freshwater) [kg P eq.]: A1-A3 3.53898e-7
- Eutrophication potential - marine (EP-marine) [kg N eq.]: A1-A3 0.000137559
- Eutrophication potential - terrestrial (EP-terrestrial) [Mole of N eq.]: A1-A3 0.0014914
- Photochemical Ozone Creation Potential (POCP) [kg NMVOC eq.]: A1-A3 0.000402409
- Abiotic depletion potential - non-fossil resources (ADPE) [kg Sb eq.]: A1-A3 3.94987e-8
- Abiotic depletion potential - fossil resources (ADPF) [MJ]: A1-A3 1.33683
- Water (user) deprivation potential (WDP) [m³ world equiv.]: A1-A3 0.00465291

## Use advice
The data set represents a cradle to gate inventory. It can be used to characterise the supply chain situation of the respective commodity in a representative manner. Combination with individual unit processes using this commodity enables the generation of user-specific (product) LCAs.

## Data sources
- Umweltdaten der deutschen Zementindustrie 2015
- Ökologische Bilanzierung von Baustoffen und Gebäuden, 2000
- AUB-Zertifkat Trasswerke Meurin: Zement (Zertifikat-Nr.: Z.MEU200), 2000
- Environmental statement 2001: Wietersdorfer & Peggauer Zementwerke GmbH, Peggau, 2001
- Ökobilanzen im Brückenbau, 1999
- Documentation of data quality management
- GaBi Database Edition 2021, CUP2021.01
- GaBi database (all versions)
