# Roofing tiles (including accessories)

Dataset: ILCD process, EPD, average dataset
Geography: DE
Reference year: 2021
Valid until: 2026
Classification: OEKOBAU.DAT: Mineralische Baustoffe / Steine und Elemente / Dachziegel
Classification: IBUCategories: 02 Bauprodukte / Bedachungen / Dachziegel
Method details: Dachziegel.pdf
Generated by: Life Cycle Engineering Experts GmbH
Registration number: EPD-BDZ-20210268-IBG2-DE
Owner: Bundesverband der Deutschen Ziegelindustrie e.V.
Compliance: DIN EN 15804+A2; ISO 14025
Review: Accredited third party review by Institut Bauen und Umwelt e. V.
Amounts: rows without a unit in brackets have none in this file; such an amount is in the reference unit of its flow, which a separate flow dataset defines
copyright: true
licenseType: Free of charge for all users and uses
accessRestrictions: None

## General comment
Clay roofing tiles, including ceramic accessories, of the members of the Bundesverband der Deutschen Ziegelindustrie e. V. are modelled. This involves flat tiles, shaped tiles and accessories (also suitable for facades).

The various products are only distinguished in terms of shape and colour (engobe, glaze). The relevant composition, i.e. clay and loam content, is largely uniform.

(EU) Directive No. 305/2011 (CPR) applies for placing the product on the market in the EU/EFTA (with the exception of Switzerland). The product requires a Declaration of Performance taking consideration of the DIN EN 1304:2013-08 – Clay roofing tiles and fittings – Product definitions and specifications, and CE marking. Use is governed by the respective national provisions; in Germany: the rules of the German roofing trade and information supplied by the manufacturer.

## Technology and included processes
Pit operation The main components (loam and clay) are extracted in opencast mines. After the topsoil has been removed and, if necessary, archaeological sites have been processed, extraction is usually carried out with excavators. Depending on the road conditions, transport entails the use of suitable trucks. Conveyor belts can be used for short distances. When the pits are exhausted, they are recultivated in accordance with nature conservation guidelines and, if necessary, returned to their previous use. Processing raw materials The individual raw material components are sampled and analysed in the laboratory for their ceramic properties and their mineralogical and chemical compositions. In the processing stage, the components are combined into the operating mass according to their ceramic properties, homogenised and stored. Forming The operating mass is pressed in extrusion presses under vacuum to form lumps, which are then pressed in turret or rotary table presses by means of plaster moulds to form roof tiles. Plain tiles are only extruded. Various parameters such as press vacuum, roof tile properties (moisture, plasticity and weight) are checked regularly. Excess operating mass and faulty pressings are returned in full to the mass circuit. Drying Drying serves as preparation of the plastic roofing tile for the subsequent firing process and takes place over 1–2 days at approx. 60–120 °C, depending on the model. Due to its shrinkage behaviour, the ceramic material reacts very sensitively and must therefore be dried under defined conditions. Various drying parameters and the residual moisture are constantly monitored. Dried roof tiles that have been sorted out (dry quarry) are returned to the production mass in the raw material preparation department. Colouring Engobes or glazes are applied to the dried roofing tiles as required. The density of the engobes/glazes and the application thickness are checked regularly. Any residues and the washing water are processed and returned to the raw material cycle. Firing The tiles are fired in tunnel kilns and bogie hearth furnaces at approx. 1000–1200 °C using natural gas. The firing time incl. the heating and cooling phase is approx. 1–2 days. The firing process gives the roof tiles their ceramic properties, which make them durable and long-lasting. Water-repellent finish In order to reduce the water absorption capacity, some roof tiles are hydrophobised on the surface in an immersion bath before being packed. Quality control The requisite ceramic quality properties according to EN 1304 and the product dimensions to be adhered to are regularly controlled internally in the factory's own production control and additionally monitored externally at least once a year.
Declared unit:
This Declaration refers to the manufacture of one square metre roofing tiles (40 kg/m²].

## Technical purpose
Clay roofing tiles are used for covering pitched roofs or for cladding facades.

## Scenarios
- S1: 1

## Reference product
- Dachziegel (inklusive Zubehör) (): 1

## Inputs
- Renewable primary energy as energy carrier (PERE) [MJ]: A1-A3 35.55, A4 0.605, A5 1.41, C1 0, C2 0.0505, C3 0.158, C4 0.0653, D (S0) -2.47, D (S1) -0.612
- Renewable primary energy resources as material utilization (PERM) [MJ]: A1-A3 1.4, A4 0, A5 -1.4, C1 0, C2 0, C3 0, C4 0, D (S0) 0, D (S1) 0
- Total use of renewable primary energy resources (PERT) [MJ]: A1-A3 36.95, A4 0.605, A5 0.0126, C1 0, C2 0.0505, C3 0.158, C4 0.0653, D (S0) -2.47, D (S1) -0.612
- Non renewable primary energy as energy carrier (PENRE) [MJ]: A1-A3 195.66, A4 10.4, A5 0.0595, C1 0, C2 0.867, C3 1.88, C4 0.498, D (S0) -79.6, D (S1) -2.23
- Non renewable primary energy as material utilization (PENRM) [MJ]: A1-A3 0.88, A4 0, A5 -0.88, C1 0, C2 0, C3 0, C4 0, D (S0) 0, D (S1) 0
- Total use of non renewable primary energy resources (PENRT) [MJ]: A1-A3 196.54, A4 10.4, A5 -0.82, C1 0, C2 0.867, C3 1.88, C4 0.498, D (S0) -79.6, D (S1) -2.23
- Use of secondary material (SM) [kg]: A1-A3 0.32, A4 0, A5 0, C1 0, C2 0, C3 0, C4 0, D (S0) 37.5, D (S1) 0
- Use of renewable secondary fuels (RSF) [MJ]: A1-A3 0, A4 0, A5 0, C1 0, C2 0, C3 0, C4 0, D (S0) 0, D (S1) 0
- Use of non renewable secondary fuels (NRSF) [MJ]: A1-A3 0, A4 0, A5 0, C1 0, C2 0, C3 0, C4 0, D (S0) 0, D (S1) 0
- Use of net fresh water (FW) [m^3]: A1-A3 0.0216, A4 0.000542, A5 0.000658, C1 0, C2 4.52e-5, C3 0.000493, C4 0.000125, D (S0) -0.00177, D (S1) -0.000334

## Outputs
- Hazardous waste disposed (HWD) [kg]: A1-A3 3.364e-7, A4 3.89e-7, A5 7.88e-11, C1 0, C2 3.24e-8, C3 3.96e-8, C4 7.59e-9, D (S0) -1.56e-7, D (S1) -1.2e-9
- Non hazardous waste disposed (NHWD) [kg]: A1-A3 0.111353, A4 0.00183, A5 0.00319, C1 0, C2 0.000152, C3 0.000567, C4 2.5, D (S0) -0.0222, D (S1) -0.0011
- Radioactive waste disposed (RWD) [kg]: A1-A3 0.00305218, A4 1.09e-5, A5 2.33e-6, C1 0, C2 9.12e-7, C3 1.51e-5, C4 5.58e-6, D (S0) -0.000347, D (S1) -8.88e-5
- Components for re-use (CRU) [kg]: A1-A3 0, A4 0, A5 0, C1 0, C2 0, C3 0, C4 0, D (S0) 0, D (S1) 0
- Materials for recycling (MFR) [kg]: A1-A3 0, A4 0, A5 0, C1 0, C2 0, C3 40, C4 0, D (S0) 0, D (S1) 0
- Materials for energy recovery (MER) [kg]: A1-A3 0, A4 0, A5 0, C1 0, C2 0, C3 0, C4 0, D (S0) 0, D (S1) 0
- Exported electrical energy (EEE) [MJ]: A1-A3 0, A4 0, A5 0.448, C1 0, C2 0, C3 0, C4 0, D (S0) 0, D (S1) 0
- Exported thermal energy (EET) [MJ]: A1-A3 0, A4 0, A5 0.886, C1 0, C2 0, C3 0, C4 0, D (S0) 0, D (S1) 0

## Impact indicators
- Global Warming Potential total (GWP-total) [kg CO_(2)-Äq.]: A1-A3 12.329, A4 0.787, A5 0.261, C1 0, C2 0.0656, C3 0.1, C4 0.041, D (S0) -6.06, D (S1) -0.158
- Global Warming Potential fossil fuels (GWP-fossil) [kg CO_(2)-Äq.]: A1-A3 12.427, A4 0.783, A5 0.138, C1 0, C2 0.0653, C3 0.0998, C4 0.038, D (S0) -6.04, D (S1) -0.157
- Global Warming Potential biogenic (GWP-biogenic) [kg CO_(2)-Äq.]: A1-A3 -0.107778, A4 0.000315, A5 0.123, C1 0, C2 2.62e-5, C3 0.000191, C4 0.00301, D (S0) -0.0129, D (S1) -0.000687
- Global Warming Potential luluc (GWP-luluc) [kg CO_(2)-Äq.]: A1-A3 0.008034, A4 0.00328, A5 4.52e-6, C1 0, C2 0.000273, C3 0.000368, C4 0.000109, D (S0) -0.0021, D (S1) -0.000218
- Depletion potential of the stratospheric ozone layer (ODP) [kg CFC11-Äq.]: A1-A3 1.06024e-12, A4 1.92e-16, A5 4.97e-17, C1 0, C2 1.6e-17, C3 4.25e-16, C4 1.42e-16, D (S0) -9.48e-15, D (S1) -2.61e-15
- Acidification potential of land and water (AP) [mol H^(+)-Äq.]: A1-A3 0.012783, A4 0.000727, A5 5.45e-5, C1 0, C2 6.06e-5, C3 0.000938, C4 0.000272, D (S0) -0.00935, D (S1) -0.000178
- Eutrophication potential aquatic freshwater (EP-freshwater) [kg PO_(4)-Äq.]: A1-A3 1.7093e-5, A4 1.7e-6, A5 8.42e-9, C1 0, C2 1.42e-7, C3 2.39e-7, C4 6.54e-8, D (S0) -3.28e-6, D (S1) -3.56e-7
- Eutrophication potential aquatic marine (EP-marine) [kg N-Äq.]: A1-A3 0.004588, A4 0.000226, A5 1.66e-5, C1 0, C2 1.88e-5, C3 0.000462, C4 7e-5, D (S0) -0.00378, D (S1) -5.75e-5
- Eutrophication potential terrestrial (EP-terrestrial) [mol N-Äq.]: A1-A3 0.04936, A4 0.00274, A5 0.000251, C1 0, C2 0.000229, C3 0.00508, C4 0.00077, D (S0) -0.0417, D (S1) -0.000612
- Formation potential of tropospheric ozone photochemical oxidants (POCP) [kg NMVOC-Äq.]: A1-A3 0.012964, A4 0.000598, A5 4.43e-5, C1 0, C2 4.98e-5, C3 0.00134, C4 0.000212, D (S0) -0.011, D (S1) -0.000153
- Abiotic depletion potential for non fossil resources (ADPE) [kg Sb-Äq.]: A1-A3 1.78601e-6, A4 6.5e-8, A5 7.18e-10, C1 0, C2 5.42e-9, C3 1.1e-7, C4 3.42e-9, D (S0) -3.17e-7, D (S1) -3.62e-8
- Abiotic depletion potential for fossil resources (ADPF) [MJ]: A1-A3 195.66, A4 10.4, A5 0.0595, C1 0, C2 0.867, C3 1.88, C4 0.498, D (S0) -79.6, D (S1) -2.23
- Water use (WDP) [m^(3) Welt-Äq. entzogen]: A1-A3 0.43239, A4 0.00337, A5 0.028, C1 0, C2 0.000281, C3 0.0169, C4 0.00396, D (S0) -0.0501, D (S1) -0.00193
- Incidence of disease due to PM emissions (PM) [Krankheitsfälle]
- Human exposure efficiency relative to U235 (IR) [kBq U235-Äq.]
- Comparative toxic unit for ecosystems (ETP-fw) [CTUe]
- Comparative toxic unit for humans (carcinogenic) (HTP-c) [CTUh]
- Comparative toxic unit for humans (noncarcinogenic) (HTP-nc) [CTUh]
- Soil quality index (SQP) [SQP]

## Use advice
Scope:
Application of this document is restricted to roofing tiles manufactured by member companies of the Bundesverband der Deutschen Ziegelindustrie e.V. For this Declaration,

data from 2020 was made available by 8 member companies and a total of 20 production locations. These members represent around 85% of the manufacturers of roofing tiles united in the federal association. Depending on their respective production quantities, the production volume of these companies accounts for approx. 85% of the German market.
System boundary:
Type of EPD: cradle to plant gate – with options. The Life Cycle Assessment takes into account the extraction of raw materials, the transport of raw materials and actual product manufacturing, including packaging materials (Modules A1–A3). Transport to the construction site (Module A4) and treatment of the packaging materials in the waste incineration plants following installation of the product (Module A5) are also part of the system boundaries. At the end of its useful life, the product is deconstructed by hand (Module C1). After transport of the dismantled product (Module C2), about 6% of the roofing tiles are to be disposed of in an inert waste landfill (Module C4), 94% can be recycled. Credits incurred by recycling firing waste are declared in Module D. Credits for electricity and thermal energy following thermal utilisation of packaging within Module A5 are also considered in Module D.

## Data sources
- GaBi Database (all versions)
- GaBi database SP40 2020
