# Application coating water based glaze (facade); 1 kg

Dataset: ILCD process, EPD, generic dataset
Geography: DE
Reference year: 2021
Valid until: 2022
Classification: oekobau.dat: Beschichtungen / Lacke und Lasuren / Lacksysteme Holzfassade
Owner: Sphera Solutions GmbH
Compliance: EN 15804+A2
Review: Dependent internal review by Sphera Solutions GmbH; Independent external review by GaBi user forum
Amounts: rows without a unit in brackets have none in this file; such an amount is in the reference unit of its flow, which a separate flow dataset defines
copyright: true
licenseType: Free of charge for all users and uses
accessRestrictions: The license conditions as stated on https://www.oekobaudat.de/ apply.
accessRestrictions: Es gelten die Lizenzbedingungen wie sie auf https://www.oekobaudat.de/ genannt sind.

## General comment
This data set has been modeled according to the European Standard EN 15804+A2 for Sustainable Building. Results are depicted in modules that allow the structured expression of results over the entire life cycle.

## Geography
The data set represents the country specific situation in Germany, focusing on the main technologies, the region specific characteristics and / or import statistics.

## Time period
Annual average

## Technology and included processes
The coating (painting) of houses and parts of houses like windows, parquet etc. is typically done on the builiding site by hand and without waste air treatment. This dataset accounts for this situation by including the application of the coating in the sope and by modelling all the NMVOCs included inthe coating material as NMVOC emissions to air. Since the transport of the coating material is specific to the special boundary conditions of the study, this transpoort is not included in the scope and shall be modeled individually by the user of the dataset. 2% of the coating material is modeled to be not used (packaging residue) and to be incinerated in a municipal waste incineration plant.
Paintings and varnishes consist usually of two to three components: a solid part, organic solvents and water. The solid parts contains the binder, the filling mass, additives, and depending on the paint hardener or pigments. The amount of the components in the painting/coating paint/varnish is defined by a receipe from the producer. In this case, the mixture proportions are 38,5% water, 1,5% solvents, 60% solids.
Production can be summarized as follows: In the pigment mass additives and binders are added and then grinded in a mill. The other components (solvents or water and additives) are mixed before the mixture reaches the final filtration and filling station. There are almost no losses in production. The data set consists of the production of the varnish system as well as the processing (solvent emission)

In module C1, a manual dismantling (no loads) is assumed, collecting losses are neglected.
The transport in module C2 to the recycling plant takes place with a truck (50km).
Module C3 takes into account the grinding and thermal treatment (combustion) of the material. When calculating combustion emissions and credits, the specific calorific value of each material and the material composition are taken into account.
In module D credits for the substitution of electricity (German electricity mix) and thermal energy (from natural gas) are given.

## Technical purpose
This product can be used in construction.

## Safety margin
10 %. Product system almost completely covered. Good technological, temporal and geographic representativeness.

## Reference product
- Application coating water based glaze (facade): 1

## Inputs
- Use of renewable primary energy as energy carrier (PERE) [MJ]: A1-A3 4.37389, A5 0.0016894, C2 0.00200398, C3 0.190378, D -1.11379
- Use of renewable primary energy resources used as raw materials (PERM) [MJ]: A1-A3 0, A5 0, C2 0, C3 0, D 0
- Total use of renewable primary energy (PERT) [MJ]: A1-A3 4.37389, A5 0.0016894, C2 0.00200398, C3 0.190378, D -1.11379
- Use of non renewable primary energy as energy carrier (PENRE) [MJ]: A1-A3 55.8758, A5 0.00688931, C2 0.0345287, C3 8.91392, D -3.57563
- Use of non renewable primary energy resources used as raw materials (PENRM) [MJ]: A1-A3 7.5, A5 0, C2 0, C3 -7.5, D 0
- Total use of non renewable primary energy resource (PENRT) [MJ]: A1-A3 63.3758, A5 0.00688931, C2 0.0345287, C3 1.41392, D -3.57563
- Use of secondary material (SM) [kg]: A1-A3 0, A5 0, C2 0, C3 0, D 0
- Use of renewable secondary fuels (SF) [MJ]: A1-A3 0, A5 0, C2 0, C3 0, D 0
- Use of non renewable secondary fuels (NRSF) [MJ]: A1-A3 0, A5 0, C2 0, C3 0, D 0
- Net use of fresh water (FW) [m3]: A1-A3 0.020121, A5 4.84175e-5, C2 1.78104e-6, C3 0.00377239, D -0.000415014

## Outputs
- Hazardous waste disposed (HWD) [kg]: A1-A3 1.06314e-8, A5 1.66508e-12, C2 1.44319e-12, C3 1.48298e-10, D -1.22348e-9
- Non harzardous waste disposed (NHWD) [kg]: A1-A3 0.0410585, A5 0.000781675, C2 5.57372e-6, C3 0.103935, D -0.00182568
- Radioactive waste disposed (RWD) [kg]: A1-A3 0.000535329, A5 2.1032e-7, C2 3.31348e-8, C3 2.28076e-5, D -0.000119786
- Components for re-use (CRU) [kg]: A1-A3 0, A5 0, C2 0, C3 0, D 0
- Materials for recycling (MFR) [kg]: A1-A3 0, A5 0, C2 0, C3 0, D 0
- Materials for energy recovery (MER) [kg]: A1-A3 0, A5 0, C2 0, C3 1, D 0
- Exported electrical energy (EEE) [MJ]: A1-A3 0, A5 0.0138593, C2 0, C3 0.803549, D 0
- Exported thermal energy (EET) [MJ]: A1-A3 0, A5 0.0326213, C2 0, C3 2.10485, D 0

## Impact indicators
- Global Warming Potential - total (GWP-total) [kg CO2 eq.]: A1-A3 2.80625, A5 0.0116035, C2 0.00262283, C3 0.841761, D -0.227869
- Global Warming Potential - fossil fuels (GWP-fossil) [kg CO2 eq.]: A1-A3 2.76477, A5 0.00584431, C2 0.00260492, C3 0.841316, D -0.225431
- Global Warming Potential - biogenic (GWP-biogenic) [kg CO2 eq.]: A1-A3 0.0394014, A5 0.00575872, C2 1.17716e-6, C3 0.000338559, D -0.00212905
- Global Warming Potential - land use and land use change (GWP-luluc) [kg CO2 eq.]: A1-A3 0.00207196, A5 4.80534e-7, C2 1.67295e-5, C3 0.000106188, D -0.000308248
- Depletion potenzial of the stratospheric ozone layer (ODP) [kg CFC-11 eq.]: A1-A3 1.68875e-14, A5 7.35446e-18, C2 6.66532e-19, C3 7.63469e-16, D -4.86078e-15
- Acidifcation potential, Accumulated Exceedance (AP) [Mole of H+ eq.]: A1-A3 0.0040294, A5 6.34569e-6, C2 7.38555e-6, C3 0.000235074, D -0.000224894
- Eutrophication potential - freshwater (EP-freshwater) [kg P eq.]: A1-A3 1.36361e-5, A5 1.2246e-9, C2 5.35732e-9, C3 2.67224e-7, D -5.13218e-7
- Eutrophication potential - marine (EP-marine) [kg N eq.]: A1-A3 0.00131523, A5 2.54707e-6, C2 3.40237e-6, C3 7.90703e-5, D -8.36218e-5
- Eutrophication potential - terrestrial (EP-terrestrial) [Mole of N eq.]: A1-A3 0.014163, A5 3.22244e-5, C2 3.80663e-5, C3 0.00113396, D -0.00089268
- Photochemical Ozone Creation Potential (POCP) [kg NMVOC eq.]: A1-A3 0.0040673, A5 0.0250272, C2 6.6347e-6, C3 0.000209173, D -0.000220099
- Abiotic depletion potential - non-fossil resources (ADPE) [kg Sb eq.]: A1-A3 6.64853e-7, A5 7.32847e-11, C2 2.26592e-10, C3 1.07553e-8, D -6.69217e-8
- Abiotic depletion potential - fossil resources (ADPF) [MJ]: A1-A3 64.1141, A5 0.00690412, C2 0.0345273, C3 0.663754, D -3.57515
- Water (user) deprivation potential (WDP) [m³ world equiv.]: A1-A3 0.296263, A5 0.00205995, C2 1.01262e-5, C3 0.158307, D -0.00252325

## Use advice
The data set represents a cradle to gate inventory. It can be used to characterise the supply chain situation of the respective commodity in a representative manner. Combination with individual unit processes using this commodity enables the generation of user-specific (product) LCAs.

## Data sources
- WEFAM-Projektbericht, 2008
- Roempp Lexikon - Lacke und Druckfarben, 1997
- Paints, Coatings and Solvents, 1998
- Ökologische Bilanzierung von Baustoffen und Gebäuden, 2000
- Lackformulierung und Lackrezeptur
- Lackrohstoffkunde
- Farben und Lacke
- Documentation of data quality management
- GaBi Database Edition 2021, CUP2021.01
- GaBi database (all versions)
