# EcoSheetPile™ Plus

Dataset: ILCD process, EPD, specific dataset
Geography: RER
Reference year: 2021
Valid until: 2026
Classification: OEKOBAU.DAT: Metalle / Stahl und Eisen / Stahlprofile
Classification: IBUCategories: 02 Building products / Metallic products and ancillaries / Structural steels
Method details: Structural steels.pdf
Generated by: ArcelorMittal Commercial RPS S.à r.l.
Registration number: EPD-ARM-20210178-CBD1-EN
Owner: ArcelorMittal Commercial RPS S.à r.l.
Compliance: DIN EN 15804; ISO 14025
Review: Accredited third party review by Institut Bauen und Umwelt e. V.
Amounts: rows without a unit in brackets have none in this file; such an amount is in the reference unit of its flow, which a separate flow dataset defines
copyright: true
licenseType: Free of charge for all users and uses
accessRestrictions: None

## General comment
This EPD applies to 1 metric ton of steel sheet piles EcoSheetPile™ Plus in steel grades EN 10248-1 - S 240 GP to S 355 GP, ASTM A572 - Gr.50 and CSA 350W for civil engineering applications, infrastructures and buildings. It is based on a steel production in an Electric Arc Furnace with 100% renewable electricity supply with Guarantee of Origins.

EcoSheetPile™ Plus are produced at the ArcelorMittal sites Differdange and Esch-Belval in Luxembourg from ca. 100% scrap in an electric arc furnace route and are 100% reusable and recyclable. The types of EcoSheetPile™ Plus available are: Z-shaped, U-shaped, straight-web, and H-shaped.

For the use and application of the product the respective national provisions at the place of use apply, in Germany for example the building codes of the federal states and the corresponding national specifications.

## Technology and included processes
This environmental product declaration is valid for steel sheet piles produced by ArcelorMittal sites Differdange and Esch-Belval in Luxembourg. The data used represent 100% of the annual production of 2019 and is based on 2019 data for deliveries based on Guarantee of Origins for 100% renewable electricity supply
Technical data:
This EPD is valid for EcoSheetPile™ Plus steel sheet piles of varied grades and geometries, as well as different forms of delivery.
Declared unit:
The declaration refers to the functional unit of 1 metric ton of EcoSheetPile™ Plus as specified in Part B requirements on the EPD for structural steels.

The background data are taken from GaBi ts Documentation.

The final results reflect the weighted average per production volume oft he two rolling lines in Differdange & Esch-Belval.

## Technical purpose
Steel sheet pile walls resist high pressure and can support the massive height of soil with a small quantity of steel compared to the applied loads. Steel sheet piles are used worldwide in many kinds of permanent and temporary structures: quay walls and breakwaters in harbours, locks, bank reinforcement on rivers and canals, pumping stations, bridge abutments, retaining walls for underpasses, tunnels and underground car parks, impervious containment walls, temporary cofferdams in land and in water, containment barriers, and load bearing foundations, among others.

## Reference product
- 1 metric tonne of EcoSheetPile™ Plus (): 1000

## Inputs
- Renewable primary energy as energy carrier (PERE) [MJ]: A1-A3 7707.2, C3 12.162, C4 4.052, D -2276.9
- Renewable primary energy resources as material utilization (PERM) [MJ]: A1-A3 0, C3 0, C4 0, D 0
- Total use of renewable primary energy resources (PERT) [MJ]: A1-A3 7707.2, C3 12.162, C4 4.052, D -2276.9
- Non renewable primary energy as energy carrier (PENRE) [MJ]: A1-A3 4412.6, C3 28.203, C4 30.106, D 2704.9
- Non renewable primary energy as material utilization (PENRM) [MJ]: A1-A3 0, C3 0, C4 0, D 0
- Total use of non renewable primary energy resources (PENRT) [MJ]: A1-A3 4412.6, C3 28.203, C4 30.106, D 2704.9
- Use of secondary material (SM) [kg]: A1-A3 1144, C3 0, C4 0, D 0
- Use of renewable secondary fuels (RSF) [MJ]: A1-A3 0, C3 0, C4 0, D 0
- Use of non renewable secondary fuels (NRSF) [MJ]: A1-A3 0, C3 0, C4 0, D 0
- Use of net fresh water (FW) [m^3]: A1-A3 1.3723, C3 0.011831, C4 0.0074255, D 1.5844

## Outputs
- Hazardous waste disposed (HWD) [kg]: A1-A3 1.8134e-6, C3 6.995e-9, C4 3.1958e-9, D -1.5152e-6
- Non hazardous waste disposed (NHWD) [kg]: A1-A3 4.971, C3 0.018865, C4 150.14, D -47.018
- Radioactive waste disposed (RWD) [kg]: A1-A3 0.051663, C3 0.0038934, C4 0.00031542, D -0.013054
- Components for re-use (CRU) [kg]: A1-A3 0, C3 250, C4 0, D 0
- Materials for recycling (MFR) [kg]: A1-A3 0, C3 600, C4 0, D 0
- Materials for energy recovery (MER) [kg]: A1-A3 0, C3 0, C4 0, D 0
- Exported electrical energy (EEE) [MJ]: A1-A3 0, C3 0, C4 0, D 0
- Exported thermal energy (EET) [MJ]: A1-A3 0, C3 0, C4 0, D 0

## Impact indicators
- Global warming potential (GWP) [kg CO_(2)-Äq.]: A1-A3 369.99, C3 1.6017, C4 2.1511, D 323.71
- Depletion potential of the stratospheric ozone layer (ODP) [kg CFC11-Äq.]: A1-A3 5.5931e-11, C3 4.6935e-14, C4 1.1746e-14, D -1.301e-11
- Acidification potential of land and water (AP) [kg SO_(2)-Äq.]: A1-A3 0.95001, C3 0.0029878, C4 0.012852, D 0.43354
- Eutrophication potential (EP) [kg PO_(4)^(3)-Äq.]: A1-A3 0.07831, C3 0.00044849, C4 0.0014576, D 0.014961
- Formation potential of tropospheric ozone photochemical oxidants (POCP) [kg Ethen-Äq.]: A1-A3 0.11526, C3 0.00025994, C4 0.00098676, D 0.17963
- Abiotic depletion potential for non fossil resources (ADPE) [kg Sb-Äq.]: A1-A3 0.00048621, C3 4.6987e-7, C4 2.1593e-7, D 0.00080492
- Abiotic depletion potential for fossil resources (ADPF) [MJ]: A1-A3 4248.9, C3 18.22, C4 29.21, D 2862.1

## Use advice
Scope:
The declaration applies to 1 metric ton of EcoSheetPile™ Plus. It covers hot rolled steel sheet piles (Z-shaped, U-shaped, straight-web, and H-shaped) produced by ArcelorMittal .

This environmental product declaration is valid for steel sheet piles produced by ArcelorMittal sites Differdange and Esch-Belval in Luxembourg. The data used represent 100% of the annual production of 2019 and is based on 2019 data for deliveries based on Guarantee of Origins for 100% renewable electricity supply.
System boundary:
Type of the EPD: cradle-to-gate - with options. Module A1-A3, Module C3, Module C4 and Module D were considered.

Modules A1-A3 of the structural steel production include the following:

The provision of resources, additives, and energy
Transport of resources and additives to the production site
Production processes on-site including energy, production of additives, disposal of production residues, and consideration of related emissions
Recycling of production/manufacturing scrap. Steel scrap is assumed to reach the end-of-waste status once is shredded and sorted, thus becomes an input to the product system in the inventory.

Module C3 takes into account the sorting and shredding of after-use steel that is recycled, as well as the non-recovered scrap due to sorting efficiency which is landfilled. A conservative value of 1% landfill is considered.

Module C4 takes into account the waste disposal including physical pre-treatment and management of the disposal site. Steel is an inert material which does not require any specific treatment on disposal site.

Module D refers to the end of life of the steel sheet piles, including reuse and recycling. In module D the recycled material gets a credit in accordance with the “value of scrap” methodology by WorldSteel and the reused material receives a credit as avoided manufacturing of steel sheet piles.

## Data sources
- GaBi Database (all versions)
- GaBi Database Edition 2021, CUP 2021.01
