# XPS Foam Insulation Jackodur plus

Dataset: ILCD process, EPD, average dataset
Geography: DE
Reference year: 2021
Valid until: 2026
Classification: OEKOBAU.DAT: Dämmstoffe / Extrudiertes Polystyrol (XPS) / XPS weiß
Classification: IBUCategories: 02 Building products / Thermal insulation products / Insulating materials made of foam plastics
Method details: Insulating materials made of foam plastics.pdf
Generated by: Sphera Solutions GmbH
Registration number: EPD-JAI-20200164-IBC1-EN
Owner: JACKON Insulation GmbH
Compliance: DIN EN 15804; ISO 14025
Review: Accredited third party review by Institut Bauen und Umwelt e. V.
Amounts: rows without a unit in brackets have none in this file; such an amount is in the reference unit of its flow, which a separate flow dataset defines
copyright: true
licenseType: Free of charge for all users and uses
accessRestrictions: None

## General comment
JACKODUR Plus is an extruded polystyrene foam (XPS) produced according to EN 13164 and available in board shape with a density range from 30 to 50 kg/m3, 35,54 kg/m3 in average (measured). It has specifically low values of thermal conductivity by using Hydrofluoroolefins (HFO)1234 ze as blowing agent. The boards are also called Super XPS in Scandinavia.
The boards can be delivered in various compressive strength values from 300 to 700 kPa. To meet the need of various applications the boards are produced with different surfaces: with the extrusion skin, planed, grooved or with thermal embossing. JACKODUR Plus boards are supplied with different edge treatments such as butt edge, ship-lap and tongue and groove. The EPD is related to an unlaminated product only; lamination and additional product treatment are not considered.

## Technology and included processes
JACKODUR Plus is produced by a continuous extrusion process using electricity as the main power source: polystyrene granules are melted in an extruder and a blowing agent is injected into the extruder under high pressure. The drop in pressure at the exit die causes the polystyrene to foam into a board with homogeneous and closed-cell structure. Then the boards’ edges are trimmed, and the product is cut to dimensions. The smooth foam skin resulting from the extrusion process remains on the boards or is removed mechanically for particular board types to achieve better adhesive strength in combination with e. g. concrete, mortar, or construction adhesives. Some boards receive special surface patterns or grooves. JACKODUR Plus foams off-grade material or scrap from production is recycled in the production process of extruded polystyrene foam XPS. The manufacturing plant in Arendsee/Germany is certified according to ISO 9001 and ISO 50001.
Technical data:
Acoustic properties are not relevant for JACKODUR Plus. For fire performance, these products except in Scandinavia achieve the fire classification Euroclass E according to EN 13501-1.
Declared unit:
The declared unit is 1 m3 XPS.
Corresponding conversion factors are listed in the table below.

## Technical purpose
The variety of the performance properties of JACKODUR Plus make it suitable for use in a large number of applications such as: perimeter insulation, inverted roof insulation, insulation of pitched roofs, floor insulation including insulation of highly loaded industrial floors, insulation of thermal bridges for exterior walls, External Thermal Insulation Composite Systems (ETICS), insulation of cavity walls, agricultural building ceiling insulation, prefabricated elements e.g. building sandwich panels, insulation for building equipment and industrial installations (pipe sections, …).

## Scenarios
- S1: Scenario 1
- S2: Scenario 2

## Reference product
- 1 m³ Jackodur Plus XPS board (): 1

## Inputs
- Renewable primary energy as energy carrier (PERE) [MJ]: A1-A3 217, A4 4.57, A5 0.0594, C2 0.677, C3 2.65, C4 2.59, D (S1) -190, D (S2) -1.45
- Renewable primary energy resources as material utilization (PERM) [MJ]: A1-A3 0, A4 0, A5 0, C2 0, C3 0, C4 0, D (S1) 0, D (S2) 0
- Total use of renewable primary energy resources (PERT) [MJ]: A1-A3 217, A4 4.57, A5 0.0594, C2 0.677, C3 2.65, C4 2.59, D (S1) -190, D (S2) -1.45
- Non renewable primary energy as energy carrier (PENRE) [MJ]: A1-A3 1857.1, A4 81.4, A5 13.192, C2 12.1, C3 1433.8, C4 36.9, D (S1) -865, D (S2) -6.65
- Non renewable primary energy as material utilization (PENRM) [MJ]: A1-A3 1432.9, A4 0, A5 -12.9, C2 0, C3 -1420, C4 0, D (S1) 0, D (S2) 0
- Total use of non renewable primary energy resources (PENRT) [MJ]: A1-A3 3290, A4 81.4, A5 0.292, C2 12.1, C3 13.8, C4 36.9, D (S1) -865, D (S2) -6.65
- Use of secondary material (SM) [kg]: A1-A3 0, A4 0, A5 0, C2 0, C3 0, C4 0, D (S1) 0, D (S2) 0
- Use of renewable secondary fuels (RSF) [MJ]: A1-A3 0, A4 0, A5 0, C2 0, C3 0, C4 0, D (S1) 0, D (S2) 0
- Use of non renewable secondary fuels (NRSF) [MJ]: A1-A3 0, A4 0, A5 0, C2 0, C3 0, C4 0, D (S1) 0, D (S2) 0
- Use of net fresh water (FW) [m^3]: A1-A3 28.7, A4 0.00529, A5 0.00186, C2 0.000784, C3 0.228, C4 0.000453, D (S1) -0.22, D (S2) -0.00168

## Outputs
- Hazardous waste disposed (HWD) [kg]: A1-A3 1.14e-6, A4 3.79e-6, A5 9.88e-10, C2 5.61e-7, C3 1.17e-8, C4 1.35e-7, D (S1) -3.45e-7, D (S2) -2.65e-9
- Non hazardous waste disposed (NHWD) [kg]: A1-A3 0.797, A4 0.0125, A5 0.0725, C2 0.00185, C3 0.684, C4 35.4, D (S1) -0.401, D (S2) -0.00308
- Radioactive waste disposed (RWD) [kg]: A1-A3 0.0385, A4 0.000101, A5 1.2e-5, C2 1.49e-5, C3 0.000803, C4 0.000445, D (S1) -0.0649, D (S2) -0.000497
- Components for re-use (CRU) [kg]: A1-A3 0, A4 0, A5 0, C2 0, C3 0, C4 0, D (S1) 0, D (S2) 0
- Materials for recycling (MFR) [kg]: A1-A3 0, A4 0, A5 0, C2 0, C3 0, C4 0, D (S1) 0, D (S2) 0
- Materials for energy recovery (MER) [kg]: A1-A3 0, A4 0, A5 0, C2 0, C3 0, C4 0, D (S1) 0, D (S2) 0
- Exported electrical energy (EEE) [MJ]: A1-A3 0, A4 0, A5 1.66, C2 0, C3 216, C4 0, D (S1) 0, D (S2) 0
- Exported thermal energy (EET) [MJ]: A1-A3 0, A4 0, A5 3, C2 0, C3 384, C4 0, D (S1) 0, D (S2) 0

## Impact indicators
- Global warming potential (GWP) [kg CO_(2)-Äq.]: A1-A3 121, A4 5.96, A5 0.749, C2 0.883, C3 119, C4 2.35, D (S1) -49.8, D (S2) -0.383
- Depletion potential of the stratospheric ozone layer (ODP) [kg CFC11-Äq.]: A1-A3 5.02e-6, A4 9.79e-16, A5 2.91e-16, C2 1.45e-16, C3 1.08e-14, C4 7.77e-15, D (S1) -7.14e-13, D (S2) -5.46e-15
- Acidification potential of land and water (AP) [kg SO_(2)-Äq.]: A1-A3 0.686, A4 0.0144, A5 0.000174, C2 0.00213, C3 0.00675, C4 0.0065, D (S1) -0.0634, D (S2) -0.000487
- Eutrophication potential (EP) [kg PO_(4)^(3)-Äq.]: A1-A3 0.0382, A4 0.0035, A5 1.38e-5, C2 0.000518, C3 0.00144, C4 0.0068, D (S1) -0.00789, D (S2) -6.06e-5
- Formation potential of tropospheric ozone photochemical oxidants (POCP) [kg Ethen-Äq.]: A1-A3 0.187, A4 -0.00509, A5 6.5e-6, C2 -0.000754, C3 0.000679, C4 0.000734, D (S1) -0.00577, D (S2) -4.43e-5
- Abiotic depletion potential for non fossil resources (ADPE) [kg Sb-Äq.]: A1-A3 0.000194, A4 4.95e-7, A5 5.14e-8, C2 7.33e-8, C3 7.75e-7, C4 4.64e-7, D (S1) -9.39e-6, D (S2) -7.2e-8
- Abiotic depletion potential for fossil resources (ADPF) [MJ]: A1-A3 3160, A4 81.2, A5 0.262, C2 12, C3 11.8, C4 35.8, D (S1) -701, D (S2) -5.4

## Use advice
Scope:
JACKON Insulation as data provider produces the extruded polystyrene foam boards JACKODUR Plus containing HFO 1234ze as blowing agent. The data have been provided by one factory in Arendsee/Germany for the year 2019.
System boundary:
Type of EPD: cradle-to-gate (A1 - A3) – with options.

The following modules are considered in the Life Cycle Assessment:

• The raw material supply (A1) comprises the production of polysterene granulate, blowing agents and flame retardants.

• The transport to manufacturer is considered in module A2.

• The manufacturing of XPS (A3) comprises the energy consumption, packaging of the product and auxilliaries.

• Transport to construction site is calculated with 500 km via truck (A4).

• Incineration of packaging materials are considered in module A5.

• Transport to disposal (EoL) is calculated with 50 km via truck (C2).

• For the End-of-Life stage two different scenarios are considered in the LCA. One scenario with 100% landfill (module C4) and one scenario with 100% incineration (module C3) are calculated. The incineration of XPS results in credits for thermal energy and power under European boundary conditions (D) - beyond system boundary.

## Data sources
- GaBi Database (all versions)
- GaBi database SP40 2020
