# Joint sealing strips, PE/PP foil; PE/PP film

Dataset: ILCD process, EPD, generic dataset
Geography: DE
Reference year: 2018
Valid until: 2022
Classification: oekobau.dat: Komponenten von Fenstern und Vorhangfassaden / Dichtungskomponenten / -materialien / Fugendichtungsbänder
Owner: thinkstep
Compliance: DIN EN 15804
Review: Dependent internal review by thinkstep, IABP-GaBi, IBP-GaBi; Independent external review by GaBi user forum, GaBi bug forum, GaBi user community
Amounts: rows without a unit in brackets have none in this file; such an amount is in the reference unit of its flow, which a separate flow dataset defines
copyright: true

## General comment
This data set has been modeled according to the European Standard EN 15804 for Sustainable Building. Results are depicted in modules that allow the structured expression of results over the entire life cycle.

## Geography
The data set represents the country specific situation in Germany, focusing on the main technologies, the region specific characteristics and / or import statistics.

## Time period
Annual average

## Technology and included processes
The LCA of joint sealing strips made of polyethylene covers the cradle-to-gate phase, that is, particularly the process of the production of plastic using PE granulate. The system boundaries are represented by the finished plastic product. Transports from the factory to the building site are not considered and must be included according to the system boundaries.
Production of polyethylene: The basis for the production of polyethylene is crude oil. There are a few process types for polymerising ethylene to polyethylene. Polyethylene is polymerised from ethylene, which is extracted by cracking naphtha or gas oil in a steam-cracker. In principle low density polyethylene (PE-LD) is traditionally produced by a high-pressure process. This extremely high pressure calls for specialist technology and many key features and details are treated as internal information. The design of these thick-walled tubes differs largely from that of the low-pressure vessels. The wearing properties of components such as pumps and compressors must be given special attention on account of the high pressure. The seals are matched to the requirements of the higher pressure. Ethylene is introduced from the pipeline at approx. 5 MPa and compressed to 25 MPa. After the primary compressor stage and input of the recycled ethylene the pressure is increased to 150 - 350 MPa in the secondary compressor stage. The reaction pressure in the reactor is automatically controlled by a pressure control valve at the reactor output. The polymerised reactant mixture is then passed through a heat exchanger and cooled. The polymer temperature drops and the product can be forwarded to the pellet extruder. The polymer is now freed from the main share of the unreacted monomer. This takes place in an interim separator at 25-30 MPa. This pressure stage should be seen as a compromise between separation efficiency and compression energy savings. The separated monomer passes through a number of coolers and separators and recycled. The monomer still in the product is separated in a low-pressure separator and returned to the primary compressor. The polymer is then forwarded to an extruder. The pellets are subsequently dried, stored temporarily to remove volatile remaining monomers and their quality checked. They are then conveyed to a silo, mixed, stored and packed in tanks or bags. The plasticised plastic granulate from the extruder is fed in the calender, which is a system of 3 or 4 counter-revolving cylinders. The plastic film has a gauge of about 0.1 to 0.5 mm. Between 0 and 4 % scrap occurs.
Background system:
Electricity: Electricity is modelled according to the individual country-specific situations. The country-specific modelling is achieved on multiple levels. Firstly, individual energy carrier specific power plants and plants for renewable energy sources are modelled according to the current national electricity grid mix. Modelling the electricity consumption mix includes transmission / distribution losses and the own use by energy producers (own consumption of power plants and "other" own consumption e.g. due to pumped storage hydro power etc.), as well as imported electricity. Secondly, the national emission and efficiency standards of the power plants are modelled as well as the share of electricity plants and combined heat and power plants (CHP). Thirdly, the country-specific energy carrier supply (share of imports and / or domestic supply) including the country-specific energy carrier properties (e.g. element and energy content) are accounted for. Fourthly, the exploration, mining/production, processing and transport processes of the energy carrier supply chains are modelled according to the specific situation of each electricity producing country. The different production and processing techniques (emissions and efficiencies) in the different energy producing countries are considered, e.g. different crude oil production technologies or different flaring rates at the oil platforms.
Thermal energy, process steam: The thermal energy and process steam supply is modelled according to the individual country-specific situation with regard to emission standards and considered energy carriers. The thermal energy and process steam are produced at heat plants. Efficiencies for thermal energy production are by definition 100% in relation to the corresponding energy carrier input. For process steam the efficiency ranges from 85%, 90% to 95%. The energy carriers used for the generation of thermal energy and process steam are modelled according to the specific import situation (see electricity above).
Transports: All relevant and known transport processes are included. Ocean-going and inland ship transport as well as rail, truck and pipeline transport of bulk commodities are considered.
Energy carriers: The energy carriers are modelled according to the specific supply situation (see electricity above).
Refinery products: Diesel fuel, gasoline, technical gases, fuel oils, lubricants and residues such as bitumen are modelled with a parameterised country-specific refinery model. The refinery model represents the current national standard in refining techniques (e.g. emission level, internal energy consumption, etc.) as well as the individual country-specific product output spectrum, which can be quite different from country to country. The supply of crude oil is modelled, again, according to the country-specific situation with the respective properties of the resources.

## Technical purpose
This product can be used in construction.

## Safety margin
20 %. Product system depicted except for a few missing processes / flows. Technological, temporal and geographic representativeness partly given.

## Reference product
- Joint gasket tape (PE/PP): 1

## Inputs
- Use of renewable primary energy (PERE) [MJ]: A1-A3 5.59486, C1 0, C2 0.0021792, C3 0.124881, D -7.13767
- Primary energy resources used as raw materials (PERM) [MJ]: A1-A3 0, C1 0, C2 0, C3 0, D 0
- Total use of renewable primary energy resources (PERT) [MJ]: A1-A3 5.59486, C1 0, C2 0.0021792, C3 0.124881, D -7.13767
- Use of non-renewable primary energy (PENRE) [MJ]: A1-A3 31.3022, C1 0, C2 0.037433, C3 55.8075, D -24.9575
- Non-renewable primary energy resources used as raw materials (PENRM) [MJ]: A1-A3 55.2, C1 0, C2 0, C3 -55.2, D 0
- Total use of non-renewable primary energy resources (PENRT) [MJ]: A1-A3 86.5022, C1 0, C2 0.037433, C3 0.607465, D -24.9575
- Input of secondary material (SM) [kg]: A1-A3 0, C1 0, C2 0, C3 0, D 0
- Use of renewable secondary fuels (RSF) [MJ]: A1-A3 0, C1 0, C2 0, C3 0, D 0
- Use of non renewable secondary fuels (NRSF) [MJ]: A1-A3 0, C1 0, C2 0, C3 0, D 0
- Use of net fresh water (FW) [m3]: A1-A3 0.0104548, C1 0, C2 1.95166e-6, C3 0.00810531, D -0.00332953

## Outputs
- Hazardous waste disposed (HWD) [kg]: A1-A3 3.16694e-8, C1 0, C2 1.39883e-9, C3 4.71041e-10, D -1.31954e-8
- Non-hazardous waste disposed (NHWD) [kg]: A1-A3 0.0260473, C1 0, C2 6.57015e-6, C3 0.0152098, D -0.0117447
- Radioactive waste disposed (RWD) [kg]: A1-A3 0.00078183, C1 0, C2 3.94093e-8, C3 1.81109e-5, D -0.000862341
- Components for re-use (CRU) [kg]: A1-A3 0, C1 0, C2 0, C3 0, D 0
- Materials for Recycling (MFR) [kg]: A1-A3 0, C1 0, C2 0, C3 0, D 0
- Material for Energy Recovery (MER) [kg]: A1-A3 0, C1 1.2, C2 0, C3 0, D 0
- Exported electrical energy (EEE) [MJ]: A1-A3 0, C1 0, C2 0, C3 6.84433, D 0
- Exported thermal energy (EET) [MJ]: A1-A3 0, C1 0, C2 0, C3 15.7635, D 0

## Impact indicators
- Global warming potential (GWP) [kg CO2 eq.]: A1-A3 2.39578, C1 0, C2 0.00278506, C3 3.76848, D -1.70559
- Ozone Depletion Potential (ODP) [kg R11 eq.]: A1-A3 3.12267e-14, C1 0, C2 9.21867e-19, C3 7.07202e-16, D -3.94681e-14
- Acidification potential (AP) [kg SO2 eq.]: A1-A3 0.00292014, C1 0, C2 5.62553e-6, C3 0.000340372, D -0.0014399
- Eutrophication potential (EP) [kg Phosphate eq.]: A1-A3 0.000410959, C1 0, C2 1.33734e-6, C3 7.67259e-5, D -0.000272864
- Photochemical Ozone Creation Potential (POCP) [kg Ethene eq.]: A1-A3 0.000528642, C1 0, C2 -1.6854e-6, C3 2.4915e-5, D -0.000146668
- Abiotic depletion potential for non fossil resources (ADPE) [kg Sb eq.]: A1-A3 5.17231e-7, C1 0, C2 2.34365e-10, C3 7.59378e-9, D -4.23728e-7
- Abiotic depletion potential for fossil resources (ADPF) [MJ]: A1-A3 84.5282, C1 0, C2 0.0373323, C3 0.561749, D -22.7806

## Use advice
The data set represents a cradle to gate inventory. It can be used to characterise the supply chain situation of the respective commodity in a representative manner. Combination with individual unit processes using this commodity enables the generation of user-specific (product) LCAs.

## Data sources
- ULLMANN'S Encyclopedia of Industrial Chemistry
- GaBi Database Edition 2020, SP40
- GaBi database (all versions)
