# Spannbeton-Fertigteildecken

Dataset: ILCD process, EPD, average dataset
Geography: DE
Reference year: 2020
Valid until: 2025
Classification: OEKOBAU.DAT: Mineralische Baustoffe / Mörtel und Beton / Beton
Classification: IBUCategories: 02 Bauprodukte / Normal- Leicht- und Porenbeton / Betonfertigteile
Method details: Betonfertigteile.pdf
Registration number: EPD-DWS-2020135-IBA1-DE
Owner: DW Systembau GmbH
Compliance: DIN EN 15804; ISO 14025
Review: Accredited third party review by Institut Bauen und Umwelt e. V.
Amounts: rows without a unit in brackets have none in this file; such an amount is in the reference unit of its flow, which a separate flow dataset defines
copyright: true

## General comment
Die deklarierten Produkte sind vorgespannte Fertigteile
aus Beton (Spannbeton- Fertigteildecken) unterschiedlicher Formate und Größen zur
Verwendung als Deckenbauteil. Der Beton wird aus
Gesteinskörnungen (Zuschlägen), Wasser,
hydraulischen Bindemitteln (Zement), Zusatzmitteln
und Zusatzstoffen hergestellt. Außer dem Spannstahl
ist keine weitere Bewehrung nötig. Für die Herstellung
der Spannbeton-Fertigteildecken werden kaltgezogene
Spannstahllitzen und- drähte verwendet. Es handelt
sich dabei um hochfeste Stähle. Diese Deklaration ist
erstellt für ein durchschnittliches Produkt aus dem
Werk BRESPA® in Schneverdingen. Das hier
dargestellte Produkt entspricht einer nach
Absatzzahlen gemittelten Spannbeton-Fertigteildecke
mit einem mittleren Flächengewicht von 374,71 kg/m²,

das entspricht eine Deckenstärke von 26,5 cm.

## Technology and included processes
The manufacturing process is described for the BRESPA® plant of DW SYSTEMBAU GMBH in Schneverdingen. Cement EN 197 is added as a binding agent to the natural aggregates (sand, chippings, gravel). Fly ash is also added. Depending on the type, bulk density and grain size, the aggregates are stored in silos in the plant or are temporarily stored separately on the open-air site. The binding agent and additives are stored in silos. The dosed aggregates are first removed from the silos and dry premixed with the binding agent. The mixture is then mixed with the addition of water to form a plastically deformable concrete. After treatment, the service water is used for cleaning purposes in the factory. The prestressed concrete ceilings are produced with extruders and slip formers on heated steel tracks as hollow core cross-sections with the required thickness and prestressed reinforcement. After the concrete has hardened to a level that allows the ceiling elements to be processed further, the ceiling elements are sawn to the desired length and temporarily stored on the factory premises. Cold-drawn prestressing steel strands and wires are used for the production of pre-fabricated pre-stressed concrete slabs. These are high-strength Steels.
Deklarierte Einheit:
Die Deklaration bezieht sich auf die Herstellung von
einem Quadratmeter (1 m²) Fertigteildecken mit einer durchschnittlichen Dicke von 26,5 cm aus
Spannbeton, hergestellt aus Zuschlägen der
genannten Zusammensetzung. Die
Durchschnittsbildung erfolgte absatzbezogen auf Basis
der im Werk BRESPA® der DW SYSTEMBAU GMBH
in Schneverdingen hergestellten Spannbeton-
Fertigteildecken.

## Technical purpose
Vorgespannte Betonfertigteile werden als
Deckenelemente im Innen- und Außenbereich
verwendet.

## Reference product
- Spannbeton- Fertigteldecke (26,5 cm Deckendicke, C45/C55): 1

## Inputs
- Erneuerbare Primärenergie als Energieträger (PERE) [MJ]: A1-A3 56.6, C1 0, C2 0.939, C3 1.59, C4 0.488, D -7.99
- Erneuerbare Primärenergie zur stofflichen Nutzung (PERM) [MJ]: A1-A3 0, C1 0, C2 0, C3 0, C4 0, D 0
- Total erneuerbare Primärenergie (PERT) [MJ]: A1-A3 56.6, C1 0, C2 0.939, C3 1.59, C4 0.488, D -7.99
- Nicht-erneuerbare Primärenergie als Energieträger (PENRE) [MJ]: A1-A3 428, C1 0, C2 16.1, C3 18.8, C4 3.72, D -39
- Nicht-erneuerbare Primärenergie zur stofflichen Nutzung (PENRM) [MJ]: A1-A3 1.2, C1 0, C2 0, C3 0, C4 0, D 0
- Total nicht erneuerbare Primärenergie (PENRT) [MJ]: A1-A3 429.2, C1 0, C2 16.1, C3 18.8, C4 3.72, D -39
- Einsatz von Sekundärstoffen (SM) [kg]: A1-A3 1.18, C1 0, C2 0, C3 0, C4 0, D 354.68
- Erneuerbare Sekundärbrennstoffe (RSF) [MJ]: A1-A3 0, C1 0, C2 0, C3 0, C4 0, D 0
- Nicht erneuerbare Sekundärbrennstoffe (NRSF) [MJ]: A1-A3 0, C1 0, C2 0, C3 0, C4 0, D 0
- Einsatz von Süßwasserressourcen (FW) [m^3]: A1-A3 0.44, C1 0, C2 0.000841, C3 0.00529, C4 0.000935, D -0.00835

## Outputs
- Gefährlicher Abfall zur Deponie (HWD) [kg]: A1-A3 1.21e-5, C1 0, C2 6.03e-7, C3 3.96e-7, C4 5.67e-8, D -6.86e-6
- Entsorgter nicht gefährlicher Abfall (NHWD) [kg]: A1-A3 7.52, C1 0, C2 0.00283, C3 0.00566, C4 18.7, D -8.03
- Entsorgter radioaktiver Abfall (RWD) [kg]: A1-A3 0.00734, C1 0, C2 1.7e-5, C3 0.000151, C4 4.17e-5, D -0.000423
- Komponenten für die Wiederverwendung (CRU) [kg]: A1-A3 0, C1 0, C2 0, C3 0, C4 0, D 0
- Stoffe zum Recycling (MFR) [kg]: A1-A3 0, C1 0, C2 0, C3 374.71, C4 0, D 0
- Stoffe für die Energierückgewinnung (MER) [kg]: A1-A3 0, C1 0, C2 0, C3 0, C4 0, D 0
- Exportierte elektrische Energie (EEE) [MJ]: A1-A3 0, C1 0, C2 0, C3 0, C4 0, D -0.314
- Exportierte thermische Energie (EET) [MJ]: A1-A3 0, C1 0, C2 0, C3 0, C4 0, D -0.722

## Impact indicators
- Globales Erwärmungspotenzial (GWP) [kg CO_(2)-Äq.]: A1-A3 64.1, C1 0, C2 1.2, C3 1.15, C4 0.255, D -4.84
- Abbau Potential der stratosphärischen Ozonschicht (ODP) [kg CFC11-Äq.]: A1-A3 2.9e-13, C1 0, C2 3.97e-16, C3 5.69e-15, C4 1.42e-15, D -3.78e-14
- Versauerungspotenzial von Boden und Wasser (AP) [kg SO_(2)-Äq.]: A1-A3 0.0776, C1 0, C2 0.000812, C3 0.0065, C4 0.00163, D -0.00895
- Eutrophierungspotenzial (EP) [kg PO_(4)^(3)-Äq.]: A1-A3 0.0097, C1 0, C2 0.000174, C3 0.00159, C4 0.000185, D -0.000334
- Bildungspotential für troposphärisches Ozon (POCP) [kg Ethen-Äq.]: A1-A3 0.00886, C1 0, C2 -2.08e-5, C3 0.00071, C4 0.000123, D -0.00294
- Potenzial für den abiotischen Abbau nicht fossiler Ressourcen (ADPE) [kg Sb-Äq.]: A1-A3 4.73e-5, C1 0, C2 1.11e-7, C3 1.11e-6, C4 9.83e-8, D -9.87e-5
- Potenzial für den abiotischen Abbau fossiler Brennstoffe (ADPF) [MJ]: A1-A3 408, C1 0, C2 16.1, C3 18.5, C4 3.62, D -42.4

## Use advice
Gültigkeitsbereich:
Die vorliegende Umwelt-Produktdeklaration bezieht sich
auf Spannbeton-Fertigteildecken hergestellt von der
DW SYSTEMBAU GMBH. Betrachtet wurde der
Produktionsstandort in Schneverdingen. Die
Ergebnisse der Ökobilanz beruhen
auf dem Ergebnis der ökobilanziellen Betrachtung
einer durchschnittlich in dem o.g. Werk hergestellten
Fertigteildecke mit der Rohdichte von 2.500 kg/m³
aus Spannbeton. Als Grundlage für die Berechnung
dient eine im Jahr 2019 durchgeführte Datenerhebung
in dem oben genannten Werk
Systemgrenze:
Typ der EPD: Wiege-bis-Werktor mit Optionen
Die gewählten Systemgrenzen umfassen die
Herstellung der Spannbeton-Fertigteildecken
einschließlich der Roh- und Hilfsstoffgewinnung bzw.
der Verarbeitung zu Zuschlagsstoffen zu dem
versandfertigen Produkt bis zum Verlassen des
Werktors (Cradle- to-Gate) sowie das Entsorgungsstadium (C1- C4) und Gutschriften und
Lasten außerhalb der Systemgrenze (D)

Im Einzelnen wurden folgende Prozesse einbezogen:

A1- A3: Produktionsstadium

Modul A1: Gewinnung und Aufbereitung der Betonausgangsstoffe und des Spannstahls

Modul A2. Transport der Grund- sowie Hilfsstoffe zum Produktionswerk

Modul A3: Spannbetonherstellung im Werk (energetische Aufwendungen (Strom, Gas) u.a. für das Dosieren/Mischen, Betonverfüllung, Verdichtung bzw. Härtung), Emissionen und Prozesse der Abfallbewirtschaftung bis zur Deponierung (nicht radioaktiver Abfall).

C1: Rückbau und Abriss

Die Fugen zwischen den Deckenplatten werden unter Maschineneinsatz voneinander getrennt. Danach erfolgt der Rückbau der Spannbeton-Fertigteildecken durch Montagetraversen.

Der energetische Einsatz ist bezogen auf die deklarierte Einheit so marginal, dass dieser unter Beachtung der 1%- Regel abgeschnitten wurde.

Die Sammelquote wird mit 100 % angesetzt.

C2: Transport

Transport der Spannbeton-Fertigteildecken zur Abfallaufbereitungsanlage.

Transportdistanz zur Abfallaufbereitungsanlage 50 km.

C3: Abfallbehandlung

In der Abfallaufbereitungsanlage werden die Spannbeton- Fertigteildecken aufbereitet. Die angesetzte Recyclingquote der Spannbeton- Fertigteildecken beträgt 95 %, der Recyclingverlust 5 %.

C4: Beseitigung

Es werden 5 % Recyclingverlust im Zuge der Abfallaufbereitung der Spannbeton- Fertigteildecken deponiert.

D: Wiederverwendungs-, Rückgewinnungspotentiale

Gutschriften infolge der Bauschuttaufbereitung der Spannbeton-Fertigteildecken

## Data sources
- Spannbeton-Fertigteildecken.pdf
- GaBi Database (all versions)
- GaBi database SP39 2019
