# CLIMAFLEX® made of NMC NATUREFOAM®

Dataset: ILCD process, EPD, average dataset
Geography: BE
Reference year: 2017
Valid until: 2022
Classification: OEKOBAU.DAT: Dämmstoffe / Polyethylen / Schaum
Classification: IBUCategories: 02 Bauprodukte / Wärmedämmungsprodukte / Dämmstoffe aus Schaumkunststoffen
Method details: Dämmstoffe aus Schaumkunststoffen.pdf
Registration number: EPD-NMC-20170078-IBD3-DE
Owner: NMC S.A.
Compliance: DIN EN 15804; ISO 14025
Review: Accredited third party review by Institut Bauen und Umwelt e. V.
Amounts: rows without a unit in brackets have none in this file; such an amount is in the reference unit of its flow, which a separate flow dataset defines
copyright: true

## General comment
CLIMAFLEX® made of NMC NATUREFOAM® is a professional bio-polyethylene-based closed-cell foam pipe insulation for continuous energy saving and condensation control purposes. CLIMAFLEX® made of NMC NATUREFOAM® provides solutions that follow all necessary guidelines and standards for any type of installation.

Products with self adhesive strip are available (range XT); this variation with self adhesive strip is not included in the calculations.

## Technology and included processes
The manufacturing process consists of a continuous extrusion. Solid pellets of thermoplastic resin are fed into a melting zone in which the resin is melted, to form a flowable thermoplastic mass. The thermoplastic mass is then metered to a mixing zone where it is thoroughly mixed with a blowing agent under pressure. The mixture of thermoplastic resin and blowing agent is then forced through a die, which imparts a shape to the thermoplastic mass, into a zone of lower pressure (i.e. atmospheric pressure). The blowing agent expands to form the cells of the foam and the thermoplastic foam is cooled trough an inline water cooler. At the end of the inline cooler the profiles are cut to the required dimensions. Quality assurance : The manufacture is certified ISO 9001 for the quality management and the product is certified for CE marking according CPR (CE Certificate of conformity N° 0749-CPR-BC1-571-4133-0001-01and 0749-CPR-BC1-571-4133-0002-01)
Technical data:
Performance data of the product in accordance with the Declaration of Performance with respect to its Essential Characteristics according to /EN 14313/ apply. Further data:
Declared unit:
This declaration refers to 1 m³ of produced pipe insulation product. For the LCA calculations, as the product is foam and have some tolerances, the density declared is the average worst case between the product categories.
The thermal conductivity coefficient (Lambda-value) and R-value per 25 mm thickness per product brand is provided below as additional information and support for installers.

## Technical purpose
CLIMAFLEX® made of NMC NATUREFOAM® are used to insulate pipes in industrial installations and building equipment

Polyethylene foam is a cost-efficient material with good insulating properties.

Products made of PE foam yield a good cost/performance ratio.

Polyethylene Foam allows condensation control in fresh-and waste water systems

## Reference product
- CLIMAFLEX® /M3: 1

## Inputs
- Renewable primary energy as energy carrier (PERE) [MJ]: A1-A3 1366.93, A4 2.98175, A5 0, C2 0.131209, C3 0, C4 2.11948, D 0
- Renewable primary energy resources as material utilization (PERM) [MJ]: A1-A3 667.236, A4 0, A5 0, C2 0, C3 0, C4 -667.236, D 0
- Total use of renewable primary energy resources (PERT) [MJ]: A1-A3 2034.17, A4 2.98175, A5 0, C2 0.131209, C3 0, C4 2.11948, D 0
- Non renewable primary energy as energy carrier (PENRE) [MJ]: A1-A3 951.432, A4 58.0567, A5 0, C2 2.55473, C3 0, C4 28.9246, D 0
- Non renewable primary energy as material utilization (PENRM) [MJ]: A1-A3 248.483, A4 0, A5 0, C2 0, C3 0, C4 -248.483, D 0
- Total use of non renewable primary energy resources (PENRT) [MJ]: A1-A3 1199.91, A4 58.0567, A5 0, C2 2.55473, C3 0, C4 28.9246, D 0
- Use of secondary material (SM) [kg]: A1-A3 9.88, A4 0, A5 0, C2 0, C3 0, C4 0, D 0
- Use of renewable secondary fuels (RSF) [MJ]: A1-A3 0, A4 0, A5 0, C2 0, C3 0, C4 0, D 0
- Use of non renewable secondary fuels (NRSF) [MJ]: A1-A3 0, A4 0, A5 0, C2 0, C3 0, C4 0, D 0
- Use of net fresh water (FW) [m^3]: A1-A3 0.293471, A4 0.00551729, A5 0, C2 0.000242783, C3 0, C4 6.92402e-5, D 0

## Outputs
- Hazardous waste disposed (HWD) [kg]: A1-A3 0.00028657, A4 3.02764e-6, A5 0, C2 1.33229e-7, C3 0, C4 1.11838e-7, D 0
- Non hazardous waste disposed (NHWD) [kg]: A1-A3 7.39325, A4 0.00459614, A5 0, C2 0.000202249, C3 0, C4 27.0177, D 0
- Radioactive waste disposed (RWD) [kg]: A1-A3 0.0935605, A4 0.000120012, A5 0, C2 5.28101e-6, C3 0, C4 0.000438117, D 0
- Components for re-use (CRU) [kg]: A1-A3 0, A4 0, A5 0, C2 0, C3 0, C4 0, D 0
- Materials for recycling (MFR) [kg]: A1-A3 0, A4 0, A5 0, C2 0, C3 0, C4 0, D 0
- Materials for energy recovery (MER) [kg]: A1-A3 0, A4 0, A5 0, C2 0, C3 0, C4 0, D 0
- Exported electrical energy (EEE) [MJ]: A1-A3 0, A4 0, A5 0, C2 0, C3 0, C4 0, D 0
- Exported thermal energy (EET) [MJ]: A1-A3 0, A4 0, A5 0, C2 0, C3 0, C4 0, D 0

## Impact indicators
- Global warming potential (GWP) [kg CO_(2)-Äq.]: A1-A3 -4.908, A4 4.1861, A5 0, C2 0.184104, C3 0, C4 1.94004, D 0
- Depletion potential of the stratospheric ozone layer (ODP) [kg CFC11-Äq.]: A1-A3 6.90969e-8, A4 3.40628e-12, A5 0, C2 1.4989e-13, C3 0, C4 4.76388e-12, D 0
- Acidification potential of land and water (AP) [kg SO_(2)-Äq.]: A1-A3 0.817856, A4 0.019827, A5 0, C2 0.000809384, C3 0, C4 0.00535982, D 0
- Eutrophication potential (EP) [kg PO_(4)^(3)-Äq.]: A1-A3 0.557765, A4 0.00497444, A5 0, C2 0.000202234, C3 0, C4 0.0053127, D 0
- Formation potential of tropospheric ozone photochemical oxidants (POCP) [kg Ethen-Äq.]: A1-A3 0.161627, A4 -0.00818075, A5 0, C2 -0.000328667, C3 0, C4 0.000611386, D 0
- Abiotic depletion potential for non fossil resources (ADPE) [kg Sb-Äq.]: A1-A3 0.038741, A4 3.78493e-7, A5 0, C2 1.66552e-8, C3 0, C4 4.01443e-7, D 0
- Abiotic depletion potential for fossil resources (ADPF) [MJ]: A1-A3 713.923, A4 57.7512, A5 0, C2 2.54129, C3 0, C4 27.8118, D 0

## Use advice
Scope:
Product line CLIMAFLEX® made of NMC NATUREFOAM®
Thermal insulation products for building equipment and industrial insulations made of polyethylene foam (PEF) according to EN14313. This declaration is an Environmental Product Declaration according to /ISO14025/ describing the specific environmental performance of the product produced in Belgium.
System boundary:
The Data collection refers to the yearly production in 2016.

Module A1 to A3: The LCA calculation covers the production of the raw materials, transport of these to the plant, the mixing of raw materials according to the respective recipes, manufacturing of the foam product and packaging for dispatch. All production takes place exclusively in Eynatten, Belgium.

Module A4: Transport of the final product to the application site. The average transport distance has been calculated based on a weighted value for NMC’s main customers representing more than 50% of the sales volume in 2016. Capacity utilisation by volume is 100%. However, given the low density of the product, capacity utilisation by mass has been estimated as 10%.

Module A5: The products can be placed end to end and the remaining pieces can be reused on other pipes. The calculations do not contain any installation waste. Cardboard as packaging material is assumed to be recycled. As input material cardboard made of waste paper is considered. Thus, environmental burden for packaging material are considered already in A1-A3. The value of the environmental impact for A5 is declared as “0”.

Module B1-B7:The foam insulation products do not require maintenance, replacement or refurbishment while in use. The information modules B1 – B7 are not declared.

Using insulation material influences the energy consumption of the overall heating and cooling equipment. This is not taken into account, as the EPD refer to the product 'insulation material'.

Module C1: Disassembly is done manually. There are no impacts associated with C1. The information module is not declared.

Module C2: For the transport at end-of-life stage an average distance to landfill is assumed to be 100 km.

Module C3: The chosen scenario of 100% landfilling does not require any waste processing. Module C3 is not declared.

Module C4: The environmental burden for the chosen scenario of 100% landfilling is declared in module C4.

The product contains raw materials from renewable sources. By calculating the environmental burden for the production process the sequestration of CO2 from atmosphere has taken into account.

The environmental effects of (bio-)plastic on a landfill site in the next 100 years cannot be foreseen as a full picture today. In this declaration it is assumed, that the sequestered CO2 is still integrated in a solid matrix.

Module D: The end-of-life scenarios for packaging material and product do not deliver any benefits for the next system. Recycling of cardboard is a closed cycle with the production process.

The product is landfilled; energy or material gain cannot be expected.

## Data sources
- CLIMAFLEX® aus NMC NATUREFOAM®.pdf
- GaBi Database (all versions)
- GaBi database SP29 2016
