# EGGER OSB boards

Dataset: ILCD process, EPD, average dataset
Geography: RER
Reference year: 2018
Valid until: 2023
Classification: OEKOBAU.DAT: Holz / Holzwerkstoffe / OSB-Platte
Classification: IBUCategories: 02 Bauprodukte / Holzwerkstoffe / Holzwerkstoffe
Method details: Holzwerkstoffe.pdf
Generated by: Daxner & Merl GmbH
Registration number: EPD-EGG-20180107-IBD1-DE
Owner: Fritz EGGER GmbH & Co. OG
Compliance: DIN EN 15804; ISO 14025
Review: Accredited third party review by Institut Bauen und Umwelt e. V.
Amounts: rows without a unit in brackets have none in this file; such an amount is in the reference unit of its flow, which a separate flow dataset defines
copyright: true
licenseType: Free of charge for all users and uses
accessRestrictions: None

## General comment
EGGER OSB boards (Oriented Strand Boards) are three-layered synthetic resin-bonded wood-based panels made of side-by-side oriented strands (micro-veneers) according to /EN 300/ “Oriented Strand Boards (OSB)”. The orientation of the middle layer is thereby at a 90° angle to the surface layers. Softwood is mainly used (spruce, pine), as well as up to 30% hardwood.
In order to bring the product into circulation in the

EU/EFTA (with the exception of Switzerland), the Building Products Regulation (EU) no. 305/2011 must be applied. Regarding the declaration of performance according to

/EN 13986/:2004+ A1:2015:

· EGGER OSB 2 / OSB 3 / OSB 3 E0 / OSB 4 TOP / OSB/3 FSC

· EGGER Ergo Board

· EGGER Roofing Board,

Relevant national regulations apply to use

· EGGER OS’Brace® (H2 / H3.1)

· EGGER OS’Floor™(H2)

· EGGER OSB3 JAS TOP

## Technology and included processes
Technical data:
Declarations of performance (DoP) with relevant data for EGGER OSB boards with CE marking according to /EN 13986/ are available at www.egger.com.

Furthermore, national legislation pursuant to the /JAS Standard/ Structural Panels applies for EGGER OSB 3 JAS TOP and to the /AS/NZS 1604/ for EGGER OS’Brace® H2/H3.1 and EGGER OS’Floor™ H2.
Declared unit:
This environmental product declaration is based on a declared unit of 1 m³ EGGER OSB products with an average raw density of 607 kg/m³ and a delivery moisture of approximately 5%.

## Technical purpose
EGGER OSB boards are used in the construction industry in non-load-bearing or load-bearing and stiffening components roof, wall, ceiling according to /EN 1995-1-1/ in the utility classes 1 and 2 (humid conditions; under the roof). Furthermore, OSB boards can be used for non-load bearing applications in interior design, drywall constructions, trade fair construction and shop fitting, as well as wood packaging and concrete formwork.

## Reference product
- OSB-Platte (): 1

## Inputs
- Renewable primary energy as energy carrier (PERE) [MJ]: A1-A3 3297.53, C3 0, D -2240
- Renewable primary energy resources as material utilization (PERM) [MJ]: A1-A3 9702.47, C3 -9702.47, D 0
- Total use of renewable primary energy resources (PERT) [MJ]: A1-A3 13000, C3 36.6, D -2240
- Non renewable primary energy as energy carrier (PENRE) [MJ]: A1-A3 3479.18, C3 0, D -9710
- Non renewable primary energy as material utilization (PENRM) [MJ]: A1-A3 920.821, C3 -920.821, D 0
- Total use of non renewable primary energy resources (PENRT) [MJ]: A1-A3 4400, C3 97.6, D -9710
- Use of secondary material (SM) [kg]: A1-A3 0, C3 0, D 0
- Use of renewable secondary fuels (RSF) [MJ]: A1-A3 27.9, C3 0, D 9702.47
- Use of non renewable secondary fuels (NRSF) [MJ]: A1-A3 0, C3 0, D 920.821
- Use of net fresh water (FW) [m^3]: A1-A3 0.67, C3 0.0499, D -2.27

## Outputs
- Hazardous waste disposed (HWD) [kg]: A1-A3 0.000202, C3 4.57e-8, D -3.5e-6
- Non hazardous waste disposed (NHWD) [kg]: A1-A3 0.986, C3 0.0687, D 0.225
- Radioactive waste disposed (RWD) [kg]: A1-A3 0.0483, C3 0.0161, D -0.988
- Components for re-use (CRU) [kg]: A1-A3 0, C3 0, D 0
- Materials for recycling (MFR) [kg]: A1-A3 0, C3 0, D 0
- Materials for energy recovery (MER) [kg]: A1-A3 0, C3 606.705, D 0
- Exported electrical energy (EEE) [MJ]: A1-A3 0, C3 0, D 0
- Exported thermal energy (EET) [MJ]: A1-A3 0, C3 0, D 0

## Impact indicators
- Global warming potential (GWP) [kg CO_(2)-Äq.]: A1-A3 -753, C3 967, D -549
- Depletion potential of the stratospheric ozone layer (ODP) [kg CFC11-Äq.]: A1-A3 9.43e-11, C3 2.37e-11, D -1.45e-9
- Acidification potential of land and water (AP) [kg SO_(2)-Äq.]: A1-A3 0.919, C3 0.0139, D -0.0386
- Eutrophication potential (EP) [kg PO_(4)^(3)-Äq.]: A1-A3 0.219, C3 0.00138, D 0.00241
- Formation potential of tropospheric ozone photochemical oxidants (POCP) [kg Ethen-Äq.]: A1-A3 0.522, C3 0.000949, D 0.109
- Abiotic depletion potential for non fossil resources (ADPE) [kg Sb-Äq.]: A1-A3 8.25e-5, C3 2.72e-6, D -0.000175
- Abiotic depletion potential for fossil resources (ADPF) [MJ]: A1-A3 4280, C3 56.9, D -7220

## Use advice
Scope:
This document refers to OSB boards for construction purposes, which are manufactured in the following plants of the Group:

Egger Holzwerkstoffe Wismar GmbH & Co. KG, Am Haffeld 1, 23970 Wismar, Germany

SC Egger Romania SRL, Str. Austriei 2, 725400 Radauti, jud. Suceava, Romania
System boundary:
The LCA of the average EGGER OSB boards includes a cradle-to-gate consideration of environmental impact with options. The following life cycle phases are taken into account in the analysis:

Module A1-A3 | Product stage

The product stage includes the cost of raw material procurement (roundwood, producing the glue system, additives, etc.), as well as related transport relative to the production plants in Wismar and Radauti. Within the plant premises, the lumberyard, the strand preparation, OSB production, board finishing are considered to the plant or to shipping. The preparation of thermal and electric energy takes place in the case of both plants via their own biomass power plant. Furthermore, the Radauti plant produces the glue system used for the OSB boards independently. In this way, the glue production is represented as specifically collected foreground data.

Module C3 | Waste processing

Module C3 declares the biogenic carbon dioxide emissions in energetic utilisation at the end of the product life. Furthermore, chopping after product disassembly is also considered.

Module D | Credits and charges outside the system limits

The energetic utilisation of the product at the end of its life cycle is described in Module D, including energetic substitution potential as a European average scenario.

## Data sources
- GaBi Database (all versions)
- GaBi database SP36 2018
