# ETICS gluing and coating mineral lightweight plaster; mineral light plaster

Dataset: ILCD process, EPD, generic dataset
Geography: DE
Reference year: 2021
Valid until: 2022
Classification: oekobau.dat: Dämmstoffe / Wärmedämmverbundsystem / Wärmedämmverbundsystem
Owner: Sphera Solutions GmbH
Compliance: EN 15804+A2
Review: Dependent internal review by Sphera Solutions GmbH; Independent external review by GaBi user forum
Amounts: rows without a unit in brackets have none in this file; such an amount is in the reference unit of its flow, which a separate flow dataset defines
copyright: true
licenseType: Free of charge for all users and uses
accessRestrictions: The license conditions as stated on https://www.oekobaudat.de/ apply.
accessRestrictions: Es gelten die Lizenzbedingungen wie sie auf https://www.oekobaudat.de/ genannt sind.

## General comment
This data set has been modeled according to the European Standard EN 15804+A2 for Sustainable Building. Results are depicted in modules that allow the structured expression of results over the entire life cycle.

## Geography
The data set represents the country specific situation in Germany, focusing on the main technologies, the region specific characteristics and / or import statistics.

## Time period
Annual average

## Technology and included processes
This dataset covers an external wall insulation system (EWIS) with mineral light plaster (lime cement).The insulation material and the wall material are not considered in this process. The system has the following structure:
Cement 4.0 kg/m2
Glass fibre mesh 0.18 kg/m2
Reinforcement light (mineral) 4.0 kg/m2
Precoat (silicate dispersion) 0.22 kg/m2
Light plaster (lime cement) 3.0 kg/m2 .
The system boundaries comprise the cradle to gate life cycle of the EWIS.

In the disposal phase, a manual dismantling (no loads) is assumed in module C1. The transport in module C2 to the landfill site takes place with a truck (50km). In C3, if relevant, a packaging with PE foil is taken into account (for example, for mineral fiber products. 0.0125 kg foil per kg of discarded material). In module C4 the average landfill emissions corresponding to the product (reference country Germany) are shown. The use of landfill gas is not taken into account.

## Technical purpose
This product can be used in construction.

## Safety margin
10 %. Product system almost completely covered. Good technological, temporal and geographic representativeness.

## Reference product
- ETICS gluing and coating mineral lightweight plaster: 1

## Inputs
- Use of renewable primary energy as energy carrier (PERE) [MJ]: A1-A3 11.2862, C2 0.0280895, C3 0, C4 0.33456
- Use of renewable primary energy resources used as raw materials (PERM) [MJ]: A1-A3 0, C2 0, C3 0, C4 0
- Total use of renewable primary energy (PERT) [MJ]: A1-A3 11.2862, C2 0.0280895, C3 0, C4 0.33456
- Use of non renewable primary energy as energy carrier (PENRE) [MJ]: A1-A3 33.2705, C2 0.483984, C3 17.6, C4 2.47727
- Use of non renewable primary energy resources used as raw materials (PENRM) [MJ]: A1-A3 16, C2 0, C3 -16, C4 0
- Total use of non renewable primary energy resource (PENRT) [MJ]: A1-A3 49.2705, C2 0.483984, C3 1.6, C4 2.47727
- Use of secondary material (SM) [kg]: A1-A3 0, C2 0, C3 0, C4 0
- Use of renewable secondary fuels (SF) [MJ]: A1-A3 0.304376, C2 0, C3 0, C4 0
- Use of non renewable secondary fuels (NRSF) [MJ]: A1-A3 5.59368, C2 0, C3 0, C4 0
- Net use of fresh water (FW) [m3]: A1-A3 0.019658, C2 2.49646e-5, C3 0, C4 0.000610206

## Outputs
- Hazardous waste disposed (HWD) [kg]: A1-A3 3.01351e-8, C2 2.0229e-11, C3 0, C4 2.63556e-10
- Non harzardous waste disposed (NHWD) [kg]: A1-A3 0.240307, C2 7.8126e-5, C3 0, C4 12.3541
- Radioactive waste disposed (RWD) [kg]: A1-A3 0.000947877, C2 4.64446e-7, C3 0, C4 2.55735e-5
- Components for re-use (CRU) [kg]: A1-A3 0, C2 0, C3 0, C4 0
- Materials for recycling (MFR) [kg]: A1-A3 0, C2 0, C3 0, C4 0
- Materials for energy recovery (MER) [kg]: A1-A3 0, C2 0, C3 0, C4 0
- Exported electrical energy (EEE) [MJ]: A1-A3 0, C2 0, C3 0, C4 0
- Exported thermal energy (EET) [MJ]: A1-A3 0, C2 0, C3 0, C4 0

## Impact indicators
- Global Warming Potential - total (GWP-total) [kg CO2 eq.]: A1-A3 4.87665, C2 0.0368355, C3 0.13, C4 0.182384
- Global Warming Potential - fossil fuels (GWP-fossil) [kg CO2 eq.]: A1-A3 5.00491, C2 0.0365845, C3 0, C4 0.186763
- Global Warming Potential - biogenic (GWP-biogenic) [kg CO2 eq.]: A1-A3 -0.133283, C2 1.65e-5, C3 0.13, C4 -0.00492757
- Global Warming Potential - land use and land use change (GWP-luluc) [kg CO2 eq.]: A1-A3 0.0050142, C2 0.000234495, C3 0, C4 0.000549092
- Depletion potenzial of the stratospheric ozone layer (ODP) [kg CFC-11 eq.]: A1-A3 9.47818e-13, C2 9.34267e-18, C3 0, C4 7.32818e-16
- Acidifcation potential, Accumulated Exceedance (AP) [Mole of H+ eq.]: A1-A3 0.010252, C2 0.000114715, C3 0, C4 0.00132938
- Eutrophication potential - freshwater (EP-freshwater) [kg P eq.]: A1-A3 2.68307e-5, C2 7.50928e-8, C3 0, C4 3.14334e-7
- Eutrophication potential - marine (EP-marine) [kg N eq.]: A1-A3 0.00302191, C2 5.35523e-5, C3 0, C4 0.000345117
- Eutrophication potential - terrestrial (EP-terrestrial) [Mole of N eq.]: A1-A3 0.0340496, C2 0.000597956, C3 0, C4 0.00379169
- Photochemical Ozone Creation Potential (POCP) [kg NMVOC eq.]: A1-A3 0.0080285, C2 0.000103272, C3 0, C4 0.00104574
- Abiotic depletion potential - non-fossil resources (ADPE) [kg Sb eq.]: A1-A3 1.74131e-5, C2 3.1761e-9, C3 0, C4 1.77023e-8
- Abiotic depletion potential - fossil resources (ADPF) [MJ]: A1-A3 50.8517, C2 0.483963, C3 0, C4 2.47596
- Water (user) deprivation potential (WDP) [m³ world equiv.]: A1-A3 0.443144, C2 0.000141938, C3 0, C4 0.0199875

## Use advice
The data set represents a cradle to gate inventory. It can be used to characterise the supply chain situation of the respective commodity in a representative manner. Combination with individual unit processes using this commodity enables the generation of user-specific (product) LCAs.

## Data sources
- Technische Systeminfo 4, Wärmedämmverbundsysteme zum Thema Ökobilanz, 1999
- Documentation of data quality management
- GaBi Database Edition 2021, CUP2021.01
- GaBi database (all versions)
