# Sikaplan VGWT

Dataset: ILCD process, EPD, specific dataset
Geography: DE
Reference year: 2016
Valid until: 2022
Classification: OEKOBAU.DAT: Kunststoffe / Dachbahnen / PVC-Dachbahnen
Classification: IBUCategories: 02 Building products / Membranes, including Liquid applied and kits / Plastic and elastomer roofing and sealing sheet systems
Method details: Plastic and elastomer roofing and sealing sheet systems.pdf
Generated by: Sika Services AG
Registration number: EPD-SIK-20160088-IBA1-EN
Owner: Sika Deutschland GmbH
Compliance: DIN EN 15804; ISO 14025
Review: Accredited third party review by Institut Bauen und Umwelt e. V.
Amounts: rows without a unit in brackets have none in this file; such an amount is in the reference unit of its flow, which a separate flow dataset defines
copyright: true
licenseType: Free of charge for all users and uses
accessRestrictions: None

## General comment
Sikaplan VGWT is multi-layer synthetic roof waterproofing sheet based on polyvinyl chloride (PVC) with embedded polyester scrim reinforcing (DE/E1 PVC-P-NB-V-PG).

Sikaplan VGWT waterproofing sheets are available in these thicknesses: 1.2 mm, 1.5 mm and 1.8 mm.

For the calculation of the Life Cycle Assessment no average values were taken for the various thicknesses of Sikaplan VGWT waterproofing sheets. Rather, all values given apply to Sikaplan VGWT-12; a formula for individually calculating values for other thicknesses is given in Chapter 5.

## Technology and included processes
Sikaplan VGWT polymeric waterproofing sheets are manufactured in the following steps: Dosing of the various raw materials and plastification of the mixture in an extruder Rolling the melt into sheets by calendar processing Cooling and reeling the sheets Heat fusing of two sheets (top and bottom layers), embedding a polyester mesh, on a lamination machine Trimming the sheets and winding them onto cardboard spools made of recycled paper Wrapping the rolls in PE stretch film, palletising Production waste such as scrap is recycled by feeding it directly back into the manufacturing process. Sika maintains a quality management system certified in accordance with /ISO 9001/.
Technical data:
In the following table, only technical data relevant to Sikaplan VGWT waterproofing sheets are given.
Declared unit:
This declaration applies to 1 m2 of Sikaplan VGWT polymeric waterproofing membrane, thickness 1.2 mm. A formula is given for independent calculation of the values for other thicknesses.

## Technical purpose
Sikaplan VGWT waterproofing sheets are used mainly for waterproofing flat roofs. The sheets can be loosely laid and mechanically fastened to roofs with any slope.

## Reference product
- 1 m2 membrane: 1

## Inputs
- Renewable primary energy as energy carrier (PERE) [MJ]: A1-A3 8.75752, A5 0.875752
- Renewable primary energy resources as material utilization (PERM) [MJ]: A1-A3 1.73697, A5 0.173697
- Total use of renewable primary energy resources (PERT) [MJ]: A1-A3 10.4945, A4 0.113636, A5 1.13041, C1 0, C2 0.101, C3 0.337, C4 0.00594, D -8.4
- Non renewable primary energy as energy carrier (PENRE) [MJ]: A1-A3 74.7893, A5 7.47893
- Non renewable primary energy as material utilization (PENRM) [MJ]: A1-A3 35.9924, A5 3.59278
- Total use of non renewable primary energy resources (PENRT) [MJ]: A1-A3 110.776, A4 2.05455, A5 11.614, C1 0, C2 1.82, C3 1.2, C4 0.0485, D -85.1
- Use of secondary material (SM) [kg]: A1-A3 0, A4 0, A5 0, C1 0, C2 0, C3 0, C4 0, D 0
- Use of renewable secondary fuels (RSF) [MJ]: A1-A3 0, A4 7.36e-6, A5 0, C1 0, C2 5.92e-6, C3 1.4e-5, C4 5.23e-6, D -0.000595
- Use of non renewable secondary fuels (NRSF) [MJ]: A1-A3 0, A4 0.000112, A5 0, C1 0, C2 9.01e-5, C3 0.000212, C4 1.54e-5, D -0.009
- Use of net fresh water (FW) [m^3]: A1-A3 0.0268182, A4 0.000285455, A5 0.00313636, C1 0, C2 0.000252, C3 0.000519, C4 0.000302, D -0.0149

## Outputs
- Hazardous waste disposed (HWD) [kg]: A1-A3 0.00151818, A4 1.51818e-7, A5 0.000151836, C1 0, C2 1.34e-7, C3 7.63e-10, C4 3.96e-10, D -1.78e-6
- Non hazardous waste disposed (NHWD) [kg]: A1-A3 0.367273, A4 0.000169091, A5 0.0856442, C1 0, C2 0.000149, C3 0.000726, C4 0.0133, D -0.0317
- Radioactive waste disposed (RWD) [kg]: A1-A3 0.00309091, A4 2.92727e-6, A5 0.000339884, C1 0, C2 2.59e-6, C3 0.000181, C4 2.44e-6, D -0.00252
- Components for re-use (CRU) [kg]: A1-A3 0, A4 0, A5 0, C1 0, C2 0, C3 0, C4 0
- Materials for recycling (MFR) [kg]: A1-A3 0, A4 0, A5 0, C1 0, C2 0, C3 1.54, C4 0
- Materials for energy recovery (MER) [kg]: A1-A3 0, A4 0, A5 0, C1 0, C2 0, C3 0, C4 0
- Exported electrical energy (EEE) [MJ]: A1-A3 0, A4 0, A5 0.166, C1 0, C2 0, C3 0, C4 0.0974
- Exported thermal energy (EET) [MJ]: A1-A3 0, A4 0, A5 0.39, C1 0, C2 0, C3 0, C4 0.241

## Impact indicators
- Global warming potential (GWP) [kg CO_(2)-Äq.]: A1-A3 4.49091, A4 0.149091, A5 0.622, C1 0, C2 0.132, C3 0.069, C4 0.102, D -3.24
- Depletion potential of the stratospheric ozone layer (ODP) [kg CFC11-Äq.]: A1-A3 4.89091e-9, A4 6.81818e-13, A5 4.96319e-10, C1 0, C2 6.03e-13, C3 4.9e-11, C4 5.44e-13, D -3.34e-9
- Acidification potential of land and water (AP) [kg SO_(2)-Äq.]: A1-A3 0.0397273, A4 0.00061, A5 0.00417573, C1 0, C2 0.000733, C3 0.000192, C4 4.17e-5, D -0.00551
- Eutrophication potential (EP) [kg PO_(4)^(3)-Äq.]: A1-A3 0.00257273, A4 0.000129091, A5 0.000278892, C1 0, C2 0.000162, C3 1.72e-5, C4 7.66e-6, D -0.00181
- Formation potential of tropospheric ozone photochemical oxidants (POCP) [kg Ethen-Äq.]: A1-A3 0.00410909, A4 7.31818e-5, A5 0.000423417, C1 0, C2 7.62e-5, C3 1.32e-5, C4 2.64e-6, D -0.00225
- Abiotic depletion potential for non fossil resources (ADPE) [kg Sb-Äq.]: A1-A3 1.03636e-5, A4 9.81818e-9, A5 1.07505e-6, C1 0, C2 8.64e-9, C3 2.25e-8, C4 4.48e-9, D -1.39e-5
- Abiotic depletion potential for fossil resources (ADPF) [MJ]: A1-A3 102.727, A4 2.04545, A5 10.7313, C1 0, C2 1.81, C3 0.747, C4 0.0424, D -78.7

## Use advice
Scope:
This document applies to Sikaplan VGWT polymeric waterproofing membrane manufactured by Sika Manufacturing AG in Duedingen, Switzerland. The life cycle assessment data are based on production data from 2015 collected by Sika Services AG.
System boundary:
Type of EPD: Cradle-to-gate with options

The system boundaries of the EPD follow the modular construction system described by /EN 15804/. The LCA takes into account the following modules:

A1-A3: Manufacturing of pre-products, packaging, ancillary materials, transport to the factory, production including energy supply and waste handling
A4: Transport to the building site
A5: Installation into the building (welding energy, disposal of packaging C1: Deconstruction and demolition
C2: Transport to waste-processing facility
C3: Waste processing for reuse, recovery and/or recycling
C4: Disposal (waste incineration)
D: Potential for reuse, recovery and/or recycling as net flows and benefits

## Data sources
- GaBi Database (all versions)
- GaBi database SP29 2016
