# CLIMAFLEX® SPIRAL made of NMC NATUREFOAM®

Dataset: ILCD process, EPD, average dataset
Geography: BE
Reference year: 2019
Valid until: 2024
Classification: OEKOBAU.DAT: Dämmstoffe / Polyethylen / Schaum
Classification: IBUCategories: 02 Building products / Thermal insulation products / Insulating materials made of foam plastics
Method details: Insulating materials made of foam plastics.pdf
Registration number: EPD-NMC-20180159-IBD1-EN
Owner: NMC S.A.
Compliance: DIN EN 15804; ISO 14025
Review: Accredited third party review by Institut Bauen und Umwelt e. V.
Amounts: rows without a unit in brackets have none in this file; such an amount is in the reference unit of its flow, which a separate flow dataset defines
copyright: true

## General comment
CLIMAFLEX® SPIRAL made of NMC NATUREFOAM® is a professional bio-polyethylene-based closed-cell foam for self-supporting ventilation pipes for interior use. Its low weight, its corrosion resistance and its good thermal and acoustic insulation, coupled with the fact that it is simple and quick to fit, make CLIMAFLEX® SPIRAL made of NMC NATUREFOAM® a worthwhile alternative to conventional ventilation pipes. CLIMAFLEX® SPIRAL made of NMC NATUREFOAM® provides solutions that follow all necessary guidelines and standards for any type of installation.For the placing on the market of the product in the EU/EFTA (with the exception of Switzerland) Regulation (EU) No. 305/2011 (CPR) applies. The product needs a Declaration of Performance taking into consideration /EN 14313/ - Thermal Insulation products for building equipment and industrial installations. Factory made polyethylene foam (PEF) and the CE-marking. For the application and use, the respective national provisions apply.

## Technology and included processes
The manufacturing process consists of a continuous extrusion. Solid pellets of thermoplastic resin are fed into a melting zone in which the resin is melted, to form a flowable thermoplastic mass. The thermoplastic mass is then metered to a mixing zone where it is thoroughly mixed with a blowing agent under pressure. The mixture of thermoplastic resin and blowing agent is then forced through a die, which imparts a shape to the thermoplastic mass, into a zone of lower pressure (i.e. atmospheric pressure). The blowing agent expands to form the cells of the foam and the product is then cooled with water (municipal water) before to be heat-welded to itself, due to a NMC’s proprietary technology. Finally, the product is cut to size, packed and stored. Quality assurance : The manufacture is certified ISO 9001 for the quality management.
Declared unit:
This declaration refers to 1 m³ of produced pipe insulation product. For the LCA calculations, as the product is foam and have some tolerances, the LCA calculation is based on the average weight per meter and the density
The thermal conductivity coefficient (Lambda-value) and R-value per 16 mm thickness per product brand is provided below as additional information and support for installers.

## Technical purpose
CLIMAFLEX® SPIRAL made of NMC NATUREFOAM® are used as self-supporting ventilation pipes for interior use in industrial installations and building equipment

Polyethylene foam is a cost-efficient material with good insulating properties.

Products made of PE foam yield a good cost/performance ratio.

Polyethylene Foam is corrosion resistant and its good thermal and acoustic insulation allows having a good alternative to conventional ventilation pipes.

## Reference product
- CLIMAFLEX®SPIRAL made of NMC NATUREFOAM®: 1

## Inputs
- Renewable primary energy as energy carrier (PERE) [MJ]: A1-A3 2581.9, A4 6.97656, A5 0, C2 0.147653, C4 2.35916, D 0
- Renewable primary energy resources as material utilization (PERM) [MJ]: A1-A3 909.45, A4 0, A5 0, C2 0, C4 0, D 0
- Total use of renewable primary energy resources (PERT) [MJ]: A1-A3 3491.35, A4 6.97656, A5 0, C2 0.147653, C4 2.35916, D 0
- Non renewable primary energy as energy carrier (PENRE) [MJ]: A1-A3 791.05, A4 133.663, A5 0, C2 2.82886, C4 31.7192, D 0
- Non renewable primary energy as material utilization (PENRM) [MJ]: A1-A3 174.84, A4 0, A5 0, C2 0, C4 0, D 0
- Total use of non renewable primary energy resources (PENRT) [MJ]: A1-A3 965.89, A4 133.663, A5 0, C2 2.82886, C4 31.7192, D 0
- Use of secondary material (SM) [kg]: A1-A3 20.2, A4 0, A5 0, C2 0, C4 0, D 0
- Use of renewable secondary fuels (RSF) [MJ]: A1-A3 0, A4 0, A5 0, C2 0, C4 0, D 0
- Use of non renewable secondary fuels (NRSF) [MJ]: A1-A3 0, A4 0, A5 0, C2 0, C4 0, D 0
- Use of net fresh water (FW) [m^3]: A1-A3 1.07457, A4 0.0128478, A5 0, C2 0.000271913, C4 -8.15156e-5, D 0

## Outputs
- Hazardous waste disposed (HWD) [kg]: A1-A3 0.000634011, A4 7.04799e-6, A5 0, C2 1.49165e-7, C4 1.3539e-7, D 0
- Non hazardous waste disposed (NHWD) [kg]: A1-A3 9.65014, A4 0.0107341, A5 0, C2 0.000227179, C4 30, D 0
- Radioactive waste disposed (RWD) [kg]: A1-A3 0.105644, A4 0.000279285, A5 0, C2 5.91084e-6, C4 0.000450352, D 0
- Components for re-use (CRU) [kg]: A1-A3 0, A4 0, A5 0, C2 0, C4 0, D 0
- Materials for recycling (MFR) [kg]: A1-A3 0, A4 0, A5 20.2, C2 0, C4 0, D 0
- Materials for energy recovery (MER) [kg]: A1-A3 0, A4 0, A5 0, C2 0, C4 0, D 0
- Exported electrical energy (EEE) [MJ]: A1-A3 0, A4 0, A5 0, C2 0, C4 0, D 0
- Exported thermal energy (EET) [MJ]: A1-A3 0, A4 0, A5 0, C2 0, C4 0, D 0

## Impact indicators
- Global warming potential (GWP) [kg CO_(2)-Äq.]: A1-A3 -16.3416, A4 9.77591, A5 0, C2 0.206344, C4 2.10505, D 0
- Depletion potential of the stratospheric ozone layer (ODP) [kg CFC11-Äq.]: A1-A3 1.05158e-7, A4 4.06423e-13, A5 0, C2 8.6016e-15, C4 5.6908e-13, D 0
- Acidification potential of land and water (AP) [kg SO_(2)-Äq.]: A1-A3 1.16837, A4 0.0445393, A5 0, C2 0.000876988, C4 0.00575573, D 0
- Eutrophication potential (EP) [kg PO_(4)^(3)-Äq.]: A1-A3 0.815744, A4 0.0114279, A5 0, C2 0.00022411, C4 0.00588205, D 0
- Formation potential of tropospheric ozone photochemical oxidants (POCP) [kg Ethen-Äq.]: A1-A3 0.234295, A4 -0.018671, A5 0, C2 -0.000362704, C4 0.0006291, D 0
- Abiotic depletion potential for non fossil resources (ADPE) [kg Sb-Äq.]: A1-A3 0.29586, A4 8.65979e-7, A5 0, C2 1.83277e-8, C4 4.61304e-7, D 0
- Abiotic depletion potential for fossil resources (ADPF) [MJ]: A1-A3 698.385, A4 132.95, A5 0, C2 2.81379, C4 30.5724, D 0

## Use advice
Scope:
Product line CLIMAFLEX® SPIRAL made of NMC NATUREFOAM®
Self supporting ventilation pipe made of polyethylene foam (PEF). This declaration is an Environmental Product Declaration according to /ISO14025/ describing the specific environmental performance of the product produced in Belgium.
System boundary:
The Data collection refers to the yearly production in 2017. EPD type: cradle to gate with options (A1-A3, A4, A5, C2, C4 and D)

Module A1 to A3: The LCA calculation covers the production of the raw materials, transport of these to the plant, the mixing of raw materials according to the respective recipes, manufacturing of the foam product and packaging for dispatch. All production takes place exclusively in Eynatten, Belgium.

Module A4: Transport of the final product to the application site. The average transport distance has been calculated based on a weighted value for NMC’s main customers representing more than 90% of the sales volume in 2017. Capacity utilisation by volume is 100%. However, given the low density of the product, capacity utilisation by mass has been estimated as 10%.

Module A5: The products can be placed end to end and the remaining pieces can be reused on other pipes. The calculations do not contain any installation waste. Cardboard as packaging material is assumed to be recycled. As input material cardboard made of waste paper is considered. Thus, environmental burden for packaging material are considered already in A1-A3. The value of the environmental impact for A5 is declared as “0”. No biogenic carbon has been accounted for the recycled content of cardboard in A3 or A5.

Module B1-B7:

Once installed the CLIMAFLEX® SPIRAL made of NMC NATUREFOAM® product requires no maintenance and no repair. Only manual cleaning with brush is required to avoid concentration of dust into this air distribution system. It will be dismantled by the end of live of the building. For this reason, there are not expected to be any impacts in B1 to B7 assuming correct specification and installation.

Module C1:

Disassembly is done manually. There are no impacts associated with C1. The information module is not declared.

Module C2:

Transport at end-of-life stage is modeled as a Euro Cargo 0-6 mix truck with diesel fuel. The average distance to either mechanical recycling, incineration or landfills is assumed to be 100Km.

Module C3:

The chosen scenario of 100% landfilling does not require any waste processing. Module C3 is not declared.

Module C4:

The environmental burden for the chosen scenario of 100% landfilling is declared in module C4.

The product contains raw materials from renewable sources. By calculating the environmental burden for the production process the sequestration of CO2 from atmosphere has taken into account. The environmental effects of (bio-)plastic on a landfill site in the next 100 years cannot be foreseen as a full picture today. In this declaration it is assumed, that the sequestered CO2 is still integrated in a solid matrix.

Module D:

The end-of-life scenarios for packaging material and product do not deliver any benefits for the next system. Recycling of cardboard is a closed cycle with the production process.

The product is landfilled; energy or material gain cannot be expected.

## Data sources
- CLIMAFLEX® SPIRAL made of NMC NATUREFOAM®.pdf
- GaBi Database (all versions)
- GaBi database SP35 2018
