# Tür - Hörmann Legnica Sp. z o.o - Rauchschutzrohrrahmentür

Dataset: ILCD process, EPD, specific dataset
Geography: PL
Reference year: 2017
Valid until: 2024
Classification: Komponenten von Fenstern und Vorhangfassaden / Türen und Tore / Stahl
Classification: OEKOBAU.DAT: Komponenten von Fenstern und Vorhangfassaden / Türen und Tore / Stahl
Synonyms: Rauchschutztür; Rohrrahmentür; Rauchschutz Rohrrahmentür; Rauchschutzabschluss
Method details: EPD Feuer- und Rauchschutz Rohrrahmentüren; Produktkategorieregeln Teil A; Produktkategorieregeln Teil B – für Türen und Tore
Owner: Hörmann Legnica Sp. z o.o
Compliance: EN 15804
Review: Independent external review by Susanne Volz
Amounts: rows without a unit in brackets have none in this file; such an amount is in the reference unit of its flow, which a separate flow dataset defines
copyright: true

## General comment
Dieser Datensatz beinhaltet die Ergebnisse für die Module A1-A3 sowie die Module A4, A5, B2, B3, B6, C1, C2, C3, C4, D gemäß EN 15804. Ein Vergleich mit anderen Produkten ist nur mit einer vergleichbaren Anwendung im Gebäude zulässig. Grundsätzlich ist eine Gegenüberstellung oder die Bewertung von EPD Daten nur möglich, wenn alle zu vergleichenden Datensätze nach EN 15804 erstellt wurden und der Gebäudekontext, bzw. die produktspezifischen Leistungsmerkmale berücksichtigt werden.

## Geography
Dieser Datensatz repräsentiert die Situation des Unternehmens Hörmann Legnica Sp. z o.o in 59-706 Gromadka, Polen, im Hinblick auf die wichtigsten Technologien und die gesetzlichen Rahmenbedingungen.

## Time period
jährlicher Durchschnitt

## Technology and included processes
Die Ökobilanzergebnisse umfassen die Lebenszyklusstadien der Herstellung der Vorprodukte bis hin zur Rohstoffgewinnung und Verarbeitungsprozesse von als Input dienenden Sekundärstoffen (z.B. Recyclingprozesse), deren Transporte zum Werk sowie die Produktion selbst, einschließlich der Bereitstellung von allen Hilfs- und Betriebsstoffen, Energie, sowie die vollständige Abfallbehandlung oder die Deponierung der Restabfälle während des Stadiums der Produktion. Die Module A1, A2 und A3 sind hier als ein aggregiertes Modul A1-A3 ausgewiesen. Falls für diesen Datensatz weitere Module berechnet wurden, sind diese separat zu finden und können für eine Betrachtung des gesamten Lebenszyklus zusammengeführt werden.

## Technical purpose
Rauchschutz Rohrrahmentüren für die Innenanwendung. Abschluss für Raumöffnungen im industriellen, gewerblichen sowie privaten Bereich.

## Reference product
- Tür - Hörmann Legnica Sp. z o.o - Rauchschutzrohrrahmentür: 1

## Inputs
- Use of net fresh water (FW) [m3]: A1-A3 0.45, A4 0.000298, A5 0.019, B2 0.51, B3 0.000915, C2 0.000318, C3 0.00043, C4 0.00251, D -0.0379
- Use of non renewable primary energy (PENRE) [MJ]: A1-A3 2030, A4 2.93, A5 2.13, B2 39.1, B3 5.82, C2 3.13, C3 0.84, C4 1.92, D -410
- Use of non renewable primary energy resources used as raw materials (PENRM) [MJ]: A1-A3 0.41, A4 0, A5 -0.41, B2 0, B3 0, C2 0, C3 0, C4 0, D 0
- Use of non renewable secondary fuels (NRSF) [MJ]: A1-A3 0, A4 0, A5 0, B2 0, B3 1.61e-24, C2 0, C3 0, C4 0, D 0
- Use of renewable primary energy (PERE) [MJ]: A1-A3 328, A4 0.16, A5 41.87, B2 4.34, B3 0.72, C2 0.17, C3 0.316, C4 0.243, D -34
- Use of renewable primary energy resources used as raw materials (PERM) [MJ]: A1-A3 41.6, A4 0, A5 -41.6, B2 0, B3 0, C2 0, C3 0, C4 0, D 0
- Use of renewable secondary fuels (RSF) [MJ]: A1-A3 0, A4 0, A5 0, B2 0, B3 1.37e-25, C2 0, C3 0, C4 0, D 0
- Use of secondary material (SM) [kg]: A1-A3 0, A4 0, A5 0, B2 0, B3 0, C2 0, C3 0, C4 0, D 0
- Total use of non renewable primary energy resource (PENRT) [MJ]: A1-A3 2030.41, A4 2.93, A5 1.72, B2 39.1, B3 5.82, C2 3.13, C3 0.84, C4 1.92, D -410
- Total use of renewable primary energy resources (PERT) [MJ]: A1-A3 369.6, A4 0.16, A5 0.27, B2 4.34, B3 0.72, C2 0.17, C3 0.316, C4 0.243, D -34

## Outputs
- Components for re-use (CRU) [kg]: A1-A3 0, A4 0, A5 0, B2 0, B3 0, C2 0, C3 0, C4 0
- Exported electrical energy (EEE) [MJ]: A1-A3 0.24, A4 0, A5 8.94, B2 0, B3 0, C2 0, C3 0, C4 2.13
- Exported thermal energy (EET) [MJ]: A1-A3 0.45, A4 0, A5 16.1, B2 0, B3 0, C2 0, C3 0, C4 3.79
- Hazardous waste disposed (HWD) [kg]: A1-A3 1.67e-6, A4 1.69e-7, A5 1.54e-9, B2 3.42e-8, B3 8.94e-11, C2 1.81e-7, C3 3.94e-10, C4 3.11e-8, D -3.1e-7
- Materials for energy recovery (MER) [kg]: A1-A3 0, A4 0, A5 0, B2 0, B3 0, C2 0, C3 0, C4 0
- Materials for recycling (MFR) [kg]: A1-A3 1.26, A4 0, A5 0, B2 0, B3 0, C2 0, C3 22.3, C4 0
- Non hazardous waste dispose (NHWD) [kg]: A1-A3 12.3, A4 0.000245, A5 0.0495, B2 0.1, B3 4.6e-5, C2 0.000262, C3 0.000592, C4 8.47, D -1.61
- Radioactive waste disposed (RWD) [kg]: A1-A3 0.0916, A4 4.01e-6, A5 0.000112, B2 0.00161, B3 0.000429, C2 4.28e-6, C3 0.000139, C4 3.42e-5, D -0.0116

## Impact indicators
- Abiotic depletion potential for non fossil resources (ADPE) [kg Sb-Äqv.]: A1-A3 0.00141, A4 1.76e-8, A5 8.88e-8, B2 6.64e-6, B3 1.74e-5, C2 1.88e-8, C3 2.44e-8, C4 5.74e-8, D -0.00132
- Abiotic depletion potential for fossil resources (ADPF) [MJ]: A1-A3 1790, A4 2.92, A5 1.44, B2 35, B3 4.54, C2 3.12, C3 0.49, C4 1.84, D -381
- Acidification potential of soil and water (AP) [kg SO2-Äqv.]: A1-A3 0.56, A4 0.000314, A5 0.000894, B2 0.00391, B3 0.00138, C2 0.000335, C3 0.000131, C4 0.00086, D -0.11
- Eutrophication potential (EP) [kg Phosphat-Äqv.]: A1-A3 0.044, A4 7.77e-5, A5 0.000181, B2 0.000891, B3 0.000166, C2 8.3e-5, C3 1.22e-5, C4 0.000123, D -0.0122
- Global warming potential (GWP) [kg CO2-Äqv.]: A1-A3 132, A4 0.22, A5 7.54, B2 1.57, B3 0.39, C2 0.23, C3 0.046, C4 1.13, D -35.6
- Depletion potential of the stratospheric ozone layer (ODP) [kg CFC 11 eq.]: A1-A3 1.74e-6, A4 5.86e-15, A5 1.61e-13, B2 2.27e-12, B3 3.39e-8, C2 6.25e-15, C3 2.05e-13, C4 4.22e-14, D -1.64e-11
- Formation potential of tropospheric ozone (POCP) [kg Ethen-Äqv.]: A1-A3 0.0371, A4 -7.14e-5, A5 6.72e-5, B2 0.000394, B3 9.44e-5, C2 -7.62e-5, C3 8.18e-6, C4 6.84e-5, D 0.000221

## Use advice
A1-A3 sowie Module A4, A5, B2, B3, B6, C1, C2, C3, C4, D. Das Umweltprofil beinhaltet die Aufwendungen für die Lebenszyklus-Stadien cradle to gate mit Optionen (Modul A1-A3). Die Herstellung der Verpackung wurde innerhalb der Module A1-A3 berücksichtigt.

## Review details
Die angewendete LCI Methode ist in Übereinstimmung mit ISO 14040 und 14044. Die Dokumentation enthält alle relevanten Informationen im Hinblick auf die Datenqualität und den Umfang der Anwendung der jeweiligen LCI Ergebnisse bzw. der Datensätze. Der Datensatz repräsentiert den Stand der Technik bezogen auf die funktionelle Einheit.

## Data sources
- GaBi database (all versions)
