# Kraft paper; 1 kg

Dataset: ILCD process, EPD, generic dataset
Geography: DE
Reference year: 2018
Valid until: 2022
Classification: oekobau.dat: Kunststoffe / Folien und Vliese / Baupappen
Owner: thinkstep
Compliance: DIN EN 15804
Review: Dependent internal review by thinkstep, IABP-GaBi, IBP-GaBi; Independent external review by GaBi user forum, GaBi bug forum, GaBi user community
Amounts: rows without a unit in brackets have none in this file; such an amount is in the reference unit of its flow, which a separate flow dataset defines
copyright: true

## General comment
This data set has been modeled according to the European Standard EN 15804 for Sustainable Building. Results are depicted in modules that allow the structured expression of results over the entire life cycle.

## Geography
The data set represents the country specific situation in Germany, focusing on the main technologies, the region specific characteristics and / or import statistics.

## Time period
Annual average

## Technology and included processes
Kraft paper or pulp is usually made from softwood (like pine, spruce or birch). But instead of harvested wood, waste woodchips, sawdust and recycled pulp can also be used as inputs. Wood consists of cellulose, hemicellulose and lignin. In contrast to cellulose, lignin is not desired for the paper production and has to get separated. The wood is harvested, debarked and ground into chips. The chips are mixed with pulping chemicals and heated. At elevated temperature, the lignin, a large amount of hemicellulose and some cellulose are dissolved. The remaining cellulose fibers are separated from the liquid. The result is chemical pulp. The most important pulping process is the kraft process. For the dissolution of lignin and the production of chemical pulp, this process uses chemicals like sodium sulfide, sodium hydroxide and sodium sulfate. The mixture of chemicals before pulping is called white liquor. Kraft pulping is usually carried out at 165- 175°C, it can be a batch process or a continuous process. A picture is attached to show the breakdown of lignin molecules during the pulping. When pulp is ready, the pulping chemicals have to get separated from the pulp by washing. Also undesired solid particles like bark residues are removed from the pulp by screening. Finally the pulp is dried. The pulping chemicals are recycled as much as possible. Some useful organics like alkali lignins or sugars are also formed by the pulping. The liquor containing the dissolved lignin is called black liquor. It has a high calorific value and can be used to generate power for the paper factory.
Background system:
Electricity: Electricity is modelled according to the individual country-specific situations. The country-specific modelling is achieved on multiple levels. Firstly, individual energy carrier specific power plants and plants for renewable energy sources are modelled according to the current national electricity grid mix. Modelling the electricity consumption mix includes transmission / distribution losses and the own use by energy producers (own consumption of power plants and "other" own consumption e.g. due to pumped storage hydro power etc.), as well as imported electricity. Secondly, the national emission and efficiency standards of the power plants are modelled as well as the share of electricity plants and combined heat and power plants (CHP). Thirdly, the country-specific energy carrier supply (share of imports and / or domestic supply) including the country-specific energy carrier properties (e.g. element and energy content) are accounted for. Fourthly, the exploration, mining/production, processing and transport processes of the energy carrier supply chains are modelled according to the specific situation of each electricity producing country. The different production and processing techniques (emissions and efficiencies) in the different energy producing countries are considered, e.g. different crude oil production technologies or different flaring rates at the oil platforms.
Thermal energy, process steam: The thermal energy and process steam supply is modelled according to the individual country-specific situation with regard to emission standards and considered energy carriers. The thermal energy and process steam are produced at heat plants. Efficiencies for thermal energy production are by definition 100% in relation to the corresponding energy carrier input. For process steam the efficiency ranges from 85%, 90% to 95%. The energy carriers used for the generation of thermal energy and process steam are modelled according to the specific import situation (see electricity above).
Transports: All relevant and known transport processes are included. Ocean-going and inland ship transport as well as rail, truck and pipeline transport of bulk commodities are considered.
Energy carriers: The energy carriers are modelled according to the specific supply situation (see electricity above).
Refinery products: Diesel fuel, gasoline, technical gases, fuel oils, lubricants and residues such as bitumen are modelled with a parameterised country-specific refinery model. The refinery model represents the current national standard in refining techniques (e.g. emission level, internal energy consumption, etc.) as well as the individual country-specific product output spectrum, which can be quite different from country to country. The supply of crude oil is modelled, again, according to the country-specific situation with the respective properties of the resources.

## Technical purpose
This product can be used in construction.

## Safety margin
20 %. Product system depicted except for a few missing processes / flows. Technological, temporal and geographic representativeness partly given.

## Reference product
- Kraftliner brown (t92) m2: 1

## Inputs
- Use of renewable primary energy (PERE) [MJ]: A1-A3 1.3807, C1 0, C2 0.000174336, C3 1.44106, D -0.178458
- Primary energy resources used as raw materials (PERM) [MJ]: A1-A3 1.44, C1 0, C2 0, C3 -1.44, D 0
- Total use of renewable primary energy resources (PERT) [MJ]: A1-A3 2.8207, C1 0, C2 0.000174336, C3 0.0010551, D -0.178458
- Use of non-renewable primary energy (PENRE) [MJ]: A1-A3 0.588798, C1 0, C2 0.00299464, C3 0.0018345, D -0.623425
- Non-renewable primary energy resources used as raw materials (PENRM) [MJ]: A1-A3 0, C1 0, C2 0, C3 0, D 0
- Total use of non-renewable primary energy resources (PENRT) [MJ]: A1-A3 0.588798, C1 0, C2 0.00299464, C3 0.0018345, D -0.623425
- Input of secondary material (SM) [kg]: A1-A3 0, C1 0, C2 0, C3 0, D 0
- Use of renewable secondary fuels (RSF) [MJ]: A1-A3 0, C1 0, C2 0, C3 0, D 0
- Use of non renewable secondary fuels (NRSF) [MJ]: A1-A3 0, C1 0, C2 0, C3 0, D 0
- Use of net fresh water (FW) [m3]: A1-A3 0.000489942, C1 0, C2 1.56133e-7, C3 5.71204e-7, D 0.000206333

## Outputs
- Hazardous waste disposed (HWD) [kg]: A1-A3 3.65283e-8, C1 0, C2 1.11907e-10, C3 1.23371e-12, D -3.20688e-10
- Non-hazardous waste disposed (NHWD) [kg]: A1-A3 0.00110589, C1 0, C2 5.25612e-7, C3 1.41189e-6, D 0.000522235
- Radioactive waste disposed (RWD) [kg]: A1-A3 3.33952e-5, C1 0, C2 3.15274e-9, C3 1.53343e-7, D -2.14103e-5
- Components for re-use (CRU) [kg]: A1-A3 0, C1 0, C2 0, C3 0, D 0
- Materials for Recycling (MFR) [kg]: A1-A3 0, C1 0, C2 0, C3 0, D 0
- Material for Energy Recovery (MER) [kg]: A1-A3 0, C1 0.096, C2 0, C3 0, D 0
- Exported electrical energy (EEE) [MJ]: A1-A3 0, C1 0, C2 0, C3 0, D 0.147522
- Exported thermal energy (EET) [MJ]: A1-A3 0, C1 0, C2 0, C3 0, D 0.345857

## Impact indicators
- Global warming potential (GWP) [kg CO2 eq.]: A1-A3 -0.0897286, C1 0, C2 0.000222805, C3 0.162065, D -0.0579045
- Ozone Depletion Potential (ODP) [kg R11 eq.]: A1-A3 1.41413e-12, C1 0, C2 7.37493e-20, C3 6.02162e-18, D -9.85912e-16
- Acidification potential (AP) [kg SO2 eq.]: A1-A3 0.000162882, C1 0, C2 4.50042e-7, C3 1.7236e-7, D -2.33715e-5
- Eutrophication potential (EP) [kg Phosphate eq.]: A1-A3 5.04105e-5, C1 0, C2 1.06987e-7, C3 3.40427e-8, D -3.9364e-6
- Photochemical Ozone Creation Potential (POCP) [kg Ethene eq.]: A1-A3 2.11647e-5, C1 0, C2 -1.34832e-7, C3 1.41925e-8, D -2.85541e-6
- Abiotic depletion potential for non fossil resources (ADPE) [kg Sb eq.]: A1-A3 2.0483e-8, C1 0, C2 1.87492e-11, C3 5.63079e-11, D -1.06052e-8
- Abiotic depletion potential for fossil resources (ADPF) [MJ]: A1-A3 0.50467, C1 0, C2 0.00298658, C3 0.00144744, D -0.569375

## Use advice
The data set represents a cradle to gate inventory. It can be used to characterise the supply chain situation of the respective commodity in a representative manner. Combination with individual unit processes using this commodity enables the generation of user-specific (product) LCAs.

## Data sources
- ULLMANN'S Encyclopedia of Industrial Chemistry
- GaBi Database Edition 2020, SP40
- GaBi database (all versions)
