# Application intermediate coating water based (windows, white); 1 kg

Dataset: ILCD process, EPD, generic dataset
Geography: DE
Reference year: 2021
Valid until: 2022
Classification: oekobau.dat: Beschichtungen / Lacke und Lasuren / Lacksysteme Holzfenster
Owner: Sphera Solutions GmbH
Compliance: EN 15804+A2
Review: Dependent internal review by Sphera Solutions GmbH; Independent external review by GaBi user forum
Amounts: rows without a unit in brackets have none in this file; such an amount is in the reference unit of its flow, which a separate flow dataset defines
copyright: true
licenseType: Free of charge for all users and uses
accessRestrictions: The license conditions as stated on https://www.oekobaudat.de/ apply.
accessRestrictions: Es gelten die Lizenzbedingungen wie sie auf https://www.oekobaudat.de/ genannt sind.

## General comment
This data set has been modeled according to the European Standard EN 15804+A2 for Sustainable Building. Results are depicted in modules that allow the structured expression of results over the entire life cycle.

## Geography
The data set represents the country specific situation in Germany, focusing on the main technologies, the region specific characteristics and / or import statistics.

## Time period
Annual average

## Technology and included processes
The coating (painting) of houses and parts of houses like windows, parquet etc. is typically done on the builiding site by hand and without waste air treatment. This dataset accounts for this situation by including the application of the coating in the sope and by modelling all the NMVOCs included inthe coating material as NMVOC emissions to air. Since the transport of the coating material is specific to the special boundary conditions of the study, this transpoort is not included in the scope and shall be modeled individually by the user of the dataset. 2% of the coating material is modeled to be not used (packaging residue) and to be incinerated in a municipal waste incineration plant.
Paints and coatings materials generally consist of two to three components: solid content, organic solvents and water. The solid content contains the binding agent, filler, additives and depending on the paint system, hardener and / or pigments. The quantity each component appears at the paint and / or coating is defined by a #recipe# given by each producer. In this case, the mixture proportions are 46% water, 10% solvents, 44% solids.
The production can be summarised as follows: In the batch pigments, additives and solvents are mixed and afterwards in a pearl or a pearl sand mill grinded. The last admixtures (solvents, and / or water and additives) will be added in an agitator before the blend reaches the final filtration and filling station.

In module C1, a manual dismantling (no loads) is assumed, collecting losses are neglected.
The transport in module C2 to the recycling plant takes place with a truck (50km).
Module C3 takes into account the grinding and thermal treatment (combustion) of the material. When calculating combustion emissions and credits, the specific calorific value of each material and the material composition are taken into account.
In module D credits for the substitution of electricity (German electricity mix) and thermal energy (from natural gas) are given.

## Technical purpose
This product can be used in construction.

## Safety margin
10 %. Product system almost completely covered. Good technological, temporal and geographic representativeness.

## Reference product
- Application intermediate coating water based (windows, white): 1

## Inputs
- Use of renewable primary energy as energy carrier (PERE) [MJ]: A1-A3 7.40155, A5 0.0012389, C2 0.00200398, C3 0.179299, D -1.04033
- Use of renewable primary energy resources used as raw materials (PERM) [MJ]: A1-A3 0, A5 0, C2 0, C3 0, D 0
- Total use of renewable primary energy (PERT) [MJ]: A1-A3 7.40155, A5 0.0012389, C2 0.00200398, C3 0.179299, D -1.04033
- Use of non renewable primary energy as energy carrier (PENRE) [MJ]: A1-A3 34.663, A5 0.00505216, C2 0.0345287, C3 8.87368, D -3.34058
- Use of non renewable primary energy resources used as raw materials (PENRM) [MJ]: A1-A3 7.5, A5 0, C2 0, C3 -7.5, D 0
- Total use of non renewable primary energy resource (PENRT) [MJ]: A1-A3 42.163, A5 0.00505216, C2 0.0345287, C3 1.37368, D -3.34058
- Use of secondary material (SM) [kg]: A1-A3 0, A5 0, C2 0, C3 0, D 0
- Use of renewable secondary fuels (SF) [MJ]: A1-A3 0, A5 0, C2 0, C3 0, D 0
- Use of non renewable secondary fuels (NRSF) [MJ]: A1-A3 0, A5 0, C2 0, C3 0, D 0
- Net use of fresh water (FW) [m3]: A1-A3 0.00828665, A5 3.55062e-5, C2 1.78104e-6, C3 0.00353701, D -0.000387642

## Outputs
- Hazardous waste disposed (HWD) [kg]: A1-A3 7.99263e-9, A5 1.22106e-12, C2 1.44319e-12, C3 1.39486e-10, D -1.14301e-9
- Non harzardous waste disposed (NHWD) [kg]: A1-A3 0.923217, A5 0.000573228, C2 5.57372e-6, C3 0.0974398, D -0.00170551
- Radioactive waste disposed (RWD) [kg]: A1-A3 0.000769259, A5 1.54235e-7, C2 3.31348e-8, C3 2.14827e-5, D -0.000111885
- Components for re-use (CRU) [kg]: A1-A3 0, A5 0, C2 0, C3 0, D 0
- Materials for recycling (MFR) [kg]: A1-A3 0, A5 0, C2 0, C3 0, D 0
- Materials for energy recovery (MER) [kg]: A1-A3 0, A5 0, C2 0, C3 1, D 0
- Exported electrical energy (EEE) [MJ]: A1-A3 0, A5 0.0101635, C2 0, C3 0.753328, D 0
- Exported thermal energy (EET) [MJ]: A1-A3 0, A5 0.0239223, C2 0, C3 1.9733, D 0

## Impact indicators
- Global Warming Potential - total (GWP-total) [kg CO2 eq.]: A1-A3 1.81564, A5 0.00850924, C2 0.00262283, C3 0.789252, D -0.212884
- Global Warming Potential - fossil fuels (GWP-fossil) [kg CO2 eq.]: A1-A3 2.14667, A5 0.00428583, C2 0.00260492, C3 0.788834, D -0.210607
- Global Warming Potential - biogenic (GWP-biogenic) [kg CO2 eq.]: A1-A3 -0.333223, A5 0.00422306, C2 1.17716e-6, C3 0.00031851, D -0.00198879
- Global Warming Potential - land use and land use change (GWP-luluc) [kg CO2 eq.]: A1-A3 0.00219633, A5 3.52392e-7, C2 1.67295e-5, C3 9.98035e-5, D -0.000287917
- Depletion potenzial of the stratospheric ozone layer (ODP) [kg CFC-11 eq.]: A1-A3 3.09553e-14, A5 5.39327e-18, C2 6.66532e-19, C3 7.19142e-16, D -4.54016e-15
- Acidifcation potential, Accumulated Exceedance (AP) [Mole of H+ eq.]: A1-A3 0.0112125, A5 4.65351e-6, C2 7.38555e-6, C3 0.000220524, D -0.000210088
- Eutrophication potential - freshwater (EP-freshwater) [kg P eq.]: A1-A3 5.87458e-6, A5 8.98042e-10, C2 5.35732e-9, C3 2.50938e-7, D -4.7937e-7
- Eutrophication potential - marine (EP-marine) [kg N eq.]: A1-A3 0.0018638, A5 1.86785e-6, C2 3.40237e-6, C3 7.4174e-5, D -7.81191e-5
- Eutrophication potential - terrestrial (EP-terrestrial) [Mole of N eq.]: A1-A3 0.0201895, A5 2.36313e-5, C2 3.80663e-5, C3 0.00106356, D -0.000833942
- Photochemical Ozone Creation Potential (POCP) [kg NMVOC eq.]: A1-A3 0.00697685, A5 0.112205, C2 6.6347e-6, C3 0.000196213, D -0.000205618
- Abiotic depletion potential - non-fossil resources (ADPE) [kg Sb eq.]: A1-A3 1.3361e-5, A5 5.37421e-11, C2 2.26592e-10, C3 1.01237e-8, D -6.25111e-8
- Abiotic depletion potential - fossil resources (ADPF) [MJ]: A1-A3 42.8959, A5 0.00506302, C2 0.0345273, C3 0.623525, D -3.34013
- Water (user) deprivation potential (WDP) [m³ world equiv.]: A1-A3 0.156652, A5 0.00151063, C2 1.01262e-5, C3 0.148415, D -0.00235684

## Use advice
The data set represents a cradle to gate inventory. It can be used to characterise the supply chain situation of the respective commodity in a representative manner. Combination with individual unit processes using this commodity enables the generation of user-specific (product) LCAs.

## Data sources
- Roempp Lexikon - Lacke und Druckfarben, 1997
- Paints, Coatings and Solvents, 1998
- Ökologische Bilanzierung von Baustoffen und Gebäuden, 2000
- Lackformulierung und Lackrezeptur
- Lackrohstoffkunde
- Farben und Lacke
- Documentation of data quality management
- GaBi Database Edition 2021, CUP2021.01
- GaBi database (all versions)
