# Tile adhesive; Tile adhesive

Dataset: ILCD process, EPD, generic dataset
Geography: DE
Reference year: 2021
Valid until: 2022
Classification: oekobau.dat: Mineralische Baustoffe / Mörtel und Beton / Kleber und Klebemörtel
Owner: Sphera Solutions GmbH
Compliance: EN 15804+A2
Review: Dependent internal review by Sphera Solutions GmbH; Independent external review by GaBi user forum
Amounts: rows without a unit in brackets have none in this file; such an amount is in the reference unit of its flow, which a separate flow dataset defines
copyright: true
licenseType: Free of charge for all users and uses
accessRestrictions: The license conditions as stated on https://www.oekobaudat.de/ apply.
accessRestrictions: Es gelten die Lizenzbedingungen wie sie auf https://www.oekobaudat.de/ genannt sind.

## General comment
This data set has been modeled according to the European Standard EN 15804+A2 for Sustainable Building. Results are depicted in modules that allow the structured expression of results over the entire life cycle.

## Geography
The data set represents the country specific situation in Germany, focusing on the main technologies, the region specific characteristics and / or import statistics.

## Time period
Annual average

## Technology and included processes
The LCA of tile adhesive has been modelled according to the IWM (Industry association mortar) composition. The main components are sand, cement and lime. The system boundaries are represented by the finished product at the factory gate. Transports from the factory to the building site are not considered and must be included according to the system boundaries.

In the disposal phase, a manual dismantling (no loads) is assumed in module C1. The transport in module C2 to the landfill site takes place with a truck (50km). In C3, if relevant, a packaging with PE foil is taken into account (for example, for mineral fiber products. 0.0125 kg foil per kg of discarded material). In module C4 the average landfill emissions corresponding to the product (reference country Germany) are shown. The use of landfill gas is not taken into account.

## Technical purpose
This product can be used in construction.

## Safety margin
20 %. Product system depicted except for a few missing processes / flows. Technological, temporal and geographic representativeness partly given.

## Reference product
- Tile adhesive: 1

## Inputs
- Use of renewable primary energy as energy carrier (PERE) [MJ]: A1-A3 0.593219, A5 0.000489839, C2 0.00273112, C4 0.0325289, D -0.0115189
- Use of renewable primary energy resources used as raw materials (PERM) [MJ]: A1-A3 0, A5 0, C2 0, C4 0, D 0
- Total use of renewable primary energy (PERT) [MJ]: A1-A3 0.593219, A5 0.000489839, C2 0.00273112, C4 0.0325289, D -0.0115189
- Use of non renewable primary energy as energy carrier (PENRE) [MJ]: A1-A3 1.46086, A5 0.00213519, C2 0.0470572, C4 0.240862, D -0.0355916
- Use of non renewable primary energy resources used as raw materials (PENRM) [MJ]: A1-A3 0, A5 0, C2 0, C4 0, D 0
- Total use of non renewable primary energy resource (PENRT) [MJ]: A1-A3 1.46086, A5 0.00213519, C2 0.0470572, C4 0.240862, D -0.0355916
- Use of secondary material (SM) [kg]: A1-A3 0, A5 0, C2 0, C4 0, D 0
- Use of renewable secondary fuels (SF) [MJ]: A1-A3 0, A5 0, C2 0, C4 0, D 0
- Use of non renewable secondary fuels (NRSF) [MJ]: A1-A3 0, A5 0, C2 0, C4 0, D 0
- Net use of fresh water (FW) [m3]: A1-A3 0.000397961, A5 2.13519e-5, C2 2.42728e-6, C4 5.93297e-5, D -4.28865e-6

## Outputs
- Hazardous waste disposed (HWD) [kg]: A1-A3 3.92826e-10, A5 4.76395e-13, C2 1.96684e-12, C4 2.56252e-11, D -1.22586e-11
- Non harzardous waste disposed (NHWD) [kg]: A1-A3 0.0359689, A5 6.77501e-5, C2 7.59611e-6, C4 1.20118, D -1.83195e-5
- Radioactive waste disposed (RWD) [kg]: A1-A3 4.52962e-5, A5 6.01323e-8, C2 4.51576e-8, C4 2.48649e-6, D -1.23885e-6
- Components for re-use (CRU) [kg]: A1-A3 0, A5 0, C2 0, C4 0, D 0
- Materials for recycling (MFR) [kg]: A1-A3 0, A5 0, C2 0, C4 0, D 0
- Materials for energy recovery (MER) [kg]: A1-A3 0, A5 0, C2 0, C4 0, D 0
- Exported electrical energy (EEE) [MJ]: A1-A3 0, A5 0.00922494, C2 0, C4 0, D 0
- Exported thermal energy (EET) [MJ]: A1-A3 0, A5 0.021583, C2 0, C4 0, D 0

## Impact indicators
- Global Warming Potential - total (GWP-total) [kg CO2 eq.]: A1-A3 0.351229, A5 0.00746182, C2 0.00358134, C4 0.017773, D -0.00227936
- Global Warming Potential - fossil fuels (GWP-fossil) [kg CO2 eq.]: A1-A3 0.354116, A5 0.000721484, C2 0.00355707, C4 0.0181588, D -0.00225248
- Global Warming Potential - biogenic (GWP-biogenic) [kg CO2 eq.]: A1-A3 -0.00309458, A5 0.00674017, C2 1.47059e-6, C4 -0.000439177, D -2.36942e-5
- Global Warming Potential - land use and land use change (GWP-luluc) [kg CO2 eq.]: A1-A3 0.000207564, A5 1.65399e-7, C2 2.27997e-5, C4 5.33877e-5, D -3.1851e-6
- Depletion potenzial of the stratospheric ozone layer (ODP) [kg CFC-11 eq.]: A1-A3 6.32601e-15, A5 2.01195e-18, C2 9.08378e-19, C4 7.12511e-17, D -5.02784e-17
- Acidifcation potential, Accumulated Exceedance (AP) [Mole of H+ eq.]: A1-A3 0.000423786, A5 1.67526e-6, C2 1.11536e-5, C4 0.000129255, D -2.27647e-6
- Eutrophication potential - freshwater (EP-freshwater) [kg P eq.]: A1-A3 4.76752e-7, A5 2.82045e-10, C2 7.30119e-9, C4 3.05624e-8, D -5.30121e-9
- Eutrophication potential - marine (EP-marine) [kg N eq.]: A1-A3 0.00015403, A5 4.70856e-7, C2 5.20684e-6, C4 3.35553e-5, D -8.42197e-7
- Eutrophication potential - terrestrial (EP-terrestrial) [Mole of N eq.]: A1-A3 0.00166738, A5 7.98073e-6, C2 5.81387e-5, C4 0.000368662, D -8.98218e-6
- Photochemical Ozone Creation Potential (POCP) [kg NMVOC eq.]: A1-A3 0.000445435, A5 1.2355e-6, C2 1.00411e-5, C4 0.000101676, D -2.21163e-6
- Abiotic depletion potential - non-fossil resources (ADPE) [kg Sb eq.]: A1-A3 2.15995e-8, A5 2.88109e-11, C2 3.08809e-10, C4 1.72118e-9, D -6.86035e-10
- Abiotic depletion potential - fossil resources (ADPF) [MJ]: A1-A3 1.46059, A5 0.00213466, C2 0.0470553, C4 0.240735, D -0.0355867
- Water (user) deprivation potential (WDP) [m³ world equiv.]: A1-A3 0.0104247, A5 0.000907267, C2 1.38005e-5, C4 0.00194337, D -2.6056e-5

## Use advice
The data set represents a cradle to gate inventory. It can be used to characterise the supply chain situation of the respective commodity in a representative manner. Combination with individual unit processes using this commodity enables the generation of user-specific (product) LCAs.

## Data sources
- Ökologische Bilanzierung von Baustoffen und Gebäuden, 2000
- Documentation of data quality management
- GaBi Database Edition 2021, CUP2021.01
- GaBi database (all versions)
