# Tetrafluoropropene (R1234ze)

Dataset: ILCD process, EPD, generic dataset
Geography: DE
Reference year: 2018
Valid until: 2022
Classification: oekobau.dat: Gebäudetechnik / Klimatisierung und Lüftung / Kältemittel
Owner: thinkstep
Compliance: DIN EN 15804
Review: Dependent internal review by thinkstep, IABP-GaBi, IBP-GaBi; Independent external review by GaBi user forum, GaBi bug forum, GaBi user community
Amounts: rows without a unit in brackets have none in this file; such an amount is in the reference unit of its flow, which a separate flow dataset defines
copyright: true

## General comment
This data set has been modeled according to the European Standard EN 15804 for Sustainable Building. Results are depicted in modules that allow the structured expression of results over the entire life cycle.

## Geography
The data set represents the country specific situation in Germany, focusing on the main technologies, the region specific characteristics and / or import statistics.

## Time period
annual average

## Technology and included processes
The production (modules A1-A3) of the refrigerant takes place in several process steps over 240fa and 245fa. The upstream chain of the basic chemicals dominates the production phase (modules A1-A3).

In module B1, the emission of 1 kg refrigerant into the air was accounted for. Since R1234ze is not characterized within the characterization method used (CML 2001 - Apr. 2013), the values for B1 are 0. According to CML 20101 - Jan. 2016, the global warming potential is 0.9 kgCO2 equiv. per kg of refrigerant. In /UBA/ a characterization factor of 7 kgCO2 equiv. Is given. Both values mentioned above can alternatively be used for building-level estimation. The above mentioned proximates of module B1 can be used for both the usage phase (e.g., leakage) and the disposal phase (module C1 removal, disposal losses). Scenarios for use and disposal must be defined at the building level (see field "Use advice for data set").

In the disposal phase (C-modules), any burdens due to removal (usually extraction by means of compressed air in special container systems), transport to the disposal or recycling company, as well as the loads for chemical analysis (e.g. gas chromatography) were neglected. Disposal losses (emissions into the air) must be determined at building level (see above).

In module D, 100% material recycling was accounted for. If properly extracted, the refrigerant can be reused directly (without treatment) with the appropriate purity.

## Technical purpose
The usual purpose is the use for cold water production.

## Safety margin
10 %. Product system almost completely covered. Good technological, temporal and geographic representativeness.

## Reference product
- [HFO 1234ze] 1,3,3,3-Tetrafluoro-1-propene: 1

## Inputs
- Use of renewable primary energy (PERE) [MJ]: A1-A3 19.1133, D -17.3757
- Primary energy resources used as raw materials (PERM) [MJ]: A1-A3 0, D 0
- Total use of renewable primary energy resources (PERT) [MJ]: A1-A3 19.1133, D -17.3757
- Use of non-renewable primary energy (PENRE) [MJ]: A1-A3 125.441, D -114.037
- Non-renewable primary energy resources used as raw materials (PENRM) [MJ]: A1-A3 0, D 0
- Total use of non-renewable primary energy resources (PENRT) [MJ]: A1-A3 125.441, D -114.037
- Input of secondary material (SM) [kg]: A1-A3 0, D 0
- Use of renewable secondary fuels (RSF) [MJ]: A1-A3 0, D 0
- Use of non renewable secondary fuels (NRSF) [MJ]: A1-A3 0, D 0
- Use of net fresh water (FW) [m3]: A1-A3 0.0307277, D -0.0279342

## Outputs
- Hazardous waste disposed (HWD) [kg]: A1-A3 1.08541e-7, D -9.86737e-8
- Non-hazardous waste disposed (NHWD) [kg]: A1-A3 0.0536108, D -0.048737
- Radioactive waste disposed (RWD) [kg]: A1-A3 0.00274684, D -0.00249713
- Components for re-use (CRU) [kg]: A1-A3 0, D 0
- Materials for Recycling (MFR) [kg]: A1-A3 0, D 0.999999
- Material for Energy Recovery (MER) [kg]: A1-A3 0, D 0
- Exported electrical energy (EEE) [MJ]: A1-A3 0, D 0
- Exported thermal energy (EET) [MJ]: A1-A3 0, D 0

## Impact indicators
- Global warming potential (GWP) [kg CO2 eq.]: A1-A3 6.12734, D -5.57031
- Ozone Depletion Potential (ODP) [kg R11 eq.]: A1-A3 1.07332e-13, D -9.75742e-14
- Acidification potential (AP) [kg SO2 eq.]: A1-A3 0.0252749, D -0.0229772
- Eutrophication potential (EP) [kg Phosphate eq.]: A1-A3 0.00163464, D -0.00148603
- Photochemical Ozone Creation Potential (POCP) [kg Ethene eq.]: A1-A3 0.00176101, D -0.00160092
- Abiotic depletion potential for non fossil resources (ADPE) [kg Sb eq.]: A1-A3 1.29441e-6, D -1.17674e-6
- Abiotic depletion potential for fossil resources (ADPF) [MJ]: A1-A3 118.5, D -107.727

## Use advice
The dataset refers to the manufacture, use and recycling of 1 kg of refrigerant. The dataset can not be used for the estimation of other refrigerants since environmental effects, durability and intended use can be very different.
For the calculation of the potential environmental effects through the use of the refrigerant at the building level, the specifications/calculation rules of the respective certification scheme must be followed. For a first estimate the following formulas may be used:

I_tot= I_(man.)+ I_use+ I_(disp.)

with

I_(man.) = I_(A1-A3) × m × a_b/a_r
I_use = (I_(A1-A3) × L × a_b ) + (I_B1 × L × a_b )
I_(disp.) = (I_B1 × m × a_b/a_r × E ) + (I_C4 × m × a_b/a_r × (1-E)) + (I_D × m × a_b/a_r × (1-E))

with:

I Indicator value of the respective life cycle stage
m Mass of the refrigerant [kg]
a_b Life time of the building [a]
a_r Life time of the refrigerant [a]
L Leakage rate [%/a]
E Disposal losses [%]

Typical values for the required mass m of the coolant in kg per kW nominal cooling capacity can be taken from Table 46 /UBA/ (see figures).
Approximate values for the usual service life a_KM, leakage rate L and disposal losses E can be taken from Table 50 /UBA/ (see figures).

/UBA/: Environment Federal Office (UBA), Climate-friendly air conditioning (heating and cooling) with natural refrigerants - Concepts for non-residential buildings with server rooms / data centers, 2016

## Data sources
- GaBi Database Edition 2020, SP40
- GaBi database (all versions)
