# Mineral wool (blowable); 50kg/m3

Dataset: ILCD process, EPD, generic dataset
Geography: DE
Reference year: 2021
Valid until: 2022
Classification: oekobau.dat: Dämmstoffe / Mineralwolle / Mineralwolle
Owner: Sphera Solutions GmbH
Compliance: EN 15804+A2
Review: Dependent internal review by Sphera Solutions GmbH; Independent external review by GaBi user forum
Amounts: rows without a unit in brackets have none in this file; such an amount is in the reference unit of its flow, which a separate flow dataset defines
copyright: true
licenseType: Free of charge for all users and uses
accessRestrictions: The license conditions as stated on https://www.oekobaudat.de/ apply.
accessRestrictions: Es gelten die Lizenzbedingungen wie sie auf https://www.oekobaudat.de/ genannt sind.

## General comment
This data set has been modeled according to the European Standard EN 15804+A2 for Sustainable Building. Results are depicted in modules that allow the structured expression of results over the entire life cycle.

## Geography
The data set represents the country specific situation in Germany, focusing on the main technologies, the region specific characteristics and / or import statistics.

## Time period
Annual average

## Technology and included processes
Foreground system
The system boundaries comprise the cradle to gate life cycle of blowable mineral wool. The LCI dataset consider the production. Mineral wool is made of sedimentary or igneous rocks (mainly basalt) and various recycled materials. The material is melted in the melting furnaces at 1400-1500 ° C and passed through rapidly rotating rollers. The fibres are then cut to required size and packed. Transportation processes for the raw materials are accounted for as far as data on average transport distances were available. All relevant energy and energy flow are included in the system.

In the disposal phase, a manual dismantling (no loads) is assumed in module C1. The transport in module C2 to the landfill site takes place with a truck (50km). In C3, if relevant, a packaging with PE foil is taken into account (for example, for mineral fiber products. 0.0125 kg foil per kg of discarded material). In module C4 the average landfill emissions corresponding to the product (reference country Germany) are shown. The use of landfill gas is not taken into account.

## Technical purpose
This product can be used in construction.

## Safety margin
0 %. Produktsystem weitgehend vollständig abgebildet. Gute technologische, zeitliche und geographische Repräsentativität.

## Reference product
- Mineral wool (blowable): 1

## Inputs
- Use of renewable primary energy as energy carrier (PERE) [MJ]: A1-A3 186.675, C2 0.113797, C3 2.16459, C4 1.37231
- Use of renewable primary energy resources used as raw materials (PERM) [MJ]: A1-A3 0, C2 0, C3 0, C4 0
- Total use of renewable primary energy (PERT) [MJ]: A1-A3 186.675, C2 0.113797, C3 2.16459, C4 1.37231
- Use of non renewable primary energy as energy carrier (PENRE) [MJ]: A1-A3 881.967, C2 1.96072, C3 46.1492, C4 10.1614
- Use of non renewable primary energy resources used as raw materials (PENRM) [MJ]: A1-A3 0, C2 0, C3 0, C4 0
- Total use of non renewable primary energy resource (PENRT) [MJ]: A1-A3 881.967, C2 1.96072, C3 46.1492, C4 10.1614
- Use of secondary material (SM) [kg]: A1-A3 0, C2 0, C3 0, C4 0
- Use of renewable secondary fuels (SF) [MJ]: A1-A3 0, C2 0, C3 0, C4 0
- Use of non renewable secondary fuels (NRSF) [MJ]: A1-A3 0, C2 0, C3 0, C4 0
- Net use of fresh water (FW) [m3]: A1-A3 0.229947, C2 0.000101137, C3 0.00517626, C4 0.00250297

## Outputs
- Hazardous waste disposed (HWD) [kg]: A1-A3 2.83792e-7, C2 8.19517e-11, C3 4.78884e-9, C4 1.08106e-9
- Non harzardous waste disposed (NHWD) [kg]: A1-A3 7.38583, C2 0.000316505, C3 0.0137327, C4 50.6748
- Radioactive waste disposed (RWD) [kg]: A1-A3 0.0200474, C2 1.88157e-6, C3 0.000359016, C4 0.000104899
- Components for re-use (CRU) [kg]: A1-A3 0, C2 0, C3 0, C4 0
- Materials for recycling (MFR) [kg]: A1-A3 0, C2 0, C3 0, C4 0
- Materials for energy recovery (MER) [kg]: A1-A3 0, C2 0, C3 0, C4 0
- Exported electrical energy (EEE) [MJ]: A1-A3 13.4121, C2 0, C3 0, C4 0
- Exported thermal energy (EET) [MJ]: A1-A3 31.1824, C2 0, C3 0, C4 0

## Impact indicators
- Global Warming Potential - total (GWP-total) [kg CO2 eq.]: A1-A3 63.072, C2 0.149235, C3 1.30062, C4 0.746091
- Global Warming Potential - fossil fuels (GWP-fossil) [kg CO2 eq.]: A1-A3 56.6465, C2 0.148211, C3 1.28993, C4 0.766072
- Global Warming Potential - biogenic (GWP-biogenic) [kg CO2 eq.]: A1-A3 6.3718, C2 7.35296e-5, C3 0.00987654, C4 -0.0222334
- Global Warming Potential - land use and land use change (GWP-luluc) [kg CO2 eq.]: A1-A3 0.0537755, C2 0.000949988, C3 0.000813893, C4 0.00225229
- Depletion potenzial of the stratospheric ozone layer (ODP) [kg CFC-11 eq.]: A1-A3 8.10323e-13, C2 3.78491e-17, C3 8.45325e-15, C4 3.00591e-15
- Acidifcation potential, Accumulated Exceedance (AP) [Mole of H+ eq.]: A1-A3 0.363984, C2 0.000464733, C3 0.00213398, C4 0.00545293
- Eutrophication potential - freshwater (EP-freshwater) [kg P eq.]: A1-A3 0.000102618, C2 3.04216e-7, C3 1.88969e-6, C4 1.28935e-6
- Eutrophication potential - marine (EP-marine) [kg N eq.]: A1-A3 0.0345506, C2 0.000216951, C3 0.000593946, C4 0.00141562
- Eutrophication potential - terrestrial (EP-terrestrial) [Mole of N eq.]: A1-A3 1.62255, C2 0.00242245, C3 0.00630205, C4 0.0155529
- Photochemical Ozone Creation Potential (POCP) [kg NMVOC eq.]: A1-A3 0.0693224, C2 0.000418378, C3 0.00253293, C4 0.00428945
- Abiotic depletion potential - non-fossil resources (ADPE) [kg Sb eq.]: A1-A3 1.36831e-5, C2 1.28671e-8, C3 2.25072e-7, C4 7.26122e-8
- Abiotic depletion potential - fossil resources (ADPF) [MJ]: A1-A3 881.883, C2 1.96064, C3 46.1171, C4 10.156
- Water (user) deprivation potential (WDP) [m³ world equiv.]: A1-A3 8.08328, C2 0.000575019, C3 0.0937989, C4 0.0819858

## Use advice
The data set represents a cradle to gate inventory. It can be used to characterise the supply chain situation of the respective commodity in a representative manner. Combination with individual unit processes using this commodity enables the generation of user-specific (product) LCAs.

## Data sources
- Documentation of data quality management
- GaBi Database Edition 2021, CUP2021.01
- GaBi database (all versions)
