# TensoSky®-System with Fluon® ETFE-FILM

Dataset: ILCD process, EPD, average dataset
Geography: RER
Reference year: 2019
Valid until: 2024
Classification: OEKOBAU.DAT: Kunststoffe / Folien und Vliese / Technische Textilien
Classification: IBUCategories: 02 Building products / Roof coverings / ETFE construction element
Method details: ETFE construction element.pdf
Registration number: EPD-TAI-20190092-ICB1-EN
Owner: Taiyo Europe GmbH
Compliance: DIN EN 15804; ISO 14025
Review: Accredited third party review by Institut Bauen und Umwelt e. V.
Amounts: rows without a unit in brackets have none in this file; such an amount is in the reference unit of its flow, which a separate flow dataset defines
copyright: true

## General comment
The ETFE construction element with the trade brand name TensoSky® consists of AGC Inc.FLUON®ETFE-film, aluminium and further components with a minor mass proportion. It can be fixed on structural systems, e.g. made of steel, wood or reinforced concrete. The structural system is not included in this EPD. The construction element includes between 1 and 5 ETFE-film layers (ETFE = ethylene tetrafluoroethylene) dependent on building physical, statical or design requirements. The ETFE-film thickness varies between 80µm and 500 µm depending on structural requirements. The individual ETFE-films are welded together, to get a planar or curved single layer or multiple-layers system. This EPD is based on a reference 3-layers system with a film thickness of 250 µm (outer/inner layer) and 100 µm (middle layer). The values for 1-, 2-, 4- and 5-layers systems are derived from this reference project.

## Technology and included processes
Taiyo Europe's ETFE construction element with the trade brand name TensoSky®, consists of ETFE-foils AGC FLUON® ETFE-Film, frames of aluminium and further materials for minor components. It can be fixed on a structural system (substructure), for example made of steel (beams, ropes etc.), wood or reinforced concrete. The structural system is not included in this EPD. The TensoSky®-System includes between one and five ETFE-Film layers (ETFE = ethylene tetrafluoroethylene) depending on the building physic, static or design requirements and specifications. The ETFE-Film thickness varies between 80µm and 500 µm depending on structural requirements. The individual foils of ETFE are welded together, to get a planar, single- or double-curved single layer or multiple-layers system. The layers are stabilized with a nominal pretension of about 1.0 kN/m (± 0.35 kN/m), achieved mechanically, by pulling the layer towards the aluminium frame, or pneumatically, by application of an overpressure in the air volume enclosed by the ETFE-layers. In case of a multiple-layers system with pneumatic pretension the nominal overpressure amounts between approximately 200 Pa (0.2 kN/m) and 1000 Pa (1.0 kN/m²). Under external loads, like wind loads, the overpressure changes. This means a low-pressure air inflation system. For use and application of the product, the respective national and regional provisions at the place of use apply, in Europe for example the Eurocode and the corresponding national appendixes. The TensoSky®-System is a transparent optionally translucent construction element, used as roof-cladding, skylight, indoor ceiling, facade-cladding, curtain wall, window or as protective canopy. It is suitable for new buildings and refurbishment projects. It can be used as permanent, stationary, moveable, retractable or temporary structure for Leisure Parcs and Indoor Pools, Biospheres and Greenhouses, Infrastructure Buildings and Carparks, Shopping Centers and Malls, Administration Buildings and Educational Buildings, Hotels and Hospitals, Public Spaces and Stadia, but also for pavillons and stands on trade fairs and exhibitions.
Technical data:
The following technical data indicates the default values for the declared ETFE-film product at the time of delivery. Unless otherwise stated the following material data refer to an ETFE-film with a thickness of 200 µm:
Declared unit:
The declaration refers to 1 m² of the TensoSky®-System (3.93 kg/m² mass per unit area for all components) including 3 layers of FLUON® ETFE-film (1.05 kg/m² mass per unit area).

## Technical purpose
The TensoSky®-System is a transparent or translucent construction element, used e.g. as cladding roof, skylight, canopy, curtain wall or facade. It is suitable for new buildings and refurbishments. It can be used as a permanent, stationary, moveable, retractable or temporary structure, e.g. for leisure parcs, indoor pools, biospheres, greenhouses, infrastructure buildings, carparks, shopping malls, administration and educational buildings, hotels, hospitals, museums, public spaces and stadia, but also for pavillons and stands on trade fairs and exhibitions.

## Reference product
- Taiyo ETFE construction element TensoSky / 1 m²: 1

## Inputs
- Renewable primary energy as energy carrier (PERE) [MJ]: A1-A3 67.54, A4 0, A5 6.06172, B1 0, B2 0, B6 0.741, B7 0, C1 0, C2 0.03984, C3 0.1826, C4 0, D -44.08
- Renewable primary energy resources as material utilization (PERM) [MJ]: A1-A3 6.02, A4 0, A5 -6.02, B1 0, B2 0, B6 0, B7 0, C1 0, C2 0, C3 0, C4 0, D 0
- Total use of renewable primary energy resources (PERT) [MJ]: A1-A3 73.56, A4 0, A5 0.04172, B1 0, B2 0, B6 0.741, B7 0, C1 0, C2 0.03984, C3 0.1826, C4 0, D -44.08
- Non renewable primary energy as energy carrier (PENRE) [MJ]: A1-A3 486.368, A4 0, A5 0.3814, B1 0, B2 0, B6 1.97, B7 0, C1 0, C2 0.7223, C3 27.1949, C4 0, D -119.2
- Non renewable primary energy as material utilization (PENRM) [MJ]: A1-A3 26.432, A4 0, A5 -0.16, B1 0, B2 0, B6 0, B7 0, C1 0, C2 0, C3 -26.272, C4 0, D 0
- Total use of non renewable primary energy resources (PENRT) [MJ]: A1-A3 512.8, A4 0, A5 0.2214, B1 0, B2 0, B6 1.97, B7 0, C1 0, C2 0.7223, C3 0.9229, C4 0, D -119.2
- Use of secondary material (SM) [kg]: A1-A3 0.85, A4 0, A5 0, B1 0, B2 0, B6 0, B7 0, C1 0, C2 0, C3 0, C4 0, D 0
- Use of renewable secondary fuels (RSF) [MJ]: A1-A3 0, A4 0, A5 0, B1 0, B2 0, B6 0, B7 0, C1 0, C2 0, C3 0, C4 0, D 0
- Use of non renewable secondary fuels (NRSF) [MJ]: A1-A3 0, A4 0, A5 0, B1 0, B2 0, B6 0, B7 0, C1 0, C2 0, C3 0, C4 0, D 0
- Use of net fresh water (FW) [m^3]: A1-A3 0.2394, A4 0, A5 0.002217, B1 0, B2 0, B6 0.00101, B7 0, C1 0, C2 7.341e-5, C3 0.006179, C4 0, D -0.1105

## Outputs
- Hazardous waste disposed (HWD) [kg]: A1-A3 0.001871, A4 0, A5 1.842e-10, B1 0, B2 0, B6 9.25e-10, B7 0, C1 0, C2 4.176e-8, C3 4.506e-8, C4 0, D 0.002497
- Non hazardous waste disposed (NHWD) [kg]: A1-A3 2.895, A4 0, A5 0.002198, B1 0, B2 0, B6 0.00139, B7 0, C1 0, C2 6.051e-5, C3 0.3388, C4 0, D -1.95
- Radioactive waste disposed (RWD) [kg]: A1-A3 0.01358, A4 0, A5 9.422e-6, B1 0, B2 0, B6 0.000327, B7 0, C1 0, C2 9.885e-7, C3 7.124e-5, C4 0, D -0.007503
- Components for re-use (CRU) [kg]: A1-A3 0, A4 0, A5 0, B1 0, B2 0, B6 0, B7 0, C1 0, C2 0, C3 0, C4 0, D 0
- Materials for recycling (MFR) [kg]: A1-A3 0, A4 0, A5 0, B1 0, B2 0, B6 0, B7 0, C1 0, C2 0, C3 2.346, C4 0, D 0
- Materials for energy recovery (MER) [kg]: A1-A3 0, A4 0, A5 0, B1 0, B2 0, B6 0, B7 0, C1 0, C2 0, C3 0, C4 0, D 0
- Exported electrical energy (EEE) [MJ]: A1-A3 0, A4 0, A5 0.02282, B1 0, B2 0, B6 0, B7 0, C1 0, C2 0, C3 2.132, C4 0, D 0
- Exported thermal energy (EET) [MJ]: A1-A3 0, A4 0, A5 0.05257, B1 0, B2 0, B6 0, B7 0, C1 0, C2 0, C3 3.83, C4 0, D 0

## Impact indicators
- Global warming potential (GWP) [kg CO_(2)-Äq.]: A1-A3 53.19, A4 0, A5 0.9161, B1 0, B2 0, B6 0.108, B7 0, C1 0, C2 0.05307, C3 2.253, C4 0, D -9.365
- Depletion potential of the stratospheric ozone layer (ODP) [kg CFC11-Äq.]: A1-A3 0.000267, A4 0, A5 1.116e-14, B1 0, B2 0, B6 4.8e-13, B7 0, C1 0, C2 1.445e-15, C3 9.986e-14, C4 0, D 4.133e-11
- Acidification potential of land and water (AP) [kg SO_(2)-Äq.]: A1-A3 0.1083, A4 0, A5 0.0001109, B1 0, B2 0, B6 0.000306, B7 0, C1 0, C2 0.0001233, C3 0.02113, C4 0, D -0.03991
- Eutrophication potential (EP) [kg PO_(4)^(3)-Äq.]: A1-A3 0.008073, A4 0, A5 2.435e-5, B1 0, B2 0, B6 2.87e-5, B7 0, C1 0, C2 3.127e-5, C3 6.795e-5, C4 0, D -0.002495
- Formation potential of tropospheric ozone photochemical oxidants (POCP) [kg Ethen-Äq.]: A1-A3 0.009361, A4 0, A5 7.369e-6, B1 0, B2 0, B6 1.92e-5, B7 0, C1 0, C2 -4.167e-5, C3 3.019e-5, C4 0, D -0.002434
- Abiotic depletion potential for non fossil resources (ADPE) [kg Sb-Äq.]: A1-A3 0.0001452, A4 0, A5 1.295e-8, B1 0, B2 0, B6 5.73e-8, B7 0, C1 0, C2 4.342e-9, C3 2.644e-7, C4 0, D -3.625e-6
- Abiotic depletion potential for fossil resources (ADPF) [MJ]: A1-A3 487.6, A4 0, A5 0.1976, B1 0, B2 0, B6 1.15, B7 0, C1 0, C2 0.7198, C3 0.7428, C4 0, D -100.1

## Use advice
Scope:
This EPD refers to individual construction elements manufactured from ethylenetetrafluoroethylene (ETFE), aluminium and other components. The construction element is used e.g. for building envelopes, cladding roofs, skylights, canopies, curtain walls or facades. It is supplied by Taiyo Europe GmbH, under the brand trade name TensoSky®, here used with Fluon®ETFE-film from AGC Inc, Japan.

The TensoSky®-System is designed, fabricated and packaged for specific projects.This EPD declares the life cycle analysis (LCA) for a specific 3-layers system.
System boundary:
The EPD of the ETFE construction element, includes the production as well as installation, use phase and the End of Life of the product. The following life cycle phases are considered:

Production

A1-A3 – Raw material supply, production of pre-products (ETFE-film, aluminium frame, further parts) and manufacturing. Transports of raw materials (ETFE-film, aluminium…) and components/ pre-products are included in A2

Installation

A4 – Transport to building site

A5 – Initial installation into building (including packaging waste processing, energy and material for the assembly of the building element and the electricity effort for first inflation)

Use stage

B1 – Use / application: Release of substances to indoor air, soil and water

B2 – Maintenance: Cleaning, yearly check and replacement of worn and damaged parts

B6 – Operational energy use: Maintaining the cushion pressure for a period of one year

B7 – Operational water use

End-of-life

C1 – Deconstruction/ demolition (including only minor effort for the deconstruction of the building element)

C2 – Transport to waste processing resp. recycling material processing,

C3 – Waste processing for recovery and recycling (including the incineration of ETFE and plastics and the recycling of aluminum and steel)

C4 – Disposal (landfilling)

## Data sources
- TensoSky®-System with Fluon® ETFE-FILM.pdf
- GaBi Database (all versions)
- GaBi database SP35 2018
