# SINIAT Standard and High Density plasterboards

Dataset: ILCD process, EPD, average dataset
Geography: IT
Reference year: 2019
Valid until: 2024
Classification: OEKOBAU.DAT: Mineralische Baustoffe / Steine und Elemente / Gipsplatten
Classification: IBUCategories: 02 Building products / Gypsum products / Plasterboard
Method details: Plasterboard.pdf
Generated by: Etex Building Performance International
Registration number: EPD-ETX-20180169-ICA1-EN
Owner: Etex Building Performance International
Compliance: DIN EN 15804; ISO 14025
Review: Accredited third party review by Institut Bauen und Umwelt e. V.
Amounts: rows without a unit in brackets have none in this file; such an amount is in the reference unit of its flow, which a separate flow dataset defines
copyright: true
licenseType: Free of charge for all users and uses
accessRestrictions: None

## General comment
Siniat plasterboards covered by this EPD are used in interior construction as a dry system where standard performances (type A) or increased density (type D) and impact resistance (type I) are required.

This EPD refers to 1 m² of PregyPlac/PregyPlac Plus BA13 plasterboard.

The following table presents the thickness and weight of the products covered by this EPD:

For the placing on the market of the product in the EU/EFTA (with the exception of Switzerland) Regulation (EU) No. 305/2011 (CPR) applies. The product needs a declaration of performance taking into consideration /EN 520:2009/ Gypsum plasterboards - Definitions, requirements and test methods, and the CE-marking.

For the application and use the respective national provisions apply.

## Technology and included processes
The manufacturing process is illustrated in the figure below. A preliminary stage consists in calcining the gypsum (natural gypsum + recycled gypsum) in a kiln to obtain the stucco, which is a calcium sulphate hemi hydrate. Plasterboards are then manufactured in a continuous automated production process by pouring from a mixer a slurry of stucco, water and additives, in-between two layers of a liner, composed of paper 100% recycled. The continuous laminated board is calibrated into a forming plate and transported on a conveyor belt to the knife, while the setting of the slurry occurs and the mechanical bond forms at the gypsum-paper interface. After cutting, the boards are introduced in a multilayer drier to remove the excess of water and increase strength. At the drier out-feed the boards are trimmed to the nominal length, pilled up on stacking units. The quality characteristics of the boards are controlled before storing pallets in the warehouse. The management system operated by the site is in compliance with the UNI EN ISO 9001:2015.
Technical data:
Detailed technical information is available in the specific product data sheets at www.siniat.it.

For the reference product PregyPlac/PregyPlac Plus BA13:

Performance data of the product in accordance with the declaration of performance with respect to its essential characteristics according to/EN 520:2009/ Gypsum plasterboards - Definitions, requirements and test methods apply. Visit www.siniat.it for detailed technical documentation.
Declared unit:
The LCA results presented in this EPD are related to 1 m² of PregyPlac (Plus) BA13 installed in the building, which is 12.5 mm thick and weights 8.5 kg approximately.

## Technical purpose
Siniat plasterboards covered by this EPD are used in all construction types (residential, non-residential, new or refurbished), ranging from complex high-tech systems to easy to install products, assuring several levels of performance. They can be used for partitions and the lining of walls, ceilings.

They are suitable for any type of coating (wallpaper, paint, tiles).

## Scenarios
- S1: 100% recycling
- S2: Scenario 2

## Reference product
- PregyPlac (Plus) BA13 (): 1

## Inputs
- Renewable primary energy as energy carrier (PERE) [MJ]: A1-A3 2.71107, A4 0.0915997, A5 0.639745, B1 0, C1 0, C2 (S1) 0.0498524, C2 (S2) 0.0498524, C3 (S1) 9.69763e-5, C3 (S2) 0.0637134, C4 (S1) 0.0334771, C4 (S2) 0.00147125, D 1.00486
- Renewable primary energy resources as material utilization (PERM) [MJ]: A1-A3 1.46947, A4 0, A5 0.0734737, B1 0, C1 0, C2 (S1) 0, C2 (S2) 0, C3 (S1) 0, C3 (S2) 0, C4 (S1) 0, C4 (S2) 0, D 0
- Total use of renewable primary energy resources (PERT) [MJ]: A1-A3 4.18055, A4 0.0915997, A5 0.713219, B1 0, C1 0, C2 (S1) 0.0498524, C2 (S2) 0.0498524, C3 (S1) 9.69763e-5, C3 (S2) 0.0637134, C4 (S1) 0.0334771, C4 (S2) 0.00147125, D 1.00486
- Non renewable primary energy as energy carrier (PENRE) [MJ]: A1-A3 35.0457, A4 4.07725, A5 3.26958, B1 0, C1 0, C2 (S1) 2.25502, C2 (S2) 2.25502, C3 (S1) 0.00224567, C3 (S2) 1.47541, C4 (S1) 1.31858, C4 (S2) 0.0579492, D -0.458582
- Non renewable primary energy as material utilization (PENRM) [MJ]: A1-A3 0, A4 0, A5 0, B1 0, C1 0, C2 (S1) 0, C2 (S2) 0, C3 (S1) 0, C3 (S2) 0, C4 (S1) 0, C4 (S2) 0, D 0
- Total use of non renewable primary energy resources (PENRT) [MJ]: A1-A3 35.0457, A4 4.07725, A5 3.26958, B1 0, C1 0, C2 (S1) 2.25502, C2 (S2) 2.25502, C3 (S1) 0.00224567, C3 (S2) 1.47541, C4 (S1) 1.31858, C4 (S2) 0.0579492, D -0.458582
- Use of secondary material (SM) [kg]: A1-A3 3.31227, A4 0, A5 0.165613, B1 0, C1 0, C2 (S1) 0, C2 (S2) 0, C3 (S1) 0, C3 (S2) 0, C4 (S1) 0, C4 (S2) 0, D 4.24497
- Use of renewable secondary fuels (RSF) [MJ]: A1-A3 0, A4 0, A5 0, B1 0, C1 0, C2 (S1) 0, C2 (S2) 0, C3 (S1) 0, C3 (S2) 0, C4 (S1) 0, C4 (S2) 0, D 0
- Use of non renewable secondary fuels (NRSF) [MJ]: A1-A3 0, A4 0, A5 0, B1 0, C1 0, C2 (S1) 0, C2 (S2) 0, C3 (S1) 0, C3 (S2) 0, C4 (S1) 0, C4 (S2) 0, D 0
- Use of net fresh water (FW) [m^3]: A1-A3 0.00775793, A4 0.000992468, A5 0.00176572, B1 0, C1 0, C2 (S1) 0.000543671, C2 (S2) 0.000543671, C3 (S1) 5.27291e-7, C3 (S2) 0.000346431, C4 (S1) 0.00144628, C4 (S2) 6.35612e-5, D 0.00017825

## Outputs
- Hazardous waste disposed (HWD) [kg]: A1-A3 0.0270975, A4 0.00460739, A5 0.00290819, B1 0, C1 0, C2 (S1) 0.00247652, C2 (S2) 0.00247652, C3 (S1) 5.63174e-7, C3 (S2) 0.000370005, C4 (S1) 0.000664158, C4 (S2) 2.91885e-5, D -3.57572e-5
- Non hazardous waste disposed (NHWD) [kg]: A1-A3 0.260362, A4 0.268112, A5 0.480774, B1 0, C1 0, C2 (S1) 0.149078, C2 (S2) 0.149078, C3 (S1) 7.62155e-6, C3 (S2) 0.00500736, C4 (S1) 8.58011, C4 (S2) 0.377079, D 0.00298781
- Radioactive waste disposed (RWD) [kg]: A1-A3 5.13765e-5, A4 2.53223e-5, A5 7.89194e-6, B1 0, C1 0, C2 (S1) 1.41017e-5, C2 (S2) 1.41017e-5, C3 (S1) 2.62796e-8, C3 (S2) 1.72657e-5, C4 (S1) 8.53953e-6, C4 (S2) 3.75296e-7, D -2.10003e-6
- Components for re-use (CRU) [kg]: A1-A3 0, A4 0, A5 0, B1 0, C1 0, C2 (S1) 0, C2 (S2) 0, C3 (S1) 0, C3 (S2) 0, C4 (S1) 0, C4 (S2) 0, D 0
- Materials for recycling (MFR) [kg]: A1-A3 0, A4 0, A5 0.206719, B1 0, C1 0, C2 (S1) 0, C2 (S2) 0, C3 (S1) 0.01125, C3 (S2) 7.39125, C4 (S1) 0, C4 (S2) 0, D 0
- Materials for energy recovery (MER) [kg]: A1-A3 0, A4 0, A5 0, B1 0, C1 0, C2 (S1) 0, C2 (S2) 0, C3 (S1) 0, C3 (S2) 0, C4 (S1) 0, C4 (S2) 0, D 0
- Exported electrical energy (EEE) [MJ]: A1-A3 0, A4 0, A5 0, B1 0, C1 0, C2 (S1) 0, C2 (S2) 0, C3 (S1) 0, C3 (S2) 0, C4 (S1) 0, C4 (S2) 0, D 0
- Exported thermal energy (EET) [MJ]: A1-A3 0, A4 0, A5 0, B1 0, C1 0, C2 (S1) 0, C2 (S2) 0, C3 (S1) 0, C3 (S2) 0, C4 (S1) 0, C4 (S2) 0, D 0

## Impact indicators
- Global warming potential (GWP) [kg CO_(2)-Äq.]: A1-A3 1.96529, A4 0.254459, A5 0.197591, B1 0, C1 0, C2 (S1) 0.140752, C2 (S2) 0.140752, C3 (S1) 4.76072e-5, C3 (S2) 0.0312779, C4 (S1) 0.0454698, C4 (S2) 0.00199831, D -0.037535
- Depletion potential of the stratospheric ozone layer (ODP) [kg CFC11-Äq.]: A1-A3 2.47693e-7, A4 4.4663e-8, A5 2.09354e-8, B1 0, C1 0, C2 (S1) 2.48553e-8, C2 (S2) 2.48553e-8, C3 (S1) 1.93995e-11, C3 (S2) 1.27455e-8, C4 (S1) 1.51654e-8, C4 (S2) 6.66492e-10, D -6.36471e-9
- Acidification potential of land and water (AP) [kg SO_(2)-Äq.]: A1-A3 0.0038781, A4 0.00104828, A5 0.00061932, B1 0, C1 0, C2 (S1) 0.000578175, C2 (S2) 0.000578175, C3 (S1) 3.49152e-7, C3 (S2) 0.000229393, C4 (S1) 0.000338576, C4 (S2) 1.48798e-5, D -0.000244914
- Eutrophication potential (EP) [kg PO_(4)^(3)-Äq.]: A1-A3 0.000947264, A4 0.000272021, A5 0.000111093, B1 0, C1 0, C2 (S1) 0.000149002, C2 (S2) 0.000149002, C3 (S1) 7.34015e-8, C3 (S2) 4.82248e-5, C4 (S1) 5.83902e-5, C4 (S2) 2.56614e-6, D -5.19306e-5
- Formation potential of tropospheric ozone photochemical oxidants (POCP) [kg Ethen-Äq.]: A1-A3 0.000563366, A4 0.000137971, A5 7.17685e-5, B1 0, C1 0, C2 (S1) 7.58465e-5, C2 (S2) 7.58465e-5, C3 (S1) 3.7021e-8, C3 (S2) 2.43228e-5, C4 (S1) 4.21559e-5, C4 (S2) 1.85267e-6, D -2.06236e-5
- Abiotic depletion potential for non fossil resources (ADPE) [kg Sb-Äq.]: A1-A3 1.73642e-5, A4 3.07196e-6, A5 1.22959e-6, B1 0, C1 0, C2 (S1) 1.63675e-6, C2 (S2) 1.63675e-6, C3 (S1) 8.99294e-11, C3 (S2) 5.90836e-8, C4 (S1) 5.74179e-8, C4 (S2) 2.52341e-9, D -1.57164e-7
- Abiotic depletion potential for fossil resources (ADPF) [MJ]: A1-A3 33.636, A4 3.94163, A5 3.03411, B1 0, C1 0, C2 (S1) 2.18079, C2 (S2) 2.18079, C3 (S1) 0.000687328, C3 (S2) 0.451575, C4 (S1) 1.29932, C4 (S2) 0.0571026, D -0.538665

## Use advice
Scope:
The EPD applies for :

PregyFlex BA6; PregyPlac BA10; PregyPlac Plus BA10; PregyPlac BA13; PregyPlac Plus BA13; SyniaPlac 4BA13; PregyPlac BA15; PregyPlac BA18; PregyDur I BA13; PregyDurWhite BA13; WhiteAir BA13; PregySoundboard BA13.

The EPD presents environmental impacts valid for PregyPlac/PregyPlac Plus BA13. The environmental impacts for other covered products can be obtained by multiplying the presented results by the corresponding conversion factor presented in the table in 3.1 of this EPD.

This EPD was developed from data collected at the Siniat plasterboard factory located in Corfinio, producing 100 % of the total production of these products sold in the Italian market. The EPD is a cradle-to-gate with options EPD and covers Siniat plasterboards sold on the Italian market.
System boundary:
This EPD is a cradle-to-gate with options EPD, covering the following life cycle stages:

- plasterboards manufacturing (modules A1-A3), including the production of components, their transport to the manufacturing site, as well as impacts due to energy consumption, air and water emissions, as well as waste treatment and packaging material production,

- transport of the plasterboards from manufacturing to building site (module A4),

- installation (module A5), including the production of auxiliaries (screw, joint tape and coating). Due to the many possible applications of plasterboards, frames or suspended-ceiling systems are excluded from the system boundary,

- emissions during the use phase (modules B1). No emissions occur during Siniat plasterboards use phase,

- end-of-life (modules C1-C4), including impacts from manual deconstruction, transport of waste to treatment facility, and waste processing and waste disposal. Two scenarios were considered : For scenario 1 (100% landfill), the system boundaries include transport to the treatment facility (C2), sorting of screws (C3) and landfill (C4). For scenario 2 (100% recovery), the system boundaries include transport to the treatment facility (C2), sorting of gypsum, cardboard and other waste (C3), and landfill of other auxiliaries (joint tape, sealant).

- benefits and loads beyond the system boundaries (D). This module is included only for end-of-life scenario 2.

## Data sources
- ecoinvent database (all versions)
- ecoinvent 3.4 database
