# Kältekautschuk Plus S3 sheet

Dataset: ILCD process, EPD, average dataset
Geography: DE
Reference year: 2021
Valid until: 2024
Classification: OEKOBAU.DAT: Dämmstoffe / Kautschuk / Schaum
Classification: IBUCategories: 02 Bauprodukte / Wärmedämmungsprodukte / Dämmstoffe aus Schaumkunststoffen
Method details: Dämmstoffe aus Schaumkunststoffen.pdf
Generated by: GreenDelta GmbH
Registration number: EPD-AWU-20210056-IBC1-DE
Owner: Adolf Würth GmbH & Co. KG
Compliance: DIN EN 15804; ISO 14025
Review: Accredited third party review by Institut Bauen und Umwelt e. V.
Amounts: rows without a unit in brackets have none in this file; such an amount is in the reference unit of its flow, which a separate flow dataset defines
copyright: true
licenseType: Free of charge for all users and uses
accessRestrictions: None

## General comment
Kältekautschuk Plus S3 sheet is a flexible closed cell rubber insulation made of flexible elastomeric foam (FEF) that prevents condensation and reduces energy loss. By incorporating a water vapour barrier into the insulation cell structure Kältekautschuk Plus S3 sheet can effectively eliminate water vapour migration and retain outstanding performance over the entire system life. This EPD covers the Kältekautschuk Plus S3 sheet product family including Kältekautschuk Plus S3 sheet and sheets.

For the placing on the market of the product in the
EU/EFTA (with the exception of Switzerland)
Regulation (EU) No. 305/2011 (CPR) applies. The
product needs a declaration of performance taking into
consideration EN 14304:2009 and the CE-marking.
For the application and use the respective national
provisions apply.

## Technology and included processes
Upon delivery, the raw materials are stored in a warehouse and used in the production shortly after. The first step in the production of Kältekautschuk Plus is to mix the raw materials in a kneader and to roll-out the resulting mixture which is then cut into sheets. The flat sheets are passed through an industrial cooler and cooled-off. The cooled-off sheets are granulated and the granulates are temporarily stored at room temperature before entering the compounding plant. In a next step, the different types of granulates enter the compounding plant for mixing. The resulting elastomer compound is pushed through extruders and carried on a conveyer belt through an industrial furnace for foaming. After foaming, the endless sheets are passed through an industrial cooler upon which a continuous longitudinal cut is applied to cut sheets into the right width. If applicable, adhesive coating is applied on one side of the sheets. Finally, a traverse cut trims the continuous sheet into sheets of various sizes. For the packaging, cardboard, polyethylene film, polypropylene film, and wooden pallets are used.
Declared unit:
The declared unit is 1 m³ of the thermal insulation material for technical building equipment and industrial installations Kältekautschuk Plus including packaging materials. The declared unit refers to the product as it leaves the factory gate. The gross density is the average density of al declared products, weighted by production volume.

## Technical purpose
Kältekautschuk Plus is used for air-conditioning, refrigeration, chilled water, heating and hot water pipes and air distribution ductwork. In addition to preventing condensation and saving energy, Kältekautschuk Plus also performs an acoustic function, absorbing sound and dampening duct wall vibration. With inherent anti-microbial resistance as standard, and a Class B fire rated, closed cell rubber that is completely dust and fibre free,Kältekautschuk Plus can be used in any kind of public, commercial or industrial building without impacting on health or the quality of air. Outdoor application requires protection against UV-radiation.

## Reference product
- Dämmstoff Kältekautschuk Plus S3 Platte (): 1

## Inputs
- Renewable primary energy as energy carrier (PERE) [MJ]: A1-A3 547.167, A4 0.565, A5 5.01537, C2 0.110493, C4 0, D -193.935
- Renewable primary energy resources as material utilization (PERM) [MJ]: A1-A3 53.4553, A4 0.0393, A5 4.44528e-5, C2 0.00766113, C4 0.00242749, D -40.1885
- Total use of renewable primary energy resources (PERT) [MJ]: A1-A3 600.623, A4 0.606, A5 5.01541, C2 0.118154, C4 0.00242749, D -234.121
- Non renewable primary energy as energy carrier (PENRE) [MJ]: A1-A3 1131.05, A4 48, A5 44.1172, C2 9.35072, C4 28.7545, D -49.8944
- Non renewable primary energy as material utilization (PENRM) [MJ]: A1-A3 3905.29, A4 0, A5 0, C2 0, C4 0, D 0
- Total use of non renewable primary energy resources (PENRT) [MJ]: A1-A3 5036.68, A4 48, A5 44.1172, C2 9.35092, C4 28.7545, D -49.8992
- Use of secondary material (SM) [kg]: A1-A3 1.87697, A4 0.0114, A5 0, C2 0.00221613, C4 0, D -0.0586466
- Use of renewable secondary fuels (RSF) [MJ]: A1-A3 5.20151e-6, A4 0, A5 4.18591e-22, C2 0, C4 0, D 0
- Use of non renewable secondary fuels (NRSF) [MJ]: A1-A3 0, A4 0, A5 0.123168, C2 0, C4 0, D 0
- Use of net fresh water (FW) [m^3]: A1-A3 5.89237, A4 0.00755, A5 0.0386422, C2 0.00146762, C4 0.273834, D -0.0232426

## Outputs
- Hazardous waste disposed (HWD) [kg]: A1-A3 0.0621506, A4 0.00124, A5 8.15953e-8, C2 0.000242215, C4 0, D -0.0017033
- Non hazardous waste disposed (NHWD) [kg]: A1-A3 116.531, A4 2.2, A5 2.87219, C2 0.42945, C4 4.21145, D -0.772485
- Radioactive waste disposed (RWD) [kg]: A1-A3 0.0265766, A4 0.00032, A5 0.000597274, C2 6.22982e-5, C4 0.00160058, D -0.000232058
- Components for re-use (CRU) [kg]: A1-A3 0, A4 0, A5 13.7, C2 0, C4 0, D 0
- Materials for recycling (MFR) [kg]: A1-A3 0.000413083, A4 2.64e-5, A5 0, C2 5.13529e-6, C4 0, D 0
- Materials for energy recovery (MER) [kg]: A1-A3 1.76047e-11, A4 1.12e-12, A5 2.70814, C2 2.18855e-13, C4 49.95, D 0
- Exported electrical energy (EEE) [MJ]: A1-A3 0, A4 0, A5 14.286, C2 0, C4 180.731, D 0
- Exported thermal energy (EET) [MJ]: A1-A3 0, A4 0, A5 46.9877, C2 0, C4 584.728, D 0

## Impact indicators
- Global warming potential (GWP) [kg CO_(2)-Äq.]: A1-A3 277.614, A4 3.1, A5 10.8778, C2 0.604402, C4 113.767, D -3.91595
- Depletion potential of the stratospheric ozone layer (ODP) [kg CFC11-Äq.]: A1-A3 4.99925e-5, A4 5.65e-7, A5 1.09359e-14, C2 1.09898e-7, C4 0, D -2.23109e-7
- Acidification potential of land and water (AP) [kg SO_(2)-Äq.]: A1-A3 1.48757, A4 0.0123, A5 0.00333452, C2 0.00240214, C4 0.0177901, D -0.0165684
- Eutrophication potential (EP) [kg PO_(4)^(3)-Äq.]: A1-A3 1.46261, A4 0.00282, A5 0.000488623, C2 0.000550129, C4 0.00427665, D -0.00747452
- Formation potential of tropospheric ozone photochemical oxidants (POCP) [kg Ethen-Äq.]: A1-A3 0.0633713, A4 0.000524, A5 0.000347981, C2 0.000101651, C4 0.000998049, D -0.00129128
- Abiotic depletion potential for non fossil resources (ADPE) [kg Sb-Äq.]: A1-A3 0.0122291, A4 9.24e-6, A5 1.52682e-6, C2 1.80462e-6, C4 0, D -1.554e-5
- Abiotic depletion potential for fossil resources (ADPF) [MJ]: A1-A3 4786.26, A4 47.4, A5 42.5795, C2 9.22554, C4 24.2794, D -46.7757

## Use advice
Scope:
Product line Kältekautschuk Plus S3 sheet.

Thermal insulation material made of flexible elastomeric foam for technical building equipment and industrial installations.

The EPD is performed in agreement with the demands of PCR Part A with reference to EN 15804+A1:2013 and PCR Part B: Requirements on the EPD for insulating materials made of foam plastics.

The EPD is based on the average Kältekautschuk Plus S3 sheet production from six different variations produced in Germany.
System boundary:
The system boundaries of the EPD follow the modular structure of EN 15804 (according to /EN 15804/, section 6.2.1). Only the declaration of the product stage modules A1 to A3 is mandatory for compliance with EN15804. The declaration of the modules of other life cycle stages is optional. Resources from the ecosphere and Technosphere enter the system on stage A1 and leave the system on stage C4. The following life cycle stages are considered:

Module A1: The system boundaries comprise raw material extraction and supply from cradle to factory gate and is represented through generic background data sets.

Module A2: The transport of the raw materials from the factory gate to the point of manufacturing is represented through generic background data sets. The transportation distances have been provided by the manufacturer.

Module A3: The manufacturing includes manufacturer specific material and energy data which are represented through generic data sets. Machinery as well as buildings to manufacture the declared unit are neglected. On average, 0.49 kWh electricity and 2.65 kWh natural gas are required for the manufacturing of 1m³ Kältekautschuk Plus. This data was provided by Adolf Würth GmbH & Co. KG. This module also includes packaging with plastics and carboard and wooden pallets. The biogenic carbon stored is declared in the result section.

Module A4: The transport of Kältekautschuk Plus from the factory gate to the site of assembly is represented through generic background data. The transportation distances are based on average transportation data provided by the manufacturer.

Module A5: The assembly can be done manually without use of any electrical equipment. Only glue is required for the assembly of Kältekautschuk Plus. Packaging material from module A3 is disposed here: Plastic packaging is incinerated, and cardboard and the wooden pallet are re-used.

Module C2: The products to be disposed are transported to the waste treatment facility.

Module C4: The waste is treated according to the waste framework directive of the European Union.

Module D: Potential impacts and benefits from energy recovery and recycling are described.

## Data sources
- GaBi Database (all versions)
- GaBi database SP30 2016
