# Cork floor tiles according to EN 12104

Dataset: ILCD process, EPD, average dataset
Geography: RER
Reference year: 2019
Valid until: 2024
Classification: OEKOBAU.DAT: Holz / Holzböden / Kork
Classification: IBUCategories: 02 Building products / Floor coverings / Floor coverings
Method details: Floor coverings.pdf
Registration number: EPD-ERF-20180184-CCI1-EN
Owner: ERFMI vzw, European Resilient Flooring Manufacturers' Institute
Compliance: DIN EN 15804; ISO 14025
Review: Accredited third party review by Institut Bauen und Umwelt e. V.
Amounts: rows without a unit in brackets have none in this file; such an amount is in the reference unit of its flow, which a separate flow dataset defines
copyright: true

## General comment
Resilient floor coverings are an entire product family of flexible flooring solutions available in sheet, tiles and planks. It is classified in heterogeneous or homogeneous composition based on plastics, linoleum, cork or rubber. Resilient floor coverings can provide different functionalities (acoustic, static control, slip resistance, easy maintenance etc.) to match a wide range of domestic, commercial and industrial applications. It is available in an enormous range of patterns and colours fitting with inspiration and decorative needs.

Cork floor tiles are produced of cork and binders. The cork is produced by stripping the bark from cork oak trees every nine years. Primarily this cork is treated in a boiling process and used for wine cork stoppers. Leftovers from the wine cork stoppers industry and
bark cork trees from pruning are granulate in different sizes. For the flooring production the cork granules are mixed with an adhesive. This mixture is cured under temperature and pressure. The cork flooring surface is finally decorated with colour and finished with a UV varnish in order to guarantee wear resistance of the surface.

## Technology and included processes
Resilient floor coverings are an entire product family of flexible flooring solutions available in sheet, tiles and planks. It is classified in heterogeneous or homogeneous composition based on plastics, linoleum, cork or rubber. Resilient floor coverings can provide different functionalities (acoustic, static control, slip resistance, easy maintenance etc.) to match a wide range of domestic, commercial and industrial applications. It is available in an enormous range of patterns and colours fitting with inspiration and decorative needs. Cork floor tiles are produced of cork and binders. The cork is produced by stripping the bark from cork oak trees every nine years. Primarily this cork is treated in a boiling process and used for wine cork stoppers. Leftovers from the wine cork stoppers industry and bark cork trees from pruning are granulate in different sizes. For the flooring production the cork granules are mixed with an adhesive. This mixture is cured under temperature and pressure. The cork flooring surface is finally decorated with colour and finished with a UV varnish in order to guarantee wear resistance of the surface.
Technical data:
The following table contains the construction data of the declared product group:
Declared unit:
1m² of floor covering.

## Technical purpose
According to /EN ISO 10874/ the area of application for resilient floor coverings is indicated by use classes. The declared product group covers the use class 23.

## Scenarios
- S1: 100% incineration
- S2: 100% landfilling

## Reference product
- cork floor tiles (2.0 kg/m²): 1

## Inputs
- Renewable primary energy as energy carrier (PERE) [MJ]: A1-A3 28.8126, A4 0.166688, A5 7.69892, B2 1.59, C1 0.0854, C2 0.0139, C3 30.533, C4 0.157, D (S1) -3.341, D (S2) -0.654
- Renewable primary energy resources as material utilization (PERM) [MJ]: A1-A3 30.4, A4 0, A5 -2.472, B2 0, C1 0, C2 0, C3 -30.4, C4 0, D (S1) 0, D (S2) 0
- Total use of renewable primary energy resources (PERT) [MJ]: A1-A3 59.2126, A4 0.166688, A5 5.22692, B2 1.59, C1 0.0854, C2 0.0139, C3 0.133, C4 0.157, D (S1) -3.341, D (S2) -0.654
- Non renewable primary energy as energy carrier (PENRE) [MJ]: A1-A3 28.2228, A4 3.02212, A5 11.9054, B2 5.13, C1 0.227, C2 0.252, C3 9.598, C4 2.11, D (S1) -17.18, D (S2) -3.37
- Non renewable primary energy as material utilization (PENRM) [MJ]: A1-A3 8.6, A4 0, A5 -0.52, B2 0, C1 0, C2 0, C3 -8.6, C4 0, D (S1) 0, D (S2) 0
- Total use of non renewable primary energy resources (PENRT) [MJ]: A1-A3 36.8228, A4 3.02212, A5 11.3854, B2 5.13, C1 0.227, C2 0.252, C3 0.998, C4 2.11, D (S1) -17.18, D (S2) -3.37
- Use of secondary material (SM) [kg]: A1-A3 0.483721, A4 0, A5 0.0227931, B2 0, C1 0, C2 0, C3 0, C4 0, D (S1) 0, D (S2) 0
- Use of renewable secondary fuels (RSF) [MJ]
- Use of non renewable secondary fuels (NRSF) [MJ]
- Use of net fresh water (FW) [m^3]: A1-A3 0.0130426, A4 0.000307172, A5 0.00358172, B2 0.00247, C1 0.000116, C2 2.57e-5, C3 0.0082, C4 -5.43e-6, D (S1) -0.004556, D (S2) -0.000891

## Outputs
- Hazardous waste disposed (HWD) [kg]: A1-A3 1.39632e-7, A4 1.74742e-7, A5 3.90991e-8, B2 2.43e-9, C1 1.07e-10, C2 1.46e-8, C3 5.64e-10, C4 9.03e-9, D (S1) -7.008e-9, D (S2) -1.37e-9
- Non hazardous waste disposed (NHWD) [kg]: A1-A3 0.0254935, A4 0.000253163, A5 0.00983763, B2 0.00838, C1 0.00016, C2 2.11e-5, C3 0.00764, C4 1.99, D (S1) -0.007406, D (S2) -0.00145
- Radioactive waste disposed (RWD) [kg]: A1-A3 0.000450877, A4 4.13602e-6, A5 0.000130702, B2 0.000702, C1 3.77e-5, C2 3.46e-7, C3 5.29e-5, C4 3e-5, D (S1) -0.001469, D (S2) -0.000287
- Components for re-use (CRU) [kg]
- Materials for recycling (MFR) [kg]
- Materials for energy recovery (MER) [kg]: D (S1) 2
- Exported electrical energy (EEE) [MJ]: A5 0.184088, C3 4.09
- Exported thermal energy (EET) [MJ]: A5 0.327043, C3 7.27

## Impact indicators
- Global warming potential (GWP) [kg CO_(2)-Äq.]: A1-A3 -2.74067, A4 0.221947, A5 0.817816, B2 0.284, C1 0.0124, C2 0.0185, C3 3.59, C4 0.14, D (S1) -0.9809, D (S2) -0.193
- Depletion potential of the stratospheric ozone layer (ODP) [kg CFC11-Äq.]: A1-A3 4.56639e-12, A4 6.04627e-15, A5 1.07119e-12, B2 1.03e-12, C1 5.53e-14, C2 5.05e-16, C3 7.57e-14, C4 3.79e-14, D (S1) -2.155e-12, D (S2) -4.21e-13
- Acidification potential of land and water (AP) [kg SO_(2)-Äq.]: A1-A3 0.00483763, A4 0.000483157, A5 0.000921038, B2 0.000728, C1 3.53e-5, C2 4.04e-5, C3 0.00118, C4 0.000384, D (S1) -0.00166, D (S2) -0.000325
- Eutrophication potential (EP) [kg PO_(4)^(3)-Äq.]: A1-A3 0.00127882, A4 0.00012217, A5 0.000220909, B2 9.38e-5, C1 3.31e-6, C2 1.02e-5, C3 0.000294, C4 0.000392, D (S1) -0.0001791, D (S2) -3.51e-5
- Formation potential of tropospheric ozone photochemical oxidants (POCP) [kg Ethen-Äq.]: A1-A3 0.000670238, A4 -0.000158042, A5 0.000116285, B2 5.93e-5, C1 2.21e-6, C2 -1.32e-5, C3 7.52e-5, C4 4.19e-5, D (S1) -0.0001296, D (S2) -2.54e-5
- Abiotic depletion potential for non fossil resources (ADPE) [kg Sb-Äq.]: A1-A3 3.01962e-6, A4 1.81691e-8, A5 2.69933e-7, B2 1.64e-7, C1 6.61e-9, C2 1.52e-9, C3 3.74e-8, C4 3.08e-8, D (S1) -2.798e-7, D (S2) -5.48e-8
- Abiotic depletion potential for fossil resources (ADPF) [MJ]: A1-A3 35.6841, A4 3.01151, A5 11.0541, B2 3.36, C1 0.133, C2 0.252, C3 0.865, C4 2.04, D (S1) -13.47, D (S2) -2.65

## Use advice
Scope:
In this EPD cork floor tiles are declared. The application of this EPD is restricted to cork floor tiles produced by the members of the European Resilient Flooring Manufacturers’ Institute (ERFMI). Data are based upon production during 2017 in Europe. Data have been provided by one company of ERFMI which represent 100% of ERFMI members.
System boundary:
Type of EPD: cradle to grave

Modules A1-A3 include processes that provide materials and energy input for the system, manufacturing and transport processes up to the factory gate, as well as waste processing.

Module A4 includes transport of the floor covering to the place of installation.

Module A5 includes the production of offcuts and adhesive for the installation of the floor covering, and incineration of offcuts and packaging material.

Module B2 is including provision of cleaning agent, energy and water consumption for the cleaning of the floor covering incl. waste water treatment. The LCA results in this EPD are declared for a one-year usage.

Module C1 considers electricity supply for the deconstruction of the flooring.

Module C2 includes transportation of the postconsumer waste to waste processing.

End of life scenarios are declared for:

100% incineration in a waste incineration plant (WIP) (Scenario 1, C3/1)
100% landfilling (Scenario 2, C4/2)

Module D declares potential benefits from all net flows given in module A5 and C3 (for incineration and related energy substitution) that leave the product boundary system after having passed the end-of-waste state.

Module D is declared for each scenario separately.

## Data sources
- Cork floor tiles according to EN 12104.pdf
- GaBi Database (all versions)
- GaBi database SP33 2017
