# Rigips GaBi Duo'Tech RF und RFI, 25 mm; 20,5 kg/m²

Dataset: ILCD process, EPD, specific dataset
Geography: AT
Reference year: 2019
Valid until: 2024
Classification: OEKOBAU.DAT: Mineralische Baustoffe / Steine und Elemente / Gipsplatten
Synonyms: Gipsplatte, Gipskarton, Trockenbauplatte, Beplankung, Feuerschutzplatte, Feuchtraumplatte, Nassraumplatte
Method details: PKR Bau EPD GmbH PKR-Code: 2.10.1 Version 9.0 vom 17.08.2017
Owner: Saint-Gobain Rigips Austria GesmbH
Compliance: EN 15804; ISO 14025
Review: Independent external review by Richter Sarah
Amounts: rows without a unit in brackets have none in this file; such an amount is in the reference unit of its flow, which a separate flow dataset defines
copyright: true

## General comment
Betrachtet werden die RIGIPS-Gipsplatten RIGIPS Duo'Tech RF und RFI Feuerschutzplatten mit einer Plattendicke von 25,0 mm der Saint-Gobain Rigips Austria GesmbH, die hauptsächlich für nichttragende Systeme eingesetzt werden.
Die Produkte werden aus Stuckgips (gebrannter Rohgips), Wasser, Karton, Kernleim und Additiven hergestellt. Die EPD repräsentiert den Durchschnitt der im Jahr 2017 von der Saint-Gobain Rigips Austria GesmbH im Werk in Bad Aussee produzierten Gipsplatten.
Die Rohdichte der Platten beträgt 820 kg/m³.
Als funktionale Einheit wurde ein Quadratmeter (m2) Gipsplatte festgelegt.

## Time period
Die EPD repräsentiert den Durchschnitt der im Jahr 2017 von der Saint-Gobain Rigips Austria GesmbH in Werk Bad Aussee produzierten Gipsplatten , die EPD wurde am 30.09.2019 ausgestellt.

## Technology and included processes
Herstellungsprozess:
Die Produkte werden aus Stuckgips (gebrannter Rohgips), Wasser, Karton, Kernleim und Additiven hergestellt. Siehe auch beigefügtes Flussdiagramm.

Die Plattendicke beträgt 25 mm. Das Gewicht einer Platte beträgt 20,5 kg/m². Die Rohdichte beträgt 820 kg/m². Die Wärmeleitfähigkeit beträgt 0,25 W/mK.

Spezifische Produktdatenblätter sind auf der Homepage der Fa. Saint-Gobain Rigips Austria GesmbH abrufbar. (http://www.rigips.at/kundenservice/produktdatenblaetter.html).

Brandschutz
Aufgrund ihrer Zusammensetzung sind RIGIPS Gipsplatten geeignet, im Brandfall Sicherheit zu gewährleisten.
RIGIPS Gipsplatten sind nach ÖNORM EN 13501-1 (EN 520) als A2- s1, d0 klassifiziert. Beim Brand wird kein Rauch (s1) frei und es tritt kein brennendes Abfallen/Abtropfen (d0) auf.
Trockenbausysteme aus RIGIPS Gipsplatten bieten einen definierten Feuerwiderstand (EI30, EI 60, EI 90, EI 120). Diese Leistungsfähigkeit der klassifizierten RIGIPS Systeme wird auch durch die RIGIPS Systemgarantie bestätigt

Die Gipsplatten werden auf Mehrwegpaletten mittels LKW ausgeliefert. Für den Transport werden die Platten mit Stahlbändern gesichert. Eine weitere Verpackung ist nicht notwendig. Die Platten sollten vor Feuchtigkeit und Witterungseinwirkungen geschützt werden.

## Technical purpose
RIGIPS Gipsplatten werden für die Ausführung von nichttragenden Systemen aus Gipsplatten gemäß ÖNORM B 3415 (wie z.B. Gipskartonständerwände, abgehängte Decken, nachträglicher Dachgeschoß-Ausbau, Bauteilverkleidungen) verwendet. Feuerschutzplatten werden zur Errichtung von Brandabschnitten eingesetzt. Imprägnierte Platten werden in Feuchträumen eingesetzt.

RIGIPS Gipsplatten sind Bestandteil von RIGIPS Montagewänden gem. ETA-12/0039, des österreichischen Instituts für Bautechnik.
Darüber hinaus finden RIGIPS Gipsplatten in vorgefertigten Bauteile aus Holz- und Fertighausbauten (gemäß ÖNORM B 2310 und ÖNORM B 2320) sowie deren Fertigstellung im Zuge der Errichtung des Gebäudes Anwendung.

## Reference product
- Rigips Duo'Tech RF und RFI, 25 mm (820 kg/m³ u. 20,5 kg/m²): 1

## Inputs
- Use of renewable primary energy (PERE) [MJ]: A1-A3 10.8174, A4 0.215276, A5 1.11276, B1 0, B2 0, B3 0, B4 0, B5 0, B6 0, B7 0, C1 0.00305606, C2 0.0446821, C3 0, C4 0.467283, D -0.107383
- Use of renewable primary energy resources used as raw materials (PERM) [MJ]: A1-A3 9.2473, A4 0, A5 0, B1 0, B2 0, B3 0, B4 0, B5 0, B6 0, B7 0, C1 0, C2 0, C3 0, C4 0, D 0
- Total use of renewable primary energy resources (PERT) [MJ]: A1-A3 20.0647, A4 0.215276, A5 1.11276, B1 0, B2 0, B3 0, B4 0, B5 0, B6 0, B7 0, C1 0.00305606, C2 0.0446821, C3 0, C4 0.467283, D -0.107383
- Use of non renewable primary energy (PENRE) [MJ]: A1-A3 65.3334, A4 3.5221, A5 7.7717, B1 0, B2 0, B3 0, B4 0, B5 0, B6 0, B7 0, C1 0.820663, C2 0.778474, C3 0, C4 4.10795, D -0.396765
- Use of non renewable primary energy resources used as raw materials (PENRM) [MJ]: A1-A3 0.906982, A4 0, A5 0, B1 0, B2 0, B3 0, B4 0, B5 0, B6 0, B7 0, C1 0, C2 0, C3 0, C4 0, D 0
- Total use of non renewable primary energy resource (PENRT) [MJ]: A1-A3 66.2404, A4 3.5221, A5 7.7717, B1 0, B2 0, B3 0, B4 0, B5 0, B6 0, B7 0, C1 0.820663, C2 0.778474, C3 0, C4 4.10795, D -0.396765
- Use of secondary material (SM) [kg]: A1-A3 0.63917, A4 0, A5 0, B1 0, B2 0, B3 0, B4 0, B5 0, B6 0, B7 0, C1 0, C2 0, C3 0, C4 0, D 0
- Use of renewable secondary fuels (RSF) [MJ]: A1-A3 0, A4 0, A5 0, B1 0, B2 0, B3 0, B4 0, B5 0, B6 0, B7 0, C1 0, C2 0, C3 0, C4 0, D 0
- Use of non renewable secondary fuels (NRSF) [MJ]: A1-A3 0, A4 0, A5 0, B1 0, B2 0, B3 0, B4 0, B5 0, B6 0, B7 0, C1 0, C2 0, C3 0, C4 0, D 0
- Use of net fresh water (FW) [m3]: A1-A3 0.0222458, A4 0.00051675, A5 0.00333765, C1 5.73282e-6, C2 0.000110435, C3 0, C4 0.000836497, D -0.000153202

## Outputs
- Hazardous waste disposed (HWD) [kg]: A1-A3 3.73059e-7, A4 2.5939e-7, A5 4.84116e-8, B1 0, B2 0, B3 0, B4 0, B5 0, B6 0, B7 0, C1 1.26916e-10, C2 5.82982e-8, C3 0, C4 9.39517e-8, D -7.88149e-10
- Non hazardous waste dispose (NHWD) [kg]: A1-A3 0.0388415, A4 0.000331479, A5 0.763858, B1 0, B2 0, B3 0, B4 0, B5 0, B6 0, B7 0, C1 9.84436e-5, C2 6.70629e-5, C3 0, C4 19.0235, D -0.0100775
- Radioactive waste disposed (RWD) [kg]: A1-A3 0.000515306, A4 1.63028e-5, A5 0.000113409, B1 0, B2 0, B3 0, B4 0, B5 0, B6 0, B7 0, C1 3.22502e-7, C2 1.66605e-6, C3 0, C4 5.67437e-5, D -5.66712e-6
- Components for re-use (CRU) [kg]: A1-A3 0, A4 0, A5 0, B1 0, B2 0, B3 0, B4 0, B5 0, B6 0, B7 0, C1 0, C2 0, C3 0, C4 0, D 0
- Materials for recycling (MFR) [kg]: A1-A3 0, A4 0, A5 0.0293, B1 0, B2 0, B3 0, B4 0, B5 0, B6 0, B7 0, C1 0, C2 0, C3 0, C4 0, D 0
- Materials for energy recovery (MER) [kg]: A1-A3 0, A4 0, A5 0.0256, B1 0, B2 0, B3 0, B4 0, B5 0, B6 0, B7 0, C1 0, C2 0, C3 0, C4 0, D 0
- Exported electrical energy (EEE) [MJ]: A1-A3 0, A4 0, A5 0.0570738, B1 0, B2 0, B3 0, B4 0, B5 0, B6 0, B7 0, C1 0, C2 0, C3 0, C4 0, D -0.0570738
- Exported thermal energy (EET) [MJ]: A1-A3 0, A4 0, A5 0.140447, B1 0, B2 0, B3 0, B4 0, B5 0, B6 0, B7 0, C1 0, C2 0, C3 0, C4 0, D -0.140447

## Impact indicators
- Global warming potential (GWP) [kg CO2-Äqv.]: A1-A3 2.95707, A4 0.257504, A5 0.525807, B1 0, B2 0, B3 0, B4 0, B5 0, B6 0, B7 0, C1 0.0596699, C2 0.057119, C3 0, C4 1.42491, D -0.0339241
- Depletion potential of the stratospheric ozone layer (ODP) [kg R11-Äqv.]: A1-A3 4.32935e-8, A4 4.21056e-12, A5 1.17286e-8, B1 0, B2 0, B3 0, B4 0, B5 0, B6 0, B7 0, C1 7.98414e-15, C2 4.06855e-13, C3 0, C4 2.99903e-12, D -3.23647e-13
- Acidification potential of soil and water (AP) [kg SO2-Äqv.]: A1-A3 0.00608796, A4 0.00112703, A5 0.00212137, B1 0, B2 0, B3 0, B4 0, B5 0, B6 0, B7 0, C1 6.52887e-5, C2 0.000251227, C3 0, C4 0.00182769, D -0.000171953
- Eutrophication potential (EP) [kg Phosphat-Äqv.]: A1-A3 0.00218433, A4 0.000275414, A5 0.000309012, B1 0, B2 0, B3 0, B4 0, B5 0, B6 0, B7 0, C1 7.16357e-6, C2 6.17202e-5, C3 0, C4 0.000248654, D -1.02953e-5
- Formation potential of tropospheric ozone (POCP) [kg Ethen-Äqv.]: A1-A3 0.00101636, A4 -0.000380937, A5 0.000155506, B1 0, B2 0, B3 0, B4 0, B5 0, B6 0, B7 0, C1 1.11839e-5, C2 -8.57749e-5, C3 0, C4 0.000175633, D -1.06941e-5
- Abiotic depletion potential for non fossil resources (ADPE) [kg Sb-Äqv.]: A1-A3 4.55027e-6, A4 1.98058e-8, A5 6.49554e-5, B1 0, B2 0, B3 0, B4 0, B5 0, B6 0, B7 0, C1 1.61615e-9, C2 4.20688e-9, C3 0, C4 1.05059e-7, D -4.99699e-7
- Abiotic depletion potential for fossil resources (ADPF) [MJ]: A1-A3 64.408, A4 3.48092, A5 7.26332, B1 0, B2 0, B3 0, B4 0, B5 0, B6 0, B7 0, C1 0.819836, C2 0.774232, C3 0, C4 3.96492, D -0.382318

## Use advice
Anmerkung zur Vergleichbarkeit: Ein Vergleich mit anderen Produkten ist nur mit einer vergleichbaren Anwendung im Gebäude sinnvoll. Grundsätzlich ist eine Gegenüberstellung oder die Bewertung von EPD Daten nur möglich, wenn alle zu vergleichenden Datensätze nach EN 15804 erstellt wurden und die produktspezifischen Leistungsmerkmale berücksichtigt werden.

## Data sources
- GaBi database (general)
- GaBi database SP30 2016
- Bau EPD GmbH / EPD-Knauf-2014-1-GaBi
- Software: Umberto LCA+
