# ArmaFlex Ultima insulation for industrial and building installation

Dataset: ILCD process, EPD, average dataset
Geography: RER
Reference year: 2021
Valid until: 2026
Classification: OEKOBAU.DAT: Dämmstoffe / Kautschuk / Schaum
Classification: IBUCategories: 02 Building products / Thermal insulation products / Insulating materials made of foam plastics
Method details: Insulating materials made of foam plastics.pdf
Generated by: Sphera Solutions GmbH
Registration number: EPD-ARM-20200218-IBB1-EN
Owner: Armacell GmbH
Compliance: DIN EN 15804+A2; ISO 14025
Review: Accredited third party review by Institut Bauen und Umwelt e. V.
Amounts: rows without a unit in brackets have none in this file; such an amount is in the reference unit of its flow, which a separate flow dataset defines
copyright: true
licenseType: Free of charge for all users and uses
accessRestrictions: None

## General comment
ArmaFlex Ultima is the professional, highly-flexible, closed-cell elastomeric foam insulation (FEF) for continuous energy saving and condensation control purposes with improved fire-retardant properties and low smoke generation. The combination of very low thermal conductivity and extremely high resistance to water vapour transmission prevents long-term energy losses and water vapour ingress and reduces the risk of corrosion under insulation.

## Technology and included processes
ArmaFlex products are manufactured in a pressureless, continuous and discontinuous production process. In the first step, a homogenous compound is produced with rubber, additives, ancillary materials, blowing and vulcanization agents. This is done on the rolling mill or in the internal mixer followed by the rolling mill. Rubber extruders are used to process the compounds to produce raw profiles with defined dimensions. Here exact compliance with the dimensions for the raw profile is crucial for the dimensional accuracy of the foamed product. In the case of the discontinuous, pressureless production process, the raw profiles are cut to length and then foamed in a hot-air oven. In the case of the continuous, pressureless process, the extruded profile is fed directly onto a vulcanization line whose energy source may be hot air, for example. In foam production, vulcanization and blowing processes run alongside each other. Both reactions are regulated by temperature control. Recipe and temperature control determine the properties of the foam. Quality assurance: EC Certificate of conformity no. 0543 of the Gütegemeinschaft Hartschaum e.V. Celle. Quality management system in accordance with /EN ISO 9001/.
Declared unit:
The declaration refers to 1 m³ insulation product.

For the LCA calculations the average density per product brand is used.

As additional information and support for installers the thermal conductivity coefficient (lambda-value) and R-value per 20 cm thickness per product brand are given.

## Technical purpose
ArmaFlex Ultima is used to insulate pipes, air ducts and vessels including fittings and flanges of industrial installations and building equipment.
Condensation control, energy saving and noise control in refrigeration and air conditioning equipment and process plants.
Energy saving according to local energy- saving laws, prevention of heat loss and noise reduction of heating and plumbing systems.
Condensation control and noise reduction in service-water and waste-water systems.
Condensation control, energy saving and noise control in refrigeration and air- conditioning equipment in the ship-building sector.

## Reference product
- ArmaFlex Ultima insulation for building equipment and industrial installations (1m³ Armaflex Ultima insulation for industrial and building installation): 1

## Inputs
- Renewable primary energy as energy carrier (PERE) [MJ]: A1-A3 1213, A4 2.79, A5 111.4, C2 0.202, C3 57.1, D -151
- Renewable primary energy resources as material utilization (PERM) [MJ]: A1-A3 97, A4 0, A5 -97, C2 0, C3 0, D 0
- Total use of renewable primary energy resources (PERT) [MJ]: A1-A3 1310, A4 2.79, A5 14.4, C2 0.202, C3 57.1, D -151
- Non renewable primary energy as energy carrier (PENRE) [MJ]: A1-A3 2128.1, A4 49.7, A5 57.1, C2 3.6, C3 2126.5, D -695
- Non renewable primary energy as material utilization (PENRM) [MJ]: A1-A3 1861.9, A4 0, A5 -10.4, C2 0, C3 -1851.5, D 0
- Total use of non renewable primary energy resources (PENRT) [MJ]: A1-A3 3990, A4 49.7, A5 46.7, C2 3.6, C3 275, D -695
- Use of secondary material (SM) [kg]: A1-A3 30.2, A4 0, A5 0, C2 0, C3 0, D 0
- Use of renewable secondary fuels (RSF) [MJ]: A1-A3 0, A4 0, A5 0, C2 0, C3 0, D 0
- Use of non renewable secondary fuels (NRSF) [MJ]: A1-A3 0, A4 0, A5 0, C2 0, C3 0, D 0
- Use of net fresh water (FW) [m^3]: A1-A3 1.58, A4 0.00343, A5 0.0542, C2 0.000236, C3 0.303, D -0.175

## Outputs
- Hazardous waste disposed (HWD) [kg]: A1-A3 0.000643, A4 2.31e-6, A5 6.53e-6, C2 1.67e-7, C3 1.24e-6, D -2.77e-7
- Non hazardous waste disposed (NHWD) [kg]: A1-A3 27.9, A4 0.0076, A5 1.35, C2 0.000551, C3 91.4, D -0.32
- Radioactive waste disposed (RWD) [kg]: A1-A3 0.103, A4 6.15e-5, A5 0.00131, C2 4.45e-6, C3 0.00873, D -0.0516
- Components for re-use (CRU) [kg]: A1-A3 0, A4 0, A5 0, C2 0, C3 0, D 0
- Materials for recycling (MFR) [kg]: A1-A3 0, A4 0, A5 35.7, C2 0, C3 0, D 0
- Materials for energy recovery (MER) [kg]: A1-A3 0, A4 0, A5 0, C2 0, C3 0, D 0
- Exported electrical energy (EEE) [MJ]: A1-A3 0, A4 0, A5 20.9, C2 0, C3 150, D 0
- Exported thermal energy (EET) [MJ]: A1-A3 0, A4 0, A5 37.5, C2 0, C3 274, D 0

## Impact indicators
- Global Warming Potential total (GWP-total) [kg CO_(2)-Äq.]: A1-A3 231, A4 3.7, A5 40, C2 0.268, C3 149, D -41.1
- Global Warming Potential fossil fuels (GWP-fossil) [kg CO_(2)-Äq.]: A1-A3 264, A4 3.68, A5 5.02, C2 0.266, C3 149, D -40.9
- Global Warming Potential biogenic (GWP-biogenic) [kg CO_(2)-Äq.]: A1-A3 -33.3, A4 -0.00636, A5 35, C2 -0.000461, C3 -0.0652, D -0.096
- Global Warming Potential luluc (GWP-luluc) [kg CO_(2)-Äq.]: A1-A3 0.389, A4 0.0302, A5 0.00469, C2 0.00219, C3 0.0304, D -0.0286
- Depletion potential of the stratospheric ozone layer (ODP) [kg CFC11-Äq.]: A1-A3 2.69e-9, A4 4.48e-16, A5 2.72e-11, C2 3.25e-17, C3 2.27e-13, D -4.26e-13
- Acidification potential of land and water (AP) [mol H^(+)-Äq.]: A1-A3 0.492, A4 0.0114, A5 0.00755, C2 0.000829, C3 0.0443, D -0.0572
- Eutrophication potential aquatic freshwater (EP-freshwater) [kg PO_(4)-Äq.]: A1-A3 0.00323, A4 1.13e-5, A5 3.34e-5, C2 8.21e-7, C3 3.82e-5, D -5.26e-5
- Eutrophication potential aquatic marine (EP-marine) [kg N-Äq.]: A1-A3 0.165, A4 0.00511, A5 0.00252, C2 0.00037, C3 0.0146, D -0.0148
- Eutrophication potential terrestrial (EP-terrestrial) [mol N-Äq.]: A1-A3 1.5, A4 0.0573, A5 0.027, C2 0.00415, C3 0.179, D -0.159
- Formation potential of tropospheric ozone photochemical oxidants (POCP) [kg NMVOC-Äq.]: A1-A3 0.593, A4 0.0101, A5 0.00829, C2 0.000731, C3 0.0415, D -0.0426
- Abiotic depletion potential for non fossil resources (ADPE) [kg Sb-Äq.]: A1-A3 3990, A4 49.6, A5 46.7, C2 3.59, C3 275, D -694
- Abiotic depletion potential for fossil resources (ADPF) [MJ]: A1-A3 0.00139, A4 2.67e-7, A5 1.41e-5, C2 1.94e-8, C3 3.27e-6, D -6.7e-6
- Water use (WDP) [m^(3) world-Äq. deprived]: A1-A3 66, A4 0.0333, A5 2.25, C2 0.00241, C3 11.5, D -4.23
- Incidence of disease due to PM emissions (PM) [Disease incidence]: A1-A3 4.85e-6, A4 5.01e-8, A5 7.11e-8, C2 3.63e-9, C3 1.07e-6, D -4.86e-7
- Human exposure efficiency relative to U235 (IR) [kBq U235-Äq.]: A1-A3 59.7, A4 0.00889, A5 0.639, C2 0.000644, C3 0.886, D -8.46
- Comparative toxic unit for ecosystems (ETP-fw) [CTUe]: A1-A3 3890, A4 35.1, A5 43.4, C2 2.54, C3 228, D -149
- Comparative toxic unit for humans (carcinogenic) (HTP-c) [CTUh]: A1-A3 1.14e-7, A4 7.34e-10, A5 1.34e-9, C2 5.32e-11, C3 9.02e-9, D -6.48e-9
- Comparative toxic unit for humans (noncarcinogenic) (HTP-nc) [CTUh]: A1-A3 3.51e-6, A4 4.35e-8, A5 4.94e-8, C2 3.15e-9, C3 9.59e-7, D -2.41e-7
- Soil quality index (SQP) [SQP]: A1-A3 908, A4 17.4, A5 10.8, C2 1.26, C3 62.4, D -109

## Use advice
Scope:
Product line ArmaFlex Ultima

Insulation material based on flexible elastomeric foam (FEF) for building equipment and industrial installations, vulcanized in tubes and sheets.

This declaration is an Environmental Product Declaration according to ISO 14025 describing the average environmental performance of the product produced in Germany and Spain.

The average has been calculated based on site specific annual production volumes.

As the installation of the product is not restricted to countries where the products have been produced the validity of this EPD is considered at least EU wide.
System boundary:
The data collection refers to the yearly production in 2019. The following life cycle stages are considered.

Type of EPD: Cradle-to-Gate with options:

Production A1-A3:
The LCA calculation covers the production of the raw materials (supply chain – A1), the mixing of raw materials according to the respective recipes (MasterBatch) exclusively done in Münster, Germany, the transport (A2) of the MasterBatches to the production facility for foaming and the foaming process (A3) in Germany and Spain, including the packaging material.

Transport A4:
Average values for the transport from factory gate to construction site are assumed.

Installation A5:
The installation considers the production of off-cuts, incineration of these off-cuts and the disposal scenario for the packaging material. Auxiliaries like adhesives or tapes or energy for installation are not considered.

End-of-life C2, C3:
An incineration scenario for the used and demolished product, including an assumption for the transport to disposal, is covered.

Benefits for the next product system D:
Credits for electrical and thermal energy resulting from the waste incineration process of the off-cut material and packaging (A5) and the product (C3) are declared in module D.

## Data sources
- GaBi Database (all versions)
- GaBi database SP40 2020
