# StoVentec Glass

Dataset: ILCD process, EPD, specific dataset
Geography: RER
Reference year: 2021
Valid until: 2025
Classification: OEKOBAU.DAT: Komposite / Systembauteile / Aussenwände
Classification: IBUCategories: 02 Bauprodukte / Fassaden / Vorhangfassaden
Method details: Vorhangfassaden.pdf
Generated by: Sphera Solutions GmbH
Registration number: EPD-STO-20200208-CBA1-DE
Owner: Sto SE & Co. KGaA
Compliance: DIN EN 15804; ISO 14025
Review: Accredited third party review by Institut Bauen und Umwelt e. V.
Amounts: rows without a unit in brackets have none in this file; such an amount is in the reference unit of its flow, which a separate flow dataset defines
copyright: true
licenseType: Free of charge for all users and uses
accessRestrictions: None

## General comment
The StoVentec Glass product is a composite panel comprising a toughened enamelled glass which is bonded to a lightweight carrier board (made of expanded glass granulate) with an integrated panel carrier profile on the back side. The panel itself is being used within Rainscreen Cladding systems with a joint-accentuated appearance.

The StoVentec Glass product offers a wide range of different design options regarding formats, colours, glass types as well as glass surfaces. Thanks to the prefabrication of the panels, the installation on site is easy and not depending on weather conditions.

This environmental product declaration does only include the panel itself as well as the agrafe profile fixed to the subconstruction / wall but not the insulation and not the subconstruction being used within the Rainscreen Cladding system.

For the use and application of the product the respective national provisions at the place fo use apply, in Germany for example the building codes of the federal states and the corresponding national specifications apply.

## Technology and included processes
This dataset represents one squaremeter (1 m²) StoVentec Glass ventilated facade system (31,8 kg/m²). The composition of the system is: 6 mm toughened Glass (15 kg/m²) Silicone based adhesive (3 kg/m²) 20 mm StoVentec Carrier Board (10 kg/m²) Sto-Board Carrier Profile (1.8 kg/m²) Sto-Agrafe Profile (2 kg/m²) For further details see the EPD document.
Declared unit:
The declared unit for the StoVentec Glass facade system is 1 m² with a surface weight of 31,80 kg/m² and a thickness of 30mm without agraffen profiles and 62mm with agraffen profiles.

## Technical purpose
The declared product StoVentec Glass is being used as a joint-accentuated facade panel within an RSC (Rainscreen cladding) system. For the application and use national regulations apply. For example, in Germany the “Allgemeine bauaufsichtliche Zulassung Z-10.3-720” issued by the Deutsches Institut für Bautechnik (DiBt), Berlin, applies.

## Reference product
- StoVentec Glass (): 1

## Inputs
- Renewable primary energy as energy carrier (PERE) [MJ]: A1-A3 400.621, A4 0.167501, A5 22.4, C1 0, C2 0.0837507, C4 2.04, D -174
- Renewable primary energy resources as material utilization (PERM) [MJ]: A1-A3 23.3374, A4 0, A5 -22, C1 0, C2 0, C4 -1.31, D 0
- Total use of renewable primary energy resources (PERT) [MJ]: A1-A3 423.958, A4 0.167501, A5 0.384, C1 0, C2 0.0837507, C4 0.73, D -174
- Non renewable primary energy as energy carrier (PENRE) [MJ]: A1-A3 1274.98, A4 2.98281, A5 15.6, C1 0, C2 1.4914, C4 90.5, D -385
- Non renewable primary energy as material utilization (PENRM) [MJ]: A1-A3 99.154, A4 0, A5 -14.2, C1 0, C2 0, C4 -84.9, D 0
- Total use of non renewable primary energy resources (PENRT) [MJ]: A1-A3 1374.13, A4 2.98281, A5 1.41, C1 0, C2 1.4914, C4 5.58, D -385
- Use of secondary material (SM) [kg]: A1-A3 8.45094, A4 0, A5 0, C1 0, C2 0, C4 0, D 0
- Use of renewable secondary fuels (RSF) [MJ]: A1-A3 0, A4 0, A5 0, C1 0, C2 0, C4 0, D 0
- Use of non renewable secondary fuels (NRSF) [MJ]: A1-A3 0, A4 0, A5 0, C1 0, C2 0, C4 0, D 0
- Use of net fresh water (FW) [m^3]: A1-A3 0.748426, A4 0.000193955, A5 0.0116, C1 0, C2 9.69776e-5, C4 0.0014055, D -0.44

## Outputs
- Hazardous waste disposed (HWD) [kg]: A1-A3 6.18914e-6, A4 1.3881e-7, A5 8.45e-10, C1 0, C2 6.94052e-8, C4 8.49708e-8, D -1.56e-7
- Non hazardous waste disposed (NHWD) [kg]: A1-A3 18.2033, A4 0.000456484, A5 0.0313, C1 0, C2 0.000228242, C4 28.0277, D -8.17
- Radioactive waste disposed (RWD) [kg]: A1-A3 0.0501864, A4 3.69193e-6, A5 0.000125, C1 0, C2 1.84596e-6, C4 6.34458e-5, D -0.0239
- Components for re-use (CRU) [kg]: A1-A3 0, A4 0, A5 0, C1 0, C2 0, C4 0, D 0
- Materials for recycling (MFR) [kg]: A1-A3 0, A4 0, A5 0, C1 3.8, C2 0, C4 0, D 0
- Materials for energy recovery (MER) [kg]: A1-A3 0, A4 0, A5 0, C1 0, C2 0, C4 0, D 0
- Exported electrical energy (EEE) [MJ]: A1-A3 0, A4 0, A5 7.6, C1 0, C2 0, C4 0, D 0
- Exported thermal energy (EET) [MJ]: A1-A3 0, A4 0, A5 13.6, C1 0, C2 0, C4 0, D 0

## Impact indicators
- Global warming potential (GWP) [kg CO_(2)-Äq.]: A1-A3 92.807, A4 0.219612, A5 4.98, C1 0, C2 0.109806, C4 0.381637, D -30
- Depletion potential of the stratospheric ozone layer (ODP) [kg CFC11-Äq.]: A1-A3 8.5216e-12, A4 3.58572e-17, A5 1.5e-15, C1 0, C2 1.79286e-17, C4 2.09982e-15, D -5.98e-14
- Acidification potential of land and water (AP) [kg SO_(2)-Äq.]: A1-A3 0.373457, A4 0.000171504, A5 0.000467, C1 0, C2 8.57522e-5, C4 0.00242658, D -0.128
- Eutrophication potential (EP) [kg PO_(4)^(3)-Äq.]: A1-A3 0.0349467, A4 3.15761e-5, A5 9.64e-5, C1 0, C2 1.5788e-5, C4 0.000272921, D -0.00642
- Formation potential of tropospheric ozone photochemical oxidants (POCP) [kg Ethen-Äq.]: A1-A3 0.00512412, A4 -7.76817e-7, A5 4.02e-5, C1 0, C2 -3.88409e-7, C4 0.000183996, D -0.00713
- Abiotic depletion potential for non fossil resources (ADPE) [kg Sb-Äq.]: A1-A3 0.000837787, A4 1.60705e-8, A5 1.7e-8, C1 0, C2 8.03524e-9, C4 3.85342e-8, D -3.74e-6
- Abiotic depletion potential for fossil resources (ADPF) [MJ]: A1-A3 1247.22, A4 2.97338, A5 1.09, C1 0, C2 1.48669, C4 5.41504, D -324

## Use advice
Scope:
This declaration covers the StoVentec Glass ventilated facade system only and does not include data for the subconstruction and insulation.

Product components are produced by Sto SE & Co. KGaA (production sites at Lauingen, Germany) and by external suppliers. The system components are then transported to the warehouse in Sweden, were the system is commissioned, packed and delivered.
System boundary:
Cradle to gate - with options.

Description of the system boundaries:

Module A1 to A3:

This module considers the manufacturing of system components (e.g. carrier board, fastening, plaster etc.), the transport to the site in Sweden and the manufacturing/compiling of the façade system components. The impact for producing packaging materials is included as well.

Module A4:

This module considers 100 km truck transport to site. The transport distance can be modified project specific.

Module A5:

Treatment and disposal of packaging material. Credits for potential avoided burdens on electricity and thermal energy generation are declared in module D and affects only the rate of virgin material.

An average electricity consumption for installation is considered.

Installation losses have not been accounted for, since such losses highly depend on the specific building geometry and other site-specific factors. Installation losses may be estimated based on the LCA results for manufacturing and End-of-life (EoL), e.g. via scaling.

Module C1 to C4:

C1: Manual dismantling, no environmental burdens.

C2: 50 km transport to waste treatment by truck (may be adapted on building level).

C3: No additional waste processing, no environmental burdens.

C4: European scenario for average landfill emissions is declared.

Module D:

Benefits and loads for metal components and avoided burdens from packaging treatment.

## Data sources
- GaBi Database (all versions)
- GaBi database SP38 2019
