# EGGER Eurodekor - Melamine Faced Chipboard

Dataset: ILCD process, EPD, average dataset
Geography: DE
Reference year: 2021
Valid until: 2026
Classification: OEKOBAU.DAT: Holz / Holzwerkstoffe / Spanplatten
Classification: IBUCategories: 02 Bauprodukte / Holzwerkstoffe / Holzwerkstoffe
Method details: Holzwerkstoffe.pdf
Generated by: Daxner & Merl GmbH
Registration number: EPD-EGG-20200251-IBC1-DE
Owner: Fritz EGGER GmbH & Co. OG
Compliance: DIN EN 15804+A2; ISO 14025
Review: Accredited third party review by Institut Bauen und Umwelt e. V.
Amounts: rows without a unit in brackets have none in this file; such an amount is in the reference unit of its flow, which a separate flow dataset defines
copyright: true
licenseType: Free of charge for all users and uses
accessRestrictions: None

## General comment
Coated chipboards (Eurodekor) are board-shaped wood-based materials according to

· EN 312:2010-09, Particleboards - Specifications and

· EN 14322:2017-03, Wood-based panels - Melamine faced boards for interior uses - Definition, requirements and classification.

The decorative pattern of a melamine faced chipboard is achieved by means of printed decor paper. A corresponding texture can be applied to the surface in the course of the pressing.

The board types are differentiated in application according to two criteria: according to load-bearing and non-load-bearing elements and according to use in dry or moist areas:

P1: General purpose boards for use in dry conditions

P2: Board for interior fittings (including furniture) for use in dry conditions

P3: Boards for non-load-bearing purposes for use in humid conditions

P4: Boards for load-bearing purposes for use in dry conditions

P5: Load-bearing boards for use in humid conditions

P6: Heavy duty load-bearing boards for use in dry conditions

The use class P7 described in the standard

is not produced by EGGER.

The average product considered has a thickness of 17.6 mm. This was calculated over the total quantities produced at the Brilon plant according to volume share. Included were the

quantities of all boards thicker than 8 mm were included. The production of boards 8 mm and thinner falls into the category of thin chipboard and is not declared in this study.

The average glue mix across all board types is considered. The production conditions of the Brilon site are comparable to those of the other plants. They correspond to the technologies and standards used in all locations.

## Technology and included processes
Production of the rawboards (EGGER Eurospan): 1. Wood preparation - Roundwood chipping - Chip preparation - Residual wood preparation 2. Drying the chips to approximately 2 – 3 % residual moisture 3. Sorting the chips 4. Applying glue to the chips 5. Spreading the glue-coated chips onto a forming belt 6. Pressing the chip cake in a continuously operating hot press (ContiRoll) 7. Formatting of the raw boards 8. Cooling the rawboards in star coolers 9. Sanding the upper and lower sides 10. Stacking into large stacks. All scraps produced during production (trimming, cutting and milling scraps) are fed back into the production process. Production of impregnates for coating: 1. Processing the base paper 2. Addition of impregnation resins (MUF) in the plant 3. Drying the impregnated paper in heated dryers 4. Formatting the endless paper by means of a cross-cutter 5. Stacking the formatted sheets on pallets Coating the chipboard (EGGER Eurodekor): 1. Laying the impregnated papers onto the upper and lower sides of the rawboard 2. Pressing the board in the hot press with variously structured pressing sheets 3. Sorting by quality and stacking 4. Acclimatisation phase of up to 14 days All waste generated in the course of the coating is used thermally within the plant. The quality management system is implemented and certified according to the requirements of ISO 9001.
Technical data:
The technical requirements for chipboard in the use classes P1-P6 produced by EGGER are specified in the standard EN 312:2010. Further definitions, requirements and classifications of melamine faced boards for interior use such as surface properties and dimensional tolerances are provided by the standard EN 14322:2017-03. Detailed information can be found in the technical data sheets.
Declared unit:
This environmental product declaration is based on a declared unit of 1 m³ EGGER Eurodekor coated chipboard with an average raw density of 11.57 kg/m² and a delivery moisture of approximately 6 %.

## Technical purpose
The area of application of the melamine faced

chipboard EGGER Eurodekor is mainly used in

decorative interior design and in furniture construction. It is

used in residential and project furnishings. EGGER Eurodekor E1E05 TSCA P2 CE and EGGER Eurodekor JP F 0.3 (F****) are used especially for furniture and interior design with increased requirements for low formaldehyde emissions. For

increased fire protection there is EGGER Eurodekor Flammex E1E05 P2 CE.

## Reference product
- Eurodekor beschichtete Spanplatte: 1

## Inputs
- Renewable primary energy as energy carrier (PERE) [MJ]: A1-A3 100.23, C1 0, C2 0.0280758, C3 180.597, C4 0, D -43.2881
- Renewable primary energy resources as material utilization (PERM) [MJ]: A1-A3 183.595, C1 0, C2 0, C3 -179.83, C4 0, D 0
- Total use of renewable primary energy resources (PERT) [MJ]: A1-A3 283.825, C1 0, C2 0.0280758, C3 0.766923, C4 0, D -43.2881
- Non renewable primary energy as energy carrier (PENRE) [MJ]: A1-A3 62.9785, C1 0, C2 0.487514, C3 21.5966, C4 0, D -171.938
- Non renewable primary energy as material utilization (PENRM) [MJ]: A1-A3 19.8737, C1 0, C2 0, C3 -19.8647, C4 0, D 0
- Total use of non renewable primary energy resources (PENRT) [MJ]: A1-A3 82.8522, C1 0, C2 0.487514, C3 1.73187, C4 0, D -171.938
- Use of secondary material (SM) [kg]: A1-A3 4.75069, C1 0, C2 0, C3 0, C4 0, D 0
- Use of renewable secondary fuels (RSF) [MJ]: A1-A3 12.0028, C1 0, C2 0, C3 0, C4 0, D 169.166
- Use of non renewable secondary fuels (NRSF) [MJ]: A1-A3 0, C1 0, C2 0, C3 0, C4 0, D 18.6868
- Use of net fresh water (FW) [m^3]: A1-A3 0.0147848, C1 0, C2 3.27178e-5, C3 0.000886761, C4 0, D -0.0350095

## Outputs
- Hazardous waste disposed (HWD) [kg]: A1-A3 2.67587e-6, C1 0, C2 2.25434e-8, C3 7.16461e-10, C4 0, D -5.81898e-8
- Non hazardous waste disposed (NHWD) [kg]: A1-A3 0.0874207, C1 0, C2 7.72672e-5, C3 0.00122786, C4 0, D 0.00628585
- Radioactive waste disposed (RWD) [kg]: A1-A3 0.00158677, C1 0, C2 8.98535e-7, C3 0.000262599, C4 0, D -0.0148
- Components for re-use (CRU) [kg]: A1-A3 0, C1 0, C2 0, C3 0, C4 0, D 0
- Materials for recycling (MFR) [kg]: A1-A3 0, C1 0, C2 0, C3 0, C4 0, D 0
- Materials for energy recovery (MER) [kg]: A1-A3 0, C1 0, C2 0, C3 12.2249, C4 0, D 0
- Exported electrical energy (EEE) [MJ]: A1-A3 0, C1 0, C2 0, C3 0, C4 0, D 0
- Exported thermal energy (EET) [MJ]: A1-A3 0, C1 0, C2 0, C3 0, C4 0, D 0

## Impact indicators
- Global Warming Potential total (GWP-total) [kg CO_(2)-Äq.]: A1-A3 -13.7667, C1 0, C2 0.0368361, C3 17.9051, C4 0, D -8.83214
- Global Warming Potential fossil fuels (GWP-fossil) [kg CO_(2)-Äq.]: A1-A3 3.92791, C1 0, C2 0.0366027, C3 0.0984514, C4 0, D -8.79893
- Global Warming Potential biogenic (GWP-biogenic) [kg CO_(2)-Äq.]: A1-A3 -17.7003, C1 0, C2 -6.10951e-5, C3 17.8065, C4 0, D -0.0250786
- Global Warming Potential luluc (GWP-luluc) [kg CO_(2)-Äq.]: A1-A3 0.00565814, C1 0, C2 0.000294581, C3 0.000142639, C4 0, D -0.00812752
- Depletion potential of the stratospheric ozone layer (ODP) [kg CFC11-Äq.]: A1-A3 1.2544e-11, C1 0, C2 6.67937e-18, C3 2.16509e-15, C4 0, D -1.21928e-13
- Acidification potential of land and water (AP) [mol H^(+)-Äq.]: A1-A3 0.0100288, C1 0, C2 0.000123689, C3 0.000217367, C4 0, D 0.00669616
- Eutrophication potential aquatic freshwater (EP-freshwater) [kg PO_(4)-Äq.]: A1-A3 1.14266e-5, C1 0, C2 1.10849e-7, C3 2.62964e-7, C4 0, D -1.49336e-5
- Eutrophication potential aquatic marine (EP-marine) [kg N-Äq.]: A1-A3 0.00395137, C1 0, C2 5.58003e-5, C3 4.82764e-5, C4 0, D 0.00169822
- Eutrophication potential terrestrial (EP-terrestrial) [mol N-Äq.]: A1-A3 0.035384, C1 0, C2 0.000623324, C3 0.000507203, C4 0, D 0.0201829
- Formation potential of tropospheric ozone photochemical oxidants (POCP) [kg NMVOC-Äq.]: A1-A3 0.0079642, C1 0, C2 0.00010963, C3 0.000132301, C4 0, D 0.00717292
- Abiotic depletion potential for non fossil resources (ADPE) [kg Sb-Äq.]: A1-A3 2.73522e-6, C1 0, C2 2.94282e-9, C3 2.8491e-8, C4 0, D -1.83322e-6
- Abiotic depletion potential for fossil resources (ADPF) [MJ]: A1-A3 82.8313, C1 0, C2 0.485567, C3 1.73152, C4 0, D -171.917
- Water use (WDP) [m^(3) Welt-Äq. entzogen]: A1-A3 0.198831, C1 0, C2 0.000354871, C3 0.0214536, C4 0, D -0.562659
- Incidence of disease due to PM emissions (PM) [Krankheitsfälle]: A1-A3 9.91102e-8, C1 0, C2 6.98876e-10, C3 1.82306e-9, C4 0, D -3.62169e-8
- Human exposure efficiency relative to U235 (IR) [kBq U235-Äq.]: A1-A3 0.16692, C1 0, C2 0.000132556, C3 0.0430837, C4 0, D -2.42808
- Comparative toxic unit for ecosystems (ETP-fw) [CTUe]: A1-A3 19.8416, C1 0, C2 0.363299, C3 0.741033, C4 0, D -42.108
- Comparative toxic unit for humans (carcinogenic) (HTP-c) [CTUh]: A1-A3 2.69077e-9, C1 0, C2 7.50888e-12, C3 2.04626e-11, C4 0, D -1.66534e-10
- Comparative toxic unit for humans (noncarcinogenic) (HTP-nc) [CTUh]: A1-A3 3.80513e-8, C1 0, C2 4.32665e-10, C3 7.53927e-10, C4 0, D 4.86746e-8
- Soil quality index (SQP) [SQP]: A1-A3 487.175, C1 0, C2 0.17044, C3 0.551082, C4 0, D -31.6173

## Use advice
Scope:
This document refers to coated chipboard EGGER Eurodekor, produced with an average glue mix at the site in Brilon, Germany.

The production conditions in Brilon are comparable to those of the other plants. They correspond to the technologies and standards used in all locations.
System boundary:
The LCA of the average EGGER Eurodekor coated chipboard includes a cradle-to-gate consideration of the occurring environmental impact with the modules C1-C4 and module D (A1-A3, +C, +D). The following life cycle phases are taken into account in the analysis:

Module A1– A3 | Production stage

The production stage includes the expenses of the raw material supply (logs, scrap wood, sawdust, glue system, auxiliary materials, etc.) as well as the associated transports to the production site in Brilon. Within the plant boundaries, the log yard, wet chip preparation, drying, gluing, spreading, pressing, the sanding line up to the warehouse and shipping are taken into account. The Eurodekor products are also finished by applying an impregnation in the short-cycle presses and then packaged. Thermal and electrical energy, compressed air and water are provided by central suppliers at the Brilon site. The majority of the electrical energy used is obtained from the German power grid. Both internal wood waste and scrap wood sourced externally are used in the in-house biomass power plant. The system boundary for the scrap wood used in the production is set after sorting and chopping. It is assumed that the end of the waste status has been reached. The system boundary for secondary raw materials according to EN 15804 applies.

Module C1 | Dismantling / Demolition

Manual dismantling was assumed for the Eurodekor coated chipboard. The associated efforts are negligible, which means that no environmental impact from the dismantling of the products is declared.

Module C2 | Transport to waste treatment

Module C2 includes transport to waste treatment. For this purpose, transport by lorry over a distance of 50 km is used as a representative scenario.

Module C3 | Waste processing

Chopping after product disassembly is considered in module C3. The wood products and with them the material-inherent properties leave the product system as secondary fuel in module C3.

Module C4 | Disposal

The scenario used declares the energy recovery of the wood products, which means that no environmental impact from the waste treatment of the products in C4 are to be expected.

Module D | Credits and charges beyond the limits of the product system The energy utilisation of the product at the end of its life cycle is described in Module D, including energetic substitution potentials as a European average

## Data sources
- GaBi Database (all versions)
- GaBi database SP40 2020
