# Multilayer parquet

Dataset: ILCD process, EPD, average dataset
Geography: AT
Reference year: 2017
Valid until: 2022
Classification: OEKOBAU.DAT: Holz / Holzböden / Parkett
Classification: IBUCategories: 02 Bauprodukte / Produkte aus Bauholz / Vollholzprodukte
Method details: Vollholzprodukte.pdf
Registration number: EPD-PAR-20170076-IBC1-DE
Owner: Parador GmbH
Compliance: DIN EN 15804; ISO 14025
Review: Accredited third party review by Institut Bauen und Umwelt e. V.
Amounts: rows without a unit in brackets have none in this file; such an amount is in the reference unit of its flow, which a separate flow dataset defines
copyright: true

## General comment
Parador multilayer parquet flooring are wooden floors with a top layer made of high-grade wood. The materials required for manufacturing these floors, i.e. sawn timber, planed goods, friezes, veneer or finished surface layers, are manufactured separately. Mainly local wood types are used. Tropical wood is not used for ecological reasons. Depending on the product variant, the surface layer consists of one lamella (wide plank) or several lamellas (block). The individual materials are glued together. After an acclimatisation period, the blanks are surface treated and equipped with a longitudinal and transverse profile according to the product format requirements before being packed.

## Technology and included processes
Technical data:
Essential characteristics and performance in accordance with the Declaration of Performance and the harmonised /EN 14342:2013/ product standard on which they are based.
Declared unit:
The declared unit is one square metre (1m²) multilayer parquet including packaging materials.

The product mix of average annual production comprising wide planks and 3-strip parquet was applied for this declaration. The average variants differ in terms of wood type and treatment of the wear layer as well as in the dimensions.

The average is based on the volumes effectively manufactured in m² and kg.

## Technical purpose
Multilayer parquet flooring complies with the /EN 13489/ standard, is suitable for private and commercial indoor applications, laid on screed or other existing substrates such as wood or tiles in combination with suitable underlays (insulation bases), either installed floated or glued across the entire screed surface. Installation needs to be executed in accordance with the installation instructions, the rules of the trade, and the state of the art.

Use is governed by the respective national regulations.

## Reference product
- Quadratmeter (1 m²) Mehrschichtparkett: 1

## Inputs
- Renewable primary energy as energy carrier (PERE) [MJ]: A1-A3 240.791, A4 0.16658, A5 2.20492, C2 0.033366, C3 112.974, D -21.747
- Renewable primary energy resources as material utilization (PERM) [MJ]: A1-A3 190.459, A4 0, A5 -2.19434, C2 0, C3 -112.861, D 0
- Total use of renewable primary energy resources (PERT) [MJ]: A1-A3 431.25, A4 0.16658, A5 0.01058, C2 0.033366, C3 0.11344, D -21.747
- Non renewable primary energy as energy carrier (PENRE) [MJ]: A1-A3 69.8662, A4 4.5532, A5 1.2669, C2 0.66506, C3 4.6088, D -85.02
- Non renewable primary energy as material utilization (PENRM) [MJ]: A1-A3 1.81979, A4 0, A5 -1.17305, C2 0, C3 0, D 0
- Total use of non renewable primary energy resources (PENRT) [MJ]: A1-A3 71.686, A4 4.5532, A5 0.093852, C2 0.66506, C3 4.6088, D -85.02
- Use of secondary material (SM) [kg]: A1-A3 0.0958, A4 0, A5 0, C2 0, C3 0, D 0
- Use of renewable secondary fuels (RSF) [MJ]: A1-A3 14.7, A4 0, A5 0, C2 0, C3 0, D 45.14
- Use of non renewable secondary fuels (NRSF) [MJ]: A1-A3 0, A4 0, A5 0, C2 0, C3 0, D 0
- Use of net fresh water (FW) [m^3]: A1-A3 0.046722, A4 0.00032834, A5 0.00079436, C2 6.1795e-5, C3 0.029924, D -0.006671

## Outputs
- Hazardous waste disposed (HWD) [kg]: A1-A3 3.2202e-6, A4 1.8249e-7, A5 9.5277e-10, C2 3.4917e-8, D -3.3295e-8
- Non hazardous waste disposed (NHWD) [kg]: A1-A3 0.081866, A4 0.00027047, A5 0.004321, C2 5.0835e-5, D -0.037912
- Radioactive waste disposed (RWD) [kg]: A1-A3 0.0026543, A4 6.0683e-6, A5 4.7297e-6, C2 9.0721e-7, C3 0.00025646, D -0.0016558
- Components for re-use (CRU) [kg]: A1-A3 0, A4 0, A5 0, C2 0, C3 0, D 0
- Materials for recycling (MFR) [kg]: A1-A3 0, A4 0, A5 0, C2 0, C3 0.820275, D 0
- Materials for energy recovery (MER) [kg]: A1-A3 2.63798, A4 0, A5 0, C2 0, C3 0, D 0
- Exported electrical energy (EEE) [MJ]: A1-A3 5.32395, A4 0, A5 0.4319, C2 0, C3 13.577, D 0
- Exported thermal energy (EET) [MJ]: A1-A3 1.89999, A4 0, A5 1.042, C2 0, C3 41.68, D 0

## Impact indicators
- Global warming potential (GWP) [kg CO_(2)-Äq.]: A1-A3 -10.35, A4 0.33851, A5 0.30125, C2 0.047975, C3 11.714, D -1.6659
- Depletion potential of the stratospheric ozone layer (ODP) [kg CFC11-Äq.]: A1-A3 1.6533e-8, A4 1.5055e-13, A5 7.0226e-11, C2 1.6099e-14, C3 2.0466e-8, D 6.6599e-9
- Acidification potential of land and water (AP) [kg SO_(2)-Äq.]: A1-A3 0.017283, A4 0.0036987, A5 5.4077e-5, C2 0.00029433, C3 0.0043825, D -0.0057606
- Eutrophication potential (EP) [kg PO_(4)^(3)-Äq.]: A1-A3 0.0037274, A4 0.00053038, A5 1.0666e-5, C2 7.4676e-5, C3 0.0010008, D -0.00089673
- Formation potential of tropospheric ozone photochemical oxidants (POCP) [kg Ethen-Äq.]: A1-A3 0.0062409, A4 -0.00028035, A5 1.1689e-7, C2 -0.00013101, C3 0.00027251, D -0.00083696
- Abiotic depletion potential for non fossil resources (ADPE) [kg Sb-Äq.]: A1-A3 2.7703e-6, A4 1.7689e-8, A5 2.4862e-9, C2 3.8579e-9, C3 -3.5134e-7, D -1.564e-6
- Abiotic depletion potential for fossil resources (ADPF) [MJ]: A1-A3 64.426, A4 4.5377, A5 0.081271, C2 0.66274, C3 3.7077, D -80.876

## Use advice
Scope:
This EPD refers to the production, transport, installation and disposal of one average square metre of Parador multilayer parquet. The various technical characteristics are described in section 2.3. The product is produced at the manufacturing site in Güssing, Austria. Products are shipped from the Coesfeld site in Germany.

This document is translated from the German Environmental Product Declaration into English. It is based on the German original version EPD-PAR-20170076-IBC1-DE. The verifier has no influence on the quality of the translation.
System boundary:
Type of EPD: cradle to factory gate with options

Modules A1-3, A4 and A5

The product stage (A1-3) commences with considering production of the necessary raw materials and energies including all relevant upstream chains and the effective procurement transport. Internal transports by truck and rail between the Austrian production site (Güssing) and German headquarters (Coesfeld) are also part of Modules A1-A3.

Furthermore, the entire manufacturing phase was considered, including processing of production waste until end-of-waste status. The distribution transports from Coesfeld / DE (A4) were also considered as well as the packaging waste incurred during installation (A5). Product losses as well as tools, ancillary materials and installation materials requiring electricity were not considered in A5.

Modules C2-3

The modules include the environmental impacts associated with processing the waste fractions until end-of-waste status, including transport at the end of the product life cycle.

Module D

Indication of product loads and credits outside the system boundary. These consist of energy credits from thermal utilisation (C3) in the form of the average Austrian electricity mix or thermal energy from natural gas.

## Data sources
- Mehrschichtparkett.pdf
- GaBi Database (all versions)
- GaBi database SP27 2015
