# Keramische Fassadenplatte TONALITY®

Dataset: ILCD process, EPD, specific dataset
Geography: DE
Reference year: 2019
Valid until: 2024
Classification: OEKOBAU.DAT: Mineralische Baustoffe / Steine und Elemente / Fliesen und Platten
Classification: IBUCategories: 02 Bauprodukte / Fassaden / Keramische Bekleidung
Method details: Keramische Bekleidung.pdf
Registration number: EPD-TON-20190011-IBA1-DE
Owner: TONALITY GmbH
Compliance: DIN EN 15804; ISO 14025
Review: Accredited third party review by Institut Bauen und Umwelt e. V.
Amounts: rows without a unit in brackets have none in this file; such an amount is in the reference unit of its flow, which a separate flow dataset defines
copyright: true

## General comment
Beim deklarierten Produkt handelt es sich um ebene keramische Fassadenplatten aus Ton. Die Platten werden aus verschiedenen Tonmassen hergestellt und erhalten durch abgestimmte Brandkurven ihre Oberfläche bzw. ihre Farben. Sie sind einschalige Platten als auch Platten mit Hohlräumen für vorgehängt hinterlüftete Fassaden. Die Fassadenplatten werden mittels systemgebundener Aluminium Unterkonstruktion an primäre Tragsysteme der Fassade angebunden.

## Technology and included processes
Die Herstellung der keramischen Fassadenplatten gliedert sich in acht Prozessschritte: Bei der Rohstoffaufbereitung werden die benötigten Komponenten dosiert, homogenisiert und unter Zugabe von Wasser zu einer plastischen Arbeitsmasse angemischt. Die Formgebung gibt der plastischen Masse durch Strangziehen seine gewünschte Form. Im Prozessschritt Trocknung wird das in den stranggezogenen Rohlingen enthaltene Wasser schonend für das Produkt ausgetrieben. Die getrockneten Ziegel werden bei der Oberflächenveredlung engobiert oder glasiert. Durch das Brennen in einem Rollenofen erhalten die Fassadenelemente ihre technischen Eigenschaften und ihr spezielles Aussehen. Beim Schneiden werden die Fassadenelemente exakt auf die gewünschte Länge geschnitten. In der Qualitätskontrolle werden diese stichprobenartig optisch geprüft und vermessen. Im letzten Produktionsschritt Verpackung werden die Fassadenelemente gemäß den Anforderungen des Kunden transportsicher verpackt.
Deklarierte Einheit:
Die Deklaration bezieht sich auf 1 m² keramischer Fassadenplatten inklusive systemgebundener Aluminium-Unterkonstruktion. Das durchschnittliche Flächengewicht einer keramischen Fassadenplatte (ohne Unterkonstruktion) beträgt 40,8 kg/m², das der Unterkonstruktion beträgt 0,52 kg/m².

Die Rohdichte des deklarierten Produkts ist 2000-2200 kg/m³.

Der Umrechnungsfaktor zu 1 kg (inkl. Unterkonstruktion) ist 41,32 kg/m²

## Technical purpose
TONALITY® findet seine Anwendung als Bekleidungsmaterial in vorgehängt- hinterlüfteten Fassaden sowie für den dekorativen Innenausbau. Die Fassadenplatten werden auch für Unterdecken, Leibungen und Abdeckungen verwendet.

## Reference product
- 1 m² keramischer Fassadenplatten inklusive systemgebundener Aluminium-Unterkonstruktion: 1

## Inputs
- Erneuerbare Primärenergie als Energieträger (PERE) [MJ]: A1-A3 77.7224, A5 14.1461, C2 0.0872276, C3 0, C4 1.08111, D -18.7576
- Erneuerbare Primärenergie zur stofflichen Nutzung (PERM) [MJ]: A1-A3 14.054, A5 -14.054, C2 0, C3 0, C4 0, D 0
- Total erneuerbare Primärenergie (PERT) [MJ]: A1-A3 91.7764, A5 0.0920737, C2 0.0872276, C3 0, C4 1.08111, D -18.7576
- Nicht-erneuerbare Primärenergie als Energieträger (PENRE) [MJ]: A1-A3 633.352, A5 5.60117, C2 1.29508, C3 0, C4 8.71369, D -63.5841
- Nicht-erneuerbare Primärenergie zur stofflichen Nutzung (PENRM) [MJ]: A1-A3 5.0912, A5 -5.0912, C2 0, C3 0, C4 0, D 0
- Total nicht erneuerbare Primärenergie (PENRT) [MJ]: A1-A3 638.443, A5 0.509966, C2 1.29508, C3 0, C4 8.71369, D -63.5841
- Einsatz von Sekundärstoffen (SM) [kg]: A1-A3 0.102, A5 0, C2 0, C3 0, C4 0, D 0
- Erneuerbare Sekundärbrennstoffe (RSF) [MJ]: A1-A3 0, A5 0, C2 0, C3 0, C4 0, D 0
- Nicht erneuerbare Sekundärbrennstoffe (NRSF) [MJ]: A1-A3 0, A5 0, C2 0, C3 0, C4 0, D 0
- Einsatz von Süßwasserressourcen (FW) [m^3]: A1-A3 108.551, A5 5.39694, C2 0.101113, C3 0, C4 1.66012, D -34.826

## Outputs
- Gefährlicher Abfall zur Deponie (HWD) [kg]: A1-A3 6.19634e-7, A5 4.75527e-10, C2 8.30594e-8, C3 0, C4 1.49939e-7, D 2.54882e-8
- Entsorgter nicht gefährlicher Abfall (NHWD) [kg]: A1-A3 1.91669, A5 0.00667916, C2 9.66192e-5, C3 0, C4 40.8721, D -0.827082
- Entsorgter radioaktiver Abfall (RWD) [kg]: A1-A3 0.0162481, A5 1.93946e-5, C2 1.56395e-6, C3 0, C4 0.000124855, D -0.00482087
- Komponenten für die Wiederverwendung (CRU) [kg]: A1-A3 0, A5 0, C2 0, C3 0, C4 0, D 0
- Stoffe zum Recycling (MFR) [kg]: A1-A3 0, A5 0, C2 0, C3 0.442, C4 0, D 0
- Stoffe für die Energierückgewinnung (MER) [kg]: A1-A3 0, A5 0, C2 0, C3 0, C4 0, D 0
- Exportierte elektrische Energie (EEE) [MJ]: A1-A3 0, A5 2.96, C2 0, C3 0, C4 0, D 0
- Exportierte thermische Energie (EET) [MJ]: A1-A3 0, A5 6.917, C2 0, C3 0, C4 0, D 0

## Impact indicators
- Globales Erwärmungspotenzial (GWP) [kg CO_(2)-Äq.]: A1-A3 41.698, A5 2.24398, C2 0.0966059, C3 0, C4 0.650247, D -4.577
- Abbau Potential der stratosphärischen Ozonschicht (ODP) [kg CFC11-Äq.]: A1-A3 2.26334e-11, A5 2.21518e-14, C2 2.02554e-15, C3 0, C4 1.44643e-13, D -7.28222e-13
- Versauerungspotenzial von Boden und Wasser (AP) [kg SO_(2)-Äq.]: A1-A3 0.0709309, A5 0.000273384, C2 9.57845e-5, C3 0, C4 0.00384376, D -0.0145839
- Eutrophierungspotenzial (EP) [kg PO_(4)^(3)-Äq.]: A1-A3 0.00778755, A5 5.98829e-5, C2 2.24556e-5, C3 0, C4 0.000530894, D -0.0010905
- Bildungspotential für troposphärisches Ozon (POCP) [kg Ethen-Äq.]: A1-A3 0.00618447, A5 1.81561e-5, C2 3.78417e-6, C3 0, C4 0.00029881, D -0.000867609
- Potenzial für den abiotischen Abbau nicht fossiler Ressourcen (ADPE) [kg Sb-Äq.]: A1-A3 0.000246783, A5 3.19412e-8, C2 1.00042e-8, C3 0, C4 2.49934e-7, D -1.65703e-6
- Potenzial für den abiotischen Abbau fossiler Brennstoffe (ADPF) [MJ]: A1-A3 597.317, A5 0.46098, C2 1.29106, C3 0, C4 8.39809, D -51.3547

## Use advice
Gültigkeitsbereich:
Die EPD bezieht sich auf keramische Fassadenelemente des Produktionswerkes Weroth (In der Mark 100, 56414 Weroth), die von der TONALITY GmbH unter der Handelsmarke TONALITY® geführt werden.
Systemgrenze:
Die Deklaration entspricht einer EPD vom Typ "Wiege bis Werkstor - mit Optionen".

Die Ökobilanz berücksichtigt die Rohstoffgewinnung und -bereitstellung, Rohstofftransporte und die eigentliche Produktherstellung sowie Verpackungsmaterialien (Module A1-A3), die Behandlung der Verpackungsmaterialien in Müllverbrennungsanlagen nach dem Einbau des Produktes (Modul A5), sowie den Transport nach dem Rückbau (Modul C2) und das End-of-Life (Deponierung der Fassadenplatte auf einer Inertstoffdeponie (Modul C4) und die Wiederverwertung der Aluminium-Unterkonstruktion (Modul D). Die Gutschriften für Strom und thermische Energie aus der Entsorgung der Verpackung wurden ebenfalls berücksichtigt (Modul D).

Das Modul C3 weist lediglich den Indikator MFR (Stoffe zum Recycling) aus. Hierbei wird die Menge Aluminium ausgewiesen, die zu Gutschriften in Modul D führt.

Das Nutzungsstadium (Modul B) ist in dieser Studie nicht berücksichtigt.

## Data sources
- Keramische Fassadenplatte TONALITY®.pdf
- GaBi Database (all versions)
- GaBi database SP35 2018
