# RESITRIX® SK W Full Bond, RESITRIX® SW und RESITRIX® SK Partial Bond

Dataset: ILCD process, EPD, average dataset
Geography: DE
Reference year: 2021
Valid until: 2026
Classification: OEKOBAU.DAT: Kunststoffe / Dachbahnen / Bitumen-Dachbahnen
Classification: IBUCategories: 02 Bauprodukte / Abdichtungen / Dach- und Dichtungsbahnsysteme aus Kunststoffen und Elastomeren
Method details: Dach- und Dichtungsbahnsysteme aus Kunststoffen und Elastomeren.pdf
Generated by: Sphera Solutions GmbH
Registration number: EPD-CCM-20200226-IBD1-DE
Owner: CARLISLE Construction Materials GmbH
Compliance: DIN EN 15804+A2; ISO 14025
Review: Accredited third party review by Institut Bauen und Umwelt e. V.
Amounts: rows without a unit in brackets have none in this file; such an amount is in the reference unit of its flow, which a separate flow dataset defines
copyright: true
licenseType: Free of charge for all users and uses
accessRestrictions: None

## General comment
RESITRIX® SK W Full Bond, RESITRIX® SW und RESITRIX® SK Partial Bond sind heißluftverschweißbare Dach- und Dichtungsbahnen auf der Basis des Synthesekautschuks EPDM mit einer Einlage aus Glasgelege. Die Unterseite ist mit einer polymermodifizierten, selbstklebenden Bitumenschicht versehen. Diese ist mit einer Trennfolie geschützt. Die selbstklebenden EPDM-Dichtungsbahnen können für die voll- und teilflächige Verklebung eingesetzt werden.

## Technology and included processes
The mixture production from the individual polymers and the associated additives takes place discontinuously in Hamburg in an internal mixer, into which the mixture components polymers, fillers, carbon black, mineral oil, processing aids and the cross-linking system are fed fully automatically via dosing and weighing systems. The mixture produced in this way is processed into webs in a four-roll calender with a glass scrim insert. This manufacturing step also takes place in Hamburg. This is followed by the crosslinking (vulcanization) of the elastomer sealing sheets in automatic vulcanization machines. After passing through a strict quality control, the coating with polymer-modified bitumen takes place in Waltershausen. The self-adhesive, polymer-modified bitumen mass is produced using an intensive mixer with downstream agitators. In this fully automatic process, quality control, cutting to length, banding and transport-proof packaging on pallets takes place again. Development and production are subject to the quality management system in accordance with ISO 9001. External quality monitoring and tests of the in-house production control are carried out by independent test institutes at regular intervals, e. B .: - Material testing office NRW / Dortmund, - BBA (British Board of Agrѐment Cert. No.06 / 4329) / UK, - FM Approvals (Approval Ident. No. PR452370) / USA, - KIWA (KOMO attest K75248) / Netherlands, - BUtgb (ATG / 1790) / Belgium and others.

## Technical purpose
RESITRIX® SK W Full Bond ist für die vollflächige Verklebung und für Dächer unter Auflast, speziell für das Gründach, geeignet.

RESITRIX® SW ist zur Bauwerksabdichtung geeignet.

RESITRIX® SK Partial Bond ist speziell für den Einsatz im Sanierungsbereich und für die teilflächige Verklebung auf geeignetem Dämmstoff und Holzwerkstoffen vorgesehen.

Die Verlegeanleitung des Herstellers ist einzuhalten.

## Reference product
- 1 m² RESITRIX SK (W FB + PB) (): 1

## Inputs
- Renewable primary energy as energy carrier (PERE) [MJ]: A1-A3 10.6532, C1 0, C2 0.00505, C3 0.357, C4 0, D -12.2
- Renewable primary energy resources as material utilization (PERM) [MJ]: A1-A3 3.03261, C1 0, C2 0, C3 0, C4 0, D 0
- Total use of renewable primary energy resources (PERT) [MJ]: A1-A3 13.6858, C1 0, C2 0.00505, C3 0.357, C4 0, D -12.2
- Non renewable primary energy as energy carrier (PENRE) [MJ]: A1-A3 138.554, C1 0, C2 0.0868, C3 76.85, C4 0, D -48
- Non renewable primary energy as material utilization (PENRM) [MJ]: A1-A3 75.737, C1 0, C2 0, C3 -75.35, C4 0, D 0
- Total use of non renewable primary energy resources (PENRT) [MJ]: A1-A3 214.291, C1 0, C2 0.0868, C3 1.5, C4 0, D -48
- Use of secondary material (SM) [kg]: A1-A3 0, C1 0, C2 0, C3 0, C4 0, D 0
- Use of renewable secondary fuels (RSF) [MJ]: A1-A3 0, C1 0, C2 0, C3 0, C4 0, D 0
- Use of non renewable secondary fuels (NRSF) [MJ]: A1-A3 0, C1 0, C2 0, C3 0, C4 0, D 0
- Use of net fresh water (FW) [m^3]: A1-A3 0.0215566, C1 0, C2 4.53e-6, C3 0.0152, C4 0, D -0.00663

## Outputs
- Hazardous waste disposed (HWD) [kg]: A1-A3 2.9483e-7, C1 0, C2 3.24e-9, C3 6.52e-9, C4 0, D -2.53e-8
- Non hazardous waste disposed (NHWD) [kg]: A1-A3 0.14268, C1 0, C2 1.52e-5, C3 0.18, C4 0, D -0.0227
- Radioactive waste disposed (RWD) [kg]: A1-A3 0.00146723, C1 0, C2 9.14e-8, C3 5.08e-5, C4 0, D -0.00176
- Components for re-use (CRU) [kg]: A1-A3 0, C1 0, C2 0, C3 0, C4 0, D 0
- Materials for recycling (MFR) [kg]: A1-A3 0, C1 0, C2 0, C3 0, C4 0, D 0
- Materials for energy recovery (MER) [kg]: A1-A3 0, C1 0, C2 0, C3 2.75, C4 0, D 0
- Exported electrical energy (EEE) [MJ]: A1-A3 0, C1 0, C2 0, C3 11, C4 0, D 0
- Exported thermal energy (EET) [MJ]: A1-A3 0, C1 0, C2 0, C3 25, C4 0, D 0

## Impact indicators
- Global Warming Potential total (GWP-total) [kg CO_(2)-Äq.]: A1-A3 8.2547, C1 0, C2 0.00656, C3 5.09, C4 0, D -3.37
- Global Warming Potential fossil fuels (GWP-fossil) [kg CO_(2)-Äq.]: A1-A3 8.53832, C1 0, C2 0.00653, C3 5.09, C4 0, D -3.35
- Global Warming Potential biogenic (GWP-biogenic) [kg CO_(2)-Äq.]: A1-A3 -0.29, C1 0, C2 2.63e-6, C3 0.000454, C4 0, D -0.014
- Global Warming Potential luluc (GWP-luluc) [kg CO_(2)-Äq.]: A1-A3 0.0063697, C1 0, C2 2.73e-5, C3 0.000175, C4 0, D -0.00433
- Depletion potential of the stratospheric ozone layer (ODP) [kg CFC11-Äq.]: A1-A3 1.0979e-12, C1 0, C2 1.6e-18, C3 1.49e-15, C4 0, D -5.19e-14
- Acidification potential of land and water (AP) [mol H^(+)-Äq.]: A1-A3 0.01188, C1 0, C2 5.49e-6, C3 0.000832, C4 0, D -0.00369
- Eutrophication potential aquatic freshwater (EP-freshwater) [kg PO_(4)-Äq.]: A1-A3 2.24161e-5, C1 0, C2 1.42e-8, C3 4.69e-7, C4 0, D -7.09e-6
- Eutrophication potential aquatic marine (EP-marine) [kg N-Äq.]: A1-A3 0.00289476, C1 0, C2 1.59e-6, C3 0.000204, C4 0, D -0.0012
- Eutrophication potential terrestrial (EP-terrestrial) [mol N-Äq.]: A1-A3 0.0317039, C1 0, C2 1.96e-5, C3 0.00392, C4 0, D -0.0128
- Formation potential of tropospheric ozone photochemical oxidants (POCP) [kg NMVOC-Äq.]: A1-A3 0.0108026, C1 0, C2 4.41e-6, C3 0.000544, C4 0, D -0.00321
- Abiotic depletion potential for non fossil resources (ADPE) [kg Sb-Äq.]: A1-A3 214.291, C1 0, C2 0.0868, C3 1.5, C4 0, D -48
- Abiotic depletion potential for fossil resources (ADPF) [MJ]: A1-A3 3.30902e-5, C1 0, C2 5.43e-10, C3 2.12e-8, C4 0, D -7.31e-7
- Water use (WDP) [m^(3) Welt-Äq. entzogen]: A1-A3 0.22685, C1 0, C2 2.81e-5, C3 0.649, C4 0, D -0.0386
- Incidence of disease due to PM emissions (PM) [Krankheitsfälle]: A1-A3 1.72692e-7, C1 0, C2 6.19e-11, C3 1.14e-8, C4 0, D -2.79e-8
- Human exposure efficiency relative to U235 (IR) [kBq U235-Äq.]: A1-A3 0.139613, C1 0, C2 8.82e-6, C3 0.00458, C4 0, D -0.159
- Comparative toxic unit for ecosystems (ETP-fw) [CTUe]: A1-A3 108.546, C1 0, C2 0.0722, C3 0.709, C4 0, D -8.44
- Comparative toxic unit for humans (carcinogenic) (HTP-c) [CTUh]: A1-A3 4.52461e-9, C1 0, C2 1.72e-12, C3 3.94e-11, C4 0, D -4.73e-10
- Comparative toxic unit for humans (noncarcinogenic) (HTP-nc) [CTUh]: A1-A3 1.60637e-7, C1 0, C2 7.65e-11, C3 1.55e-9, C4 0, D -1.97e-8
- Soil quality index (SQP) [SQP]: A1-A3 49.6336, C1 0, C2 0.0272, C3 0.495, C4 0, D -10.8

## Use advice
Gültigkeitsbereich:
Die vorliegende Ökobilanz bezieht sich auf den Lebenszyklus der Dach- und Dichtungsbahnen RESITRIX® SK W Full Bond, RESITRIX® SW und RESITRIX® SK Partial Bond. Hersteller ist die Firma Carlisle Construction Materials GmbH mit Sitz in Hamburg.

Es handelt sich um heißluftverschweißbare Abdichtungsbahnen auf der Basis des Synthesekautschuks EPDM mit einer Einlage aus Glasgelege. Die Unterseite ist mit einer polymermodifizierten, selbstklebenden Bitumenschicht versehen.

Die EPDM-Schicht wird in Hamburg hergestellt. In Waltershausen (Thüringen) erfolgt die Beschichtung mit polymermodifiziertem Bitumen.
Systemgrenze:
Typ der EPD: Wiege bis Werkstor - mit Optionen. Die Ökobilanz berücksichtigt die Rohstoff- und Energiegewinnung, Rohstofftransporte und die Produktherstellung (Module A1–A3) sowie den manuellen Rückbau (Modul C1), den Transport nach dem Rückbau (Modul C2), die Abfallbehandlung (thermische Verwertung, Modul C3) und Gutschriften und Lasten außerhalb der Systemgrenze für die thermische Verwertung (Modul D).

## Data sources
- GaBi Database (all versions)
- GaBi database SP40 2020
