# HENSOTHERM® 410 KS / 420 KS / 421 KS / 461 KS / 471 KS und RENITHERM® PMA 600 HD / 1200 HD

Dataset: ILCD process, EPD, average dataset
Geography: GLO
Reference year: 2019
Valid until: 2024
Classification: OEKOBAU.DAT: Beschichtungen / Brandschutz / Innen- und Außenbeschichtungen
Classification: IBUCategories: 02 Bauprodukte / Bauklebstoffe und Beschichtungen / Beschichtungen mit organischen Bindemitteln
Method details: Beschichtungen mit organischen Bindemitteln.pdf
Registration number: EPD-RHG-20190097-IAC1-DE
Owner: Rudolf Hensel GmbH
Compliance: DIN EN 15804; ISO 14025
Review: Accredited third party review by Institut Bauen und Umwelt e. V.
Amounts: rows without a unit in brackets have none in this file; such an amount is in the reference unit of its flow, which a separate flow dataset defines
copyright: true

## General comment
HENSOTHERM® 410 KS / 420 KS / 421 KS / 461 KS / 471 KS and RENITHERM® PMA 600 HD / 1200 HD are water-based intumescent fire protection coatings. They are factory-produced dispersion coatings with organic binding agents, water, mineral fillers, pigments and additives. The coatings are classified as low-emission, and contain no borates, plasticisers, halogens, formaldehydes or alkylphenol ethoxylates (APEO). The fire protection coatings are part of the "Green Product Line" of Rudolf Hensel GmbH.

## Technology and included processes
HENSOTHERM® 410 KS / 420 KS / 421 KS / 461 KS / 471 KS and RENITHERM® PMA 600 HD / 1200 HD are manufactured in a fully-automatic dispersing unit. The dosage of the liquid raw materials is effected largely automatically; powders are dosed manually. The preliminary products required for manufacture are made available after an inspection of the incoming materials. After the batches have been produced, an internal quality control is carried out. This comprises technical quality characteristics relating to paint and fire protection requirements. Besides the internal factory control, official external monitoring takes place at regular intervals.
Technical data:
HENSOTHERM® 410 KS / 420 KS / 421 KS / 461 KS / 471 KS and RENITHERM® PMA 600 HD / 1200 HD do not contain any hazardous substances exceeding the limit values in accordance with the /REACH Directive, Annex XVII/ and the /ECHA candidate list/ of substances of very high concern.
Declared unit:
The declared unit is a fire retardant by Rudolf Hensel GmbH with the designations HENSOTHERM® 410 KS / 420 KS / 421 KS / 461 KS / 471 KS or RENITHERM® PMA 600 HD / 1200 HD, with packaging. The calculated weight is one kilogram of the fire retardant. The packaging is also included in the calculation. The following table depicts the data on the declared unit.

## Technical purpose
Fire protection of steel components with H and I profiles (columns and beams) and hollow sections for a fire resistance duration of up to 180 minutes in accordance with /EN13501-2/ and for design temperatures of 350 °C to 750 °C.

The products are suitable for galvanised surfaces.

In general, the complete coating system consists of a suitable anti-corrosion primer, the fire protection coating and, if required, a suitable topcoat. Primers and topcoats are not components of this EPD.

European Technical Assessment in accordance with /EAD 350402-00-1106/:

The main application of HENSOTHERM® 410 KS is for fire resistance durations of 30 – 60 minutes; HENSOTHERM® 420 KS and HENSOTHERM® 421 KS mainly cover the range from 90 − 120 minutes.

Approval in accordance with Warrington Certifire Ltd. – /TS15/, Intumescent Coatings for Steelwork:

The main application of HENSOTHERM® 461 KS is for fire resistance durations of 30 – 60 minutes; HENSOTHERM® 471 mainly covers the range from 90 − 180 minutes. RENITHERM® PMA 600 HD is a multiple listing transfer from HENSOTHERM® 461 KS while RENITHERM® PMA 1200 HD is a multiple listing transfer from HENSOTHERM® 471 KS.

All fire protection coatings referred to above are mainly used indoors and in open buildings. They are not to be used on construction units that are constantly exposed to rain or moisture or aggressive gases for a longer period of time.

## Reference product
- HENSOTHERM® 410 KS / 420 KS / 421 KS / 461 KS / 471 KS und RENITHERM® PMA 600 HD / 1200 HD [1 kg]: 1

## Inputs
- Renewable primary energy as energy carrier (PERE) [MJ]: A1-A3 2.34425
- Renewable primary energy resources as material utilization (PERM) [MJ]: A1-A3 0
- Total use of renewable primary energy resources (PERT) [MJ]: A1-A3 2.34425
- Non renewable primary energy as energy carrier (PENRE) [MJ]: A1-A3 23.65
- Non renewable primary energy as material utilization (PENRM) [MJ]: A1-A3 12.12
- Total use of non renewable primary energy resources (PENRT) [MJ]: A1-A3 35.771
- Use of secondary material (SM) [kg]: A1-A3 0
- Use of renewable secondary fuels (RSF) [MJ]: A1-A3 0
- Use of non renewable secondary fuels (NRSF) [MJ]: A1-A3 0
- Use of net fresh water (FW) [m^3]: A1-A3 31.9783

## Outputs
- Hazardous waste disposed (HWD) [kg]: A1-A3 2.91966e-8
- Non hazardous waste disposed (NHWD) [kg]: A1-A3 0.00561102
- Radioactive waste disposed (RWD) [kg]: A1-A3 0.000276118
- Components for re-use (CRU) [kg]: A1-A3 0
- Materials for recycling (MFR) [kg]: A1-A3 0
- Materials for energy recovery (MER) [kg]: A1-A3 0
- Exported electrical energy (EEE) [MJ]: A1-A3 0
- Exported thermal energy (EET) [MJ]: A1-A3 0

## Impact indicators
- Global warming potential (GWP) [kg CO_(2)-Äq.]: A1-A3 1.81302
- Depletion potential of the stratospheric ozone layer (ODP) [kg CFC11-Äq.]: A1-A3 1.0702e-7
- Acidification potential of land and water (AP) [kg SO_(2)-Äq.]: A1-A3 0.0201458
- Eutrophication potential (EP) [kg PO_(4)^(3)-Äq.]: A1-A3 0.00328143
- Formation potential of tropospheric ozone photochemical oxidants (POCP) [kg Ethen-Äq.]: A1-A3 0.000969366
- Abiotic depletion potential for non fossil resources (ADPE) [kg Sb-Äq.]: A1-A3 8.1343e-6
- Abiotic depletion potential for fossil resources (ADPF) [MJ]: A1-A3 33.5613

## Use advice
Scope:
This document refers to HENSOTHERM® 410 KS / 420 KS / 421 KS / 461 KS / 471 KS and RENITHERM® PMA 600 HD / 1200 HD. Specific data from the Rudolf Hensel GmbH manufacturing plant in Börnsen was used for generating this LCA. This LCA is based on data from 2018 which corresponds with the annual average.
System boundary:
Type of EPD: cradle to plant gate. The following information modules are defined in this study as system boundaries:

A1-A3 Product stage:

• A1, Raw material supply

• A2, Transport to manufacturer

• A3, Production

A total of three information modules are reviewed in order to obtain an accurate record of the indicators and environmental impact of the declared unit. Information modules A1 to A3 outline the provision of raw materials, transport to the production facility and the actual product production process. All preliminary products are procured mainly in Germany. Transport is exclusively by truck. The following process diagram depicts the production process on which this is based.

Fig.: Flow chart of the production process

## Data sources
- HENSOTHERM® 410 KS / 420 KS / 421 KS / 461 KS / 471 KS und RENITHERM® PMA 600 HD / 1200 HD.pdf
- GaBi Database (all versions)
- GaBi database SP37 2019
