# Usage - gas heat pump air (20 kW, 7 °C, acc. EnEV); (20 kW) 7°C

Dataset: ILCD process, EPD, generic dataset
Geography: DE
Reference year: 2021
Valid until: 2022
Classification: oekobau.dat: Gebäudetechnik / Nutzung / Nutzung Wärmeerzeuger (EnEV)
Owner: Sphera Solutions GmbH
Compliance: EN 15804+A2
Review: Dependent internal review by Sphera Solutions GmbH; Independent external review by GaBi user forum
Amounts: rows without a unit in brackets have none in this file; such an amount is in the reference unit of its flow, which a separate flow dataset defines
copyright: true
licenseType: Free of charge for all users and uses
accessRestrictions: The license conditions as stated on https://www.oekobaudat.de/ apply.
accessRestrictions: Es gelten die Lizenzbedingungen wie sie auf https://www.oekobaudat.de/ genannt sind.

## General comment
This data set has been modeled according to the European Standard EN 15804+A2 for Sustainable Building. Results are depicted in modules that allow the structured expression of results over the entire life cycle.

## Geography
The data set represents the country specific situation in Germany, focusing on the main technologies, the region specific characteristics and / or import statistics.

## Time period
Annual average

## Technology and included processes
Heat pumps are at the moment mainly operated with cold steam compression processing. In the process heated refrigerant is compressed by the heat source and added to the liquefier. By releasing heat it is converted again to liquid and then reheated by the heat source (soil, ground water). The liquifaction heat released by a heat exchanger is supplied to a customer, e.g. a heating circuit. The energy needed for the compression is added to the system by electricity. The demand for natural gas and additional energy (electricity) mainly depends on the temperature of the environment in the heating period.

The data set was created according to the German EnEV (Energieeinsparverordnung or Energy Saving Ordinance). The auxiliary energy as well as the current requirement of a circulating pump is not included in this data set. Usage data corresponding to EnEV shall be used if the final energy according to EnEV is used as the initial value.

Background system:
Electricity: Electricity is modelled according to the individual country-specific situations. The country-specific modelling is achieved on multiple levels. Firstly, individual energy carrier specific power plants and plants for renewable energy sources are modelled according to the current national electricity grid mix. Modelling the electricity consumption mix includes transmission / distribution losses and the own use by energy producers (own consumption of power plants and "other" own consumption e.g. due to pumped storage hydro power etc.), as well as imported electricity. Secondly, the national emission and efficiency standards of the power plants are modelled as well as the share of electricity plants and combined heat and power plants (CHP). Thirdly, the country-specific energy carrier supply (share of imports and / or domestic supply) including the country-specific energy carrier properties (e.g. element and energy content) are accounted for. Fourthly, the exploration, mining/production, processing and transport processes of the energy carrier supply chains are modelled according to the specific situation of each electricity producing country. The different production and processing techniques (emissions and efficiencies) in the different energy producing countries are considered, e.g. different crude oil production technologies or different flaring rates at the oil platforms.
Thermal energy, process steam: The thermal energy and process steam supply is modelled according to the individual country-specific situation with regard to emission standards and considered energy carriers. The thermal energy and process steam are produced at heat plants. Efficiencies for thermal energy production are by definition 100% in relation to the corresponding energy carrier input. For process steam the efficiency ranges from 85%, 90% to 95%. The energy carriers used for the generation of thermal energy and process steam are modelled according to the specific import situation (see electricity above).
Transports: All relevant and known transport processes are included. Ocean-going and inland ship transport as well as rail, truck and pipeline transport of bulk commodities are considered.
Energy carriers: The energy carriers are modelled according to the specific supply situation (see electricity above).
Refinery products: Diesel fuel, gasoline, technical gases, fuel oils, lubricants and residues such as bitumen are modelled with a parameterised country-specific refinery model. The refinery model represents the current national standard in refining techniques (e.g. emission level, internal energy consumption, etc.) as well as the individual country-specific product output spectrum, which can be quite different from country to country. The supply of crude oil is modelled, again, according to the country-specific situation with the respective properties of the resources.

## Technical purpose
This product can be used in construction.

## Safety margin
0 %.

## Reference product
- Usage - gas heat pump air (20 kW, 7 °C, acc. EnEV): 3.6

## Inputs
- Use of renewable primary energy as energy carrier (PERE) [MJ]: B6 3.6081
- Use of renewable primary energy resources used as raw materials (PERM) [MJ]: B6 0
- Total use of renewable primary energy (PERT) [MJ]: B6 3.6081
- Use of non renewable primary energy as energy carrier (PENRE) [MJ]: B6 3.46683
- Use of non renewable primary energy resources used as raw materials (PENRM) [MJ]: B6 0
- Total use of non renewable primary energy resource (PENRT) [MJ]: B6 3.46683
- Use of secondary material (SM) [kg]: B6 0
- Use of renewable secondary fuels (SF) [MJ]: B6 0
- Use of non renewable secondary fuels (NRSF) [MJ]: B6 0
- Net use of fresh water (FW) [m3]: B6 1.13705e-5

## Outputs
- Hazardous waste disposed (HWD) [kg]: B6 9.85135e-10
- Non harzardous waste disposed (NHWD) [kg]: B6 0.001092
- Radioactive waste disposed (RWD) [kg]: B6 8.27742e-7
- Components for re-use (CRU) [kg]: B6 0
- Materials for recycling (MFR) [kg]: B6 0
- Materials for energy recovery (MER) [kg]: B6 0
- Exported electrical energy (EEE) [MJ]: B6 0
- Exported thermal energy (EET) [MJ]: B6 0

## Impact indicators
- Global Warming Potential - total (GWP-total) [kg CO2 eq.]: B6 0.198043
- Global Warming Potential - fossil fuels (GWP-fossil) [kg CO2 eq.]: B6 0.197345
- Global Warming Potential - biogenic (GWP-biogenic) [kg CO2 eq.]: B6 0.000688513
- Global Warming Potential - land use and land use change (GWP-luluc) [kg CO2 eq.]: B6 9.18884e-6
- Depletion potenzial of the stratospheric ozone layer (ODP) [kg CFC-11 eq.]: B6 1.61611e-17
- Acidifcation potential, Accumulated Exceedance (AP) [Mole of H+ eq.]: B6 0.000123935
- Eutrophication potential - freshwater (EP-freshwater) [kg P eq.]: B6 1.98686e-8
- Eutrophication potential - marine (EP-marine) [kg N eq.]: B6 5.66635e-5
- Eutrophication potential - terrestrial (EP-terrestrial) [Mole of N eq.]: B6 0.000625818
- Photochemical Ozone Creation Potential (POCP) [kg NMVOC eq.]: B6 0.00016174
- Abiotic depletion potential - non-fossil resources (ADPE) [kg Sb eq.]: B6 1.55495e-8
- Abiotic depletion potential - fossil resources (ADPF) [MJ]: B6 3.46679
- Water (user) deprivation potential (WDP) [m³ world equiv.]: B6 0.000114933

## Use advice
The data set represents a cradle to gate inventory. It can be used to characterise the supply chain situation of the respective commodity in a representative manner. Combination with individual unit processes using this commodity enables the generation of user-specific (product) LCAs.

## Data sources
- KUNZ 2008
- BUDERUS 2008
- Documentation of data quality management
- GaBi Database Edition 2021, CUP2021.01
- GaBi database (all versions)
