# Mineral wool insulation (low bulk density range)

Dataset: ILCD process, EPD, average dataset
Geography: DE
Reference year: 2021
Valid until: 2026
Classification: OEKOBAU.DAT: Dämmstoffe / Mineralwolle / Mineralwolle
Classification: IBUCategories: 02 Bauprodukte / Wärmedämmungsprodukte / Mineralische Dämmstoffe
Method details: Mineralische Dämmstoffe.pdf
Registration number: EPD-FMI-20210020-IBG1-DE
Owner: FMI Fachverband Mineralwolleindustrie e.V.
Compliance: DIN EN 15804; ISO 14025
Review: Accredited third party review by Institut Bauen und Umwelt e. V.
Amounts: rows without a unit in brackets have none in this file; such an amount is in the reference unit of its flow, which a separate flow dataset defines
copyright: true

## General comment
Mineral wool is the generic term for insulating materials made of glass wool and stone wool. These are non-combustible insulating materials, which consist mainly of amorphous fibres obtained from a silicate melt.

The mineral wool insulation materials described in this declaration are produced in the form of rolls, boards, mats, lamella mats as well as loose-fill insulation and blowing wool in the low bulk density range (up to

60 kg/m³). The ready-made products are supplied in thicknesses between 10 mm and 400 mm.

For certain applications, the insulation materials are provided with a functional facing on one or both sides. The environmental effects of the facings are shown in the appendix on the basis of 1 m².

## Technology and included processes
For production, the required quantities of the raw materials are weighed, mixed and fed into a melting furnace. The raw materials are melted in a furnace at temperatures of approx. 1,400-1,500 °C. The manufacture of the fibres depends on the product. Three processes are used: - Rotary process (mainly glass wool): After passing the melting furnace, a thin jet of glass is led into a rapidly rotating metal basket where it is ejected through thousands of small holes in the outer wall of the basket. The resulting filaments are drawn out into fibres using a gas burner and compressed air. - Cascade centrifugal process (stone wool): After passing the cupola furnace, a thin jet of the liquid melt is directed onto rapidly rotating metal wheels. Their rotational movement spins the melt into fibres. - Steam-Blown process (stone wool): After passing the melting furnace, the glass melt flows through many nozzles. The resulting filaments are drawn out into fibres by compressed air or high-pressure steam. To ensure dimensional stability and to reduce dust and make the fibres water-repellent, they are sprayed with an aqueous solution of binder, dust-binding oil, adhesive agent and - depending on the product - silicones. They are then placed on conveyor belts under negative pressure. Facings can then be applied optionally. (The corresponding environmental impacts for this are specified in the Appendix.) In a curing oven, which runs continuously, the binder is cured at above 200 °C. The structure and density of the product are adapted to the exact application requirements. The mineral wool is cut according to the desired size and shape, for example in the form of rolls, mats or boards. The finished products are packed and prepared for shipping. Cut-offs and other mineral wool residues are returned to the production process. Quality assurance: - RAL-GZ 388 - Factory production control and third-party monitoring in accordance with CE marking according to European regulations - KEYMARK according to Insulation KEYMARK Scheme Rules 2.1; for technical insulation according to VDI 2055 according to KEYMARK Scheme Rules and AGI-Q 132 - EUCEB - Quality management system according to DIN EN ISO 9001 - For technical insulation, VDI 2055 / AGI-Q 132 (depending on product)
Declared unit:
This EPD refers to a declared unit of 1 m³ unfaced mineral wool insulation material with a declared bulk density of 24 kg/m³ (low bulk density range up to 60 kg/m³).

## Technical purpose
Mineral wool insulation materials are used in buildings and industrial plants for thermal insulation as well as noise and fire protection. The main application areas of the products declared in this EPD are:

- All areas of application according to DIN 4108-10 for wall, ceiling and roof applications with the specified requirements regarding thermal and sound insulation and the mechanical properties

- Blowing wool and loose-fill insulation

- Technical insulation and building services (e.g. insulation of pipes for ventilation, heating and hot water, district heating pipelines, boilers and equipment) - Fire protection elements and industrial applications (e.g. air-conditioning ducts, fire protection doors, prefabricated components, chimney systems, cable penetration sealing)

## Reference product
- Mineralwolle-Dämmstoff: 1

## Inputs
- Renewable primary energy as energy carrier (PERE) [MJ]: A1-A3 77.2249, A4 0.400548, A5 27.0593, C2 0.0556316, C4 0.625344, D -5.55362
- Renewable primary energy resources as material utilization (PERM) [MJ]: A1-A3 45.0812, A4 0, A5 -24.464, C2 0, C4 0, D 0
- Total use of renewable primary energy resources (PERT) [MJ]: A1-A3 122.306, A4 0.400548, A5 2.59531, C2 0.0556316, C4 0.625344, D -5.55362
- Non renewable primary energy as energy carrier (PENRE) [MJ]: A1-A3 507.377, A4 6.95519, A5 29.6968, C2 0.965999, C4 4.77803, D -25.2963
- Non renewable primary energy as material utilization (PENRM) [MJ]: A1-A3 51.183, A4 0, A5 -17.5895, C2 0, C4 0, D 0
- Total use of non renewable primary energy resources (PENRT) [MJ]: A1-A3 558.56, A4 6.95519, A5 12.1073, C2 0.965999, C4 4.77803, D -25.2963
- Use of secondary material (SM) [kg]: A1-A3 11.1653, A4 0, A5 0.223306, C2 0, C4 0, D 0
- Use of renewable secondary fuels (RSF) [MJ]: A1-A3 0, A4 0, A5 0, C2 0, C4 0, D 0
- Use of non renewable secondary fuels (NRSF) [MJ]: A1-A3 0, A4 0, A5 0.045166, C2 0, C4 0, D 0
- Use of net fresh water (FW) [m^3]: A1-A3 0.130913, A4 0.000466773, A5 0.0114166, C2 6.48296e-5, C4 0.00120434, D -0.00643108

## Outputs
- Hazardous waste disposed (HWD) [kg]: A1-A3 1.67015e-6, A4 3.21619e-7, A5 4.26573e-8, C2 4.46694e-8, C4 7.28318e-8, D -1.00896e-8
- Non hazardous waste disposed (NHWD) [kg]: A1-A3 3.98258, A4 0.00110234, A5 0.582714, C2 0.000153103, C4 24.0237, D -0.0117201
- Radioactive waste disposed (RWD) [kg]: A1-A3 0.014557, A4 1.28191e-5, A5 0.000331757, C2 1.78043e-6, C4 5.42709e-5, D -0.00189657
- Components for re-use (CRU) [kg]: A1-A3 0, A4 0, A5 0, C2 0, C4 0, D 0
- Materials for recycling (MFR) [kg]: A1-A3 0, A4 0, A5 0.0583813, C2 0, C4 0, D 0
- Materials for energy recovery (MER) [kg]: A1-A3 0, A4 0, A5 0, C2 0, C4 0, D 0
- Exported electrical energy (EEE) [MJ]: A1-A3 0, A4 0, A5 6.34518, C2 0, C4 0, D 0
- Exported thermal energy (EET) [MJ]: A1-A3 0, A4 0, A5 11.3447, C2 0, C4 0, D 0

## Impact indicators
- Global warming potential (GWP) [kg CO_(2)-Äq.]: A1-A3 33.5776, A4 0.511569, A5 4.56571, C2 0.0710513, C4 1.50788, D -1.45742
- Depletion potential of the stratospheric ozone layer (ODP) [kg CFC11-Äq.]: A1-A3 1.4477e-10, A4 1.2703e-16, A5 2.89596e-12, C2 1.76431e-17, C4 1.79862e-15, D -2.08601e-14
- Acidification potential of land and water (AP) [kg SO_(2)-Äq.]: A1-A3 0.182324, A4 0.000756571, A5 0.00401559, C2 0.000105079, C4 0.00207985, D -0.00166456
- Eutrophication potential (EP) [kg PO_(4)^(3)-Äq.]: A1-A3 0.043641, A4 0.000164844, A5 0.000948497, C2 2.2895e-5, C4 0.000233923, D -0.000222422
- Formation potential of tropospheric ozone photochemical oxidants (POCP) [kg Ethen-Äq.]: A1-A3 0.0112307, A4 -0.000169758, A5 0.000251609, C2 -2.35775e-5, C4 0.000157705, D -0.000168652
- Abiotic depletion potential for non fossil resources (ADPE) [kg Sb-Äq.]: A1-A3 2.48161e-5, A4 4.20651e-8, A5 5.04346e-7, C2 5.84237e-9, C4 3.30166e-8, D -2.57402e-7
- Abiotic depletion potential for fossil resources (ADPF) [MJ]: A1-A3 495.155, A4 6.88439, A5 10.7339, C2 0.956165, C4 4.63186, D -20.4442

## Use advice
Scope:
This Environmental Product Declaration is a generic EPD of the FMI association. The life cycle assessment presented in the EPD refers to the life cycle of 1 m³ mineral wool in the low bulk density range (≤ 60 kg/m³) of the following members of the Fachverband Mineralwolleindustrie e.V. (FMI):

- DEUTSCHE ROCKWOOL GmbH & Co. KG: Flechtingen, Gladbeck and Neuburg plants

- Knauf Insulation GmbH: Bernburg and St. Egidien plants

- SAINT-GOBAIN ISOVER G+H AG: Bergisch Gladbach, Ladenburg, Lübz and Speyer plants

- URSA Deutschland GmbH: Delitzsch plant

The data used cover 100 % of the annual production of the FMI members in Germany.
This EPD is mainly based on production data for the reference year 2019, collected in the plants and weighted by mass-based production volume. As a result of averaging, an average bulk density of

24 kg/m³ is obtained for mineral wool insulation materials in the low bulk density range.
System boundary:
The life cycle assessment of mineral wool insulation material includes a cradle-to-gate analysis of the products’ environmental impacts with options. Subsequent life cycle phases are part of the analysis:

Module A1-A3 | Production stage

The production stage includes the upstream burdens of raw material supply (basalt, dolomite, sand, secondary raw materials, binding agents, etc.), the respective transports and the manufacturing plants of the members of the FMI. The system boundary for secondary raw materials used in production is set after the end of waste status has been reached. The system boundary for secondary raw materials is defined according to EN 15804. During production, melting in the melting furnace, fiberization, injection of binder, compacting, curing, cutting and packaging of the mineral wool are considered.

The manufacturing process is modelled based on the primary data of all sites considered.

The production of the facings of mineral wool products is declared in three separate appendices to the EPD.

Module A4 | Transport to construction site

The transport from the plants to the customer is considered as a weighted average based on a representative scenario (360 km truck transport).

Module A5 | Assembly

For installation in the building, a scenario of 2 % waste is declared according to EURIMA (2019). The losses during installation are highly dependent on the building geometry and the specific application. Thus, the percentage of waste can vary greatly in the building context and must be adjusted at the building level according to the actual conditions. In addition to the losses during installation, module A5 includes the environmental impacts from the utilization of the packaging of the products.

Module C1 | Deconstruction and demolition

For the disassembly of the mineral wool products, a manual dismantling was assumed. Referring energy demand is considered to be negligible.

Module C2 | Transport to disposal

Module C2 includes the transport to waste treatment. In this case, transport by truck over a transport distance of 50 km is assumed. This corresponds to the recommendations according to EURIMA (2019).

Module C3 | Waste processing

The declared scenario assumes landfilling of the mineral wool, therefore no environmental impacts from the waste treatment of the products are declared in C3.

Module C4 | Disposal

Module C4 refers to the emissions from the disposal of the insulation material. The chosen scenario, therefore, includes the environmental burdens of landfilling of the product. The biogenic carbon in the binder of the products is treated as emissions of biogenic CO2 from the technosphere into the natural environment.

Module D | Benefits and loads beyond the system boundary

In module D the substitution potential from the energy recovery of the packaging is declared.

## Data sources
- Mineralwolle-Dämmstoff im niedrigen Rohdichtebereich.pdf
- GaBi Database (all versions)
- GaBi database SP40 2020
