# Heavy plates

Dataset: ILCD process, EPD, average dataset
Geography: AT
Reference year: 2017
Valid until: 2022
Classification: OEKOBAU.DAT: Metalle / Stahl und Eisen / Stahlbleche
Classification: IBUCategories: 02 Bauprodukte / Metallbauprodukte und Zubehör / Baustähle
Method details: Baustähle.pdf
Registration number: EPD-VOE-20170157-IBC1-DE
Owner: voestalpine AG
Compliance: DIN EN 15804; ISO 14025
Review: Accredited third party review by Institut Bauen und Umwelt e. V.
Amounts: rows without a unit in brackets have none in this file; such an amount is in the reference unit of its flow, which a separate flow dataset defines
copyright: true

## General comment
The products of voestalpine Grobblech GmbH are found in a wide variety of applications.

For the placing of structural steels on the market in the EU/EFTA (with the exception of Switzerland) Regulation (EU) No. 305/2011 applies. The products need a Declaration of Performance (DoP) taking into consideration /EN 10025/ and the CE marking.

For the application and use the respective national regulations apply. In Austria, for example, it is the /building regulations of the individual states/ as well as the technical stipulations based on these regulations.

## Technology and included processes
The starting material for the production of heavy plates at voestalpine is crude steel made in the primary route (blast furnace, LD steelmaking plant) at the Linz site. The molten crude steel is cast into slabs using a continuous casting method. After cooling, the slabs are reheated in pusher-type furnaces to 1100–1250 °C. As opposed to hot-rolled steel strips, a four-high rolling configuration, a type of reversing rolling, is used for heavy plates. The four-high mill stands always consist of two work rolls and two backup rolls, with a total of four rolls on each stand. The material is rolled back and forth until it reaches the desired width and length. The product is further processed at the Linz site of voestalpine Grobblech GmbH, among other things, into boiler heads. The plates are formed in a press into heads with desired shapes and sizes.
Technical data:
This EPD refers to all products of voestalpine Grobblech GmbH (alform®, aldur®, durostat®, toughcore®) in a variety of different steel grades, dimensions, shapes and as-delivered conditions. Specific information on tolerances in the different fields of application can be found in /EN 10029/ and /EN 10163/.

The data given in the DoP apply.
Declared unit:
This EPD refers to a declared unit of 1 ton of heavy plate produced by voestalpine. This includes heavy plates in a variety of different applications; however, the EPD does not refer to roll-bonded clad products.

## Technical purpose
Rolled plates and hot- or cold-formed heads manufactured by voestalpine Grobblech GmbH are found in the following applications:

- Piping systems for large oil and gas pipelines

- Manufacture of oil platforms (offshore industries)

- Boiler and apparatus construction

- Steel construction and bridge building

- Vehicle and crane assembly (high-strength and wear-resistant steels)

## Reference product
- 1 t Grobblech: 1000

## Inputs
- Renewable primary energy as energy carrier (PERE) [MJ]: A1-A3 959.552, C3 0, C4 1.22714, D 383.732
- Renewable primary energy resources as material utilization (PERM) [MJ]: A1-A3 0, C3 0, C4 0, D 0
- Total use of renewable primary energy resources (PERT) [MJ]: A1-A3 959.552, C3 0, C4 1.22714, D 383.732
- Non renewable primary energy as energy carrier (PENRE) [MJ]: A1-A3 19739.1, C3 0, C4 10.8152, D -11368.4
- Non renewable primary energy as material utilization (PENRM) [MJ]: A1-A3 0, C3 0, C4 0, D 0
- Total use of non renewable primary energy resources (PENRT) [MJ]: A1-A3 19739.1, C3 0, C4 10.8152, D -11368.4
- Use of secondary material (SM) [kg]: A1-A3 194.46, C3 0, C4 0, D 950
- Use of renewable secondary fuels (RSF) [MJ]: A1-A3 0, C3 0, C4 0, D 0
- Use of non renewable secondary fuels (NRSF) [MJ]: A1-A3 0, C3 0, C4 0, D 0
- Use of net fresh water (FW) [m^3]: A1-A3 4.41935, C3 0, C4 0.00220586, D -0.824679

## Outputs
- Hazardous waste disposed (HWD) [kg]: A1-A3 0.000469462, C3 0, C4 2.46995e-7, D 0.00173762
- Non hazardous waste disposed (NHWD) [kg]: A1-A3 24.6428, C3 0, C4 50.0867, D -18.5701
- Radioactive waste disposed (RWD) [kg]: A1-A3 0.151946, C3 0, C4 0.000150816, D 0.252805
- Components for re-use (CRU) [kg]: A1-A3 0, C3 0, C4 0, D 0
- Materials for recycling (MFR) [kg]: A1-A3 0, C3 950, C4 0, D 0
- Materials for energy recovery (MER) [kg]: A1-A3 0, C3 0, C4 0, D 0
- Exported electrical energy (EEE) [MJ]: A1-A3 0, C3 0, C4 0, D 0
- Exported thermal energy (EET) [MJ]: A1-A3 0, C3 0, C4 0, D 0

## Impact indicators
- Global warming potential (GWP) [kg CO_(2)-Äq.]: A1-A3 2127.62, C3 0, C4 0.802816, D -1287.44
- Depletion potential of the stratospheric ozone layer (ODP) [kg CFC11-Äq.]: A1-A3 1.04431e-8, C3 0, C4 8.83753e-12, D 1.43063e-8
- Acidification potential of land and water (AP) [kg SO_(2)-Äq.]: A1-A3 7.26393, C3 0, C4 0.00481341, D -5.00745
- Eutrophication potential (EP) [kg PO_(4)^(3)-Äq.]: A1-A3 0.68422, C3 0, C4 0.000654592, D -0.419862
- Formation potential of tropospheric ozone photochemical oxidants (POCP) [kg Ethen-Äq.]: A1-A3 0.749791, C3 0, C4 0.000382613, D -0.726022
- Abiotic depletion potential for non fossil resources (ADPE) [kg Sb-Äq.]: A1-A3 0.00781205, C3 0, C4 2.77182e-7, D -1.30395e-5
- Abiotic depletion potential for fossil resources (ADPF) [MJ]: A1-A3 19356, C3 0, C4 10.4351, D -12006.3

## Use advice
Scope:
This EPD is based on a declared unit of 1 ton of average heavy plate (alform®, aldur®, durostat®, toughcore®) produced at the Linz site. This includes thermomechanically rolled, standard-strength and high-strength heavy plates. Roll-bonded clad heavy plates are the subject of a separate declaration.
System boundary:
The life cycle assessment of average heavy plates produced by voestalpine refers to a cradle-to-gate analysis with options. The following lifecycle phases are taken into consideration in the analysis:

Module A1–A3 | Product stage

The product stage includes upstream burdens of raw materials (coal, iron ore, pellets, etc.) and the corresponding transports to the Linz production site. Material and energy flows required in the coking plant, sintering plant, blast furnaces, steelmaking plant and heavy plate rolling mill were recorded on site. Electricity is provided at the Linz site in a power station where furnace gases are used as fuel. Since more energy is used than is supplied by this company-owned power station, natural gas and electricity is additionally procured from Austrian networks.

Module C3 | Waste treatment

Product flows that reach Module D for recycling leave the product system in C3. Environmental impacts resulting from the grinding and sorting of steel scrap are not included.

Module C4 | Landfilling

Module C4 declares the environmental impacts incurred by landfilling (5 % of the product).

Module D | Credits and loads beyond the system boundary The potential for substituting primary steel with a recycling scenario (95 % of the product) is set forth in Module D.

## Data sources
- Grobblech.pdf
- GaBi Database (all versions)
- GaBi database SP29 2016
