# Gates - Peneder Bau-Elemente GmbH - fire resistance gate SN90

Dataset: ILCD process, EPD, specific dataset
Geography: AT
Reference year: 2020
Valid until: 2026
Classification: OEKOBAU.DAT: Komponenten von Fenstern und Vorhangfassaden / Türen und Tore / Stahl
Synonyms: steel fire resistance gates; PENEDERrail; electronic fire resistance gates; SN30
Method details: Produktkategorieregeln Teil B – für Türen und Tore; Produktkategorieregeln Teil A
Generated by: ift Rosenheim
Registration number: EPD-PTO-47.0
Owner: Peneder Bau-Elemente GmbH
Compliance: EN 15804
Review: Independent external review by Patrick Wortner
Amounts: rows without a unit in brackets have none in this file; such an amount is in the reference unit of its flow, which a separate flow dataset defines
copyright: true
licenseType: Free of charge for all users and uses
accessRestrictions: None

## General comment
A1-A3 as well as modules A4, A5, B2, B3, B4, B5, B6, B7, C1, C2, C3, C4, D. The environmental profile includes the expenses for the life cycle stages cradle to grave. The production of packaging was considered within modules A1-A3.

## Geography
This data set represents the situation of the company Peneder Bau-Elemente GmbH in 4904 Atzbach, with regard to the most important technologies and the legal framework.

## Time period
anual average

## Technology and included processes
The LCA results cover the life cycle stages of the manufacture of intermediate products up to raw material extraction and processing operations of secondary materials serving as input (e.g. recycling processes), their transports to the plant as well as the production itself, including the provision of all auxiliary and operating materials, energy, and the complete waste treatment or landfilling of residual waste during the stage of production. Modules A1, A2, and A3 are shown here as one aggregated module A1-A3. If further modules were calculated for this data set, they can be found separately and can be combined for a consideration of the entire life cycle.

## Technical purpose
PENEDERrail fire resistance gates for use for industrial, commercial and residential applications.

## Reference product
- Tor - Peneder Bau-Elemente GmbH - Brandschutztor SN90: 1

## Inputs
- Use of net fresh water (FW) [m3]: A1-A3 0.24, A4 0, A5 0.041, B2 0.13, B3 0.0284, B4 0.29, B5 0, B6 0.000127, B7 0, C1 0, C2 0.000117, C3 0.08, C4 0.000143, D -0.0762
- Nicht-erneuerbare Primärenergie als Energieträger (PENRE) [MJ]: A1-A3 3560, A4 42.2, A5 14.24, B2 13.1, B3 59.6, B4 3010, B5 0, B6 0.283, B7 0, C1 0, C2 1.83, C3 25.93, C4 1.2, D -655
- Nicht-erneuerbare Primärenergie zur stofflichen Nutzung (PENRM) [MJ]: A1-A3 22.7, A4 0, A5 -10.34, B2 0, B3 0, B4 0, B5 0, B6 0, B7 0, C1 0, C2 0, C3 -11.73, C4 -0.62, D 0
- Use of non renewable secondary fuels (NRSF) [MJ]: A1-A3 0, A4 0, A5 0, B2 0, B3 0, B4 0, B5 0, B6 0, B7 0, C1 0, C2 0, C3 0, C4 0, D 0
- Erneuerbare Primärenergie als Energieträger (PERE) [MJ]: A1-A3 370, A4 2.35, A5 138.93, B2 0.18, B3 14.7, B4 319, B5 0, B6 0.13, B7 0, C1 0, C2 0.1, C3 3.63, C4 0.89, D -72
- Erneuerbare Primärenergie zur stofflichen Nutzung (PERM) [MJ]: A1-A3 140, A4 0, A5 -138.16, B2 0, B3 0, B4 0, B5 0, B6 0, B7 0, C1 0, C2 0, C3 -0.81, C4 -0.81, D 0
- Use of renewable secondary fuels (RSF) [MJ]: A1-A3 0, A4 0, A5 0, B2 0, B3 0, B4 0, B5 0, B6 0, B7 0, C1 0, C2 0, C3 0, C4 0, D 0
- Input of secondary material (SM) [kg]: A1-A3 10, A4 0, A5 0, B2 0, B3 0, B4 10, B5 0, B6 0, B7 0, C1 0, C2 0, C3 0, C4 0, D 0
- Total use of non-renewable primary energy resources (PENRT) [MJ]: A1-A3 3580, A4 42.2, A5 3.9, B2 13.1, B3 59.6, B4 3010, B5 0, B6 0.283, B7 0, C1 0, C2 1.83, C3 14.2, C4 0.58, D -655
- Total use of renewable primary energy resources (PERT) [MJ]: A1-A3 510, A4 2.35, A5 0.77, B2 0.18, B3 14.7, B4 319, B5 0, B6 0.13, B7 0, C1 0, C2 0.1, C3 2.82, C4 0.08, D -72

## Outputs
- Components for re-use (CRU) [kg]: A1-A3 0, A4 0, A5 0, B2 0, B3 0, B4 0, B5 0, B6 0, B7 0, C1 0, C2 0, C3 0, C4 0, D 0
- Exported electrical energy (EEE) [MJ]: A1-A3 2.4, A4 0, A5 25.2, B2 0, B3 1.52, B4 58.5, B5 0, B6 0, B7 0, C1 0, C2 0, C3 30.9, C4 0, D 0
- Exported thermal energy (EET) [MJ]: A1-A3 7.72, A4 0, A5 45.4, B2 0, B3 13.5, B4 121, B5 0, B6 0, B7 0, C1 0, C2 0, C3 67.6, C4 0, D 0
- Hazardous waste disposed (HWD) [kg]: A1-A3 3.59e-7, A4 2.13e-9, A5 7.03e-10, B2 3e-10, B3 3.15e-8, B4 2.98e-7, B5 0, B6 7.48e-11, B7 0, C1 0, C2 9.23e-11, C3 2.71e-9, C4 6.17e-11, D -7.06e-8
- Material for Energy Recovery (MER) [kg]: A1-A3 0, A4 0, A5 0, B2 0, B3 0, B4 0, B5 0, B6 0, B7 0, C1 0, C2 0, C3 0, C4 0, D 0
- Materials for Recycling (MFR) [kg]: A1-A3 6.45, A4 0, A5 0, B2 0, B3 0, B4 39.6, B5 0, B6 0, B7 0, C1 0, C2 0, C3 33.1, C4 0, D 0
- Non-hazardous waste disposed (NHWD) [kg]: A1-A3 4.06, A4 0.00627, A5 0.24, B2 0.037, B3 0.45, B4 10.3, B5 0, B6 0.000201, B7 0, C1 0, C2 0.000272, C3 3.71, C4 2.9, D -0.63
- Radioactive waste disposed (RWD) [kg]: A1-A3 0.0118, A4 5.1e-5, A5 0.000208, B2 5.67e-5, B3 0.0017, B4 -0.00589, B5 0, B6 4.21e-5, B7 0, C1 0, C2 2.21e-6, C3 0.000681, C4 6.1e-6, D -0.0191

## Impact indicators
- Abiotic depletion potential for non fossil resources (ADPE) [kg Sb-Äqv.]: A1-A3 0.00107, A4 2.7e-7, A5 2.37e-7, B2 4.25e-8, B3 3.63e-5, B4 0.00107, B5 0, B6 5.3e-9, B7 0, C1 0, C2 1.17e-8, C3 1.29e-6, C4 1.53e-8, D -4.86e-6
- Abiotic depletion potential for fossil resources (ADPF) [MJ]: A1-A3 911, A4 42.1, A5 3.38, B2 13, B3 55.3, B4 381, B5 0, B6 0.18, B7 0, C1 0, C2 1.83, C3 12.5, C4 0.57, D -607
- Acidification potential of soil and water (AP) [kg SO2-Äqv.]: A1-A3 0.22, A4 0.00298, A5 0.0018, B2 0.000748, B3 0.00687, B4 0.13, B5 0, B6 3.09e-5, B7 0, C1 0, C2 0.000116, C3 0.0109, C4 0.00025, D -0.11
- Eutrophication potential (EP) [kg Phosphat-Äqv.]: A1-A3 0.027, A4 0.000704, A5 0.000348, B2 7.41e-5, B3 0.000886, B4 0.0187, B5 0, B6 3.64e-6, B7 0, C1 0, C2 2.66e-5, C3 0.00202, C4 2.84e-5, D -0.0115
- Global warming potential (GWP) [kg CO2-Äqv.]: A1-A3 64.3, A4 3.11, A5 16.8, B2 0.27, B3 4.67, B4 55.4, B5 0, B6 0.0157, B7 0, C1 0, C2 0.13, C3 28.1, C4 0.0415, D -58.3
- Depletion potential of the stratospheric ozone layer (ODP) [kg R11 eq.]: A1-A3 1.82e-7, A4 5.39e-16, A5 3.25e-15, B2 7.04e-16, B3 3.31e-10, B4 1.82e-7, B5 0, B6 5.08e-16, B7 0, C1 0, C2 2.34e-17, C3 1.22e-14, C4 2.27e-16, D -2.7e-13
- Formation potential of tropospheric ozone (POCP) [kg Ethen-Äqv.]: A1-A3 0.0304, A4 -0.000397, A5 0.000136, B2 0.000118, B3 0.000904, B4 0.0163, B5 0, B6 2.24e-6, B7 0, C1 0, C2 -1.1e-5, C3 0.000646, C4 1.9e-5, D -0.0146

## Use advice
This data set contains the results for modules A1-A3 as well as modules A4, A5, B2, B3, B4, B5, B6, B7, C1, C2, C3, C4, D according to EN 15804. A comparison with other products is only permitted with a comparable application in the building. In principle, a comparison or the evaluation of EPD data is only possible if all data sets to be compared were created according to EN 15804 and the building context, or the product-specific performance characteristics are taken into account.

## Review details
The applied LCI method is in accordance with ISO 14040 and 14044. The documentation contains all relevant information with regard to the data quality and the scope of application of the respective LCI results or data sets. The data set represents the state of the art related to the functional unit.

## Data sources
- GaBi database (general)
