# Mineral wool insulation panel; 145 kg/m3

Dataset: ILCD process, EPD, generic dataset
Geography: DE
Reference year: 2021
Valid until: 2022
Classification: oekobau.dat: Gebäudetechnik / Heizung / Wärmeverteilung und Abgabe
Owner: Sphera Solutions GmbH
Compliance: EN 15804+A2
Review: Dependent internal review by Sphera Solutions GmbH; Independent external review by GaBi user forum
Amounts: rows without a unit in brackets have none in this file; such an amount is in the reference unit of its flow, which a separate flow dataset defines
copyright: true
licenseType: Free of charge for all users and uses
accessRestrictions: The license conditions as stated on https://www.oekobaudat.de/ apply.
accessRestrictions: Es gelten die Lizenzbedingungen wie sie auf https://www.oekobaudat.de/ genannt sind.

## General comment
This data set has been modeled according to the European Standard EN 15804+A2 for Sustainable Building. Results are depicted in modules that allow the structured expression of results over the entire life cycle.

## Geography
The data set represents the country specific situation in Germany, focusing on the main technologies, the region specific characteristics and / or import statistics.

## Time period
Annual average

## Technology and included processes
Dataset describes Mineral wool and Glass fiber. Mineral wool is made of sedimentary or igneous rocks (mainly basalt) and various recycled materials. The material is melted in the melting furnaces at 1400-1500 ° C and passed through rapidly rotating rollers. Binding agent is added. The binder then hardens in continuously operated tunnel kilns.
For the glass wool a pure primary glass is melted in a furnace at about 1400 ° C. This process consumes power. The molten gluss is centrifuged in a perforated rotating drum. The warm airflow evaporates the water and the fibers solidify. The raw fibers are guided through a treadmills and a tunnel kiln. The binder cures at about 200 ° C. The fibres are then cut to required size and packed. System boundary is the finished product at the factory gate. Transportation from the factory to the site is not includede in the dataset and must be taken into account separately when analyzing the complete life cycle. For different applications, typical compositions and densities were modeled. A following distincuished applications were defined: flat roof, facade, floor, roof and interior.
Background system:
Electricity: Electricity is modelled according to the individual country-specific situations. The country-specific modelling is achieved on multiple levels. Firstly, individual energy carrier specific power plants and plants for renewable energy sources are modelled according to the current national electricity grid mix. Modelling the electricity consumption mix includes transmission / distribution losses and the own use by energy producers (own consumption of power plants and "other" own consumption e.g. due to pumped storage hydro power etc.), as well as imported electricity. Secondly, the national emission and efficiency standards of the power plants are modelled as well as the share of electricity plants and combined heat and power plants (CHP). Thirdly, the country-specific energy carrier supply (share of imports and / or domestic supply) including the country-specific energy carrier properties (e.g. element and energy content) are accounted for. Fourthly, the exploration, mining/production, processing and transport processes of the energy carrier supply chains are modelled according to the specific situation of each electricity producing country. The different production and processing techniques (emissions and efficiencies) in the different energy producing countries are considered, e.g. different crude oil production technologies or different flaring rates at the oil platforms.
Thermal energy, process steam: The thermal energy and process steam supply is modelled according to the individual country-specific situation with regard to emission standards and considered energy carriers. The thermal energy and process steam are produced at heat plants. Efficiencies for thermal energy production are by definition 100% in relation to the corresponding energy carrier input. For process steam the efficiency ranges from 85%, 90% to 95%. The energy carriers used for the generation of thermal energy and process steam are modelled according to the specific import situation (see electricity above).
Transports: All relevant and known transport processes are included. Ocean-going and inland ship transport as well as rail, truck and pipeline transport of bulk commodities are considered.
Energy carriers: The energy carriers are modelled according to the specific supply situation (see electricity above).
Refinery products: Diesel fuel, gasoline, technical gases, fuel oils, lubricants and residues such as bitumen are modelled with a parameterised country-specific refinery model. The refinery model represents the current national standard in refining techniques (e.g. emission level, internal energy consumption, etc.) as well as the individual country-specific product output spectrum, which can be quite different from country to country. The supply of crude oil is modelled, again, according to the country-specific situation with the respective properties of the resources.

## Technical purpose
This product can be used in construction.

## Safety margin
20 %. Product system depicted except for a few missing processes / flows. Technological, temporal and geographic representativeness partly given.

## Reference product
- Mineral wool insulation panel: 1

## Inputs
- Use of renewable primary energy as energy carrier (PERE) [MJ]: A1-A3 274.334, C2 0.00522934, C3 0, C4 0.0325289
- Use of renewable primary energy resources used as raw materials (PERM) [MJ]: A1-A3 0, C2 0, C3 0, C4 0
- Total use of renewable primary energy (PERT) [MJ]: A1-A3 274.334, C2 0.00522934, C3 0, C4 0.0325289
- Use of non renewable primary energy as energy carrier (PENRE) [MJ]: A1-A3 2053.73, C2 0.0901018, C3 21.024, C4 0.240862
- Use of non renewable primary energy resources used as raw materials (PENRM) [MJ]: A1-A3 17.52, C2 0, C3 -17.52, C4 0
- Total use of non renewable primary energy resource (PENRT) [MJ]: A1-A3 2071.25, C2 0.0901018, C3 3.504, C4 0.240862
- Use of secondary material (SM) [kg]: A1-A3 0, C2 0, C3 0, C4 0
- Use of renewable secondary fuels (SF) [MJ]: A1-A3 0, C2 0, C3 0, C4 0
- Use of non renewable secondary fuels (NRSF) [MJ]: A1-A3 0, C2 0, C3 0, C4 0
- Net use of fresh water (FW) [m3]: A1-A3 0.336531, C2 4.64758e-6, C3 0, C4 5.93297e-5

## Outputs
- Hazardous waste disposed (HWD) [kg]: A1-A3 2.85196e-7, C2 3.76596e-12, C3 0, C4 2.56252e-11
- Non harzardous waste disposed (NHWD) [kg]: A1-A3 71.8115, C2 1.45445e-5, C3 0, C4 1.20118
- Radioactive waste disposed (RWD) [kg]: A1-A3 0.0332859, C2 8.64644e-8, C3 0, C4 2.48649e-6
- Components for re-use (CRU) [kg]: A1-A3 0, C2 0, C3 0, C4 0
- Materials for recycling (MFR) [kg]: A1-A3 0, C2 0, C3 0, C4 0
- Materials for energy recovery (MER) [kg]: A1-A3 0, C2 0, C3 0, C4 0
- Exported electrical energy (EEE) [MJ]: A1-A3 0, C2 0, C3 0, C4 0
- Exported thermal energy (EET) [MJ]: A1-A3 0, C2 0, C3 0, C4 0

## Impact indicators
- Global Warming Potential - total (GWP-total) [kg CO2 eq.]: A1-A3 198.067, C2 0.00675226, C3 0, C4 0.017773
- Global Warming Potential - fossil fuels (GWP-fossil) [kg CO2 eq.]: A1-A3 197.198, C2 0.00670579, C3 0, C4 0.0181588
- Global Warming Potential - biogenic (GWP-biogenic) [kg CO2 eq.]: A1-A3 0.749489, C2 2.81579e-6, C3 0, C4 -0.000439177
- Global Warming Potential - land use and land use change (GWP-luluc) [kg CO2 eq.]: A1-A3 0.119502, C2 4.36552e-5, C3 0, C4 5.33877e-5
- Depletion potenzial of the stratospheric ozone layer (ODP) [kg CFC-11 eq.]: A1-A3 1.10483e-12, C2 1.7393e-18, C3 0, C4 7.12511e-17
- Acidifcation potential, Accumulated Exceedance (AP) [Mole of H+ eq.]: A1-A3 1.52938, C2 5.52183e-5, C3 0, C4 0.000129255
- Eutrophication potential - freshwater (EP-freshwater) [kg P eq.]: A1-A3 0.000236331, C2 1.39798e-8, C3 0, C4 3.05624e-8
- Eutrophication potential - marine (EP-marine) [kg N eq.]: A1-A3 0.146265, C2 2.77437e-5, C3 0, C4 3.35553e-5
- Eutrophication potential - terrestrial (EP-terrestrial) [Mole of N eq.]: A1-A3 4.5364, C2 0.000306221, C3 0, C4 0.000368662
- Photochemical Ozone Creation Potential (POCP) [kg NMVOC eq.]: A1-A3 0.486857, C2 5.18488e-5, C3 0, C4 0.000101676
- Abiotic depletion potential - non-fossil resources (ADPE) [kg Sb eq.]: A1-A3 1.99297e-5, C2 5.91286e-10, C3 0, C4 1.72118e-9
- Abiotic depletion potential - fossil resources (ADPF) [MJ]: A1-A3 2073.51, C2 0.090098, C3 0, C4 0.240735
- Water (user) deprivation potential (WDP) [m³ world equiv.]: A1-A3 10.9356, C2 2.64241e-5, C3 0, C4 0.00194337

## Use advice
The data set represents a cradle to gate inventory. It can be used to characterise the supply chain situation of the respective commodity in a representative manner. Combination with individual unit processes using this commodity enables the generation of user-specific (product) LCAs.

## Data sources
- AUB-Deklaration Rockwool: Unkaschierte bzw. unbeschichtete kunstharzgebundene Steinwolle-Dämmstoffe
- IBU-Deklaration Saint-Gobain ISOVER G+H: Unkaschierte Glaswolle-Platten und -Filze, 2008
- Documentation of data quality management
- GaBi Database Edition 2021, CUP2021.01
- GaBi database (all versions)
