# TecTem Insulation Board Indoor Laibungsplatte

Dataset: ILCD process, EPD, specific dataset
Geography: DE
Reference year: 2016
Valid until: 2021
Classification: OEKOBAU.DAT: Dämmstoffe / Blähperlit / Platten
Classification: IBUCategories: 02 Bauprodukte / Wärmedämmungsprodukte / Mineralische Dämmstoffe
Method details: Mineralische Dämmstoffe.pdf
Owner: KNAUF AQUAPANEL GmbH
Compliance: DIN EN 15804; ISO 14025
Review: Accredited third party review by IBU
Amounts: rows without a unit in brackets have none in this file; such an amount is in the reference unit of its flow, which a separate flow dataset defines
copyright: true

## General comment
TecTem® Insulation Board Indoor Laibungsplatte ist eine innovative, in Abweichung von /EN 13169/ faserfreie Dämmplatte. Sie wird aus natürlichem expandiertem Perlit mit einem mineralischem Kleber und einem Verdickungsmittel aus einem nachwachsenden Rohstoff hergestellt.

Besondere Eigenschaften sind:

- nicht brennbar

- hydrophil

- mineralisch

- schimmelresistent

- leicht zu verarbeiten und anzubringen.

## Technology and included processes
TecTem® Insulation Board Indoor Laibungsplatte ist eine innovative, in Abweichung von EN 13169 faserfreie Dämmplatte. Sie wird aus natürlichem expandiertem Perlit mit einem mineralischem Kleber und einem Verdickungsmittel aus einem nachwachsenden Rohstoff nach folgendem Verfahren hergestellt: Das zerkleinerte, abgesiebte und vorgetrocknete Rohperlit wird im Perlitofen bei einer Temperatur von ca. 1000 Grad Celsius expandiert. Es entsteht ein sehr leichtes und poröses Granulat. Das aus Kleber, Wasser und Verdickungsmittel hergestellte Bindemittelgel wird mit der Hauptkomponente Perlit vermischt. Dazu wird in einem Freifallprozess das Bindemittelgel gleichmäßig auf die Perlitkörner aufgebracht. Das so hergestellte Mischgut wird zu einer Platte, dem sogenannten Grünling, im Format 1,25 m x 1,25 m in entsprechender Dicke verpresst. Anschließend wird der Grünling getrocknet, formatiert und verpackt.
Deklarierte Einheit:
Für die TecTem® Laibungsplatte wurden die erforderlichen Module gemäß /EN 15804/ für eine Ökobilanz „von der Wiege bis zum Werkstor“ abgedeckt. Die betrachteten Module A1 bis A3 wurden gemäß der PCR für Mineralische Dämmstoffe für 1 m³ Dämmplatte berechnet und deklariert. Für das Produkt TecTem® Insulation Board Indoor Laibungsplatte wurde mit einer durchschnittlichen Rohdichte von 138,7 kg/m³ gerechnet.

## Technical purpose
TecTem® Insulation Board Indoor Laibungsplatte wurde für die Innendämmung von Außenwänden und Innendecken (WI, DI nach /DIN 4108-10/) entwickelt. Sie wird speziell für die Dämmung von Fensterlaibungen und einbindenden Wänden eingesetzt.

Gemäß /Prüfzeugnis 18102007-1/ des Micor Instituts (Labor für mikrobielle Prozesse und Materialkunde) stellt die Dämmplatte keinen Nährboden für Schimmelpilze dar, auch ein Materialabbau wurde nicht festgestellt. Dementsprechend wurde der Dämmplatte die Schimmelfestigkeit bestätigt.

## Reference product
- 1 m³ von TecTem® Insulation Board Indoor Laibungsplatte: 1

## Inputs
- Erneuerbare Primärenergie als Energieträger (PERE) [MJ]: A1-A3 604
- Erneuerbare Primärenergie zur stofflichen Nutzung (PERM) [MJ]: A1-A3 0
- Total erneuerbare Primärenergie (PERT) [MJ]: A1-A3 604
- Nicht-erneuerbare Primärenergie als Energieträger (PENRE) [MJ]: A1-A3 6032
- Nicht-erneuerbare Primärenergie zur stofflichen Nutzung (PENRM) [MJ]: A1-A3 0
- Total nicht erneuerbare Primärenergie (PENRT) [MJ]: A1-A3 6032
- Einsatz von Sekundärstoffen (SM) [kg]: A1-A3 0
- Erneuerbare Sekundärbrennstoffe (RSF) [MJ]: A1-A3 0
- Nicht erneuerbare Sekundärbrennstoffe (NRSF) [MJ]: A1-A3 0
- Einsatz von Süßwasserressourcen (FW) [m^3]: A1-A3 0.895

## Outputs
- Gefährlicher Abfall zur Deponie (HWD) [kg]: A1-A3 0.00161
- Entsorgter nicht gefährlicher Abfall (NHWD) [kg]: A1-A3 2.83
- Entsorgter radioaktiver Abfall (RWD) [kg]: A1-A3 0.152
- Komponenten für die Wiederverwendung (CRU) [kg]: A1-A3 0
- Stoffe zum Recycling (MFR) [kg]: A1-A3 0
- Stoffe für die Energierückgewinnung (MER) [kg]: A1-A3 0
- Exportierte elektrische Energie (EEE) [MJ]: A1-A3 0
- Exportierte thermische Energie (EET) [MJ]: A1-A3 0

## Impact indicators
- Globales Erwärmungspotenzial (GWP) [kg CO_(2)-Äq.]: A1-A3 377
- Abbau Potential der stratosphärischen Ozonschicht (ODP) [kg CFC11-Äq.]: A1-A3 1.84e-6
- Versauerungspotenzial von Boden und Wasser (AP) [kg SO_(2)-Äq.]: A1-A3 1.44
- Eutrophierungspotenzial (EP) [kg PO_(4)^(3)-Äq.]: A1-A3 0.129
- Bildungspotential für troposphärisches Ozon (POCP) [kg Ethen-Äq.]: A1-A3 0.0698
- Potenzial für den abiotischen Abbau nicht fossiler Ressourcen (ADPE) [kg Sb-Äq.]: A1-A3 0.000474
- Potenzial für den abiotischen Abbau fossiler Brennstoffe (ADPF) [MJ]: A1-A3 5609

## Use advice
Gültigkeitsbereich:
TecTem® Insulation Board Indoor Laibungsplatte, Werk KNAUF AQUAPANEL GmbH, Kipperstraße 19, 44147 Dortmund in Deutschland
Systemgrenze:
Bilanz von der Wiege bis zum Werkstor (Modul A1-3) für TecTem® Insulation Board Indoor Climaprotect:

Die Ökobilanz bezieht sich auf die Herstellung bzw. Bereitstellung (Modul A1) und Transporte (Modul A2) der Vorprodukte und auf die Produktion der Endprodukte (Modul A3). Zum Modul A3 gehörig werden zudem die Verpackungsmaterialien, deren Transporte sowie das in der Produktion eingesetzte Wasser betrachtet.

## Data sources
- TecTem Insulation Board Indoor Laibungsplatte.pdf
- GaBi Database (all versions)
- GaBi database SP28 2015
