# Glass bricks; 1800 kg/m3

Dataset: ILCD process, EPD, generic dataset
Geography: DE
Reference year: 2021
Valid until: 2022
Classification: oekobau.dat: Mineralische Baustoffe / Steine und Elemente / Glasbausteine
Owner: Sphera Solutions GmbH
Compliance: EN 15804+A2
Review: Dependent internal review by Sphera Solutions GmbH; Independent external review by GaBi user forum
Amounts: rows without a unit in brackets have none in this file; such an amount is in the reference unit of its flow, which a separate flow dataset defines
copyright: true
licenseType: Free of charge for all users and uses
accessRestrictions: The license conditions as stated on https://www.oekobaudat.de/ apply.
accessRestrictions: Es gelten die Lizenzbedingungen wie sie auf https://www.oekobaudat.de/ genannt sind.

## General comment
This data set has been modeled according to the European Standard EN 15804+A2 for Sustainable Building. Results are depicted in modules that allow the structured expression of results over the entire life cycle.

## Geography
The data set represents the country specific situation in Germany, focusing on the main technologies, the region specific characteristics and / or import statistics.

## Time period
Annual average

## Technology and included processes
The LCA dataset of glass blocks comprises the essensial process of glass making. The various forms and dimensions of the glass blocks are outlined in DIN 1051-1 (Appendix C). The system boundary is the finished product at the factory gate. Transportation from the factory to the site is not included and must be added when analyzing life cycle systems.The data set is an estimate based on window glass.

In the disposal phase, a mechanical dismantling (excavator) is assumed in module C1. The transport in module C2 to the treatment plant takes place with a truck (50km). In module C3, the material is processed, any reinforcement is fed to a sink (no loads, no credits). A treatment loss of 25% was assumed. This loss is fed to an inert material landfill within Module C3 (average landfill emissions). In Module D, a credit for the net amount of material (excluding reinforcement and treatment losses) for the substitution of natural gravel as backfill material is given.

## Technical purpose
This product can be used in construction.

## Safety margin
30 %. Processes / flows can be missing or estimated. Strongly restricted technological, temporal or geographical representativeness.

## Reference product
- Glass bricks: 1

## Inputs
- Use of renewable primary energy as energy carrier (PERE) [MJ]: A1-A3 2964.96, C2 7.39677, C4 88.0991
- Use of renewable primary energy resources used as raw materials (PERM) [MJ]: A1-A3 0, C2 0, C4 0
- Total use of renewable primary energy (PERT) [MJ]: A1-A3 2964.96, C2 7.39677, C4 88.0991
- Use of non renewable primary energy as energy carrier (PENRE) [MJ]: A1-A3 45302.5, C2 127.447, C4 652.336
- Use of non renewable primary energy resources used as raw materials (PENRM) [MJ]: A1-A3 0, C2 0, C4 0
- Total use of non renewable primary energy resource (PENRT) [MJ]: A1-A3 45302.5, C2 127.447, C4 652.336
- Use of secondary material (SM) [kg]: A1-A3 0, C2 0, C4 0
- Use of renewable secondary fuels (SF) [MJ]: A1-A3 0, C2 0, C4 0
- Use of non renewable secondary fuels (NRSF) [MJ]: A1-A3 0, C2 0, C4 0
- Net use of fresh water (FW) [m3]: A1-A3 7.85691, C2 0.00657389, C4 0.160685

## Outputs
- Hazardous waste disposed (HWD) [kg]: A1-A3 1.07091e-5, C2 5.32686e-9, C4 6.94017e-8
- Non harzardous waste disposed (NHWD) [kg]: A1-A3 87.7931, C2 0.0205728, C4 3253.2
- Radioactive waste disposed (RWD) [kg]: A1-A3 0.325289, C2 0.000122302, C4 0.00673423
- Components for re-use (CRU) [kg]: A1-A3 0, C2 0, C4 0
- Materials for recycling (MFR) [kg]: A1-A3 0, C2 0, C4 0
- Materials for energy recovery (MER) [kg]: A1-A3 0, C2 0, C4 0
- Exported electrical energy (EEE) [MJ]: A1-A3 0, C2 0, C4 0
- Exported thermal energy (EET) [MJ]: A1-A3 0, C2 0, C4 0

## Impact indicators
- Global Warming Potential - total (GWP-total) [kg CO2 eq.]: A1-A3 3995.15, C2 9.69917, C4 48.2266
- Global Warming Potential - fossil fuels (GWP-fossil) [kg CO2 eq.]: A1-A3 3987.94, C2 9.63374, C4 49.18
- Global Warming Potential - biogenic (GWP-biogenic) [kg CO2 eq.]: A1-A3 5.54562, C2 0.00367648, C4 -1.09794
- Global Warming Potential - land use and land use change (GWP-luluc) [kg CO2 eq.]: A1-A3 1.66711, C2 0.0617492, C4 0.144592
- Depletion potenzial of the stratospheric ozone layer (ODP) [kg CFC-11 eq.]: A1-A3 1.20019e-11, C2 2.46019e-15, C4 1.92972e-13
- Acidifcation potential, Accumulated Exceedance (AP) [Mole of H+ eq.]: A1-A3 23.3211, C2 0.0302076, C4 0.350064
- Eutrophication potential - freshwater (EP-freshwater) [kg P eq.]: A1-A3 0.00290542, C2 1.97741e-5, C4 8.27732e-5
- Eutrophication potential - marine (EP-marine) [kg N eq.]: A1-A3 8.48993, C2 0.0141018, C4 0.090879
- Eutrophication potential - terrestrial (EP-terrestrial) [Mole of N eq.]: A1-A3 102.106, C2 0.157459, C4 0.99846
- Photochemical Ozone Creation Potential (POCP) [kg NMVOC eq.]: A1-A3 21.9387, C2 0.0271946, C4 0.275372
- Abiotic depletion potential - non-fossil resources (ADPE) [kg Sb eq.]: A1-A3 0.000302412, C2 8.36359e-7, C4 4.66153e-6
- Abiotic depletion potential - fossil resources (ADPF) [MJ]: A1-A3 45295.1, C2 127.441, C4 651.992
- Water (user) deprivation potential (WDP) [m³ world equiv.]: A1-A3 -113.334, C2 0.0373762, C4 5.26329

## Use advice
The data set represents a cradle to gate inventory. It can be used to characterise the supply chain situation of the respective commodity in a representative manner. Combination with individual unit processes using this commodity enables the generation of user-specific (product) LCAs.

## Data sources
- DIN EN 1051-1 Glassteine und Betongläser - Begriffe und Beschreibungen, 2003
- Documentation of data quality management
- GaBi Database Edition 2021, CUP2021.01
- GaBi database (all versions)
