# Frame profiles for facades - Window + Facade Association - Frame profile for steel/stainless steel facade

Dataset: ILCD process, EPD, template dataset
Geography: RER
Reference year: 2017
Valid until: 2023
Classification: OEKOBAU.DAT: Komponenten von Fenstern und Vorhangfassaden / Rahmen / Profile / Stahl
Synonyms: Facade profile made of steel, stainless steel or weatherproof structural steel
Method details: Produktkategorieregeln Teil A; Produktkategorieregeln Teil B – für Fassaden und Dächer aus Glas und Kunststoff
Generated by: ift Rosenheim
Registration number: M-EPD-FA-000
Owner: Verband Fenster + Fassade
Compliance: EN 15804
Review: Independent external review by Patrick Wortner
Amounts: rows without a unit in brackets have none in this file; such an amount is in the reference unit of its flow, which a separate flow dataset defines
copyright: true
licenseType: Free of charge for all users and uses
accessRestrictions: None
Declaration holders can be found on page 3.

## General comment
This data set contains the results for modules A1-A3 according to EN 15804. A comparison with other products is only permissible with a comparable application in the building. In principle, a comparison or the evaluation of EPD data is only possible if all data sets to be compared were created according to EN 15804 and the building context or the product-specific performance characteristics are taken into account.

## Geography
This data set represents the situation of companies producing products according to the systems of Forster Profilsysteme AG, Jansen AG, RP Technik GmbH, Ottostumm SA, with regard to the main technologies and the legal framework.

## Time period
anual average

## Technology and included processes
The LCA results cover the life cycle stages of the manufacture of intermediate products up to raw material extraction and processing operations of secondary materials serving as input (e.g. recycling processes), their transports to the plant as well as the production itself, including the provision of all auxiliary and operating materials, energy, and the complete waste treatment or landfilling of residual waste during the stage of production. Modules A1, A2, and A3 are shown here as one aggregated module A1-A3. If further modules were calculated for this data set, they can be found separately and can be combined for a consideration of the entire life cycle.

## Technical purpose
Frame profiles for steel/stainless steel facades for use in office and administrative buildings and public buildings as well as in the private sector.

## Reference product
- Rahmenprofile für Fassaden - Verband Fenster + Fassade - Rahmenprofil für Stahl-/Edelstahlfassade: 1

## Inputs
- Use of net fresh water (FW) [m3]: A1-A3 0.730945
- Nicht-erneuerbare Primärenergie als Energieträger (PENRE) [MJ]: A1-A3 1945.75
- Nicht-erneuerbare Primärenergie zur stofflichen Nutzung (PENRM) [MJ]: A1-A3 98.8668
- Use of non renewable secondary fuels (NRSF) [MJ]: A1-A3 6.63997e-8
- Erneuerbare Primärenergie als Energieträger (PERE) [MJ]: A1-A3 387.993
- Erneuerbare Primärenergie zur stofflichen Nutzung (PERM) [MJ]: A1-A3 0
- Use of renewable secondary fuels (RSF) [MJ]: A1-A3 5.65286e-9
- Input of secondary material (SM) [kg]: A1-A3 0
- Total use of non-renewable primary energy resources (PENRT) [MJ]: A1-A3 2044.62
- Total use of renewable primary energy resources (PERT) [MJ]: A1-A3 387.993

## Outputs
- Components for re-use (CRU) [kg]: A1-A3 0
- Exported electrical energy (EEE) [MJ]: A1-A3 1.34623
- Exported thermal energy (EET) [MJ]: A1-A3 2.52541
- Hazardous waste disposed (HWD) [kg]: A1-A3 2.19589e-6
- Material for Energy Recovery (MER) [kg]: A1-A3 0
- Materials for Recycling (MFR) [kg]: A1-A3 0
- Non-hazardous waste disposed (NHWD) [kg]: A1-A3 10.1085
- Radioactive waste disposed (RWD) [kg]: A1-A3 0.125686

## Impact indicators
- Abiotic depletion potential for non fossil resources (ADPE) [kg Sb-Äqv.]: A1-A3 0.000739875
- Abiotic depletion potential for fossil resources (ADPF) [MJ]: A1-A3 1720.06
- Acidification potential of soil and water (AP) [kg SO2-Äqv.]: A1-A3 0.405426
- Eutrophication potential (EP) [kg Phosphat-Äqv.]: A1-A3 0.0347199
- Global warming potential (GWP) [kg CO2-Äqv.]: A1-A3 135.397
- Depletion potential of the stratospheric ozone layer (ODP) [kg R11 eq.]: A1-A3 3.24115e-9
- Formation potential of tropospheric ozone (POCP) [kg Ethen-Äqv.]: A1-A3 0.0336305

## Use advice
The environmental profile includes the expenses for the life cycle stages cradle to gate (module A1-A3).

The model EPD becomes valid when it is transferred to the manufacturer by ift. Currently valid EPDs can be found in the following list and are published on www.ift-service.de/epd.
EPD number and declaration holder:
Currently no valid EPDs available

## Review details
The applied LCI method is in accordance with ISO 14040 and 14044. The documentation contains all relevant information with regard to the data quality and the scope of application of the respective LCI results or data sets. The data set represents the state of the art related to the functional unit.

## Data sources
- GaBi database (general)
