# EPDM-Dach- und Dichtungsbahnen EVALASTIC®V,VG,VSGK

Dataset: ILCD process, EPD, specific dataset
Geography: DE
Reference year: 2020
Valid until: 2025
Classification: OEKOBAU.DAT: Kunststoffe / Dachbahnen / Elastomer-Dachbahnen
Classification: IBUCategories: 02 Bauprodukte / Abdichtungen / Dach- und Dichtungsbahnsysteme aus Kunststoffen und Elastomeren
Method details: Dach- und Dichtungsbahnsysteme aus Kunststoffen und Elastomeren.pdf
Registration number: EPD-ALW-20190186-IBAC-DE
Owner: alwitra GmbH & Co.
Compliance: DIN EN 15804; ISO 14025
Review: Accredited third party review by Institut Bauen und Umwelt e. V.
Amounts: rows without a unit in brackets have none in this file; such an amount is in the reference unit of its flow, which a separate flow dataset defines
copyright: true

## General comment
In dieser Umweltproduktdeklaration werden bitumenverträgliche Dach- und Dichtungsbahnensysteme aus EPDM beschrieben. Die deklarierten Produkte bestehen aus einer Hochpolymerlegierung aus Ethylen-Propylen-Dien-Terpolymer (EPDM) und Polypropylen (PP) inkl. Zusatzstoffen. EVALASTIC® Bahnen sind unterseitig mit Polyestervlies (ggf. zusätzlich mit Glasvlies) kaschiert. Als Selbstklebebahnen sind die Bahnen zusätzlich mit einer Selbstklebeschicht inkl. Schutzfolie kaschiert.

Die deklarierten Produkte werden im Kalanderverfahren hergestellt. Die Nahtfügung erfolgt mit Heißluft.

Die Produktserie EVALASTIC® umfasst folgende Varianten:

EVALASTIC® V mit Polyestervlieskaschierung

(eff. Dicke 1,2/1,3/1,5 mm; Gesamtdicke: 2,1/2,2/2,4 mm)

EVALASTIC® VG mit Polyester-/Glasvleiskaschierung

(eff. Dicke 1,2/1,5 mm; Gesamtdicke 2,2/2,4 mm)

EVALASTIC® VGSK mit Polyester-/Glasvlieskaschierung und Selbstklebeschicht (eff. Dicke 1,2/1,5 mm; Gesamtdicke 2,2/2,5 mm)

Für das Inverkehrbringen des Produkts in der EU/EFTA (mit Ausnahme der Schweiz) gilt die Verordnung (EU) Nr. 305/2011 (CPR). Das Produkt benötigt eine Leistungserklärung unter Berücksichtigung der /DIN EN 13956:2013-03, Abdichtungsbahnen – Kunststoff- und Elastomerbahnen für Dachabdichtungen Definitionen und Eigenschaften

und
DIN EN 13967:2017-08, Abdichtungsbahnen - Kunststoff- und Elastomerbahnen für die Bauwerksabdichtung gegen Bodenfeuchte und Wasser - Definitionen und Eigenschaften und die CE-Kennzeichnung.

Für die Verwendung gelten die jeweiligen nationalen Bestimmungen.

## Technology and included processes
Die Grundstoffe und Vorprodukte (außer der Kaschierung und der Selbstklebeschicht) werden in einem Mischer vorgemischt und anschließend zusammen mit den anderen Rezepturbestandteilen in einem Extruder plastifiziert. Die Kunststoffmasse wird über ein Mischwalzwerk als Zwischenstufe einem Kalander zugeführt, hier zu einer homogenen Dach- oder Dichtungsbahn ausgewalzt und bekommt (je nach Bahnentyp) eine Kaschierlage unterseitig zugeführt. Über spezielle Kühlwalzen erfolgt die Abkühlung der fertigen Bahn, die anschließend zu den endgültigen Maßen beschnitten und als Rollenware konfektioniert wird. Alle anfallenden unkaschierten Produktionsreste (Randstreifen) werden recycelt, d.h. der Produktion wieder direkt zugeführt. Die Herstellung unterliegt dem eingeführten Qualitätsmanagementsystem nach ISO 9001 Außerdem erfolgen externe Qualitätsüberprüfungen (Fremdüberwachungen) durch die Staatliche Materialprüfungsanstalt Darmstadt
Technische Daten:
EVALASTIC® V, VG, VGSK Dach- und Dichtungsbahn
Deklarierte Einheit:
Die deklarierte Einheit ist 1 m² durchschnittlich produziertes, installiertes und entsorgtes/reycketes EVALASTIC© Dach-und Dichtungsbahnsystem mit einer Dicke von 1,5 mm. Die Durchschnittsbildung erfolgte anhand der jährlichen Produktionsdaten (gesamte In- und Outputs pro Jahr). Die so errechneten Werte wurden auf eine repräsentative Dicke skaliert, und entsprechen ca. 90% Marktanteil der ausgelieferten . Die näherungsweise Berechnung anderer Dicken kann durch folgende Rechenformel erfolgen:

Id,neu=(Idekl*dneu)/1,2, mit

Id,neu: Indikatorergebnis in Bezug auf eine neue Dicke

Idekl: Indikatorergebnis der jeweiligen Lebenszyklusphase

dneu: zu berechnende Dicke in mm

Die ökobilanziellen Abweichungen innerhalb der produzierten Produktvarianten können als gering eingestuft werden (< 5%).

Die Abweichungen kommen z.B. durch unterschiedliche Kaschierungen und oder Selbstklebeschichten von geringer Masse

## Technical purpose
Die Einsatzzwecke des deklarierten Produktes sind:

Dachabdichtung

Einlagige Abdichtung von nicht genutzten und genutzten Dächern in flacher und geneigter Form. Die Bahnen werden je nach Anforderung wie folgt verlegt:

EVALASTIC® V und EVALASTIC® VG

lose verlegt unter Auflast

mechanisch befestigt

verklebt verlegt mit Systemklebstoff

EVALASTIC® VGSK

verklebt verlegt (Selbstklebeschicht) auf diverse, baübliche Untergründe mit alwitra Haftgrund SK oder SK-L.

verklebt aufgrund der integrierten Brandschutzlage auch direkt und ohne Haftgrund auf unkaschierte EPS- Wärmedämmplatten

Bauwerksabdichtung

Einlagige Abdichtung von nicht wasserdichten Bauwerken oder Bauteilen gegen Bodenfeuchte und nicht drückendes Wasser. Die Bahnen werden je nach Anforderung wie zuvor beschrieben verklebt verlegt oder lose verlegt.

Bei der Verarbeitung ist die Verlegeanleitung des Herstellers einzuhalten.

## Scenarios
- S1: Szenario 1
- S2: Szenario 2

## Reference product
- durchschnittlich produziertes und installiertes EVALASTIC: 1

## Inputs
- Erneuerbare Primärenergie als Energieträger (PERE) [MJ]: A1-A3 25.6119, A4 0.0269, A5 2.68808, C2 (S1) 0.00369, C2 (S2) 0.0544, C3 (S1) 0.614, C3 (S2) 5.29, D (S1) -10.9, D (S2) -16.3
- Erneuerbare Primärenergie zur stofflichen Nutzung (PERM) [MJ]: A1-A3 1.28808, A4 0, A5 -1.28808, C2 (S1) 0, C2 (S2) 0, C3 (S1) 0, C3 (S2) 0, D (S1) 0, D (S2) 0
- Total erneuerbare Primärenergie (PERT) [MJ]: A1-A3 26.9, A4 0.0269, A5 1.4, C2 (S1) 0.00369, C2 (S2) 0.0544, C3 (S1) 0.614, C3 (S2) 5.29, D (S1) -10.9, D (S2) -16.3
- Nicht-erneuerbare Primärenergie als Energieträger (PENRE) [MJ]: A1-A3 109.943, A4 0.442, A5 9.73268, C2 (S1) 0.0606, C2 (S2) 0.893, C3 (S1) 78.224, C3 (S2) 10.6, D (S1) -46.3, D (S2) -120
- Nicht-erneuerbare Primärenergie zur stofflichen Nutzung (PENRM) [MJ]: A1-A3 76.0567, A4 0, A5 -0.30268, C2 (S1) 0, C2 (S2) 0, C3 (S1) -75.754, C3 (S2) 0, D (S1) 0, D (S2) 0
- Total nicht erneuerbare Primärenergie (PENRT) [MJ]: A1-A3 186, A4 0.442, A5 9.43, C2 (S1) 0.0606, C2 (S2) 0.893, C3 (S1) 2.47, C3 (S2) 10.6, D (S1) -46.3, D (S2) -120
- Einsatz von Sekundärstoffen (SM) [kg]: A1-A3 0, A4 0, A5 0, C2 (S1) 0, C2 (S2) 0, C3 (S1) 0, C3 (S2) 0, D (S1) 0, D (S2) 0
- Erneuerbare Sekundärbrennstoffe (RSF) [MJ]: A1-A3 0, A4 0, A5 0, C2 (S1) 0, C2 (S2) 0, C3 (S1) 0, C3 (S2) 0, D (S1) 0, D (S2) 0
- Nicht erneuerbare Sekundärbrennstoffe (NRSF) [MJ]: A1-A3 0, A4 0, A5 0, C2 (S1) 0, C2 (S2) 0, C3 (S1) 0, C3 (S2) 0, D (S1) 0, D (S2) 0
- Einsatz von Süßwasserressourcen (FW) [m^3]: A1-A3 0.042, A4 3.09e-5, A5 0.0026, C2 (S1) 4.23e-6, C2 (S2) 6.23e-5, C3 (S1) 0.0129, C3 (S2) 0.00288, D (S1) -0.00592, D (S2) -0.027

## Outputs
- Gefährlicher Abfall zur Deponie (HWD) [kg]: A1-A3 5.39e-7, A4 2.52e-8, A5 2.83e-8, C2 (S1) 3.45e-9, C2 (S2) 5.09e-8, C3 (S1) 1.36e-8, C3 (S2) 5.84e-8, D (S1) -2.6e-8, D (S2) -3.36e-7
- Entsorgter nicht gefährlicher Abfall (NHWD) [kg]: A1-A3 0.756, A4 2.97e-5, A5 0.0398, C2 (S1) 4.07e-6, C2 (S2) 6e-5, C3 (S1) 0.55, C3 (S2) 0.0101, D (S1) -0.0243, D (S2) -0.486
- Entsorgter radioaktiver Abfall (RWD) [kg]: A1-A3 0.00502, A4 5.26e-7, A5 0.00026, C2 (S1) 7.2e-8, C2 (S2) 1.06e-6, C3 (S1) 0.000105, C3 (S2) 0.000914, D (S1) -0.00191, D (S2) -0.00325
- Komponenten für die Wiederverwendung (CRU) [kg]: A1-A3 0, A4 0, A5 0, C2 (S1) 0, C2 (S2) 0, C3 (S1) 0, C3 (S2) 0, D (S1) 0, D (S2) 0
- Stoffe zum Recycling (MFR) [kg]: A1-A3 0, A4 0, A5 0, C2 (S1) 0, C2 (S2) 0, C3 (S1) 0, C3 (S2) 1.96, D (S1) 0, D (S2) 0
- Stoffe für die Energierückgewinnung (MER) [kg]: A1-A3 0, A4 0, A5 0, C2 (S1) 0, C2 (S2) 0, C3 (S1) 1.96, C3 (S2) 0, D (S1) 0, D (S2) 0
- Exportierte elektrische Energie (EEE) [MJ]: A1-A3 0, A4 0, A5 0.245, C2 (S1) 0, C2 (S2) 0, C3 (S1) 9.8, C3 (S2) 0, D (S1) 0, D (S2) 0
- Exportierte thermische Energie (EET) [MJ]: A1-A3 0, A4 0, A5 0.572, C2 (S1) 0, C2 (S2) 0, C3 (S1) 22.5, C3 (S2) 0, D (S1) 0, D (S2) 0

## Impact indicators
- Globales Erwärmungspotenzial (GWP) [kg CO_(2)-Äq.]: A1-A3 8.61, A4 0.0331, A5 0.625, C2 (S1) 0.00453, C2 (S2) 0.0668, C3 (S1) 5.26, C3 (S2) 0.825, D (S1) -3.18, D (S2) -5.67
- Abbau Potential der stratosphärischen Ozonschicht (ODP) [kg CFC11-Äq.]: A1-A3 6.09e-13, A4 1.13e-17, A5 3.08e-14, C2 (S1) 1.54e-18, C2 (S2) 2.28e-17, C3 (S1) 3.63e-15, C3 (S2) 3.18e-14, D (S1) -6.62e-14, D (S2) -6.93e-14
- Versauerungspotenzial von Boden und Wasser (AP) [kg SO_(2)-Äq.]: A1-A3 0.0209, A4 6.85e-5, A5 0.00108, C2 (S1) 9.38e-6, C2 (S2) 0.000138, C3 (S1) 0.00136, C3 (S2) 0.00131, D (S1) -0.00335, D (S2) -0.0134
- Eutrophierungspotenzial (EP) [kg PO_(4)^(3)-Äq.]: A1-A3 0.00214, A4 1.7e-5, A5 0.000115, C2 (S1) 2.33e-6, C2 (S2) 3.44e-5, C3 (S1) 0.000132, C3 (S2) 0.000225, D (S1) -0.000567, D (S2) -0.00137
- Bildungspotential für troposphärisches Ozon (POCP) [kg Ethen-Äq.]: A1-A3 0.00176, A4 -2.35e-5, A5 8.89e-5, C2 (S1) -3.22e-6, C2 (S2) -4.75e-5, C3 (S1) 5.55e-5, C3 (S2) 3e-5, D (S1) -0.000289, D (S2) -0.00113
- Potenzial für den abiotischen Abbau nicht fossiler Ressourcen (ADPE) [kg Sb-Äq.]: A1-A3 0.000237, A4 3.12e-9, A5 1.19e-5, C2 (S1) 4.27e-10, C2 (S2) 6.3e-9, C3 (S1) 7.78e-7, C3 (S2) 3.23e-7, D (S1) -7.47e-7, D (S2) -0.000152
- Potenzial für den abiotischen Abbau fossiler Brennstoffe (ADPF) [MJ]: A1-A3 174, A4 0.441, A5 8.77, C2 (S1) 0.0604, C2 (S2) 0.89, C3 (S1) 2.2, C3 (S2) 8.28, D (S1) -41.4, D (S2) -112

## Use advice
Gültigkeitsbereich:
Bei der vorliegenden EPD handelt es sich um eine Durchschnitts EPD der Produkte EVALASTIC® V,VG, VGSK Dach-und Dichtungsbahnen der alwitra GmbH. Die Produkte werden am Standort 54411 Hermeskeil gefertigt.
Systemgrenze:
Diese Ökobilanz adressiert neben dem Lebenszyklusstadium der Produktherstellung (Wiege bis Werkstor) weitere Optionen, die nachfolgend aufgelistet werden:

- Rohstoffgewinnung und –bereitstellung (A1)

- Transporte der Grundstoffe (A2)

- ggfs. Kaschierung (A1)

- Herstellung der Bahnen (A3)

- Verpackung der Bahnen (inklusive Transporte der Verpackungsmaterialien und End-of-Life

- Transport zur Baustelle (A4)

- Installation auf der Baustelle (Lagesicherung mit Klebstoffen und Nahtverschweißung) (A5)

- End-of-Llife der Bahnen (inklusive Transporte) – stofflich und thermisch (Module C2, C3 und D)

## Data sources
- EPDM-Dach- und Dichtungsbahnen EVALASTIC®V,VG,VSGK.pdf
- GaBi Database (all versions)
- GaBi database SP39 2019
