# Kielsteg elements OSB; 158,3 kg/m³

Dataset: ILCD process, EPD, specific dataset
Geography: AT
Reference year: 2019
Valid until: 2024
Classification: OEKOBAU.DAT: Holz / Holzwerkstoffe / Elemente aus Holzwerkstoffen
Synonyms: Holzdecken, Holzfachwerk, Holzelemente
Method details: PKR Bau EPD GmbH PKR-Code: 2.11.1 Stand 17.08.2017 "Vollholzprodukte bzw. Holzwerkstoffe"
Generated by: IBO Institut für Baubiologie und Bauökologie
Registration number: BAU-EPD-Kielsteg-2019-1-Ecoinvent
Owner: Kielsteg GmbH
Compliance: ISO 14025; EN 15804
Review: Independent external review by Richter Sarah
Amounts: rows without a unit in brackets have none in this file; such an amount is in the reference unit of its flow, which a separate flow dataset defines
copyright: true
licenseType: Free of charge for all users and uses
accessRestrictions: keine

## General comment
Kielstegelemente (mit innerem Fachwerk OSB der Firma Kielsteg GmbH
aus einem Werk. Die deklarierte Einheit ist 1 m³.

## Time period
Die Sachbilanzdaten repräsentieren die im Jahr 2017 tatsächlich produzierten
Mengen an Kielstegelementen mit Stegen aus OSB in dem
österreichischen Werk in Pischelsdorf.

## Technology and included processes
Kielsteg components are lightweight and highly load-bearing, uniaxially tensioned surface support systems consisting of an upper and lower pressure and tension zone made of spruce wood and an intermediate framework made of thin-walled OSB (oriented strand board) or PLY (plywood) panels. The material is efficiently and specifically concentrated in the cross-section where it is statically necessary. The load-bearing capacity of the remarkable cellular construction predestines the components for use as load-bearing structures in Buildings with a large span.

## Technical purpose
The components are used for a wide range of applications in halls and residential buildings, including carports
mainly used for roof but also as ceiling structures. With spans of up to 27 meters as a single-span system, the Technology allows the greatest possible flexibility in the use of the building.

## Reference product
- KIELSTEG ecoinvent Kielstegelemente aus Holz mit innerem Fachwerk OSB: 1

## Inputs
- Use of renewable primary energy (PERE) [MJ]: A1 0, A1-A3 964.508, A2 0, A3 0, A4 1.49, A5 50.6, B1 0, B2 0, B3 0, B4 0, B5 0, B6 0, B7 0, C1 0.0473, C2 1.09, C3 0.553, C4 0, D -123.452
- Use of renewable primary energy resources used as raw materials (PERM) [MJ]: A1 0, A1-A3 2667.61, A2 0, A3 0, A4 0, A5 0, B1 0, B2 0, B3 0, B4 0, B5 0, B6 0, B7 0, C1 0, C2 0, C3 -2670, C4 0, D 0
- Total use of renewable primary energy resources (PERT) [MJ]: A1 0, A1-A3 3632.12, A2 0, A3 0, A4 1.49, A5 50.6, B1 0, B2 0, B3 0, B4 0, B5 0, B6 0, B7 0, C1 0.0473, C2 1.09, C3 -2670, C4 0, D -123.452
- Use of non renewable primary energy (PENRE) [MJ]: A1 0, A1-A3 1285.11, A2 0, A3 0, A4 123, A5 59.3, B1 0, B2 0, B3 0, B4 0, B5 0, B6 0, B7 0, C1 8.46, C2 75.6, C3 27.5, C4 0, D -845.09
- Use of non renewable primary energy resources used as raw materials (PENRM) [MJ]: A1 0, A1-A3 13.6675, A2 0, A3 0, A4 0, A5 0, B1 0, B2 0, B3 0, B4 0, B5 0, B6 0, B7 0, C1 0, C2 0, C3 0, C4 0, D 0
- Total use of non renewable primary energy resource (PENRT) [MJ]: A1 0, A1-A3 1298.78, A2 0, A3 0, A4 123, A5 59.3, B1 0, B2 0, B3 0, B4 0, B5 0, B6 0, B7 0, C1 8.46, C2 75.6, C3 27.5, C4 0, D -845.09
- Use of secondary material (SM) [kg]: A1 0, A1-A3 0.00906, A2 0, A3 0, A4 0.000302, A5 0.00033, B1 0, B2 0, B3 0, B4 0, B5 0, B6 0, B7 0, C1 9.29e-6, C2 0.000217, C3 0.000104, C4 0, D -0.00269985
- Use of renewable secondary fuels (RSF) [MJ]: A1 0, A1-A3 965, A2 0, A3 0, A4 1.49, A5 50.6, B1 0, B2 0, B3 0, B4 0, B5 0, B6 0, B7 0, C1 0.0473, C2 1.09, C3 0.553, C4 0, D -123.452
- Use of non renewable secondary fuels (NRSF) [MJ]: A1 0, A1-A3 2670, A2 0, A3 0, A4 0, A5 0, B1 0, B2 0, B3 0, B4 0, B5 0, B6 0, B7 0, C1 0, C2 0, C3 0, C4 0, D 0
- Use of net fresh water (FW) [m3]: A1 0, A2 0, A3 0

## Outputs
- Hazardous waste disposed (HWD) [kg]: A1 0, A1-A3 0.00161048, A2 0, A3 0, A4 7.63e-5, A5 9.94e-5, B1 0, B2 0, B3 0, B4 0, B5 0, B6 0, B7 0, C1 3.77e-6, C2 5.06e-5, C3 5.72e-5, C4 0, D -0.0014854
- Non hazardous waste dispose (NHWD) [kg]: A1 0, A1-A3 21.3948, A2 0, A3 0, A4 5.89, A5 0.679, B1 0, B2 0, B3 0, B4 0, B5 0, B6 0, B7 0, C1 0.00919, C2 2.97, C3 2.91, C4 0, D -1.84652
- Radioactive waste disposed (RWD) [kg]: A1 0, A1-A3 0.0101423, A2 0, A3 0, A4 0.00166, A5 0.000453, B1 0, B2 0, B3 0, B4 0, B5 0, B6 0, B7 0, C1 0.000117, C2 0.00102, C3 0.000111, C4 0, D -0.00171627
- Components for re-use (CRU) [kg]: A1 0, A1-A3 0, A2 0, A3 0, A4 0, A5 0, B1 0, B2 0, B3 0, B4 0, B5 0, B6 0, B7 0, C1 0, C2 0, C3 0, C4 0, D 0
- Materials for recycling (MFR) [kg]: A1 0, A1-A3 0, A2 0, A3 0, A4 0, A5 0, B1 0, B2 0, B3 0, B4 0, B5 0, B6 0, B7 0, C1 0, C2 0, C3 0.162, C4 0, D 0
- Materials for energy recovery (MER) [kg]: A1 0, A1-A3 0, A2 0, A3 0, A4 0, A5 0.476, B1 0, B2 0, B3 0, B4 0, B5 0, B6 0, B7 0, C1 0, C2 0, C3 158, C4 0, D 0
- Exported electrical energy (EEE) [MJ]: A1 0, A1-A3 0, A2 0, A3 0, A4 0, A5 0.582, B1 0, B2 0, B3 0, B4 0, B5 0, B6 0, B7 0, C1 0, C2 0, C3 158, C4 0, D -158.582
- Exported thermal energy (EET) [MJ]: A1 0, A1-A3 0, A2 0, A3 0, A4 0, A5 5.13, B1 0, B2 0, B3 0, B4 0, B5 0, B6 0, B7 0, C1 0, C2 0, C3 1390, C4 0, D -1395.13

## Impact indicators
- Global warming potential (GWP) [kg CO2-Äqv.]: A1 0, A1-A3 -169.869, A2 0, A3 0, A4 8.11, A5 0.73, B1 0, B2 0, B3 0, B4 0, B5 0, B6 0, B7 0, C1 0.581, C2 4.98, C3 269, C4 0, D -51.388
- Depletion potential of the stratospheric ozone layer (ODP) [kg R11 eq.]: A1 0, A1-A3 8.56167e-6, A2 0, A3 0, A4 1.48e-6, A5 4.84e-7, B1 0, B2 0, B3 0, B4 0, B5 0, B6 0, B7 0, C1 1.05e-7, C2 9e-7, C3 2.25e-7, C4 0, D -9.1836e-6
- Acidification potential of soil and water (AP) [kg SO2-Äqv.]: A1 0, A1-A3 0.425274, A2 0, A3 0, A4 0.0221, A5 0.0208, B1 0, B2 0, B3 0, B4 0, B5 0, B6 0, B7 0, C1 0.0044, C2 0.0188, C3 0.0234, C4 0, D -0.095347
- Eutrophication potential (EP) [kg Phosphat-Äqv.]: A1 0, A1-A3 0.210634, A2 0, A3 0, A4 0.00484, A5 0.00756, B1 0, B2 0, B3 0, B4 0, B5 0, B6 0, B7 0, C1 0.00102, C2 0.00444, C3 0.0239, C4 0, D -0.061824
- Formation potential of tropospheric ozone (POCP) [kg Ethen-Äqv.]: A1 0, A1-A3 0.0969349, A2 0, A3 0, A4 0.0037, A5 0.0031, B1 0, B2 0, B3 0, B4 0, B5 0, B6 0, B7 0, C1 0.000534, C2 0.00227, C3 0.00123, C4 0, D -0.0122441
- Abiotic depletion potential for non fossil resources (ADPE) [kg Sb-Äqv.]: A1 0, A1-A3 0.00015271, A2 0, A3 0, A4 2.44e-5, A5 1.1e-5, B1 0, B2 0, B3 0, B4 0, B5 0, B6 0, B7 0, C1 1.95e-7, C2 2.01e-5, C3 3.27e-6, C4 0, D -1.40395e-5
- Abiotic depletion potential for fossil resources (ADPF) [MJ]: A1 0, A1-A3 1284.82, A2 0, A3 0, A4 122, A5 57.9, B1 0, B2 0, B3 0, B4 0, B5 0, B6 0, B7 0, C1 8.32, C2 74.7, C3 28.5, C4 0, D -829.03

## Use advice
Kielsteg-Bauelemente sind leichte und hochtragfähige, einachsig gespannte Flächentragsysteme bestehend aus einer oberen sowie
unteren Druck-, bzw. Zugzone aus Fichtenholz und einem dazwischenliegenden Fachwerk aus dünnwandigen OSB- (oriented strand
board) oder PLY- (Sperrholz)-Platten. Das Material wird im Querschnitt effizient und gezielt da konzentriert, wo es statisch notwendig ist.
Die Tragkraft der charakteristischen Zellenbauweise prädestiniert die Bauelemente für den Einsatz als biegebeanspruchte Tragwerke in
Gebäuden mit großer Spannweite. Für eine breite Anwendung in Hallen und Wohnbauten bis hin zu Carports werden die Bauelemente
vorwiegend für Dach- aber auch als Deckentragwerke eingesetzt. Mit Spannweiten von bis zu 27 Metern als Einfeldsystem sichert die
Technologie eine größtmögliche Flexibilität in der Gebäudenutzung.

## Data sources
- ecoinvent database (general)
- ecoinvent 3.4 database
- Software: SimaPro 8.5.2.0
