# Aluminiumprofil anodisiert

Dataset: ILCD process, EPD, average dataset
Geography: RER
Reference year: 2019
Valid until: 2024
Classification: OEKOBAU.DAT: Metalle / Aluminium / Aluminiumprofil
Classification: IBUCategories: 02 Bauprodukte / Metallbauprodukte und Zubehör / Produkte aus Aluminium und Aluminiumlegierungen
Method details: Produkte aus Aluminium und Aluminiumlegierungen.pdf
Registration number: 10997
Owner: GDA - Gesamtverband der Aluminiumindustrie e.V.
Compliance: DIN EN 15804; ISO 14025
Review: Accredited third party review by Institut Bauen und Umwelt e. V.
Amounts: rows without a unit in brackets have none in this file; such an amount is in the reference unit of its flow, which a separate flow dataset defines
copyright: true

## General comment
Bei den hergestellten Aluminiumprofilen handelt es sich um Halbzeuge für die Bauindustrie, Konsum- und Industriegüter, automotive Anwendungen, den Solarbereich uvm.

Die Profile werden aus Aluminiumlegierungen gefertigt; bestehend aus dem Leichtmetall Aluminium (Al) und diversen Legierungselementen (wie Silicium, Kupfer, Mangan, Magnesium, u.a.).

Die blanken Aluminiumprofile können (je nach Kundenwunsch) in einem oder mehreren Verarbeitungsschritten veredelt werden, bevor sie zum (End-)Produkt verarbeitet werden.

Oberflächenveredelung von Profilen: Anodische Oxidation

Bei der anodischen Oxidation (Eloxieren) von Aluminium, wird in einem elektrochemischen Verfahren eine künstliche Oxidschicht erzeugt, die eine hohe Oberflächenhärte aufweist, verschleißfest und nach dem Verdichten in der Witterung beständig ist. Diese Schichten können mittels Tauchfärben oder elektrolytischen Färbens farblich gestaltet werden. Der metallische Charakter des Aluminiums bleibt dabei erhalten.

Profile werden in üblichen Fertigungslängen (6 m) eloxiert. Anschließend erfolgt die weitere Verarbeitung, beispielsweise zu Fenstern und Fassaden.

Für bestimmte Bauteile oder Komponenten ist es auch üblich, dass diese vor der Oberflächenbehandlung gefertigt werden.

## Technology and included processes
Erhitzen - Der Aluminiumbolzen wird auf 460°C bis 530°C erhitzt, damit das Metall seinen plastischen Zustand erreicht. Strangpressen - mit typischen Presskräften von 6'000 - 8'000 MN/mm2 Bolzenquerschnittsfläche wird der heiße Aluminiumbolzen durch ein vorgewärmtes Werkzeug gepresst. Somit erhält das Profil seine geometrische Form. Kühlen - Direkt nach dem Strangpressen werden die Profile gekühlt (es gibt unterschiedliche Verfahren durch Luft, Wasser oder Sprühnebel) -> notwendig für die Endfestigkeit. Recken - Nach dem Strangpressen werden die Profile gereckt, um sie gerade zu richten. Ablängen - Zuschnitt der Profile gemäß Kundenanforderung (Standard 6.000 mm). Vergüten - Aushärten der Profile bei einer Temperatur zwischen 145 – 210 °C (5 – 12 h) Verpacken - Danach erfolgt das kundenindividuelle Verpacken der Profile. Isolieren (optional) - Um die Wärmeleitung von Fenstern und Türen zu reduzieren, können Verbundprofile mit Stegen aus Werkstoffen mit sehr schlechter Wärmeleitfähigkeit eingesetzt werden. Diese bestehen häufig aus Polyamidstrips Schema Extrusionsprozess – der erhitzte Bolzen wird durch ein Werkzeug gepresst. Pressbolzen Werkzeuge für Hohlprofile Schema Extrusionsprozess – der erhitzte Bolzen wird durch ein Werkzeug gepresst Die Profile können nach dem Extrusionsprozess wahlweise oberflächenveredelt und/oder mechanisch bearbeitet werden. Der gesamte Herstellungsprozess wird durch zertifizierte Qualitätsmanagementsysteme (z.B. /DIN EN ISO 9001/; /IATF 16949/ u.s.w.) hinsichtlich qualitativer Produktanforderungen überwacht.
Technische Daten:
Physikalische Eigenschaften von Aluminium (EN AW-6060):
Deklarierte Einheit:
Die Deklaration bezieht sich auf durchschnittliche anodisierte Aluminiumprofile der an der EPD beteiligten Unternehmen. Die deklarierte Einheit ist 1 kg Aluminiumprofil.

## Technical purpose
Aluminiumprofile werden in verschiedensten Anwendungen/Produkten eingesetzt. Vielfach im Baubereich (z.B. für Fenster/Fassaden, Solar-Unterkonstruktionen, …), aber auch im Konsumgüterbereich (z.B. bei Möbeln, Haushalts-/Elektro- und Sportgeräten), in der Industrie (z.B. Kühlkörper, Zylinder, …), im automotiven Bereich (z.B. Zierleisten, Stoßdämpfer, Heckträger, ...).

## Reference product
- Aluminiumprofil eloxiert (): 1

## Inputs
- Erneuerbare Primärenergie als Energieträger (PERE) [MJ]: A1-A3 51.5652, C3 0.01172, D -31.18
- Erneuerbare Primärenergie zur stofflichen Nutzung (PERM) [MJ]: A1-A3 0.294772, C3 0, D 0
- Total erneuerbare Primärenergie (PERT) [MJ]: A1-A3 51.86, C3 0.01172, D -31.18
- Nicht-erneuerbare Primärenergie als Energieträger (PENRE) [MJ]: A1-A3 140.253, C3 0.0386, D -67.84
- Nicht-erneuerbare Primärenergie zur stofflichen Nutzung (PENRM) [MJ]: A1-A3 0.0465208, C3 0, D 0
- Total nicht erneuerbare Primärenergie (PENRT) [MJ]: A1-A3 140.3, C3 0.0386, D -67.84
- Einsatz von Sekundärstoffen (SM) [kg]: A1-A3 0.24, C3 0, D 0
- Erneuerbare Sekundärbrennstoffe (RSF) [MJ]: A1-A3 0, C3 0, D 0
- Nicht erneuerbare Sekundärbrennstoffe (NRSF) [MJ]: A1-A3 0, C3 0, D 0
- Einsatz von Süßwasserressourcen (FW) [m^3]: A1-A3 0.111, C3 1.612e-5, D -0.07878

## Outputs
- Gefährlicher Abfall zur Deponie (HWD) [kg]: A1-A3 1.118e-7, C3 2.915e-10, D -3.729e-8
- Entsorgter nicht gefährlicher Abfall (NHWD) [kg]: A1-A3 2.454, C3 0.04009, D -1.575
- Entsorgter radioaktiver Abfall (RWD) [kg]: A1-A3 0.007748, C3 4.762e-6, D -0.004095
- Komponenten für die Wiederverwendung (CRU) [kg]: A1-A3 0, C3 0, D 0
- Stoffe zum Recycling (MFR) [kg]: A1-A3 0, C3 0.96, D 0
- Stoffe für die Energierückgewinnung (MER) [kg]: A1-A3 0, C3 0, D 0
- Exportierte elektrische Energie (EEE) [MJ]: A1-A3 0, C3 0, D 0
- Exportierte thermische Energie (EET) [MJ]: A1-A3 0, C3 0, D 0

## Impact indicators
- Globales Erwärmungspotenzial (GWP) [kg CO_(2)-Äq.]: A1-A3 10.68, C3 0.002322, D -5.507
- Abbau Potential der stratosphärischen Ozonschicht (ODP) [kg CFC11-Äq.]: A1-A3 1.088e-10, C3 6.96e-15, D -7.736e-11
- Versauerungspotenzial von Boden und Wasser (AP) [kg SO_(2)-Äq.]: A1-A3 0.04236, C3 8.664e-6, D -0.02804
- Eutrophierungspotenzial (EP) [kg PO_(4)^(3)-Äq.]: A1-A3 0.003414, C3 1.06e-6, D -0.001719
- Bildungspotential für troposphärisches Ozon (POCP) [kg Ethen-Äq.]: A1-A3 0.002395, C3 6.194e-7, D -0.001474
- Potenzial für den abiotischen Abbau nicht fossiler Ressourcen (ADPE) [kg Sb-Äq.]: A1-A3 1.479e-5, C3 1.075e-9, D 5.022e-7
- Potenzial für den abiotischen Abbau fossiler Brennstoffe (ADPF) [MJ]: A1-A3 120.7, C3 0.02659, D -57.42

## Use advice
Gültigkeitsbereich:
Die Umweltproduktdeklaration bezieht sich auf 1 kg anodisiertes Aluminiumprofil.

Diese Verbands-EPD wurde auf Basis der Daten von Mitgliedsunternehmen (Aluminium-Laufen AG Liesberg, apt Extrusions GmbH & Co. KG, apt Extrusions B.V., Hydro Extrusion Nenzing GmbH, OTTO FUCHS KG) sowie der GSB International erstellt. Die Standorte der Produktionsanlagen aller Unternehmen befinden sich in der DACH Region und verwenden die gleiche Produktionstechnologie. Die Datenerfassung bezieht sich auf ein Jahr im Zeitraum 2016 oder 2017.
Systemgrenze:
Typ der EPD: Wiege bis Werkstor mit Optionen.

Folgende Prozesse im Produktstadium A1-A3 der Aluminiumprofil-Herstellung wurden berücksichtigt:

Bereitstellungsprozesse von Hilfsstoffen und Energie
Transporte der Ressourcen und Hilfsstoffe zum Werk
Herstellungsprozess des Aluminiumbarrens (Der Gesamtverband der Aluminiumindustrie stellt die aktuellen Datensätze der European Aluminium /EA/ zur Verfügung.)
Herstellprozess für Aluminiumprofile im Werk inklusive energetischen Aufwendungen, Herstellung von Hilfsstoffen, Entsorgung von anfallenden Reststoffen und der Berücksichtigung von im Werk auftretenden Emissionen.
Herstellung der Verpackungen (PE-Folien, Karton, Stahlbänder und Holzpaletten)
Oberflächenveredelung

Folgende Prozesse im Entsorgungsstadium wurden berücksichtigt:
Schreddern des Aluminium-Schrottes (C3).
Ersparte Aufwendungen für die Netto-Schrottmenge durch Substitution von Primäraluminium (Gutschrift in Modul D).

Das Ende der Abfalleigenschaft (End-of-Waste-Status) ist nach dem Schreddern erreicht. Der geschredderte Schrott wird zu Aluminium umgeschmolzen.

Aufgrund des geringen Umwelt-Einflusses der Verpackung wurde deren Entsorgung in Modul A5 abgeschnitten und das EoL der Verpackung nicht berücksichtigt (cut-off).

## Data sources
- Aluminiumprofil anodisiert.pdf
- GaBi Database (all versions)
- GaBi database SP35 2018
