# Polyvinyl chloride floorcoverings with enhanced slip resistance (Safety Flooring) according to EN 13845

Dataset: ILCD process, EPD, average dataset
Geography: RER
Reference year: 2019
Valid until: 2024
Classification: OEKOBAU.DAT: Kunststoffe / Bodenbeläge / PVC-Bodenbeläge
Classification: IBUCategories: 02 Building products / Floor coverings / Floor coverings
Method details: Floor coverings.pdf
Registration number: EPD-ERF-20180181-CCI1-EN
Owner: ERFMI vzw, European Resilient Flooring Manufacturers' Institute
Compliance: DIN EN 15804; ISO 14025
Review: Accredited third party review by Institut Bauen und Umwelt e. V.
Amounts: rows without a unit in brackets have none in this file; such an amount is in the reference unit of its flow, which a separate flow dataset defines
copyright: true

## General comment
Resilient floor coverings are an entire product family of flexible flooring solutions available in sheet, tiles and planks. It is classified in heterogeneous or homogeneous composition based on plastics, linoleum, cork or rubber. Resilient floor coverings can provide different functionalities (acoustic, static control, slip resistance, easy maintenance etc.) to match a wide range of domestic, commercial and industrial applications. It is available in an enormous range of
patterns and colours fitting with inspiration and decorative needs.

Polyvinyl chloride floorcoverings with enhanced slip resistance (safety flooring) are based on polyvinyl chloride with a wear surface modified to provide sustainable enhanced slip resisting properties under specified conditions. The surface contains various aggregate or identifiable particles of different hardness which are present throughout the normal wear life of the product.

## Technology and included processes
flexible flooring solutions available in sheet, tiles and planks. It is classified in heterogeneous or homogeneous composition based on plastics, linoleum, cork or rubber. Resilient floor coverings can provide different functionalities (acoustic, static control, slip resistance, easy maintenance etc.) to match a wide range of domestic, commercial and industrial applications. It is available in an enormous range of patterns and colours fitting with inspiration and decorative needs. Polyvinyl chloride floorcoverings with enhanced slip resistance (safety flooring) are based on polyvinyl chloride with a wear surface modified to provide sustainable enhanced slip resisting properties under specified conditions. The surface contains various aggregate or identifiable particles of different hardness which are present throughout the normal wear life of the product.
Technical data:
The following table contains the construction data of the declared product group:
Declared unit:
1m² of floor covering.

## Technical purpose
According to /EN ISO 10874/ the area of application for resilient floor coverings is indicated by use classes. The declared product group covers the use classes 23, 34 and 43.

## Scenarios
- S1: 100% incineration
- S2: 100% landfilling
- S3: 100% recycling

## Reference product
- polyvinyl chloride floorcovering with enhanced slip resistance (2.8 kg/m²): 1

## Inputs
- Renewable primary energy as energy carrier (PERE) [MJ]: A1-A3 17.5245, A4 0.19841, A5 4.69589, B2 1.59, C1 0.0854, C2 0.0194, C3 5.62, C4 0.219, D (S1) -4.527, D (S2) -0.321, D (S3) -0.321
- Renewable primary energy resources as material utilization (PERM) [MJ]: A1-A3 4.4, A4 0, A5 -0.802052, B2 0, C1 0, C2 0, C3 -4.4, C4 0, D (S1) 0, D (S2) 0, D (S3) 0
- Total use of renewable primary energy resources (PERT) [MJ]: A1-A3 21.9245, A4 0.19841, A5 3.89384, B2 1.59, C1 0.0854, C2 0.0194, C3 1.22, C4 0.219, D (S1) -4.527, D (S2) -0.321, D (S3) -0.321
- Non renewable primary energy as energy carrier (PENRE) [MJ]: A1-A3 125.715, A4 3.59726, A5 20.7051, B2 5.13, C1 0.227, C2 0.352, C3 46.55, C4 2.95, D (S1) -26.91, D (S2) -1.88, D (S3) -1.88
- Non renewable primary energy as material utilization (PENRM) [MJ]: A1-A3 39.3, A4 0, A5 -0.131953, B2 0, C1 0, C2 0, C3 -39.3, C4 0, D (S1) 0, D (S2) 0, D (S3) 0
- Total use of non renewable primary energy resources (PENRT) [MJ]: A1-A3 165.015, A4 3.59726, A5 20.5731, B2 5.13, C1 0.227, C2 0.352, C3 7.25, C4 2.95, D (S1) -26.91, D (S2) -1.88, D (S3) -1.88
- Use of secondary material (SM) [kg]: A1-A3 0.050857, A4 0, A5 0.00324619, B2 0, C1 0, C2 0, C3 0, C4 0, D (S1) 0, D (S2) 0, D (S3) 2.73914
- Use of renewable secondary fuels (RSF) [MJ]
- Use of non renewable secondary fuels (NRSF) [MJ]
- Use of net fresh water (FW) [m^3]: A1-A3 0.0531056, A4 0.000365629, A5 0.00583664, B2 0.00247, C1 0.000116, C2 3.58e-5, C3 0.0132, C4 -7.58e-6, D (S1) -0.006174, D (S2) -0.000438, D (S3) -0.000438

## Outputs
- Hazardous waste disposed (HWD) [kg]: A1-A3 7.0638e-6, A4 2.07997e-7, A5 4.91047e-7, B2 2.43e-9, C1 1.07e-10, C2 2.04e-8, C3 4.54e-8, C4 1.26e-8, D (S1) -1.074e-8, D (S2) -7.52e-10, D (S3) -7.52e-10
- Non hazardous waste disposed (NHWD) [kg]: A1-A3 0.3266, A4 0.000301342, A5 0.173256, B2 0.00838, C1 0.00016, C2 2.95e-5, C3 2.46, C4 2.78, D (S1) -0.01054, D (S2) -0.000743, D (S3) -0.000743
- Radioactive waste disposed (RWD) [kg]: A1-A3 0.00457648, A4 4.92314e-6, A5 0.0004107, B2 0.000702, C1 3.77e-5, C2 4.82e-7, C3 0.000284, C4 4.19e-5, D (S1) -0.001989, D (S2) -0.000141, D (S3) -0.000141
- Components for re-use (CRU) [kg]
- Materials for recycling (MFR) [kg]: D (S3) 2.8
- Materials for energy recovery (MER) [kg]: D (S1) 2.8
- Exported electrical energy (EEE) [MJ]: A5 0.35079, C3 5.85
- Exported thermal energy (EET) [MJ]: A5 0.829331, C3 13.8

## Impact indicators
- Global warming potential (GWP) [kg CO_(2)-Äq.]: A1-A3 7.7289, A4 0.264185, A5 1.13978, B2 0.284, C1 0.0124, C2 0.0259, C3 5.46, C4 0.196, D (S1) -1.546, D (S2) -0.108, D (S3) -0.108
- Depletion potential of the stratospheric ozone layer (ODP) [kg CFC11-Äq.]: A1-A3 1.17693e-9, A4 7.19692e-15, A5 7.60836e-11, B2 1.03e-12, C1 5.53e-14, C2 7.05e-16, C3 1.93e-12, C4 5.29e-14, D (S1) -2.916e-12, D (S2) -2.07e-13, D (S3) -2.07e-13
- Acidification potential of land and water (AP) [kg SO_(2)-Äq.]: A1-A3 0.0130439, A4 0.000575105, A5 0.00173256, B2 0.000728, C1 3.53e-5, C2 5.63e-5, C3 0.0048, C4 0.000535, D (S1) -0.002371, D (S2) -0.000167, D (S3) -0.000167
- Eutrophication potential (EP) [kg PO_(4)^(3)-Äq.]: A1-A3 0.00257615, A4 0.00014542, A5 0.000320067, B2 9.38e-5, C1 3.31e-6, C2 1.42e-5, C3 0.000212, C4 0.000547, D (S1) -0.0002645, D (S2) -1.86e-5, D (S3) -1.86e-5
- Formation potential of tropospheric ozone photochemical oxidants (POCP) [kg Ethen-Äq.]: A1-A3 0.00492122, A4 -0.000188118, A5 0.000394436, B2 5.93e-5, C1 2.21e-6, C2 -1.84e-5, C3 0.000111, C4 5.85e-5, D (S1) -0.0001945, D (S2) -1.36e-5, D (S3) -1.36e-5
- Abiotic depletion potential for non fossil resources (ADPE) [kg Sb-Äq.]: A1-A3 3.2261e-5, A4 2.16268e-8, A5 2.2749e-6, B2 1.64e-7, C1 6.61e-9, C2 2.12e-9, C3 1.58e-6, C4 4.29e-8, D (S1) -3.885e-7, D (S2) -2.75e-8, D (S3) -2.75e-8
- Abiotic depletion potential for fossil resources (ADPF) [MJ]: A1-A3 153.503, A4 3.58462, A5 19.5377, B2 3.36, C1 0.133, C2 0.351, C3 6.53, C4 2.84, D (S1) -21.89, D (S2) -1.52, D (S3) -1.52

## Use advice
Scope:
In this EPD polyvinyl chloride floorcoverings with enhanced slip resistance (safety flooring) are declared. The application of this EPD is restricted to polyvinyl chloride floorcoverings with enhanced slip resistance (safety flooring) produced by the members of the European Resilient Flooring Manufacturers’ Institute (ERFMI). Data are based upon production during 2017 in Europe. Data have been provided by 7 companies of ERFMI which represent 100% of ERFMI members.
System boundary:
Type of EPD: cradle to grave

Modules A1-A3 include processes that provide materials and energy input for the system, manufacturing and transport processes up to the factory gate, as well as waste processing.

Module A4 includes transport of the floor covering to the place of installation.

Module A5 includes the production of offcuts and adhesive for the installation of the floor covering, and incineration of offcuts and packaging material.

Module B2 is including provision of cleaning agent, energy and water consumption for the cleaning of the floor covering incl. waste water treatment. The LCA results in this EPD are declared for a one-year usage.

Module C1 considers electricity supply for the deconstruction of the flooring.

Module C2 includes transportation of the postconsumer waste to waste processing.

End of life scenarios are declared for:

100% incineration in a waste incineration plant (WIP) (Scenario 1, C3/1)

100% landfilling (Scenario 2, C4/2)

100% recycling according to information from AgPR, (Arbeitsgemeinschaft PVC-Bodenbelag Recycling) (Scenario 3 - for the recycling scenario the end of waste state is reached after removal from the building)
Module D includes potential benefits from all net flows given in module A5 and C3 that leave the product boundary system after having passed the end-of-waste state in the form of recovery and/or recycling potentials. Module D is declared for each scenario separately.

## Data sources
- Polyvinyl chloride floorcoverings with enhanced slip resistance (Safety Flooring) according to EN 13845.pdf
- GaBi Database (all versions)
- GaBi database SP33 2017
