# PIR high-density foam

Dataset: ILCD process, EPD, generic dataset
Geography: DE
Reference year: 2021
Valid until: 2022
Classification: oekobau.dat: Dämmstoffe / Polyurethan-Hartschaum (PU) / PIR-Hartschaum
Owner: Sphera Solutions GmbH
Compliance: EN 15804+A2
Review: Dependent internal review by Sphera Solutions GmbH; Independent external review by GaBi user forum
Amounts: rows without a unit in brackets have none in this file; such an amount is in the reference unit of its flow, which a separate flow dataset defines
copyright: true
licenseType: Free of charge for all users and uses
accessRestrictions: The license conditions as stated on https://www.oekobaudat.de/ apply.
accessRestrictions: Es gelten die Lizenzbedingungen wie sie auf https://www.oekobaudat.de/ genannt sind.

## General comment
This data set has been modeled according to the European Standard EN 15804+A2 for Sustainable Building. Results are depicted in modules that allow the structured expression of results over the entire life cycle.

## Geography
The data set represents the country specific situation in Germany, focusing on the main technologies, the region specific characteristics and / or import statistics.

## Time period
Annual average

## Technology and included processes
PIR is made from the raw materials MDI and polyol. In contrast to PUR foams, excess MDI is present in the manufacture of PIR, which is why it partially reacts with itself. The result is PIR, a very highly networked plastic with ring-like structures. The raw materials MDI and polyol dominate the LCA.

In module C1, a manual dismantling (no loads) is assumed, collecting losses are neglected.
The transport in module C2 to the recycling plant takes place with a truck (50km).
Module C3 takes into account the grinding and thermal treatment (combustion) of the material. When calculating combustion emissions and credits, the specific calorific value of each material and the material composition are taken into account.
In module D credits for the substitution of electricity (German electricity mix) and thermal energy (from natural gas) are given.

## Technical purpose
PIR high-density foams are used as insulation e.g. of industrial floors and roof structures with high loads.

## Safety margin
10 %. Product system almost completely covered. Good technological, temporal and geographic representativeness.

## Reference product
- PIR high-density foam: 1

## Inputs
- Use of renewable primary energy as energy carrier (PERE) [MJ]: A1-A3 178.912, C2 0.0601195, C3 4.27399, D -140.173
- Use of renewable primary energy resources used as raw materials (PERM) [MJ]: A1-A3 0, C2 0, C3 0, D 0
- Total use of renewable primary energy (PERT) [MJ]: A1-A3 178.912, C2 0.0601195, C3 4.27399, D -140.173
- Use of non renewable primary energy as energy carrier (PENRE) [MJ]: A1-A3 1277.41, C2 1.03586, C3 915.088, D -402.435
- Use of non renewable primary energy resources used as raw materials (PENRM) [MJ]: A1-A3 810, C2 0, C3 -810, D 0
- Total use of non renewable primary energy resource (PENRT) [MJ]: A1-A3 2087.41, C2 1.03586, C3 105.088, D -402.435
- Use of secondary material (SM) [kg]: A1-A3 0, C2 0, C3 0, D 0
- Use of renewable secondary fuels (SF) [MJ]: A1-A3 0, C2 0, C3 0, D 0
- Use of non renewable secondary fuels (NRSF) [MJ]: A1-A3 0, C2 0, C3 0, D 0
- Net use of fresh water (FW) [m3]: A1-A3 0.631528, C2 5.34312e-5, C3 0.178573, D -0.0521149

## Outputs
- Hazardous waste disposed (HWD) [kg]: A1-A3 0.000390598, C2 4.32957e-11, C3 5.88952e-9, D -1.40483e-7
- Non harzardous waste disposed (NHWD) [kg]: A1-A3 0.874229, C2 0.000167212, C3 0.393873, D -0.214854
- Radioactive waste disposed (RWD) [kg]: A1-A3 0.0504288, C2 9.94044e-7, C3 0.000524646, D -0.0150759
- Components for re-use (CRU) [kg]: A1-A3 0, C2 0, C3 0, D 0
- Materials for recycling (MFR) [kg]: A1-A3 0, C2 0, C3 0, D 0
- Materials for energy recovery (MER) [kg]: A1-A3 0, C2 0, C3 30, D 0
- Exported electrical energy (EEE) [MJ]: A1-A3 0, C2 0, C3 102.955, D 0
- Exported thermal energy (EET) [MJ]: A1-A3 0, C2 0, C3 225.122, D 0

## Impact indicators
- Global Warming Potential - total (GWP-total) [kg CO2 eq.]: A1-A3 95.6256, C2 0.0786849, C3 78.2309, D -25.962
- Global Warming Potential - fossil fuels (GWP-fossil) [kg CO2 eq.]: A1-A3 96.1297, C2 0.0781477, C3 77.3811, D -25.6656
- Global Warming Potential - biogenic (GWP-biogenic) [kg CO2 eq.]: A1-A3 -0.841033, C2 3.53147e-5, C3 0.848332, D -0.25769
- Global Warming Potential - land use and land use change (GWP-luluc) [kg CO2 eq.]: A1-A3 0.336953, C2 0.000501885, C3 0.00141211, D -0.0386976
- Depletion potenzial of the stratospheric ozone layer (ODP) [kg CFC-11 eq.]: A1-A3 0.000157425, C2 1.99959e-17, C3 1.75464e-14, D -6.12005e-13
- Acidifcation potential, Accumulated Exceedance (AP) [Mole of H+ eq.]: A1-A3 0.214329, C2 0.000221567, C3 0.0517165, D -0.0266127
- Eutrophication potential - freshwater (EP-freshwater) [kg P eq.]: A1-A3 0.000604815, C2 1.6072e-7, C3 2.5972e-6, D -6.43665e-5
- Eutrophication potential - marine (EP-marine) [kg N eq.]: A1-A3 0.0558199, C2 0.000102071, C3 0.0237487, D -0.00974908
- Eutrophication potential - terrestrial (EP-terrestrial) [Mole of N eq.]: A1-A3 0.58746, C2 0.00114199, C3 0.285522, D -0.103784
- Photochemical Ozone Creation Potential (POCP) [kg NMVOC eq.]: A1-A3 0.229933, C2 0.000199041, C3 0.0606573, D -0.0254862
- Abiotic depletion potential - non-fossil resources (ADPE) [kg Sb eq.]: A1-A3 1.41393e-5, C2 6.79776e-9, C3 2.76311e-7, D -8.21401e-6
- Abiotic depletion potential - fossil resources (ADPF) [MJ]: A1-A3 2167.72, C2 1.03582, C3 24.0829, D -402.376
- Water (user) deprivation potential (WDP) [m³ world equiv.]: A1-A3 24.8515, C2 0.000303787, C3 7.57901, D -0.316221

## Use advice
This data set refers to the production of 1 m³ PIR high-density foam. Lamination was not considered. The bulk density is 30 kg/m³. The thermal conductivity is 0.024 W/mK. The data set can be used approximately for the estimation of phenolic resin foam with a density of 25 - 35 kg/m³, as well as for the estimation of slabs with thin fiberglass lamination.

The data set represents a cradle to gate inventory. It can be used to characterise the supply chain situation of the respective commodity in a representative manner. Combination with individual unit processes using this commodity enables the generation of user-specific (product) LCAs.

## Data sources
- GaBi databases
- Documentation of data quality management
- GaBi Database Edition 2021, CUP2021.01
- GaBi database (all versions)
