# Rahmenprofile für Fenster und Türen - HUECK System GmbH & Co. KG - WS/DS 090; 3,15 kg/lfm

Dataset: ILCD process, EPD, specific dataset
Geography: DE
Reference year: 2018
Valid until: 2024
Classification: OEKOBAU.DAT: Komponenten von Fenstern und Vorhangfassaden / Rahmen / Profile / Aluminium thermisch getrennt
Synonyms: Aluminium-Fenstersysteme; Aluminium-Türensysteme; WS 090 SA; WS 090 IS; WS 090; WS 090 Duo; DS 090; DS 090 Duo; Lambda 110; Lambda
Method details: EPD Rahmenprofile für Aluminiumfenster und -türen; Produktkategorieregeln Teil A; Produktkategorieregeln Teil B – für Profile für Fenster, Türen und Fassaden
Owner: HUECK System GmbH & Co. KG
Compliance: EN 15804
Review: Independent external review by Patrick Wortner
Amounts: rows without a unit in brackets have none in this file; such an amount is in the reference unit of its flow, which a separate flow dataset defines
copyright: true

## General comment
Hochwärmegedämmte Aluminiumkonstruktioen mit einer Bautiefe von 75 mm. Rahmenansichtsbreiten der Fenster von 55 mm bis 225 mm, der Türen von 65 mm bis 75 mm .

A1-A3 sowie Module C1, C2, C3, C4, D. Das Umweltprofil beinhaltet die Aufwendungen für die Lebenszyklus-Stadien cradle to gate mit Optionen (Modul A1-A3). Die Herstellung der Verpackung wurde innerhalb der Module A1-A3 berücksichtigt.

## Geography
Dieser Datensatz repräsentiert die Situation des Unternehmens HUECK System GmbH & Co. KG in 58511 Lüdenscheid im Hinblick auf die wichtigsten Technologien und die gesetzlichen Rahmenbedingungen.

## Time period
jährlicher Durchschnitt

## Technology and included processes
Die Ökobilanzergebnisse umfassen die Lebenszyklusstadien der Herstellung der Vorprodukte bis hin zur Rohstoffgewinnung und Verarbeitungsprozesse von als Input dienenden Sekundärstoffen (z.B. Recyclingprozesse), deren Transporte zum Werk sowie die Produktion selbst, einschließlich der Bereitstellung von allen Hilfs- und Betriebsstoffen, Energie, sowie die vollständige Abfallbehandlung oder die Deponierung der Restabfälle während des Stadiums der Produktion. Die Module A1, A2 und A3 sind hier als ein aggregiertes Modul A1-A3 ausgewiesen. Falls für diesen Datensatz weitere Module berechnet wurden, sind diese separat zu finden und können für eine Betrachtung des gesamten Lebenszyklus zusammengeführt werden.

## Technical purpose
HUECK Lambda-Aluminium-Fenster- und Türensysteme für alle Gebäudeklassen.

## Reference product
- Rahmenprofile für Fenster und Türen - HUECK System GmbH & Co. KG - WS/DS 090: 1

## Inputs
- Use of net fresh water (FW) [m3]: A1-A3 0.3, C1 0, C2 0.000198, C3 0.00541, C4 1.74e-5, D -0.16
- Use of non renewable primary energy (PENRE) [MJ]: A1-A3 357.42, C1 0, C2 2.02, C3 16.21, C4 0.85, D -156.19
- Use of non renewable primary energy resources used as raw materials (PENRM) [MJ]: A1-A3 15.66, C1 0, C2 0, C3 -14.88, C4 -0.78, D 0
- Use of non renewable secondary fuels (NRSF) [MJ]: A1-A3 0, C1 0, C2 0, C3 0, C4 0, D 0
- Use of renewable primary energy (PERE) [MJ]: A1-A3 120.13, C1 0, C2 0.12, C3 0.47, C4 0.00876, D -63.38
- Use of renewable primary energy resources used as raw materials (PERM) [MJ]: A1-A3 0.00557, C1 0, C2 0, C3 0, C4 0, D 0
- Use of renewable secondary fuels (RSF) [MJ]: A1-A3 0, C1 0, C2 0, C3 0, C4 0, D 0
- Use of secondary material (SM) [kg]: A1-A3 0, C1 0, C2 0, C3 0, C4 0, D 0
- Total use of non renewable primary energy resource (PENRT) [MJ]: A1-A3 373.08, C1 0, C2 2.02, C3 1.33, C4 0.0691, D -156.19
- Total use of renewable primary energy resources (PERT) [MJ]: A1-A3 120.14, C1 0, C2 0.12, C3 0.47, C4 0.00876, D -63.38

## Outputs
- Components for re-use (CRU) [kg]: A1-A3 0, C1 0, C2 0, C3 0, C4 0, D 0
- Exported electrical energy (EEE) [MJ]: A1-A3 1.3e-6, C1 0, C2 0, C3 4.85, C4 0, D 0
- Exported thermal energy (EET) [MJ]: A1-A3 2.78e-6, C1 0, C2 0, C3 8.63, C4 0, D 0
- Hazardous waste disposed (HWD) [kg]: A1-A3 2.42e-7, C1 0, C2 1.13e-7, C3 7.26e-10, C4 1.18e-9, D -1.1e-7
- Materials for energy recovery (MER) [kg]: A1-A3 0, C1 0, C2 0, C3 0, C4 0, D 0
- Materials for recycling (MFR) [kg]: A1-A3 0, C1 0, C2 0, C3 2.11, C4 0, D 0
- Non hazardous waste dispose (NHWD) [kg]: A1-A3 5.56, C1 0, C2 0.000164, C3 0.00978, C4 0.32, D -3.09
- Radioactive waste disposed (RWD) [kg]: A1-A3 0.0207, C1 0, C2 2.74e-6, C3 0.000187, C4 9.29e-7, D -0.0102

## Impact indicators
- Abiotic depletion potential for non fossil resources (ADPE) [kg Sb-Äqv.]: A1-A3 1.7e-5, C1 0, C2 1.14e-8, C3 3.08e-8, C4 1.76e-9, D -4.08e-6
- Abiotic depletion potential for fossil resources (ADPF) [MJ]: A1-A3 320.25, C1 0, C2 2.01, C3 0.86, C4 0.0668, D -130.32
- Acidification potential of soil and water (AP) [kg SO2-Äqv.]: A1-A3 0.11, C1 0, C2 0.000304, C3 0.000311, C4 2.86e-5, D -0.0532
- Eutrophication potential (EP) [kg Phosphat-Äqv.]: A1-A3 0.00716, C1 0, C2 7.5e-5, C3 4.64e-5, C4 3.24e-6, D -0.00317
- Global warming potential (GWP) [kg CO2-Äqv.]: A1-A3 25.15, C1 0, C2 0.15, C3 2.33, C4 0.00477, D -11.64
- Depletion potential of the stratospheric ozone layer (ODP) [kg CFC 11 eq.]: A1-A3 2.42e-8, C1 0, C2 2.45e-17, C3 1.83e-15, C4 2.77e-17, D -2.95e-14
- Formation potential of tropospheric ozone (POCP) [kg Ethen-Äqv.]: A1-A3 0.00649, C1 0, C2 -9.17e-5, C3 2.54e-5, C4 2.2e-6, D -0.00294

## Use advice
Dieser Datensatz beinhaltet die Ergebnisse für die Module A1-A3 sowie die Module C1, C2, C3, C4, D gemäß EN 15804.
Ein Vergleich mit anderen Produkten ist nur mit einer vergleichbaren Anwendung im Gebäude zulässig. Grundsätzlich ist eine Gegenüberstellung oder die Bewertung von EPD Daten nur möglich, wenn alle zu vergleichenden Datensätze nach EN 15804 erstellt wurden und der Gebäudekontext, bzw. die produktspezifischen Leistungsmerkmale berücksichtigt werden.

## Review details
Die angewendete LCI Methode ist in Übereinstimmung mit ISO 14040 und 14044. Die Dokumentation enthält alle relevanten Informationen im Hinblick auf die Datenqualität und den Umfang der Anwendung der jeweiligen LCI Ergebnisse bzw. der Datensätze. Der Datensatz repräsentiert den Stand der Technik bezogen auf die funktionelle Einheit.

## Data sources
- GaBi database (all versions)
