# Glued laminated timber - straight shapes (German average)

Dataset: ILCD process, EPD, representative dataset
Geography: DE
Reference year: 2021
Valid until: 2026
Classification: OEKOBAU.DAT: Holz / Vollholz / Brettschichtholz (BSH)
Method details: EN 15804; ILCD format
Generated by: Thünen-Institut für Holzforschung
Owner: Thünen-Institut für Holzforschung
Compliance: EN 15804+A2; EN 16485
Review: Independent external review by Dr. Frank Werner - Umwelt & Entwicklung
Amounts: rows without a unit in brackets have none in this file; such an amount is in the reference unit of its flow, which a separate flow dataset defines
copyright: true

## General comment
Further information on the declared unit and the inventory analysis based on manufacturer information (input and output of material and energy flows) are available for download as an Excel file within the section “background info”.
The data set was created in 2021 as an update with identical foreground system. All background data sets are taken from the GaBi Professional Database with content version 2021.1. The modeling and calculation of the life cycle assessment is based on the European standards EN 15804:2012+A2:2019 and EN 16485:2014. For questions, please contact holzundklima@thuenen.de.

## Geography
Für die Ökobilanzierung von Brettschichtholz, Standardträger wurden Daten von 21 Werken berücksichtigt (Rüter & Diederichs 2012). Für alle in Rüter & Diederichs (2012) angeführten Vollholzprodukte wurden von 2009 bis 2011 insgesamt 178 Prozesslinien erfasst. Im Verhältnis zu den vom Statistischen Bundesamt gemeldeten Produktionsmengen im selben Zeitraum entspricht die erreichte Abdeckung von Vollholzprodukten aus Nadelschnittholz 38 %.

## Time period
The data set is based on production data from the years 2009 to 2011 (foreground system).
The background system was updated in 2021.

## Technology and included processes
Brettschichtholz besteht aus mindestens drei faserparallel miteinander verklebten und getrockneten Brettern oder Brettlamellen aus Nadelholz. Die hier aufgeführten Ergebnisse und Parameter beziehen sich auf gerade, horizontal laminierte Träger (Standardträger). Die Verklebung von Brettschichtholz Standardträgern wird vornehmlich mittels Melamin-Harnstoff-Formaldehyd Bindemittel durchgeführt. Teilweise werden jedoch auch 1 Komponenten Polyurethan-Bindemittel und in seltenen Fällen Emulsion-Polymer-Isocyanat-Bindemittel genutzt. Die keilgezinkten Lamellen werden analog zu den Konstruktionsvollhölzern verklebt. Im Einzelfall werden maximal zwei verschiedene Klebstofftypen genutzt. Für die Herstellung von Brettschichtholz Standardträgern wird konventionelles Schnittholz zunächst auf etwa 12 % Holzfeuchte getrocknet, vorgehobelt und visuell bzw. maschinell nach Festigkeit sortiert. Identifizierte Brettabschnitte mit festigkeitsvermindernden Stellen werden abhängig von der erwünschten Festigkeitsklasse ausgekappt und die entstandenen Bretter durch Keilzinkenverbindung zu endlos langen Lamellen gestoßen. Im darauffolgenden Vorhobelprozess werden die Lamellen auf bis zu 45mm Stärke gehobelt, um nach Beleimung der Breitseite im Pressbett zu mindesten 3-lagigen Holzrohlingen verpresst zu werden. Nach Aushärtung wird der Rohling gehobelt, gefast, abgebunden und verpackt.
Die Holzfeuchte des Produktes liegt bei 12%.

## Technical purpose
Glued laminated timber is mainly used for high structural demands in timber engineering.

## Scenarios
- energetisch (Modul D): therm. Verwertung
- stofflich (Modul D): stoffl. Verwertung
- Entsorgung Verpackung (Modul A5): Das Modul A5 enthält ausschließlich die Entsorgung der Verpackungsmaterialien

## Reference product
- Brettschichtholz (standard): 1

## Inputs
- Use of renewable primary energy (PERE) [MJ]: A1 821.91, A2 47.4358, A3 2115.79, A1-A3 2985.14, A5 (Entsorgung Verpackung) 0.268097, C2 0.413704, C3 100.439, D (energetisch) 6098.63, D (stofflich) -80.7323
- Use of renewable primary energy resources used as raw materials (PERM) [MJ]: A1 8573.86, A2 0, A3 36.1501, A1-A3 8610.01, A5 (Entsorgung Verpackung) -36.1501, C2 0, C3 -8573.86, D (energetisch) 0, D (stofflich) 0
- Total use of renewable primary energy resources (PERT) [MJ]: A1 9395.77, A2 47.4358, A3 2151.94, A1-A3 11595.1, A5 (Entsorgung Verpackung) -35.882, C2 0.413704, C3 -8473.42, D (energetisch) 6098.63, D (stofflich) -80.7323
- Use of non renewable primary energy (PENRE) [MJ]: A1 746.762, A2 436.155, A3 865.342, A1-A3 2048.26, A5 (Entsorgung Verpackung) 1.37866, C2 7.42299, C3 153.986, D (energetisch) -4708.12, D (stofflich) -175.472
- Use of non renewable primary energy resources used as raw materials (PENRM) [MJ]: A1 88.0247, A2 0, A3 16.668, A1-A3 104.693, A5 (Entsorgung Verpackung) -16.668, C2 0, C3 -88.0247, D (energetisch) 0, D (stofflich) 0
- Total use of non renewable primary energy resource (PENRT) [MJ]: A1 834.787, A2 436.155, A3 882.01, A1-A3 2152.95, A5 (Entsorgung Verpackung) -15.2893, C2 7.42299, C3 65.9614, D (energetisch) -4708.12, D (stofflich) -175.472
- Use of secondary material (SM) [kg]: A1 0, A2 0, A3 0, A1-A3 0, A5 (Entsorgung Verpackung) 0, C2 0, C3 0, D (energetisch) 0, D (stofflich) 507.055
- Use of renewable secondary fuels (RSF) [MJ]: A1 51.9469, A2 0, A3 24.4399, A1-A3 76.3868, A5 (Entsorgung Verpackung) 0, C2 0, C3 0, D (energetisch) 0, D (stofflich) 0
- Use of non renewable secondary fuels (NRSF) [MJ]: A1 0, A2 0, A3 0, A1-A3 0, A5 (Entsorgung Verpackung) 0, C2 0, C3 0, D (energetisch) 0, D (stofflich) 0
- Use of net fresh water (FW) [m3]: A1 0.150144, A2 0.049632, A3 0.210819, A1-A3 0.410596, A5 (Entsorgung Verpackung) 0.0150211, C2 0.00047355, C3 0.0472656, D (energetisch) 0.881863, D (stofflich) -0.0203181

## Outputs
- Hazardous waste disposed (HWD) [kg]: A1 8.80952e-7, A2 3.41072e-8, A3 2.36266e-6, A1-A3 3.27772e-6, A5 (Entsorgung Verpackung) 2.49858e-10, C2 3.7404e-10, C3 5.59893e-8, D (energetisch) -1.66067e-6, D (stofflich) -2.36889e-7
- Non hazardous waste dispose (NHWD) [kg]: A1 0.793914, A2 0.0968619, A3 1.66662, A1-A3 2.5574, A5 (Entsorgung Verpackung) 0.0560655, C2 0.0011027, C3 0.11997, D (energetisch) 7.24201, D (stofflich) -0.0399543
- Radioactive waste disposed (RWD) [kg]: A1 0.0173324, A2 0.00893471, A3 0.0508678, A1-A3 0.0771349, A5 (Entsorgung Verpackung) 6.53228e-5, C2 8.97905e-6, C3 0.0123357, D (energetisch) -0.294571, D (stofflich) -0.00397824
- Components for re-use (CRU) [kg]: A1 0, A2 0, A3 0, A1-A3 0, A5 (Entsorgung Verpackung) 0, C2 0, C3 0, D (energetisch) 0, D (stofflich) 0
- Materials for recycling (MFR) [kg]: A1 0, A2 0, A3 0, A1-A3 0, A5 (Entsorgung Verpackung) 0, C2 0, C3 507.055, D (energetisch) 0, D (stofflich) 0
- Materials for energy recovery (MER) [kg]: A1 0, A2 0, A3 0, A1-A3 0, A5 (Entsorgung Verpackung) 1.87588, C2 0, C3 507.055, D (energetisch) 0, D (stofflich) 0
- Exported electrical energy (EEE) [MJ]: A1 0, A2 0, A3 0.149788, A1-A3 0.149788, A5 (Entsorgung Verpackung) 9.76787, C2 0, C3 0, D (energetisch) 0, D (stofflich) 0
- Exported thermal energy (EET) [MJ]: A1 0, A2 0, A3 0.347975, A1-A3 0.347975, A5 (Entsorgung Verpackung) 19.0104, C2 0, C3 0, D (energetisch) 0, D (stofflich) 0

## Impact indicators
- Global Warming Potential - total (GWP-total) [kg CO2-Äqv.]: A1 -762.625, A2 31.0156, A3 64.5943, A1-A3 -667.015, A5 (Entsorgung Verpackung) 5.1017, C2 0.535583, C3 827.806, D (energetisch) -305.836, D (stofflich) -13.3017
- Global Warming Potential - fossil fuels (GWP-fossil) [kg CO2-Äqv.]: A1 53.0436, A2 31.0156, A3 68.0334, A1-A3 152.093, A5 (Entsorgung Verpackung) 1.66258, C2 0.535583, C3 12.138, D (energetisch) -305.836, D (stofflich) -13.3017
- Global Warming Potential - biogenic (GWP-biogenic) [kg CO2-Äqv.]: A1 -815.668, A2 0, A3 -3.43912, A1-A3 -819.107, A5 (Entsorgung Verpackung) 3.43912, C2 0, C3 815.668, D (energetisch) 0, D (stofflich) 0
- Depletion potential of the stratospheric ozone layer (ODP) [kg CFC 11-Äquiv.]: A1 5.59204e-13, A2 8.05659e-14, A3 1.64454e-12, A1-A3 2.28431e-12, A5 (Entsorgung Verpackung) 8.88576e-16, C2 7.11492e-17, C3 4.15483e-13, D (energetisch) -9.9187e-12, D (stofflich) -1.32524e-13
- Acidification potential, Accumulated Exceedance (AP) [mol H+ eqv.]: A1 0.309711, A2 0.171879, A3 0.416961, A1-A3 0.89855, A5 (Entsorgung Verpackung) 0.000945458, C2 0.00323342, C3 0.0174679, D (energetisch) -0.317163, D (stofflich) -0.0681767
- Eutrophication potential - freshwater (EP-freshwater) [kg P eqv.]: A1 0.000138494, A2 9.24525e-5, A3 0.00030131, A1-A3 0.000532256, A5 (Entsorgung Verpackung) 1.33942e-7, C2 1.65315e-6, C3 5.08852e-5, D (energetisch) -0.00121793, D (stofflich) -3.22947e-5
- Eutrophication potential - marine (EP-marine) [kg N eqv.]: A1 0.154642, A2 0.0825519, A3 0.176664, A1-A3 0.413859, A5 (Entsorgung Verpackung) 0.000274068, C2 0.00158432, C3 0.00558653, D (energetisch) -0.114177, D (stofflich) -0.0322721
- Eutrophication potential - terrestrial (EP-terrestrial) [mol N eqv.]: A1 1.54385, A2 0.912799, A3 1.97755, A1-A3 4.4342, A5 (Entsorgung Verpackung) 0.00449353, C2 0.0175357, C3 0.0583261, D (energetisch) -0.914797, D (stofflich) -0.355102
- Versauerungspotenzial, kumulierte Überschreitung (AP) [kg NMVOC eqv.]: A1 0.386011, A2 0.156986, A3 0.496935, A1-A3 1.03993, A5 (Entsorgung Verpackung) 0.000735714, C2 0.00298795, C3 0.0138795, D (energetisch) -0.285042, D (stofflich) -0.0835001
- Abiotic depletion potential - non-fossil resources (ADPE) [kg Sb-Äqv.]: A1 2.29658e-5, A2 3.11748e-6, A3 2.56728e-5, A1-A3 5.17561e-5, A5 (Entsorgung Verpackung) 1.35699e-8, C2 4.23963e-8, C3 4.98206e-6, D (energetisch) -0.000124051, D (stofflich) -2.34514e-6
- Abiotic depletion potential - fossil resources (ADPF) [MJ]: A1 834.673, A2 435.648, A3 864.99, A1-A3 2135.31, A5 (Entsorgung Verpackung) 1.37801, C2 7.4131, C3 153.938, D (energetisch) -4795.03, D (stofflich) -175.451
- Water (user) deprivation potential (WDP) [m3 world eqv.]: A1 0.150144, A2 0.049632, A3 0.210819, A1-A3 0.410596, A5 (Entsorgung Verpackung) 0.0150211, C2 0.00047355, C3 0.0472656, D (energetisch) 0.881863, D (stofflich) -0.0203181
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
## Use advice
Aufgrund der hohen Abdeckung bildet der Datensatz die durchschnittlichen Produktionsverhältnisse und die damit verbundenen Umweltwirkungen repräsentativ für Deutschland ab. Liegen keine herstellerspezifischen Ökobilanzergebnisse des verwendeten Produkts vor, empfiehlt sich die Verwendung dieses Durchschnittsdatensatzes.

## Data sources
- Rüter S, Diederichs S (2012) Ökobilanz Basisdaten für Bauprodukte aus Holz, Hamburg, Johann Heinrich von Thünen Institut, Institut für Holztechnologie und Holzbiologie, Abschlussbericht
- GaBi database (general)
