# colofer®

Dataset: ILCD process, EPD, average dataset
Geography: AT
Reference year: 2017
Valid until: 2022
Classification: OEKOBAU.DAT: Metalle / Stahl und Eisen / Stahlbleche
Classification: IBUCategories: 02 Bauprodukte / Metallbauprodukte und Zubehör / Dünnwandige Profile und Profiltafeln aus Metall
Method details: Dünnwandige Profile und Profiltafeln aus Metall.pdf
Registration number: EPD-VOE-20170087-IBC1-DE
Owner: voestalpine Stahl GmbH
Compliance: DIN EN 15804; ISO 14025
Review: Accredited third party review by Institut Bauen und Umwelt e. V.
Amounts: rows without a unit in brackets have none in this file; such an amount is in the reference unit of its flow, which a separate flow dataset defines
copyright: true

## General comment
The declared product is managed under the name colofer®. It is characterised as a compound product made of metallic support material (galvanised steel strip) and an organic coating by means of coil coating processes to /EN 10169/.
Special material properties can be achieved through the combination of the two components:
- High corrosion resistance
- Formability
- A decorative appearance

The respective national regulations apply for the use of the product at the location of use; in Austria, for example, it is the /building regulations of the federal states/ and the technical stipulations based on these regulations.

## Technology and included processes
The raw material for manufacturing colofer® is steel which is manufactured via the primary route (blast furnace, BOF basic oxygen furnace). The liquid crude steel is cast into slabs in a continuous casting process. The slabs are reheated to 1100 - 1250°C over pusher or walking beam furnaces and rolled to strips of 1.2 – 4 mm thickness in several rolling steps. A mill scale layer forms on the hot-rolled strip which is removed before further processing in the cold rolling mill (scale removal). This production step first proceeds through a mechanical loosening of the scale layer (levelling line). The steel strip is subsequently pickled with hydrochloric and sulphuric acid. After pickling, the strip is rinsed, dried and oiled. The pickled hot strip is processed further in voestalpine’s cold rolling mill. The steel strip can be rolled to thicknesses of between 0.3 and 3mm. Heat treatment (batch or continuous annealing) is performed to restore the formability of the steel strip and to produce a material with certain material properties. With the batch annealing process, the coils are annealed at around 600-700°C in an inert gas atmosphere for a period of 15 - 40 hours, kept at a constant temperature and cooled down again. Unlike batch annealing, the annealing process in the continuous annealing process consists of unrolling the strip and drawing it through a furnace. Metallic coatings (zinc and zinc-magnesium) are used to refine the surface of the steel strip, which exhibit a protective cathodic effect for the steel strip. The declared product is galvanized in a hot dip galvanizing process. colofer® is manufactured at the Linz site in the coil coating plant 2. After passing through the entry looper, the galvanized steel strips are cleaned and pre-treated to achieve better subsequent binding of the paint layer. The liquid paint is applied to the steel strip at the coating stations by means of rollers. To harden the paint layer it is dried in an oven and then cooled.
Declared unit:
This environmental product declaration refers to a declared unit of 1 m² of colofer® organically coated sheet steel with an average surface weight of 5.28 kg/m² and a reference thickness of 0.67 mm. The LCA result for other thicknesses can be calculated by means of linear conversion of the surface weight.

## Technical purpose
The application areas for colofer® cover many sectors and areas – divided into the housing industry (outdoor use) and the household appliance industry (indoor use). Here are a few example applications:

- Roof and wall elements
- Sandwich panels
- Roof drainage systems
- Wall cassettes

- Refrigerators
- Washing machines
- Cookers

## Reference product
- 1 m² colofer® [5,28 kg/m²]: 1

## Inputs
- Renewable primary energy as energy carrier (PERE) [MJ]: A1-A3 7.35, C2 0.0999, C3 0, C4 0.00648, D 2.11
- Renewable primary energy resources as material utilization (PERM) [MJ]: A1-A3 0, C2 0, C3 0, C4 0, D 0
- Total use of renewable primary energy resources (PERT) [MJ]: A1-A3 7.35, C2 0.0999, C3 0, C4 0.00648, D 2.11
- Non renewable primary energy as energy carrier (PENRE) [MJ]: A1-A3 129, C2 1.74, C3 0, C4 0.0571, D -62.4
- Non renewable primary energy as material utilization (PENRM) [MJ]: A1-A3 0, C2 0, C3 0, C4 0, D 0
- Total use of non renewable primary energy resources (PENRT) [MJ]: A1-A3 129, C2 1.74, C3 0, C4 0.0571, D -62.4
- Use of secondary material (SM) [kg]: A1-A3 0.866, C2 0, C3 0, C4 0, D 5
- Use of renewable secondary fuels (RSF) [MJ]: A1-A3 0, C2 0, C3 0, C4 0, D 0
- Use of non renewable secondary fuels (NRSF) [MJ]: A1-A3 0, C2 0, C3 0, C4 0, D 0
- Use of net fresh water (FW) [m^3]: A1-A3 0.0234, C2 0.000247, C3 0, C4 1.16e-5, D -0.00453

## Outputs
- Hazardous waste disposed (HWD) [kg]: A1-A3 3.81e-6, C2 1.3e-7, C3 0, C4 1.3e-9, D 9.54e-6
- Non hazardous waste disposed (NHWD) [kg]: A1-A3 0.129, C2 0.00015, C3 0, C4 0.264, D -0.102
- Radioactive waste disposed (RWD) [kg]: A1-A3 0.00116, C2 3.73e-6, C3 0, C4 7.96e-7, D 0.00139
- Components for re-use (CRU) [kg]: A1-A3 0, C2 0, C3 0, C4 0, D 0
- Materials for recycling (MFR) [kg]: A1-A3 0, C2 0, C3 5, C4 0, D 0
- Materials for energy recovery (MER) [kg]: A1-A3 0, C2 0, C3 0, C4 0, D 0
- Exported electrical energy (EEE) [MJ]: A1-A3 0, C2 0, C3 0, C4 0, D 0
- Exported thermal energy (EET) [MJ]: A1-A3 0, C2 0, C3 0, C4 0, D 0

## Impact indicators
- Global warming potential (GWP) [kg CO_(2)-Äq.]: A1-A3 12.4, C2 0.126, C3 0, C4 0.00424, D -7.07
- Depletion potential of the stratospheric ozone layer (ODP) [kg CFC11-Äq.]: A1-A3 1.65e-10, C2 9.1e-13, C3 0, C4 4.67e-14, D 7.86e-11
- Acidification potential of land and water (AP) [kg SO_(2)-Äq.]: A1-A3 0.0382, C2 0.000549, C3 0, C4 2.54e-5, D -0.0275
- Eutrophication potential (EP) [kg PO_(4)^(3)-Äq.]: A1-A3 0.00359, C2 0.000135, C3 0, C4 3.46e-6, D -0.00231
- Formation potential of tropospheric ozone photochemical oxidants (POCP) [kg Ethen-Äq.]: A1-A3 0.00443, C2 -0.000186, C3 0, C4 2.47e-6, D -0.00408
- Abiotic depletion potential for non fossil resources (ADPE) [kg Sb-Äq.]: A1-A3 0.000573, C2 9.41e-9, C3 0, C4 1.46e-9, D -7.31e-8
- Abiotic depletion potential for fossil resources (ADPF) [MJ]: A1-A3 126, C2 1.73, C3 0, C4 0.0551, D -66

## Use advice
Scope:
This EPD is based on a declared unit of 1 m² or average colofer® with a surface weight of 5.28 kg/m² produced at the Linz site. It consists of organically coated steel sheets and bands.
System boundary:
Type of the LCA: cradle-to-gate with options.

The following life cycle phases are taken into account in the analysis:

Module A1-A3 | Production stage
The product stage contains upstream burdens of purchased raw material (coal, iron ore, pellets, etc.) and the associated transport to the manufacturing site in Linz. At the site, the material and energy flows needed for the coking plant, sintering plant, in the blast furnaces, in the steelworks and the rolling mill as well as during hot dip galvanizing and organic coating were recorded. Energy is provided at the Linz site via a power station in which process gases are used to produce energy. Since more energy is used than is available from this internal power station, natural gas and electrical energy is additionally obtained from the Austrian network.

Module C2 | Transport for disposal/recycling
A distance of 500 km is assumed conservatively for the transport for disposal or recycling.

Module C3 | Waste treatment
It is assumed that 95 % of the product are recycled and leave the product system in module C3 to module D. Environmental impacts resulting from the grinding and sorting of steel scrap are not included.

Module C4 | Disposal in landfill
Module C4 declares the environmental effects which occur through landfilling (5 % of the product).

Module D | Benefits and loads beyond the system boundary
The substitution potential of primary steel by a recycling scenario (95% of the product) is declared in Module D.

## Data sources
- colofer®.pdf
- GaBi Database (all versions)
- GaBi database SP30 2016
