# Chlorodifluoromethane (R22)

Dataset: ILCD process, EPD, generic dataset
Geography: DE
Reference year: 2018
Valid until: 2022
Classification: oekobau.dat: Gebäudetechnik / Klimatisierung und Lüftung / Kältemittel
Owner: thinkstep
Compliance: DIN EN 15804
Review: Dependent internal review by thinkstep, IABP-GaBi, IBP-GaBi; Independent external review by GaBi user forum, GaBi bug forum, GaBi user community
Amounts: rows without a unit in brackets have none in this file; such an amount is in the reference unit of its flow, which a separate flow dataset defines
copyright: true

## General comment
This data set has been modeled according to the European Standard EN 15804 for Sustainable Building. Results are depicted in modules that allow the structured expression of results over the entire life cycle.

## Geography
The data set represents the country specific situation in Germany, focusing on the main technologies, the region specific characteristics and / or import statistics.

## Time period
annual average

## Technology and included processes
The production (modules A1-A3) of the refrigerant is based on hydrogen flourid and trichloromethane. The upstream chain of the two above-mentioned basic chemicals dominates the production phase.

In module B1, the escape of 1 kg of refrigerant into the air was accounted for. The values of module B1 can be used for both the usage phase (e.g., leakage) and the disposal phase (module C1 disposal losses). Scenarios for use and disposal must be defined at the building level (see field "Use advice for data set").

In the disposal phase (C-modules), any burdens due to removal (usually extraction by means of compressed air in special container systems), transport to the disposal or recycling company, as well as the loads for chemical analysis (e.g. gas chromatography) were neglected. Disposal losses (emissions into the air) must be determined at building level (see above).

In module C4 100% thermal treatment / disposal was accounted for. Reuse is prohibited by law. In module D, a credit for substituted electrical and thermal energy takes place.

## Technical purpose
The usual purpose is the use in existing air conditioners. Since the year 2000, the refrigerant must no longer be used in new systems. Since 2015, a general ban on use applies.

## Safety margin
10 %. Product system almost completely covered. Good technological, temporal and geographic representativeness.

## Reference product
- Chlorodifluoromethane (R22): 1

## Inputs
- Use of renewable primary energy (PERE) [MJ]: A1-A3 16.0039, B1 0, C4 1.12654, D -0.887593
- Primary energy resources used as raw materials (PERM) [MJ]: A1-A3 0, B1 0, C4 0, D 0
- Total use of renewable primary energy resources (PERT) [MJ]: A1-A3 16.0039, B1 0, C4 1.12654, D -0.887593
- Use of non-renewable primary energy (PENRE) [MJ]: A1-A3 91.747, B1 0, C4 14.7855, D -3.11457
- Non-renewable primary energy resources used as raw materials (PENRM) [MJ]: A1-A3 0, B1 0, C4 0, D 0
- Total use of non-renewable primary energy resources (PENRT) [MJ]: A1-A3 91.747, B1 0, C4 14.7855, D -3.11457
- Input of secondary material (SM) [kg]: A1-A3 0, B1 0, C4 0, D 0
- Use of renewable secondary fuels (RSF) [MJ]: A1-A3 0, B1 0, C4 0, D 0
- Use of non renewable secondary fuels (NRSF) [MJ]: A1-A3 0, B1 0, C4 0, D 0
- Use of net fresh water (FW) [m3]: A1-A3 0.0358481, B1 0, C4 0.0086849, D -0.000414061

## Outputs
- Hazardous waste disposed (HWD) [kg]: A1-A3 9.74575e-8, B1 0, C4 5.8497e-8, D -1.64543e-9
- Non-hazardous waste disposed (NHWD) [kg]: A1-A3 0.0479043, B1 0, C4 0.735754, D -0.00146314
- Radioactive waste disposed (RWD) [kg]: A1-A3 0.00237228, B1 0, C4 0.00016306, D -0.000107234
- Components for re-use (CRU) [kg]: A1-A3 0, B1 0, C4 0, D 0
- Materials for Recycling (MFR) [kg]: A1-A3 0, B1 0, C4 0, D 0
- Material for Energy Recovery (MER) [kg]: A1-A3 0, B1 0, C4 0, D 0
- Exported electrical energy (EEE) [MJ]: A1-A3 0, B1 0, C4 0.78017, D 0
- Exported thermal energy (EET) [MJ]: A1-A3 0, B1 0, C4 1.80802, D 0

## Impact indicators
- Global warming potential (GWP) [kg CO2 eq.]: A1-A3 4.75856, B1 1810, C4 1.77483, D -0.212757
- Ozone Depletion Potential (ODP) [kg R11 eq.]: A1-A3 1.8361e-7, B1 0.05, C4 5.44513e-15, D -4.90791e-15
- Acidification potential (AP) [kg SO2 eq.]: A1-A3 0.0185125, B1 0, C4 0.00566938, D -0.000179396
- Eutrophication potential (EP) [kg Phosphate eq.]: A1-A3 0.00130868, B1 0, C4 0.00105125, D -3.39889e-5
- Photochemical Ozone Creation Potential (POCP) [kg Ethene eq.]: A1-A3 0.00115119, B1 0, C4 0.000401133, D -1.82879e-5
- Abiotic depletion potential for non fossil resources (ADPE) [kg Sb eq.]: A1-A3 0.000967001, B1 0, C4 7.93798e-8, D -5.273e-8
- Abiotic depletion potential for fossil resources (ADPF) [MJ]: A1-A3 85.7508, B1 0, C4 14.3736, D -2.84386

## Use advice
The dataset refers to the manufacture, use and recycling of 1 kg of refrigerant. The dataset can not be used for the estimation of other refrigerants since environmental effects, durability and intended use can be very different.
For the calculation of the potential environmental effects through the use of the refrigerant at the building level, the specifications/calculation rules of the respective certification scheme must be followed. For a first estimate the following formulas may be used:

I_tot= I_(man.)+ I_use+ I_(disp.)

with

I_(man.) = I_(A1-A3) × m × a_b/a_r
I_use = (I_(A1-A3) × L × a_b ) + (I_B1 × L × a_b )
I_(disp.) = (I_B1 × m × a_b/a_r × E ) + (I_C4 × m × a_b/a_r × (1-E)) + (I_D × m × a_b/a_r × (1-E))

with:

I Indicator value of the respective life cycle stage
m Mass of the refrigerant [kg]
a_b Life time of the building [a]
a_r Life time of the refrigerant [a]
L Leakage rate [%/a]
E Disposal losses [%]

Typical values for the required mass m of the coolant in kg per kW nominal cooling capacity can be taken from Table 46 /UBA/ (see figures).
Approximate values for the usual service life a_KM, leakage rate L and disposal losses E can be taken from Table 50 /UBA/ (see figures).

/UBA/: Environment Federal Office (UBA), Climate-friendly air conditioning (heating and cooling) with natural refrigerants - Concepts for non-residential buildings with server rooms / data centers, 2016

## Data sources
- GaBi Database Edition 2020, SP40
- GaBi database (all versions)
