# noraplan® ed

Dataset: ILCD process, EPD, specific dataset
Geography: RER
Reference year: 2022
Valid until: 2027
Classification: OEKOBAU.DAT: Kunststoffe / Bodenbeläge / Gummi-/Kautschuk-Bodenbeläge
Classification: IBUCategories: 02 Bauprodukte / Bodenbeläge / Bodenbeläge
Method details: Bodenbeläge.pdf
Generated by: nora systems GmbH
Registration number: EPD-NOR-2022008-IBA1-DE
Owner: nora systems GmbH
Compliance: DIN EN 15804+A2; ISO 14025
Review: Accredited third party review by Institut Bauen und Umwelt e. V.
Amounts: rows without a unit in brackets have none in this file; such an amount is in the reference unit of its flow, which a separate flow dataset defines
copyright: true
licenseType: Free of charge for all users and uses
accessRestrictions: None

## General comment
In this Environmental Product Declaration (EPD), resilient, electrostatically dissipative rubber floor coverings of the nora systems GmbH product line noraplan® ed with different designs and surface structures but same rubber recipes are modelled.

For the product line noraplan® ed standards apply:

EN 1817:2007-7: Resilient floor coverings - Specification for homogeneous and heterogeneous smooth rubber floor coverings
EN 14521:2004-9: Resilient floor coverings -Specification for smooth rubber floor coverings with or without foam backing with a decorative layer
ISO 10874:2009-11: Resilient, textile and laminate floor coverings – Classification
EN 1081:2021-1: Resilient, laminate and modular multilayer floor coverings - Determination of the electrical resistance

## Technology and included processes
The production stages are weighing, mixing, and stretching of the unvulcanized blanks on a calender. The following vulcanization is continuously executed on production lines with steam heated drum presses, where under high pressure and at a temperature of approximately 180°C sheets of 1.22 m width are produced. After the vulcanization machine, the sheets are backside sanded and either wound into rolls or, for tiles, cut to length and die-cut. The mass per unit area is 2,95 kg/m². The quality and energy management of nora systems GmbH is certified according to ISO 9001.
Technical data:
Excerpt of technical data sheets: (available at www.nora.com)
Declared unit:
The reference unit is 1 m² of floor covering. The values of module A1-A3 refer to 1 m² produced. This EPD represents a product declaration, i.e. the production and disposal of off-cuts during the installation stage are assigned to module A5. The combined modules A1- A3, A4 and A5 refer to a reference unit of 1 m² installed.

The material for subfloor preparation and adhesive bonding, needed during installation, is not considered. Information on the complete floor structure can be found in Environmental Product Declarations based on the PCR „Dispersion adhesives and primers for floor coverings“ and „Mineral factory-made mortar”.

## Technical purpose
Electrostatically dissipative noraplan® ed floorings offer optimum ESD protection of electronic devices and equipment. They protect against electrical shock and resist most oils and greases.

Floor coverings are classified according to ISO 10874.

Floor coverings for high performance in professional use:

## Reference product
- noraplan ed (): 1

## Inputs
- Renewable primary energy as energy carrier (PERE) [MJ]: A1-A3 22.0321, A4 0.109067, A5 2.82439, B2 0.456397, C1 0.325931, C2 0.00541139, C3 0.792681, D -4.53928
- Renewable primary energy resources as material utilization (PERM) [MJ]: A1-A3 2.24713, A4 0, A5 -1.55329, B2 0, C1 0, C2 0, C3 -0.69384, D 0
- Total use of renewable primary energy resources (PERT) [MJ]: A1-A3 24.2792, A4 0.109067, A5 1.27109, B2 0.456397, C1 0.325931, C2 0.00541139, C3 0.0988412, D -4.53928
- Non renewable primary energy as energy carrier (PENRE) [MJ]: A1-A3 185.156, A4 2.13034, A5 12.4381, B2 8.05377, C1 0.70735, C2 0.094384, C3 49.7643, D -19.9718
- Non renewable primary energy as material utilization (PENRM) [MJ]: A1-A3 49.3978, A4 0, A5 -0.1299, B2 0, C1 0, C2 0, C3 -49.2679, D 0
- Total use of non renewable primary energy resources (PENRT) [MJ]: A1-A3 234.554, A4 2.13034, A5 12.3082, B2 8.05377, C1 0.70735, C2 0.094384, C3 0.496365, D -19.9718
- Use of secondary material (SM) [kg]: A1-A3 0.170281, A4 0, A5 0.00851404, B2 0, C1 0, C2 0, C3 0, D 0
- Use of renewable secondary fuels (RSF) [MJ]: A1-A3 0, A4 0, A5 0, B2 0, C1 0, C2 0, C3 0, D 0
- Use of non renewable secondary fuels (NRSF) [MJ]: A1-A3 0, A4 0, A5 0, B2 0, C1 0, C2 0, C3 0, D 0
- Use of net fresh water (FW) [m^3]: A1-A3 0.044673, A4 0.000125321, A5 0.00269272, B2 0.00138901, C1 0.000317357, C2 6.19779e-6, C3 0.00608795, D -0.00443335

## Outputs
- Hazardous waste disposed (HWD) [kg]: A1-A3 0.00017629, A4 1.01367e-10, A5 9.14551e-6, B2 0.000413867, C1 1.86995e-10, C2 4.9733e-12, C3 8.6744e-11, D -4.4923e-9
- Non hazardous waste disposed (NHWD) [kg]: A1-A3 3.56687, A4 0.000320513, A5 0.190145, B2 0.0179808, C1 0.00050159, C2 1.48077e-5, C3 0.0909547, D -0.00939793
- Radioactive waste disposed (RWD) [kg]: A1-A3 0.00221102, A4 3.69621e-6, A5 0.000116478, B2 0.000206277, C1 0.000105332, C2 1.71206e-7, C3 2.6447e-5, D -0.00146049
- Components for re-use (CRU) [kg]: A1-A3 0, A4 0, A5 0, B2 0, C1 0, C2 0, C3 0, D 0
- Materials for recycling (MFR) [kg]: A1-A3 0, A4 0, A5 0.1, B2 0, C1 0, C2 0, C3 0, D 0
- Materials for energy recovery (MER) [kg]: A1-A3 0, A4 0, A5 0, B2 0, C1 0, C2 0, C3 0, D 0
- Exported electrical energy (EEE) [MJ]: A1-A3 0, A4 0, A5 0.287, B2 0, C1 0, C2 0, C3 4.69, D 0
- Exported thermal energy (EET) [MJ]: A1-A3 0, A4 0, A5 0.514, B2 0, C1 0, C2 0, C3 8.41, D 0

## Impact indicators
- Global Warming Potential total (GWP-total) [kg CO_(2)-Äq.]: A1-A3 12.1696, A4 0.162924, A5 0.82158, B2 0.355314, C1 0.0401444, C2 0.00712724, C3 3.03009, D -1.15702
- Global Warming Potential fossil fuels (GWP-fossil) [kg CO_(2)-Äq.]: A1-A3 12.0427, A4 0.161912, A5 0.810272, B2 0.345064, C1 0.0397502, C2 0.00707794, C3 3.02993, D -1.15045
- Global Warming Potential biogenic (GWP-biogenic) [kg CO_(2)-Äq.]: A1-A3 0.0369279, A4 0, A5 0.00657555, B2 0.0102006, C1 0.000337935, C2 0, C3 0.000124886, D -0.00577256
- Global Warming Potential luluc (GWP-luluc) [kg CO_(2)-Äq.]: A1-A3 0.0900212, A4 0.00115461, A5 0.00473195, B2 4.89506e-5, C1 5.6285e-5, C2 5.77098e-5, C3 3.40151e-5, D -0.000799187
- Depletion potential of the stratospheric ozone layer (ODP) [kg CFC11-Äq.]: A1-A3 1.4639e-8, A4 2.99566e-17, A5 7.59438e-10, B2 2.68815e-11, C1 9.51741e-16, C2 1.39391e-18, C3 3.09735e-16, D -1.32115e-14
- Acidification potential of land and water (AP) [mol H^(+)-Äq.]: A1-A3 0.0405014, A4 0.00120348, A5 0.00218152, B2 0.00101264, C1 8.27244e-5, C2 2.12747e-5, C3 0.000295805, D -0.00150761
- Eutrophication potential aquatic freshwater (EP-freshwater) [kg PO_(4)-Äq.]: A1-A3 5.67609e-5, A4 4.24069e-7, A5 2.97109e-6, B2 1.09327e-5, C1 1.06644e-7, C2 2.09755e-8, C3 7.77904e-8, D -1.51145e-6
- Eutrophication potential aquatic marine (EP-marine) [kg N-Äq.]: A1-A3 0.0100191, A4 0.000390644, A5 0.000544705, B2 0.000218632, C1 1.96509e-5, C2 9.63448e-6, C3 7.69723e-5, D -0.000428073
- Eutrophication potential terrestrial (EP-terrestrial) [mol N-Äq.]: A1-A3 0.114379, A4 0.00432284, A5 0.00624228, B2 0.00193324, C1 0.000206311, C2 0.000107745, C3 0.00138699, D -0.00458529
- Formation potential of tropospheric ozone photochemical oxidants (POCP) [kg NMVOC-Äq.]: A1-A3 0.0300714, A4 0.000938041, A5 0.00162202, B2 0.00100378, C1 5.33222e-5, C2 1.91474e-5, C3 0.0002196, D -0.00120159
- Abiotic depletion potential for non fossil resources (ADPE) [kg Sb-Äq.]: A1-A3 0.000192823, A4 1.31158e-8, A5 1.00041e-5, B2 6.29625e-8, C1 1.16965e-8, C2 6.25796e-10, C3 4.74886e-9, D -1.9202e-7
- Abiotic depletion potential for fossil resources (ADPF) [MJ]: A1-A3 234.456, A4 2.12317, A5 12.3027, B2 8.05344, C1 0.707184, C2 0.0940415, C3 0.496132, D -19.9693
- Water use (WDP) [m^(3) Welt-Äq. entzogen]: A1-A3 0.363788, A4 0.00134129, A5 0.0346375, B2 0.0536569, C1 0.00637938, C2 6.5518e-5, C3 0.259133, D -0.088648
- Incidence of disease due to PM emissions (PM) [Krankheitsfälle]: A1-A3 4.3608e-7, A4 1.5485e-8, A5 2.35905e-8, B2 1.29409e-8, C1 6.97573e-10, C2 1.24934e-10, C3 2.81458e-9, D -1.29666e-8
- Human exposure efficiency relative to U235 (IR) [kBq U235-Äq.]: A1-A3 0.363538, A4 0.000539611, A5 0.0191349, B2 0.130488, C1 0.0172865, C2 2.50381e-5, C3 0.00412544, D -0.239557
- Comparative toxic unit for ecosystems (ETP-fw) [CTUe]: A1-A3 249.539, A4 1.57087, A5 13.0426, B2 2.75591, C1 0.297388, C2 0.0697838, C3 0.264743, D -4.20282
- Comparative toxic unit for humans (carcinogenic) (HTP-c) [CTUh]: A1-A3 3.60905e-9, A4 3.14889e-11, A5 1.89973e-10, B2 8.92915e-11, C1 8.42315e-12, C2 1.41122e-12, C3 1.84419e-11, D -1.90455e-10
- Comparative toxic unit for humans (noncarcinogenic) (HTP-nc) [CTUh]: A1-A3 2.49943e-7, A4 1.79599e-9, A5 1.31034e-8, B2 1.56395e-8, C1 3.17753e-10, C2 8.21681e-11, C3 7.38828e-10, D -7.51745e-9
- Soil quality index (SQP) [SQP]: A1-A3 27.2592, A4 0.647105, A5 1.45602, B2 0.212483, C1 0.223144, C2 0.0323229, C3 0.139487, D -3.10678

## Use advice
Scope:
Product line noraplan® ed, electrostatically dissipative rubber floor coverings, continuously vulcanized in sheets in various colors and designs.

This declaration is an Environmental Product Declaration according to ISO 14025 and EN 15804 describing the specific environmental performance of the mentioned construction products produced in Germany (Weinheim/Bergstraße).
System boundary:
Type of EPD: from cradle to gate with options

The analysis of the product life cycle includes the

following stages:

Production stage A1-A3: Consideration of production of the basic materials and the manufacturing of the floor covering incl. packaging material (input of waste paper for paper/cardboard production).
Transport A4: Assumption for the transport of the products to the construction site.
Installation A5: Production, transport and incineration of the off-cut material, incineration of off-cut material (gained energy is declared in D as avoided environmental burden), disposal of the packaging (incineration of PE film). The pretreatment of the underground surface (prime coat, levelling compound, adhesive) is not considered. This treatment depends on the building and the application and need to be specified for the particular case.
Use stage B2: Scenario for maintenance/cleaning according to the manufacturer's recommendation (see 4.)
End-of-Life stage C1, C2, C3: Scenario for the incineration of the floor covering incl. removal from the building and transport to the waste incineration plant (gained energy is declared in D as avoided environmental burden).
Benefits for the next product system D: Extraction for electrical and thermal energy from the waste incineration process of the product, the off-cuts and the packaging material.

Contributions of waste flows are considered in the modules where they occur.

## Data sources
- GaBi Database (all versions)
- GaBi Database Edition 2021, CUP 2021.01
