# Scheucher Parkett Mehrschichtparkett

Dataset: ILCD process, EPD, average dataset
Geography: AT
Reference year: 2016
Valid until: 2021
Classification: OEKOBAU.DAT: Holz / Holzböden / Parkett
Classification: IBUCategories: 02 Bauprodukte / Produkte aus Bauholz / Vollholzprodukte
Method details: Vollholzprodukte.pdf
Owner: Scheucher Holzindustrie GmbH
Compliance: DIN EN 15804; ISO 14025
Review: Accredited third party review by IBU
Amounts: rows without a unit in brackets have none in this file; such an amount is in the reference unit of its flow, which a separate flow dataset defines
copyright: true

## General comment
SCHEUCHER Parkett produziert Mehrschichtparkettböden:

3-Schichtparkett (Schiffsböden, Landhausdielen)
Nutzschicht: verschiedene Laubhölzer
Mittellage: Fichte, Kiefer
Gegenzug: Fichte2-Schichtparkett (BILAflor)
Nutzschicht: verschiedene Laubhölzer
Trägermaterial: Fichte

Das deklarierte Produkt stellt einen flächengewichteten Durchschnitt der hergestellten Sortimente dar.

## Technology and included processes
Die vorliegende Umweltproduktdeklaration bezieht sich auf eine deklarierte Einheit von 1 m² Scheucher Mehrschichtparkett mit einem durchschnittlichen Flächengewicht von 7 kg/m² und einer Auslieferungsfeuchte von 6-9 %.Das deklarierte Produkt stellt einen flächengewichteten Durchschnitt der hergestellten Sortimente dar und bezieht sich auf das Produktionsjahr 2014. Mehrschichtparkett besteht aus einer Nutzschicht, einer Trägerschicht und im Falle von 3-Schichtböden einem Gegenzug. Zugekaufte Friesen werden nach dem Trocknen, Hobeln, Auftrennen und Sortieren zu einer Deckschicht verleimt. Diese werden dann weiter zu Schiffsböden bzw. BILAflor-Böden verarbeitet. Auch zugekaufte Deckschichten werden nach dem Qualitätssortieren zu Landhausdielen bzw. BILAflor-Böden weiterverarbeitet. Deckschichten werden zusammen mit Trägermaterial und Gegenzug verleimt. Nach einer Klimatisierungsphase werden die verpressten Dielen bei Bedarf gekittet, alle Dielen werden geschliffen und mit UV-Lack oder oxidativ trocknendem Öl-Wachs-Gemisch behandelt. Nach der rundum laufenden Profilierung mit Nut/Feder- Verbindung oder einem leimlos zu verlegenden Klickprofil (NovoLOC5G) werden die Dielen versandfertig verpackt und bis zur Auslieferung klimatisiert im Hochregal gelagert. Für die Abbildung des Hintergrundsystems im Ökobilanzmodell werden Sekundärdaten herangezogen. Diese entstammen einerseits der GaBi Datenbank /GaBi 7/ und andererseits anerkannten Literaturquellen /Rüter & Diederichs, 2012/. Das UF-Leimsystem wurde anhand eines spezifischen Hintergrunddatensatzes des Zulieferers abgebildet. Kohlenstoffgehalt und Primärenergiegehalt der Produkte wurden basierend auf ihren materialinhärenten Eigenschaften entsprechend zugrundeliegenden physikalischen Zusammenhängen bilanziert. Bei der Produktion von Scheucher Mehrschichtparkett entstehen neben dem deklarierten Produkt Koppelprodukte wie Mehrschichtplatten und Brennstoffe. Die Allokation der Umweltwirkungen des Mehrschichtparketts und der Nebenprodukte basiert auf ihrem Marktpreis. Die Allokation in der Forstkette beruht auf der Veröffentlichung von /Hasch 2002/ und dessen Aktualisierung von /Rüter & Albrecht 2007/. Für kammergetrocknete Bretter und Furniere wurde eine Preisallokation gemäß /Rüter & Diederichs, 2012/ angewandt.
Technische Daten:
Gemäß /EU-Verordnung Nr. 305/2011/ sind anzugeben:
Deklarierte Einheit:
Die vorliegende Umweltproduktdeklaration bezieht sich auf eine deklarierte Einheit von 1 m² Scheucher Mehrschichtparkett mit einem durchschnittlichen Flächengewicht von 7 kg/m² und einer Auslieferungsfeuchte von 6-9 %.

## Technical purpose
Mehrschichtparkettböden aus dem Hause Scheucher sind für die Verlegung im Innenbereich in Räumen der Klasse 1 (Beheizte Innenräume mit vorwiegend konstanten Temperaturen und wohnraumüblichen klimatischen Verhältnissen) vorgesehen. Die Parkettböden können entweder verklebt oder schwimmend verlegt werden.

## Reference product
- 1 m² Mehrschichtparkett: 1

## Inputs
- Erneuerbare Primärenergie als Energieträger (PERE) [MJ]: A1-A3 127
- Erneuerbare Primärenergie zur stofflichen Nutzung (PERM) [MJ]: A1-A3 115.255
- Total erneuerbare Primärenergie (PERT) [MJ]: A1-A3 242, D -17.0054
- Nicht-erneuerbare Primärenergie als Energieträger (PENRE) [MJ]: A1-A3 95.3434
- Nicht-erneuerbare Primärenergie zur stofflichen Nutzung (PENRM) [MJ]: A1-A3 7.945
- Total nicht erneuerbare Primärenergie (PENRT) [MJ]: A1-A3 103.288, D -125.947
- Einsatz von Sekundärstoffen (SM) [kg]: A1-A3 0, D 0
- Erneuerbare Sekundärbrennstoffe (RSF) [MJ]: A1-A3 29.8733, D 115.914
- Nicht erneuerbare Sekundärbrennstoffe (NRSF) [MJ]: A1-A3 0
- Einsatz von Süßwasserressourcen (FW) [m^3]: A1-A3 0.0474281, D -0.0245966

## Outputs
- Gefährlicher Abfall zur Deponie (HWD) [kg]: A1-A3 0.000114019, D 0
- Entsorgter nicht gefährlicher Abfall (NHWD) [kg]: A1-A3 0.00921244, D 0
- Entsorgter radioaktiver Abfall (RWD) [kg]: A1-A3 0.00563215, D -0.0121013
- Komponenten für die Wiederverwendung (CRU) [kg]: A1-A3 0
- Stoffe zum Recycling (MFR) [kg]: A1-A3 0
- Stoffe für die Energierückgewinnung (MER) [kg]: C3 7.04
- Exportierte elektrische Energie (EEE) [MJ]
- Exportierte thermische Energie (EET) [MJ]

## Impact indicators
- Globales Erwärmungspotenzial (GWP) [kg CO_(2)-Äq.]: A1-A3 -5.09788, C3 11.5914, D -2.89986
- Abbau Potential der stratosphärischen Ozonschicht (ODP) [kg CFC11-Äq.]: A1-A3 1.26908e-7, D -3.37678e-9
- Versauerungspotenzial von Boden und Wasser (AP) [kg SO_(2)-Äq.]: A1-A3 0.036, D -0.00438966
- Eutrophierungspotenzial (EP) [kg PO_(4)^(3)-Äq.]: A1-A3 0.00604, D 3.27642e-6
- Bildungspotential für troposphärisches Ozon (POCP) [kg Ethen-Äq.]: A1-A3 0.00459, D 0.000591976
- Potenzial für den abiotischen Abbau nicht fossiler Ressourcen (ADPE) [kg Sb-Äq.]: A1-A3 4.36171e-6, D -8.8838e-7
- Potenzial für den abiotischen Abbau fossiler Brennstoffe (ADPF) [MJ]: A1-A3 87.8, D -95.6

## Use advice
Gültigkeitsbereich:
Die vorliegende Umweltproduktdeklaration bezieht sich auf eine deklarierte Einheit von 1 m² durchschnittliches Scheucher Mehrschichtparkett produziert am Standort Mettersdorf.
Systemgrenze:
Die Ökobilanz des Scheucher Mehrschichtparketts beinhaltet eine cradle-to-gate (Wiege bis zum Werkstor) Betrachtung der auftretenden Umweltwirkungen mit Optionen. Die folgenden Lebenszyklusphasen werden in der Analyse berücksichtigt:

Modul A1-A3 Produktstadium

Das Produktstadium beinhaltet die Aufwendungen der Rohstoffversorgung (Holz, Leimsystem, etc.) sowie der damit verbundenen Transporte bezogen auf den Produktionsstandort Mettersdorf. Die Bereitstellung thermischer Energie ist im Produktstadium in Form des werkseigenen Ofens berücksichtigt. Elektrische Energie wird vom regionalen Stromnetz geliefert.

Modul C3 Abfallbehandlung

Das Modul C3 deklariert die biogenen Kohlendioxid-Emissionen in der energetischen Verwertung am Lebensende des Produktes.
Modul D Gutschriften und Lasten außerhalb der Systemgrenzen

In Modul D wird die energetische Verwertung des Produktes am Lebensende inklusive entsprechenden energetischen Substitutionspotentialen in Form eines europäischen Durchschnittsszenarios beschrieben.

## Data sources
- Scheucher Parkett Mehrschichtparkett.pdf
- GaBi Database (all versions)
- GaBi database SP20 2013
