# Cement bound particle board (generic)

Dataset: ILCD process, EPD, generic dataset
Geography: DE
Reference year: 2021
Valid until: 2022
Classification: oekobau.dat: Holz / Holzwerkstoffe / Spanplatten
Owner: Sphera Solutions GmbH
Compliance: EN 15804+A2
Review: Dependent internal review by Sphera Solutions GmbH; Independent external review by GaBi user forum
Amounts: rows without a unit in brackets have none in this file; such an amount is in the reference unit of its flow, which a separate flow dataset defines
copyright: true
licenseType: Free of charge for all users and uses
accessRestrictions: The license conditions as stated on https://www.oekobaudat.de/ apply.
accessRestrictions: Es gelten die Lizenzbedingungen wie sie auf https://www.oekobaudat.de/ genannt sind.

## General comment
This data set has been modeled according to the European Standard EN 15804+A2 for Sustainable Building. Results are depicted in modules that allow the structured expression of results over the entire life cycle.

## Geography
The data set represents the country specific situation in Germany, focusing on the main technologies, the region specific characteristics and / or import statistics.

## Time period
Annual average

## Technology and included processes
An uncoated cement bound particle board was modeled without the addition of lightweight aggregates, e.g. Perlite. Main components are cement (about 75 m.%) and wood (about 18 m.%). The raw materials are mixed with water and small amounts of additives, pressed and then cured with the addition of steam and brought into shape. After a maturing period of 28 days, a technical drying takes place. Cement use and thermal energy (here natural gas) dominate the life cycle assessment.

In module C1, a manual dismantling (no loads) is assumed, collecting losses are neglected.
The transport in module C2 to the recycling plant takes place with a truck (50km).
Module C3 takes into account the grinding and thermal treatment (combustion) of the material. It is assumed that the material reaches the end of the waste status immediately after dismantling. The CO2 absorbed and stored in the material by photosynthesis (from module A1) is written off in C3 (CO2 neutrality within the product system according to EN 16485: Round and sawn timber - Environmental Product Declarations - Product category rules for wood and wood-based products for use in construction, 2014).
Module D contains the loads through the operation of the recovery facility (excluding biogenic CO2, see above) and credits for the substitution of electricity (German electricity mix) and thermal energy (from natural gas). The calculation of combustion emissions and credits takes into account the specific calorific value of the material and the material composition.

## Technical purpose
Covering material for interior construction, especially in areas with high fire- or sound insulation requirements. Can also be used as a dry screed element.

## Safety margin
20 %. Product system depicted except for a few missing processes / flows. Technological, temporal and geographic representativeness partly given.

## Reference product
- Cement bound particle board (generic): 1

## Inputs
- Use of renewable primary energy as energy carrier (PERE) [MJ]: A1-A3 3493.15, C2 2.6234, C3 2732.45, D -349.92
- Use of renewable primary energy resources used as raw materials (PERM) [MJ]: A1-A3 2250, C2 0, C3 -2250, D 0
- Total use of renewable primary energy (PERT) [MJ]: A1-A3 5743.15, C2 2.6234, C3 482.447, D -349.92
- Use of non renewable primary energy as energy carrier (PENRE) [MJ]: A1-A3 19714.3, C2 45.2012, C3 92.8099, D -1048.39
- Use of non renewable primary energy resources used as raw materials (PENRM) [MJ]: A1-A3 0, C2 0, C3 0, D 0
- Total use of non renewable primary energy resource (PENRT) [MJ]: A1-A3 19714.3, C2 45.2012, C3 92.8099, D -1048.39
- Use of secondary material (SM) [kg]: A1-A3 0, C2 0, C3 0, D 0
- Use of renewable secondary fuels (SF) [MJ]: A1-A3 0, C2 0, C3 0, D 0
- Use of non renewable secondary fuels (NRSF) [MJ]: A1-A3 0, C2 0, C3 0, D 0
- Net use of fresh water (FW) [m3]: A1-A3 1.97799, C2 0.00233155, C3 0.674492, D -0.130203

## Outputs
- Hazardous waste disposed (HWD) [kg]: A1-A3 5.626e-6, C2 1.88926e-9, C3 2.4417e-8, D -3.63113e-7
- Non harzardous waste disposed (NHWD) [kg]: A1-A3 222.961, C2 0.00729651, C3 1.91042, D -0.550073
- Radioactive waste disposed (RWD) [kg]: A1-A3 0.367064, C2 4.33765e-5, C3 0.00398503, D -0.0376341
- Components for re-use (CRU) [kg]: A1-A3 0, C2 0, C3 0, D 0
- Materials for recycling (MFR) [kg]: A1-A3 0, C2 0, C3 0, D 0
- Materials for energy recovery (MER) [kg]: A1-A3 0, C2 0, C3 0, D 0
- Exported electrical energy (EEE) [MJ]: A1-A3 0, C2 0, C3 280.292, D 0
- Exported thermal energy (EET) [MJ]: A1-A3 0, C2 0, C3 657.129, D 0

## Impact indicators
- Global Warming Potential - total (GWP-total) [kg CO2 eq.]: A1-A3 1742.91, C2 3.43339, C3 233.916, D -67.3687
- Global Warming Potential - fossil fuels (GWP-fossil) [kg CO2 eq.]: A1-A3 1963.8, C2 3.41008, C3 6.85014, D -66.56
- Global Warming Potential - biogenic (GWP-biogenic) [kg CO2 eq.]: A1-A3 -221.965, C2 0.00141259, C3 227.056, D -0.712058
- Global Warming Potential - land use and land use change (GWP-luluc) [kg CO2 eq.]: A1-A3 1.07194, C2 0.0219005, C3 0.0103939, D -0.0966907
- Depletion potenzial of the stratospheric ozone layer (ODP) [kg CFC-11 eq.]: A1-A3 1.4111e-11, C2 8.7255e-16, C3 1.33795e-13, D -1.52753e-12
- Acidifcation potential, Accumulated Exceedance (AP) [Mole of H+ eq.]: A1-A3 2.02718, C2 0.00966836, C3 0.053332, D -0.0679903
- Eutrophication potential - freshwater (EP-freshwater) [kg P eq.]: A1-A3 0.00167128, C2 7.01322e-6, C3 1.73344e-5, D -0.000160886
- Eutrophication potential - marine (EP-marine) [kg N eq.]: A1-A3 0.72064, C2 0.00445401, C3 0.0150567, D -0.0250502
- Eutrophication potential - terrestrial (EP-terrestrial) [Mole of N eq.]: A1-A3 7.8748, C2 0.0498322, C3 0.251222, D -0.26696
- Photochemical Ozone Creation Potential (POCP) [kg NMVOC eq.]: A1-A3 2.01043, C2 0.00868542, C3 0.0393767, D -0.0656596
- Abiotic depletion potential - non-fossil resources (ADPE) [kg Sb eq.]: A1-A3 0.000231961, C2 2.96629e-7, C3 1.75074e-6, D -2.06966e-5
- Abiotic depletion potential - fossil resources (ADPF) [MJ]: A1-A3 19712.6, C2 45.1993, C3 92.7847, D -1048.24
- Water (user) deprivation potential (WDP) [m³ world equiv.]: A1-A3 16.248, C2 0.0132561, C3 28.3618, D -0.790624

## Use advice
This data set refers to the production of 1 m³ of uncoated, cement bound particle board. The bulk density is 1200 kg/m³. The thermal conductivity is 0.35 - 0.4 W/mK. The data set can be used approximately for the estimation of uncoated cement bound particle boards with a density of 1100 - 1300 kg/m³.

The data set represents a cradle to gate inventory. It can be used to characterise the supply chain situation of the respective commodity in a representative manner. Combination with individual unit processes using this commodity enables the generation of user-specific (product) LCAs.

## Data sources
- GaBi databases
- Documentation of data quality management
- GaBi Database Edition 2021, CUP2021.01
- GaBi database (all versions)
