# Aluminiumprofil beschichtet

Dataset: ILCD process, EPD, average dataset
Geography: WEU
Reference year: 2019
Valid until: 2024
Classification: OEKOBAU.DAT: Metalle / Aluminium / Aluminiumprofil
Classification: IBUCategories: 02 Bauprodukte / Metallbauprodukte und Zubehör / Produkte aus Aluminium und Aluminiumlegierungen
Method details: Produkte aus Aluminium und Aluminiumlegierungen.pdf
Registration number: 10999
Owner: GDA - Gesamtverband der Aluminiumindustrie e.V.
Compliance: DIN EN 15804; ISO 14025
Review: Accredited third party review by Institut Bauen und Umwelt e. V.
Amounts: rows without a unit in brackets have none in this file; such an amount is in the reference unit of its flow, which a separate flow dataset defines
copyright: true

## General comment
Bei den hergestellten Aluminiumprofilen handelt es sich um Halbzeuge für die Bauindustrie, Konsum- und Industriegüter, automotive Anwendungen, den Solarbereich uvm.

Die Profile werden aus Aluminiumlegierungen gefertigt; bestehend aus dem Leichtmetall Aluminium (Al) und diversen Legierungselementen (wie Silicium, Kupfer, Mangan, Magnesium, u.a.).

Die blanken Aluminiumprofile können (je nach Kundenwunsch) in einem oder mehreren Verarbeitungsschritten veredelt werden, bevor sie zum (End-)Produkt verarbeitet werden.

Oberflächenveredelung von Profilen: Beschichten

Bevor ein Beschichtungsstoff aufgebracht wird, müssen die Profile vorbehandelt werden. Nach dem Beizen und Entfetten wird eine Konversionsschicht als Haftvermittlung aufgebracht. Hierbei werden die Gelbchromatierung, die Grünchromatierung und chromfreie Verfahren eingesetzt. Das Eloxieren wird auch als Vorbehandlung (Voranodisation) vor dem Beschichten eingesetzt.

Das pulverbeschichtete Aluminiumprofil in dieser EPD wurde mit einem chromfreien Beschichtungsverfahren modelliert.

Die Schicht der Gelbchromatierung ist Chrom-VI-haltig. Verfahren und Schichten auf der Basis von Chrom-VI dürfen seit dem 21. September 2017 (Sunset-Date) nicht mehr eingesetzt werden (EU 348/2013). Für eine Vielzahl von Prozessen und Anwendungen sind Anträge auf weitere Verwendung fristgerecht zum 21. März 2016 eingereicht worden. Über diese Anträge ist bisher nicht entschieden worden. Artikel 58(1)(c)(ii) REACH legt fest, dass Antragssteller und Anwender, die in der Lieferkette von Antragstellern beliefert werden, ihre Anwendungen über das Sunset-Date hinaus bis zur Entscheidung der Kommission fortsetzen können.

In der Architektur werden zunehmend Objekte mit einer chromfreien Vorbehandlung ausgeschrieben. Systemhäuser haben ihre Spezifikationen umgestellt. Im Bereich Automotive werden bedingt durch die Altautoverordnung schon seit mehr als 10 Jahren Chrom-VI-freie Verfahren eingesetzt. Nach der Oberflächenvorbehandlung erfolgt die Beschichtung mit einem flüssigen Beschichtungsstoff oder einem Pulverlack. Der Flüssiglack wird in der Regel in einem Ofen forciert getrocknet. Der Pulverlack wird in einem Ofen eingebrannt. Hierbei vernetzt das elektrostatisch aufgebrachte Pulver zu einem Lackfilm. Die Möglichkeiten der Farbgebung sind fast unbegrenzt.

Profile werden in üblichen Fertigungslängen (6 m) beschichtet. Anschließend erfolgt die weitere Verarbeitung, beispielsweise zu Fenstern und Fassaden.

Für bestimmte Bauteile oder Komponenten ist es auch üblich, dass diese vor der Oberflächenbehandlung aus dem Halbzeug gefertigt werden.

## Technology and included processes
Erhitzen - Der Aluminiumbolzen wird auf 460°C bis 530°C erhitzt, damit das Metall seinen plastischen Zustand erreicht. Strangpressen - mit typischen Presskräften von 6'000 - 8'000 kg/cm2 wird der heiße Aluminiumbolzen durch ein vorgewärmtes Werkzeug gepresst. Somit erhält das Profil seine geometrische Form. Kühlen - Direkt nach dem Strangpressen werden die Profile gekühlt (es gibt unterschiedliche Verfahren durch Luft, Wasser oder Sprühnebel) -> notwendig für die Endfestigkeit. Recken - Nach dem Strangpressen werden die Profile gereckt, um sie gerade zu richten. Ablängen - Zuschnitt der Profile gemäß Kundenanforderung (Standard 6.000 mm). Vergüten - Aushärten der Profile bei einer Temperatur zwischen 145 – 210 °C (5 – 12 h) Verpacken - Danach erfolgt das kundenindividuelle Verpacken der Profile. Isolieren (optional) - Um die Wärmeleitung von Fenstern und Türen zu reduzieren, können Verbundprofile mit Stegen aus Werkstoffen mit sehr schlechter Wärmeleitfähigkeit eingesetzt werden. Diese bestehen häufig aus Polyamidstrips. Schema Extrusionsprozess – der erhitzte Bolzen wird durch ein Werkzeug gepresst. Pressbolzen Werkzeuge für Hohlprofile Schema Extrusionsprozess – der erhitzte Bolzen wird durch ein Werkzeug gepresst Die Profile können nach dem Extrusionsprozess wahlweise oberflächenveredelt und/oder mechanisch bearbeitet werden. Der gesamte Herstellungsprozess wird durch zertifizierte Qualitätsmanagementsysteme (z.B. /DIN EN ISO 9001/; /IATF 16949/ u.s.w.) hinsichtlich qualitativer Produktanforderungen überwacht.
Technische Daten:
Physikalische Eigenschaften von Aluminium (EN AW-6060):
Deklarierte Einheit:
Die Deklaration bezieht sich auf durchschnittliche pulverbeschichtete Aluminiumprofile der an der EPD beteiligten Werke. Die deklarierte Einheit ist 1 kg Aluminiumprofil.

## Technical purpose
Aluminiumprofile werden in verschiedensten Anwendungen/Produkten eingesetzt. Vielfach im Baubereich (z.B. für Fenster/Fassaden, Solar-Unterkonstruktionen, …), aber auch im Konsumgüterbereich (z.B. bei Möbeln, Haushalts-/Elektro- und Sportgeräten), in der Industrie (z.B. Kühlkörper, Zylinder, …), im automotiven Bereich (z.B. Zierleisten, Stoßdämpfer, Heckträger, ...).

## Reference product
- Aluminiumprofil pulverbeschichtet (): 1

## Inputs
- Erneuerbare Primärenergie als Energieträger (PERE) [MJ]: A1-A3 42.3652, C3 0.01172, D -31.64
- Erneuerbare Primärenergie zur stofflichen Nutzung (PERM) [MJ]: A1-A3 0.294772, C3 0, D 0
- Total erneuerbare Primärenergie (PERT) [MJ]: A1-A3 42.66, C3 0.01172, D -31.64
- Nicht-erneuerbare Primärenergie als Energieträger (PENRE) [MJ]: A1-A3 112.653, C3 0.0386, D -68.84
- Nicht-erneuerbare Primärenergie zur stofflichen Nutzung (PENRM) [MJ]: A1-A3 0.0465208, C3 0, D 0
- Total nicht erneuerbare Primärenergie (PENRT) [MJ]: A1-A3 112.7, C3 0.0386, D -68.84
- Einsatz von Sekundärstoffen (SM) [kg]: A1-A3 0.23, C3 0, D 0
- Erneuerbare Sekundärbrennstoffe (RSF) [MJ]: A1-A3 0, C3 0, D 0
- Nicht erneuerbare Sekundärbrennstoffe (NRSF) [MJ]: A1-A3 0, C3 0, D 0
- Einsatz von Süßwasserressourcen (FW) [m^3]: A1-A3 0.1017, C3 1.612e-5, D -0.07993

## Outputs
- Gefährlicher Abfall zur Deponie (HWD) [kg]: A1-A3 0.0008563, C3 2.915e-10, D -3.783e-8
- Entsorgter nicht gefährlicher Abfall (NHWD) [kg]: A1-A3 2.2, C3 0.04009, D -1.598
- Entsorgter radioaktiver Abfall (RWD) [kg]: A1-A3 0.005986, C3 4.762e-6, D -0.004155
- Komponenten für die Wiederverwendung (CRU) [kg]: A1-A3 0, C3 0, D 0
- Stoffe zum Recycling (MFR) [kg]: A1-A3 0, C3 0.96, D 0
- Stoffe für die Energierückgewinnung (MER) [kg]: A1-A3 0, C3 0, D 0
- Exportierte elektrische Energie (EEE) [MJ]: A1-A3 0, C3 0, D 0
- Exportierte thermische Energie (EET) [MJ]: A1-A3 0, C3 0, D 0

## Impact indicators
- Globales Erwärmungspotenzial (GWP) [kg CO_(2)-Äq.]: A1-A3 8.589, C3 0.002322, D -5.588
- Abbau Potential der stratosphärischen Ozonschicht (ODP) [kg CFC11-Äq.]: A1-A3 4.167e-10, C3 6.96e-15, D -7.849e-11
- Versauerungspotenzial von Boden und Wasser (AP) [kg SO_(2)-Äq.]: A1-A3 0.03949, C3 8.664e-6, D -0.02845
- Eutrophierungspotenzial (EP) [kg PO_(4)^(3)-Äq.]: A1-A3 0.002688, C3 1.06e-6, D -0.001744
- Bildungspotential für troposphärisches Ozon (POCP) [kg Ethen-Äq.]: A1-A3 0.00219, C3 6.194e-7, D -0.001496
- Potenzial für den abiotischen Abbau nicht fossiler Ressourcen (ADPE) [kg Sb-Äq.]: A1-A3 1.264e-5, C3 1.075e-9, D 5.095e-7
- Potenzial für den abiotischen Abbau fossiler Brennstoffe (ADPF) [MJ]: A1-A3 97.55, C3 0.02659, D -58.27

## Use advice
Gültigkeitsbereich:
Die Umweltproduktdeklaration bezieht sich auf 1 kg beschichtetes Aluminiumprofil.

Diese Verbands-EPD wurde auf Basis der Daten von Mitgliedsunternehmen (Aluminium-Laufen AG Liesberg, apt Extrusions GmbH & Co. KG, apt Extrusions B.V., Hydro Extrusion Nenzing GmbH, OTTO FUCHS KG) sowie der GSB International erstellt.

Die Standorte der Produktionsanlagen aller Unternehmen befinden sich in der DACH Region und verwenden die gleiche Produktionstechnologie. Die Datenerfassung bezieht sich auf ein Jahr im Zeitraum 2016 oder 2017.
Systemgrenze:
Typ der EPD: Wiege bis Werkstor mit Optionen.

Folgende Prozesse im Produktstadium A1–A3 der Aluminiumprofil-Herstellung wurden berücksichtigt:

Bereitstellungsprozesse von Hilfsstoffen und Energie
Transporte der Ressourcen und Hilfsstoffe zum Werk
Herstellungsprozess des Aluminiumbarrens (Der Gesamtverband der Aluminiumindustrie stellt die aktuellen Datensätze der European Aluminium /EA/ zur Verfügung.)
Herstellprozess für Aluminiumprofile im Werk inklusive energetischen Aufwendungen, Herstellung von Hilfsstoffen, Entsorgung von anfallenden Reststoffen und der Berücksichtigung von im Werk auftretenden Emissionen

Herstellung der Verpackungen (PE-Folien, Karton, Stahlbänder und Holzpaletten)
Oberflächenveredelung

Folgende Prozesse im Entsorgungsstadium wurden berücksichtigt:

Schreddern des Aluminium-Schrottes (C3).
Ersparte Aufwendungen für die Netto-Schrottmenge durch Substitution von Primäraluminium (Gutschrift in Modul D).

Das Ende der Abfalleigenschaft (End-of-Waste Status) ist nach dem Schreddern erreicht. Der geschredderte Schrott wird zu Aluminium umgeschmolzen.

Aufgrund des geringen Umwelt-Einflusses der Verpackung wurde deren Entsorgung in Modul A5 abgeschnitten und das EoL der Verpackung nicht berücksichtigt (cut-off).

## Data sources
- Aluminiumprofil beschichtet.pdf
- GaBi Database (all versions)
- GaBi database SP35 2018
