# Großformatige Elemente aus Leichtbeton

Dataset: ILCD process, EPD, average dataset
Geography: DE
Reference year: 2019
Valid until: 2024
Classification: OEKOBAU.DAT: Mineralische Baustoffe / Steine und Elemente / Leichtbeton
Classification: IBUCategories: 02 Bauprodukte / Normal- Leicht- und Porenbeton / Leichtbeton
Method details: Leichtbeton.pdf
Registration number: EPD-BVL-20180111-IAG1-DE
Owner: Bundesverband Leichtbeton e. V.
Compliance: DIN EN 15804; ISO 14025
Review: Accredited third party review by Institut Bauen und Umwelt e. V.
Amounts: rows without a unit in brackets have none in this file; such an amount is in the reference unit of its flow, which a separate flow dataset defines
copyright: true

## General comment
Die genannten Produkte sind unbewehrte Bauteile oder Elemente unterschiedlicher Formate und Größen aus handwerksporigem Leichtbeton. Der Leichtbeton wird hergestellt aus natürlichen Gesteinskörnungen (Zuschlägen), Wasser und hydraulischen Bindemitteln (Zement).

Bei dieser EPD handelt es sich um eine Herstellergruppen- Deklaration eines typischen oder repräsentativen Produktes, das ein spezifisches Produkt beschreibt.

## Technology and included processes
Den natürlichen Leichtzuschlägen (Bims, Waschsplitt) wird Zement (/DIN EN 197-1/) als Bindemittel zugesetzt. Zusätzlich kommen Zusatzstoffe und -mittel hinzu. Im Werk werden die Zuschläge je nach Art, Schüttdichte und Korngröße in Silos gelagert oder auf dem Freigelände getrennt zwischengelagert. Das Bindemittel sowie Zusatzstoffe und -mittel werden in Silos gelagert. Die dosierten Zuschläge werden zunächst aus den Silos abgezogen und trocken mit dem Bindemittel vorgemischt. Danach wird die Mischung, unter Zufügung von Wasser, zu einem plastisch verformbaren Leichtbeton gemischt. Die fertig gemischte Leichtbetonmasse gelangt im Anschluss über einen automatischen Betonverteiler in die vorbereitete Schalung, die bereits mit Schalöl als Trennmittel vorbereitet ist. Die fertigen Elemente werden auf den Schalungstischen (Palettenumlaufanlage) in eine Nachbehandlungskammer transportiert, bevor sie nach 12 bis 36 Stunden auf Transportgestelle umgeladen werden. Sie lagern danach zur vollständigen Aushärtung auf dem Lagerplatz, bis sie zur Baustelle ausgeliefert werden.
Technische Daten:
Leistungswerte des Produkts entsprechend der Leistungserklärung in Bezug auf dessen wesentliche Merkmale gemäß /DIN EN 1520:2011-06: Vorgefertigte Bauteile aus haufwerksporigem Leichtbeton und mit statisch anrechenbarer oder nicht anrechenbarer Bewehrung; Deutsche Fassung: /EN 1520:2011/.
Deklarierte Einheit:
Die Deklaration bezieht sich auf die Herstellung von einem Kubikmeter (1 m³) großformatigen Leichtbetonelementen aus natürlichen Zuschlägen der genannten Zusammensetzung mit einer Rohdichte von 900 kg/m³.

## Technical purpose
Bauteile oder Elemente für monolithische, tragende und nichttragende Wände.

## Reference product
- Großformatige Elemente aus Leichtbeton: 1

## Inputs
- Erneuerbare Primärenergie als Energieträger (PERE) [MJ]: A1-A3 85
- Erneuerbare Primärenergie zur stofflichen Nutzung (PERM) [MJ]: A1-A3 0
- Total erneuerbare Primärenergie (PERT) [MJ]: A1-A3 85
- Nicht-erneuerbare Primärenergie als Energieträger (PENRE) [MJ]: A1-A3 953
- Nicht-erneuerbare Primärenergie zur stofflichen Nutzung (PENRM) [MJ]: A1-A3 0
- Total nicht erneuerbare Primärenergie (PENRT) [MJ]: A1-A3 953
- Einsatz von Sekundärstoffen (SM) [kg]: A1-A3 0
- Erneuerbare Sekundärbrennstoffe (RSF) [MJ]: A1-A3 0
- Nicht erneuerbare Sekundärbrennstoffe (NRSF) [MJ]: A1-A3 0
- Einsatz von Süßwasserressourcen (FW) [m^3]: A1-A3 77.6

## Outputs
- Gefährlicher Abfall zur Deponie (HWD) [kg]: A1-A3 0
- Entsorgter nicht gefährlicher Abfall (NHWD) [kg]: A1-A3 463
- Entsorgter radioaktiver Abfall (RWD) [kg]: A1-A3 5.2e-5
- Komponenten für die Wiederverwendung (CRU) [kg]: A1-A3 0
- Stoffe zum Recycling (MFR) [kg]: A1-A3 0
- Stoffe für die Energierückgewinnung (MER) [kg]: A1-A3 0
- Exportierte elektrische Energie (EEE) [MJ]: A1-A3 0
- Exportierte thermische Energie (EET) [MJ]: A1-A3 0

## Impact indicators
- Globales Erwärmungspotenzial (GWP) [kg CO_(2)-Äq.]: A1-A3 187
- Abbau Potential der stratosphärischen Ozonschicht (ODP) [kg CFC11-Äq.]: A1-A3 1.25e-7
- Versauerungspotenzial von Boden und Wasser (AP) [kg SO_(2)-Äq.]: A1-A3 0.39
- Eutrophierungspotenzial (EP) [kg PO_(4)^(3)-Äq.]: A1-A3 0.0387
- Bildungspotential für troposphärisches Ozon (POCP) [kg Ethen-Äq.]: A1-A3 0.042
- Potenzial für den abiotischen Abbau nicht fossiler Ressourcen (ADPE) [kg Sb-Äq.]: A1-A3 4.35e-5
- Potenzial für den abiotischen Abbau fossiler Brennstoffe (ADPF) [MJ]: A1-A3 835

## Use advice
Gültigkeitsbereich:
Diese Umwelt-Produktdeklaration repräsentiert Leichtbetonelemente der Hersteller des Bundesverbands Leichtbeton e.V. Die Angaben stammen von der Thermodur Wandelemente GmbH & Co. KG des Bundesverbands Leichtbeton e.V. und sind typisch für Produkte der Herstellerfirmen im Verband. Die Firma Thermodur produziert ca.40 % der Leichtbetonelemente im Bundesverband Leichtbeton e.V. Sie beziehen sich auf Leichtbetonelemente aus natürlichen Zuschlägen der genannten Zusammensetzung.
Systemgrenze:
Typ der EPD: Wiege-bis-Werkstor

Die gewählten Systemgrenzen umfassen die Herstellung der Leichtbetonmauersteine einschließlich der Rohstoffgewinnung bzw. der Verarbeitung zu Zuschlagsstoffen bis zum versandfertigen Produkt beim Verlassen des Werkstors (cradle to gate). Ebenfalls eingeschlossen ist die Herstellung der weiteren Roh- und Hilfsstoffe.

Alle Herstellungsprozesse der Vorprodukte wurden einbezogen. Die Vorprodukte wurden entsprechend den genannten Rezepturen für die Leichtbetonsteine identifiziert.

Im Einzelnen wurden folgende Prozesse einbezogen:
Bereitstellung aller Einsatzstoffe (Vorprodukte)
Herstellaufwendungen (Energie, Abfall, Emissionen)
Energiebereitstellung

Das Nutzungs- und Entsorgungsstadium der genannten Produkte sind in dieser Studie nicht berücksichtigt und müssen für eine Bewertung im Kontext des Gebäudes ergänzt werden.

Transporte vom Werkstor zur Baustelle sind nicht in die Bilanz einbezogen.

Der Produktionsstandort befindet sich in Deutschland. Demnach wird der Strom-Mix für Deutschland mit dem Bezugsjahr 2014 verwendet.

## Data sources
- Großformatige Elemente aus Leichtbeton.pdf
- GaBi Database (all versions)
- GaBi database SP35 2018
