# FOAMGLAS® T4+

Dataset: ILCD process, EPD, specific dataset
Geography: RER
Reference year: 2021
Valid until: 2026
Classification: OEKOBAU.DAT: Dämmstoffe / Schaumglas / Platten
Classification: IBUCategories: 02 Building products / Thermal insulation products / Mineral insulating materials
Method details: Mineral insulating materials.pdf
Generated by: Sphera Solutions GmbH
Registration number: EPD-PCE-20200299-IBB1-EN
Owner: Pittsburgh Corning Europe NV
Compliance: DIN EN 15804+A2; ISO 14025
Review: Accredited third party review by Institut Bauen und Umwelt e. V.
Amounts: rows without a unit in brackets have none in this file; such an amount is in the reference unit of its flow, which a separate flow dataset defines
copyright: true
licenseType: Free of charge for all users and uses
accessRestrictions: None

## General comment
FOAMGLAS® T4+ is an insulation product for buildings made of cellular glass. It is applied to the desired dimensions in the form of slabs, panels, or other specific elements. The FOAMGLAS® T4+ is in general unfaced as a slab. Further processing to fabricated ware is possible (eg PSG, PSH, PSQ,…). In some cases, depending on the end-use, the slabs can be faced with bitumen on the top with a PE-foil (e.g. READY, BOARDS) or a white mineral liner (ROOFBLOCK, ROOF BOARDS). Also, on the bottom, the white mineral liner can be applied (cf. BOARDS).

The product is declared with a density of 110 kg/m³ (±15%) and is supplied in thicknesses of 40 mm to 200 mm.

For the placing on the market of the product FOAMGLAS® T4+ in the European Union/European Free Trade Association (EU/EFTA) (with the exception of Switzerland) Construction Products Regulation (CPR) applies. The product declaration of performance (DOP) is taking into consideration EN 13167:2015 Thermal insulation products for buildings – Factory made cellular glass (CG) products – Specification but also EN14305:2013 Thermal insulation for building equipment and industrial installations - Factory made cellular glass (CG) products – Specification.

In addition to the common applications, especially for loadbearing constructions and perimeter insulation, the product also complies with the characteristics declared in European Technical Assessment (ETA) 17/0903: 2017 Cellular glass boards as load bearing layer and thermal insulation outside the waterproofing and the CE-marking.

For the application and use the respective national provisions apply.

## Technology and included processes
The product is made following the protocol of the company. All glass constituents (recycled glass, sand, sodium carbonate, feldspar, sodium sulfate, sodium nitrate, iron oxide, and FOAMGLAS®-scrap) are melted (at ca. 1250°C) in the furnace and drawn into the shape of a thin-walled tube to enable efficient grinding. Melted glass from the melter furnace is put in grinders to produce fine glass powder. In the grinding process, additives are added so that afterwards, glass foaming processes can be envisaged. In the foaming furnace, cellular glass blocks are made in moulds by heating (sintering towards ca 850°C) the glass powder after the grinding process. After the foaming process, the annealing process starts by moving the foamed blocks on the lehr where they cool according to a precisely determined curve. The cooled blocks are cut into rectangular blocks and if necessary, ground or cut to thinner sizes. The produced material is released, labelled, marked, and packed for commercialisation and various end-use applications (floor, roof, wall, façade and other construction elements). 1 Mixing and batching of the raw materials: Recycled glass, feldspar, sodium carbonate, iron oxide, manganese oxide, sodium sulphate, sodium nitrate. 2 The melting furnace has a constant temperature of 1250°C. 3 Molten glass is drawn out of the furnace. 4 Control room for monitoring the production. 5 The glass is drawn off and falls onto the conveyor band where it cools down before entering the ball mill. 6 Addition of "carbon black". 7 Ball mill grinds all ingredients into a fine powder before putting them into stainless steel moulds. 8 The filled moulds pass through a cellulating oven (foaming furnace) with a temperature of 850°C. This is where the material gains its unique cell structure. 9 Energy recovery of heat. 10 The FOAMGLAS® blocks pass through an annealing oven to allow carefully controlled cooling without thermal stress. 11 The blocks are cut to size and sorted by batch. Production waste is recycled. 12 FOAMGLAS® slabs are then packaged, labelled and palletized. 13 Finished FOAMGLAS® products are stored and prepared for transport. Quality assurance Quality is assured through internal and external monitoring. The product complies with the Declaration of Performance. It also bears the CEN Keymark
Technical data:
The technical specifications of FOAMGLAS® T4+ within the scope of this EPD and within the CE marking is according to EN 13167, EN 14305 and ETA.

In addition to the EN13167 declared values, the characteristics declared for service temperature (-265°C – 430°C), thermal conductivity ranges & chloride content are in line with EN 14305. The same for the ETA declared values on the mechanical properities. Performance data of the product in accordance with the declaration of performance with respect to its essential characteristics according to EN 13167.

Voluntary data: CEN KEYMARK certificate n°001-BK-516-001; ATG H539; KOMO-CTG100-9; SIA CH672-13; ACERMI16-023-1179; Natureplus n°Zt-PCE-0406-1101-101
Declared unit:
The Declaration refers to the life cycle of 1kg FOAMGLAS® T4+. The gross density of the product is 110 kg/m³ ± 15%.

## Technical purpose
FOAMGLAS® T4+ products are used for roof, facades, interior, in contact with the ground, or specific insulation. FOAMGLAS® T4+ is also used for building equipment & industrial installations, for which FOAMGLAS® ONE is an equivalent product.

## Scenarios
- S1: Scenario 1
- S2: Scenario 2
- S3: Scenario 3

## Reference product
- FOAMGLAS® T4+ (1 kg FOAMGLAS® T4+): 1

## Inputs
- Renewable primary energy as energy carrier (PERE) [MJ]: A1-A3 12.8, A4 0.0211, A5 0.728, C1 0.000461, C2 0.00167, C3 (S2) 0, C3 (S3) 0.0187, C4 0.0261, D (S0) -0.168, D (S2) -12.8, D (S3) -0.118
- Renewable primary energy resources as material utilization (PERM) [MJ]: A1-A3 0.72, A4 0, A5 -0.72, C1 0, C2 0, C3 (S2) 0, C3 (S3) 0, C4 0, D (S0) 0, D (S2) -0.72, D (S3) 0
- Total use of renewable primary energy resources (PERT) [MJ]: A1-A3 13.52, A4 0.0211, A5 0.008, C1 0.000461, C2 0.00167, C3 (S2) 0, C3 (S3) 0.0187, C4 0.0261, D (S0) -0.168, D (S2) -13.52, D (S3) -0.118
- Non renewable primary energy as energy carrier (PENRE) [MJ]: A1-A3 21.6, A4 0.375, A5 0.677, C1 0.00821, C2 0.0298, C3 (S2) 0, C3 (S3) 0.0421, C4 0.199, D (S0) -0.81, D (S2) -21.6, D (S3) -2.91
- Non renewable primary energy as material utilization (PENRM) [MJ]: A1-A3 0.64, A4 0, A5 -0.64, C1 0, C2 0, C3 (S2) 0, C3 (S3) 0, C4 0, D (S0) 0, D (S2) -0.64, D (S3) 0
- Total use of non renewable primary energy resources (PENRT) [MJ]: A1-A3 22.24, A4 0.375, A5 0.037, C1 0.00821, C2 0.0298, C3 (S2) 0, C3 (S3) 0.0421, C4 0.199, D (S0) -0.81, D (S2) -22.24, D (S3) -2.91
- Use of secondary material (SM) [kg]: A1-A3 0.454, A4 0, A5 0, C1 0, C2 0, C3 (S2) 0, C3 (S3) 0, C4 0, D (S0) 0, D (S2) 0, D (S3) 0
- Use of renewable secondary fuels (RSF) [MJ]: A1-A3 0, A4 0, A5 0, C1 0, C2 0, C3 (S2) 0, C3 (S3) 0, C4 0, D (S0) 0, D (S2) 0, D (S3) 0
- Use of non renewable secondary fuels (NRSF) [MJ]: A1-A3 0, A4 0, A5 0, C1 0, C2 0, C3 (S2) 0, C3 (S3) 0, C4 0, D (S0) 0, D (S2) 0, D (S3) 0
- Use of net fresh water (FW) [m^3]: A1-A3 0.0313, A4 2.44e-5, A5 0.000299, C1 5.34e-7, C2 1.94e-6, C3 (S2) 0, C3 (S3) 2.16e-5, C4 5.02e-5, D (S0) -0.000195, D (S2) -0.0313, D (S3) -0.000139

## Outputs
- Hazardous waste disposed (HWD) [kg]: A1-A3 6.03e-8, A4 1.75e-8, A5 8.76e-11, C1 3.82e-10, C2 1.39e-9, C3 (S2) 0, C3 (S3) 1.74e-11, C4 3.03e-9, D (S0) -3.22e-10, D (S2) -6.03e-8, D (S3) -2.45e-9
- Non hazardous waste disposed (NHWD) [kg]: A1-A3 0.0409, A4 5.74e-5, A5 0.00508, C1 1.26e-6, C2 4.56e-6, C3 (S2) 0, C3 (S3) 2.99e-5, C4 1, D (S0) -0.000364, D (S2) -0.0409, D (S3) -0.000772
- Radioactive waste disposed (RWD) [kg]: A1-A3 9.95e-5, A4 4.64e-7, A5 1.73e-6, C1 1.02e-8, C2 3.68e-8, C3 (S2) 0, C3 (S3) 6.39e-6, C4 2.26e-6, D (S0) -5.73e-5, D (S2) -9.95e-5, D (S3) -3.9e-5
- Components for re-use (CRU) [kg]: A1-A3 0, A4 0, A5 0, C1 0, C2 0, C3 (S2) 1, C3 (S3) 0, C4 0, D (S0) 0, D (S2) 0, D (S3) 0
- Materials for recycling (MFR) [kg]: A1-A3 0, A4 0, A5 0, C1 0, C2 0, C3 (S2) 0, C3 (S3) 0.546, C4 0, D (S0) 0, D (S2) 0, D (S3) 0
- Materials for energy recovery (MER) [kg]: A1-A3 0, A4 0, A5 0.0618, C1 0, C2 0, C3 (S2) 0, C3 (S3) 0, C4 0, D (S0) 0, D (S2) 0, D (S3) 0
- Exported electrical energy (EEE) [MJ]: A1-A3 0, A4 0, A5 0.192, C1 0, C2 0, C3 (S2) 0, C3 (S3) 0, C4 0, D (S0) 0, D (S2) 0, D (S3) 0
- Exported thermal energy (EET) [MJ]: A1-A3 0, A4 0, A5 0.383, C1 0, C2 0, C3 (S2) 0, C3 (S3) 0, C4 0, D (S0) 0, D (S2) 0, D (S3) 0

## Impact indicators
- Global Warming Potential total (GWP-total) [kg CO_(2)-Äq.]: A1-A3 1.43, A4 0.0296, A5 0.1211, C1 0.000616, C2 0.00235, C3 (S2) 0, C3 (S3) 0.00241, C4 0.0153, D (S0) -0.0479, D (S2) -1.43, D (S3) -0.1773
- Global Warming Potential fossil fuels (GWP-fossil) [kg CO_(2)-Äq.]: A1-A3 1.49, A4 0.028, A5 0.0423, C1 0.00064, C2 0.00223, C3 (S2) 0, C3 (S3) 0.00239, C4 0.0152, D (S0) -0.0478, D (S2) -1.49, D (S3) -0.177
- Global Warming Potential biogenic (GWP-biogenic) [kg CO_(2)-Äq.]: A1-A3 -0.0562, A4 0.00133, A5 0.0788, C1 1.93e-6, C2 0.000106, C3 (S2) 0, C3 (S3) 2.11e-5, C4 4.86e-5, D (S0) -0.00011, D (S2) 0.0562, D (S3) -0.000279
- Global Warming Potential luluc (GWP-luluc) [kg CO_(2)-Äq.]: A1-A3 0.0011, A4 0.000228, A5 3.16e-6, C1 4.99e-6, C2 1.81e-5, C3 (S2) 0, C3 (S3) 3.47e-6, C4 4.37e-5, D (S0) -3.18e-5, D (S2) -0.0011, D (S3) -4.25e-5
- Depletion potential of the stratospheric ozone layer (ODP) [kg CFC11-Äq.]: A1-A3 8.21e-14, A4 3.38e-18, A5 3.1e-17, C1 7.41e-20, C2 2.68e-19, C3 (S2) 0, C3 (S3) 5.27e-17, C4 5.62e-17, D (S0) -4.73e-16, D (S2) -8.21e-14, D (S3) -3.23e-16
- Acidification potential of land and water (AP) [mol H^(+)-Äq.]: A1-A3 0.00508, A4 2.95e-5, A5 2.02e-5, C1 3.09e-6, C2 7.17e-6, C3 (S2) 0, C3 (S3) 5.28e-6, C4 0.000109, D (S0) -6.51e-5, D (S2) -0.00508, D (S3) -0.000164
- Eutrophication potential aquatic freshwater (EP-freshwater) [kg PO_(4)-Äq.]: A1-A3 1.99e-5, A4 8.56e-8, A5 4.92e-9, C1 1.87e-9, C2 6.79e-9, C3 (S2) 0, C3 (S3) 6.39e-9, C4 2.6e-8, D (S0) -5.86e-8, D (S2) -1.99e-5, D (S3) -6.49e-8
- Eutrophication potential aquatic marine (EP-marine) [kg N-Äq.]: A1-A3 0.00167, A4 8.75e-6, A5 5.94e-6, C1 1.44e-6, C2 3.23e-6, C3 (S2) 0, C3 (S3) 1.17e-6, C4 2.8e-5, D (S0) -1.7e-5, D (S2) -0.00167, D (S3) -5.89e-5
- Eutrophication potential terrestrial (EP-terrestrial) [mol N-Äq.]: A1-A3 0.0185, A4 0.000105, A5 9.34e-5, C1 1.59e-5, C2 3.61e-5, C3 (S2) 0, C3 (S3) 1.23e-5, C4 0.000308, D (S0) -0.000183, D (S2) -0.0185, D (S3) -0.000648
- Formation potential of tropospheric ozone photochemical oxidants (POCP) [kg NMVOC-Äq.]: A1-A3 0.00393, A4 2.4e-5, A5 1.62e-5, C1 4.03e-6, C2 6.33e-6, C3 (S2) 0, C3 (S3) 3.22e-6, C4 8.48e-5, D (S0) -4.91e-5, D (S2) -0.00393, D (S3) -0.000178
- Abiotic depletion potential for non fossil resources (ADPE) [kg Sb-Äq.]: A1-A3 2.18e-7, A4 2.02e-9, A5 4.48e-10, C1 4.42e-11, C2 1.6e-10, C3 (S2) 0, C3 (S3) 6.93e-10, C4 1.36e-9, D (S0) -7.57e-9, D (S2) -2.18e-7, D (S3) -1.26e-8
- Abiotic depletion potential for fossil resources (ADPF) [MJ]: A1-A3 22.2, A4 0.375, A5 0.0372, C1 0.0082, C2 0.0297, C3 (S2) 0, C3 (S3) 0.0421, C4 0.199, D (S0) -0.81, D (S2) -22.2, D (S3) -2.91
- Water use (WDP) [m^(3) world-Äq. deprived]: A1-A3 0.125, A4 0.000252, A5 0.0127, C1 5.51e-6, C2 2e-5, C3 (S2) 0, C3 (S3) 0.000522, C4 0.00159, D (S0) -0.0047, D (S2) -0.125, D (S3) -0.00328
- Incidence of disease due to PM emissions (PM) [Disease incidence]: A1-A3 5.46e-8, A4 1.73e-10, A5 1.59e-10, C1 3.47e-11, C2 3.92e-11, C3 (S2) 0, C3 (S3) 4.43e-11, C4 1.35e-9, D (S0) -5.54e-10, D (S2) -5.46e-8, D (S3) -8.8e-9
- Human exposure efficiency relative to U235 (IR) [kBq U235-Äq.]: A1-A3 0.014, A4 6.71e-5, A5 0.000225, C1 1.47e-6, C2 5.33e-6, C3 (S2) 0, C3 (S3) 0.00105, C4 0.000232, D (S0) -0.00941, D (S2) -0.014, D (S3) -0.00636
- Comparative toxic unit for ecosystems (ETP-fw) [CTUe]: A1-A3 43.3, A4 0.265, A5 0.0152, C1 0.0058, C2 0.021, C3 (S2) 0, C3 (S3) 0.018, C4 0.114, D (S0) -0.166, D (S2) -43.3, D (S3) -0.16
- Comparative toxic unit for humans (carcinogenic) (HTP-c) [CTUh]: A1-A3 6.93e-10, A4 5.55e-12, A5 1.13e-12, C1 1.21e-13, C2 4.4e-13, C3 (S2) 0, C3 (S3) 4.97e-13, C4 1.68e-11, D (S0) -7.47e-12, D (S2) -6.93e-10, D (S3) -2.18e-11
- Comparative toxic unit for humans (noncarcinogenic) (HTP-nc) [CTUh]: A1-A3 2.78e-8, A4 2.87e-10, A5 8.11e-11, C1 7.28e-12, C2 2.58e-11, C3 (S2) 0, C3 (S3) 1.83e-11, C4 1.86e-9, D (S0) -2.78e-10, D (S2) -2.78e-8, D (S3) -8.34e-10
- Soil quality index (SQP) [SQP]: A1-A3 25, A4 0.131, A5 0.0107, C1 0.00288, C2 0.0104, C3 (S2) 0, C3 (S3) 0.0134, C4 0.0415, D (S0) -0.121, D (S2) -25, D (S3) -0.0943

## Use advice
Scope:
This document refers to the production of 1 kg
uncoated "FOAMGLAS® T4+" cellular glass
manufactured in Belgium at the Tessenderlo
and in Czech Republic at the Klasterec production facilities of Pittsburgh Corning Europe NV. The reference year of production is 2019.
The environmental impacts of the coated product "FOAMGLAS® T4+ in boards & blocks " are to be assessed with the help of a markup factor in the amount of 0.8% for Global Warming Potential.
Besides FOAMGLAS® T4+, exclusively for building equipment and industrial applications FOAMGLAS® ONE has the same environmental impacts as FOAMGLAS® T4+.
System boundary:
Type of EPD: Cradle to Grave with options, modules C1-C4, and module D (A1-A3, C, D and additional modules)

The LCA addresses the life cycle stage of production, installation, end-of-life (EoL) and potential benefits beyond the system boundaries.

The product stage comprises of modules A1 (raw material supply), A2 (transport) and A3 (production). The following individual processes were included in the product stage A1- A3 of production:

Processes for providing preliminary products and energy
Transporting the raw materials and preliminary materials to the plant
The manufacturing process in the plant including energy-related expenses, disposal of residual materials and emissions
Production of packaging

Module A4 takes into account the transportation of product to the construction site. The treatment of the packaging materials is assigned to module A5. Module C1 takes into accounts the de-construction or demolition of the product before taking it for treatment / disposal through means of transportation (module C2). Module C3 is the waste processing of the product before recycling/recovery/reuse. Landfilling with residual materials is assigned to module C4. Module D accounts for the potential credits resulting from the thermal and electrical energy generated when burning packaging materials in module A5 (energy substitution).

There are 3 EoL scenarios in the study: Landfill, Reuse and Recycling. Module D/2 takes into account potential credits for 100% reuse of material and module D/3 considers potential credits for replacing kaolin in the brick industry.

## Data sources
- GaBi Database (all versions)
- GaBi database SP40 2020
