# Furnace bottom ash; coal plant bottom ash

Dataset: ILCD process, EPD, generic dataset
Geography: DE
Reference year: 2018
Valid until: 2022
Classification: oekobau.dat: Mineralische Baustoffe / Zuschläge / Kraftwerksnebenprodukte
Owner: thinkstep
Compliance: DIN EN 15804
Review: Dependent internal review by thinkstep, LBP-GaBi, IBP-GaBi; Independent external review by GaBi user forum, GaBi bug forum, GaBi user community
Amounts: rows without a unit in brackets have none in this file; such an amount is in the reference unit of its flow, which a separate flow dataset defines
copyright: true

## General comment
1.2.8 This dataset is modelled according to the European Standard EN 15804 for Sustainable Construction. Results are declared in modules, which allows the structured expression of results throughout the life cycle. A1-A3: Product stage, containing the following modules: * A1, raw material extraction and processing, processing of secondary material input (e.g. recycling processes), * A2, transport to the manufacturer, * A3, manufacturing.

## Geography
The data set represents the German situation, focusing on the main technologies, the region specific characteristics and / or import statistics.

## Time period
annual average

## Technology and included processes
Bottom ash, a solid, dispese residue occurs inevitably during coal-or lignite combustion. It is used as aggregate in the construction industry. The system boundary is the finished product at a factory gate. The goal of the operation of coal-fired power plants is the production of electricity and heat. Bottom ash and boiler slag are partially liquid and partially broken and glazed. The system boundary is defined by the furnace. Therefore, the impacts related to the slag and ash generation are inseparable from the power and heat production process and are assigned to the power and heat plant. Bottom ash and boiler slag impacts are reflected in the requirements for cooling, breaking and glazing. Background system: Electricity: Electricity is modelled according to the individual country-specific situations. The country-specific modelling is achieved on multiple levels. Firstly, individual energy carrier specific power plants and plants for renewable energy sources are modelled according to the current national electricity grid mix. Modelling the electricity consumption mix includes transmission / distribution losses and the own use by energy producers (own consumption of power plants and "other" own consumption e.g. due to pumped storage hydro power etc.), as well as imported electricity. Secondly, the national emission and efficiency standards of the power plants are modelled as well as the share of electricity plants and combined heat and power plants (CHP). Thirdly, the country-specific energy carrier supply (share of imports and / or domestic supply) including the country-specific energy carrier properties (e.g. element and energy content) are accounted for. Fourthly, the exploration, mining/production, processing and transport processes of the energy carrier supply chains are modelled according to the specific situation of each electricity producing country. The different production and processing techniques (emissions and efficiencies) in the different energy producing countries are considered, e.g. different crude oil production technologies or different flaring rates at the oil platforms. Thermal energy, process steam: The thermal energy and process steam supply is modelled according to the individual country-specific situation with regard to emission standards and considered energy carriers. The thermal energy and process steam are produced at heat plants. Efficiencies for thermal energy production are by definition 100% in relation to the corresponding energy carrier input. For process steam the efficiency ranges from 85%, 90% to 95%. The energy carriers used for the generation of thermal energy and process steam are modelled according to the specific import situation (see electricity above). Transports: All relevant and known transport processes are included. Ocean-going and inland ship transport as well as rail, truck and pipeline transport of bulk commodities are considered. Energy carriers: The energy carriers are modelled according to the specific supply situation (see electricity above). Refinery products: Diesel fuel, gasoline, technical gases, fuel oils, lubricants and residues such as bitumen are modelled with a parameterised country-specific refinery model. The refinery model represents the current national standard in refining techniques (e.g. emission level, internal energy consumption, etc.) as well as the individual country-specific product output spectrum, which can be quite different from country to country. The supply of crude oil is modelled, again, according to the country-specific situation with the respective properties of the resources.

## Technical purpose
mineral additive

## Safety margin
0 %. Produktsystem bis auf wenige Prozesse/Flüsse abgebildet. Technologische, zeitliche und geographische Repräsentativität teilweise gegeben.

## Reference product
- Furnace bottom ash: 1

## Inputs
- Use of renewable primary energy (PERE) [MJ]: A1-A3 0
- Primary energy resources used as raw materials (PERM) [MJ]: A1-A3 0
- Total use of renewable primary energy resources (PERT) [MJ]: A1-A3 0
- Use of non-renewable primary energy (PENRE) [MJ]: A1-A3 0
- Non-renewable primary energy resources used as raw materials (PENRM) [MJ]: A1-A3 0
- Total use of non-renewable primary energy resources (PENRT) [MJ]: A1-A3 0
- Input of secondary material (SM) [kg]: A1-A3 0
- Use of renewable secondary fuels (RSF) [MJ]: A1-A3 0
- Use of non renewable secondary fuels (NRSF) [MJ]: A1-A3 0
- Use of net fresh water (FW) [m3]: A1-A3 0

## Outputs
- Hazardous waste disposed (HWD) [kg]: A1-A3 0
- Non-hazardous waste disposed (NHWD) [kg]: A1-A3 0
- Radioactive waste disposed (RWD) [kg]: A1-A3 0
- Components for re-use (CRU) [kg]: A1-A3 0
- Materials for Recycling (MFR) [kg]: A1-A3 0
- Material for Energy Recovery (MER) [kg]: A1-A3 0
- Exported electrical energy (EEE) [MJ]: A1-A3 0
- Exported thermal energy (EET) [MJ]: A1-A3 0

## Impact indicators
- Global warming potential (GWP) [kg CO2 eq.]: A1-A3 0
- Ozone Depletion Potential (ODP) [kg R11 eq.]: A1-A3 0
- Acidification potential (AP) [kg SO2 eq.]: A1-A3 0
- Eutrophication potential (EP) [kg Phosphate eq.]: A1-A3 0
- Photochemical Ozone Creation Potential (POCP) [kg Ethene eq.]: A1-A3 0
- Abiotic depletion potential for non fossil ressources (ADPE) [kg Sb eq.]: A1-A3 0
- Abiotic depletion potential for fossil resources (ADPF) [MJ]: A1-A3 0

## Use advice
The data set represents a cradle to gate inventory. It can be used to characterise the supply chain situation of the respective commodity in a representative manner. Combination with individual unit processes using this commodity enables the generation of user-specific (product) LCAs.

## Other review details
Overall quality according to different validation schemes
GaBi = 1,5 interpreted into "good overall quality" in the GaBi quality validation scheme
ILCD = 1,7 interpreted into "basic overall quality" in the ILCD quality validation scheme
PEF = 1,5 interpreted into "excellent overall quality" in the PEF quality validation scheme

## Data sources
- GaBi Database Edition 2019, SP37
- GaBi database (all versions)
