# Drinking water pipe PE-X-Alu; PE-X-Alu

Dataset: ILCD process, EPD, generic dataset
Geography: DE
Reference year: 2021
Valid until: 2022
Classification: oekobau.dat: Kunststoffe / Rohre / Trinkwasserrohre
Owner: Sphera Solutions GmbH
Compliance: EN 15804+A2
Review: Dependent internal review by Sphera Solutions GmbH; Independent external review by GaBi user forum
Amounts: rows without a unit in brackets have none in this file; such an amount is in the reference unit of its flow, which a separate flow dataset defines
copyright: true
licenseType: Free of charge for all users and uses
accessRestrictions: The license conditions as stated on https://www.oekobaudat.de/ apply.
accessRestrictions: Es gelten die Lizenzbedingungen wie sie auf https://www.oekobaudat.de/ genannt sind.

## General comment
This data set has been modeled according to the European Standard EN 15804+A2 for Sustainable Building. Results are depicted in modules that allow the structured expression of results over the entire life cycle.

## Geography
The data set represents the country specific situation in Germany, focusing on the main technologies, the region specific characteristics and / or import statistics.

## Time period
Annual average

## Technology and included processes
The life cycle analysis of the drinking water pipe based on PE-X-Alu includes the life cycle phases cradle to gate, i.e. particularly the compounding with following extrusion and manufacturing of the aluminium layer. The Cross-linking in the water bath was not taken into account. The system boundary is the finished product, which is composed with each 50% of PE-X and aluminium. Adhesive layers hasn't been considered. Transports from the factory to the mounting location are not taken into account and have to be incorporated in a system approach.

In module C1, a manual dismantling (no loads) is assumed, collecting losses are neglected.
The transport in module C2 to the recycling plant takes place with a truck (50km).
Module C3 takes into account the grinding and thermal treatment (combustion) of the material. When calculating combustion emissions and credits, the specific calorific value of each material and the material composition are taken into account.
In module D credits for the substitution of electricity (German electricity mix) and thermal energy (from natural gas) are given.
Module D also includes loads for sorting, remelting, slag treatment, landfill, filtration of dusts and dross treatment. Credits are given for the net scrap amount (amount returned minus secondary material content, minus processing losses) for the average material mix (from different alloys).

## Technical purpose
This product can be used in construction.

## Safety margin
20 %. Product system depicted except for a few missing processes / flows. Technological, temporal and geographic representativeness partly given.

## Reference product
- Drinking water pipe PE-X-Alu: 1

## Inputs
- Use of renewable primary energy as energy carrier (PERE) [MJ]: A1-A3 39.6459, C1 0, C2 0.00218616, C3 0.0678385, D -18.0315
- Use of renewable primary energy resources used as raw materials (PERM) [MJ]: A1-A3 0, C1 0, C2 0, C3 0, D 0
- Total use of renewable primary energy (PERT) [MJ]: A1-A3 39.6459, C1 0, C2 0.00218616, C3 0.0678385, D -18.0315
- Use of non renewable primary energy as energy carrier (PENRE) [MJ]: A1-A3 112.26, C1 0, C2 0.0376677, C3 21.3076, D -54.3699
- Use of non renewable primary energy resources used as raw materials (PENRM) [MJ]: A1-A3 17.5, C1 0, C2 0, C3 -17.5, D 0
- Total use of non renewable primary energy resource (PENRT) [MJ]: A1-A3 129.76, C1 0, C2 0.0376677, C3 3.80758, D -54.3699
- Use of secondary material (SM) [kg]: A1-A3 0, C1 0, C2 0, C3 0, D 0
- Use of renewable secondary fuels (SF) [MJ]: A1-A3 0, C1 0, C2 0, C3 0, D 0
- Use of non renewable secondary fuels (NRSF) [MJ]: A1-A3 0, C1 0, C2 0, C3 0, D 0
- Net use of fresh water (FW) [m3]: A1-A3 0.0827979, C1 0, C2 1.94295e-6, C3 0.00405081, D -0.0318761

## Outputs
- Hazardous waste disposed (HWD) [kg]: A1-A3 1.90459e-8, C1 0, C2 1.57439e-12, C3 6.47371e-11, D 3.37853e-10
- Non harzardous waste disposed (NHWD) [kg]: A1-A3 1.54371, C1 0, C2 6.08042e-6, C3 0.00761695, D -0.773183
- Radioactive waste disposed (RWD) [kg]: A1-A3 0.00542524, C1 0, C2 3.61471e-8, C3 8.32919e-6, D -0.0038283
- Components for re-use (CRU) [kg]: A1-A3 0, C1 0, C2 0, C3 0, D 0
- Materials for recycling (MFR) [kg]: A1-A3 0, C1 0.5, C2 0, C3 0, D 0
- Materials for energy recovery (MER) [kg]: A1-A3 0, C1 0, C2 0, C3 0.5, D 0
- Exported electrical energy (EEE) [MJ]: A1-A3 0, C1 0, C2 0, C3 2.8518, D 0
- Exported thermal energy (EET) [MJ]: A1-A3 0, C1 0, C2 0, C3 6.56813, D 0

## Impact indicators
- Global Warming Potential - total (GWP-total) [kg CO2 eq.]: A1-A3 7.75184, C1 0, C2 0.00286116, C3 1.88481, D -3.98008
- Global Warming Potential - fossil fuels (GWP-fossil) [kg CO2 eq.]: A1-A3 7.70987, C1 0, C2 0.00284173, C3 1.88469, D -3.96308
- Global Warming Potential - biogenic (GWP-biogenic) [kg CO2 eq.]: A1-A3 0.0372042, C1 0, C2 1.17716e-6, C3 0.000101026, D -0.0153929
- Global Warming Potential - land use and land use change (GWP-luluc) [kg CO2 eq.]: A1-A3 0.00476691, C1 0, C2 1.82504e-5, C3 2.25803e-5, D -0.00160048
- Depletion potenzial of the stratospheric ozone layer (ODP) [kg CFC-11 eq.]: A1-A3 6.09827e-14, C1 0, C2 7.27125e-19, C3 2.78659e-16, D 1.08947e-12
- Acidifcation potential, Accumulated Exceedance (AP) [Mole of H+ eq.]: A1-A3 0.0292566, C1 0, C2 8.05696e-6, C3 0.000290842, D -0.0128938
- Eutrophication potential - freshwater (EP-freshwater) [kg P eq.]: A1-A3 1.99465e-5, C1 0, C2 5.84435e-9, C3 3.80234e-8, D -2.6471e-6
- Eutrophication potential - marine (EP-marine) [kg N eq.]: A1-A3 0.00468025, C1 0, C2 3.71167e-6, C3 4.68182e-5, D -0.00214524
- Eutrophication potential - terrestrial (EP-terrestrial) [Mole of N eq.]: A1-A3 0.0501508, C1 0, C2 4.15269e-5, C3 0.0013541, D -0.0233079
- Photochemical Ozone Creation Potential (POCP) [kg NMVOC eq.]: A1-A3 0.0157801, C1 0, C2 7.23785e-6, C3 0.000126879, D -0.00636842
- Abiotic depletion potential - non-fossil resources (ADPE) [kg Sb eq.]: A1-A3 1.20812e-6, C1 0, C2 2.47191e-10, C3 3.96246e-9, D -4.77945e-7
- Abiotic depletion potential - fossil resources (ADPF) [MJ]: A1-A3 133.162, C1 0, C2 0.0376661, C3 0.30747, D -54.3196
- Water (user) deprivation potential (WDP) [m³ world equiv.]: A1-A3 0.826344, C1 0, C2 1.10468e-5, C3 0.172629, D -0.211054

## Use advice
The data set represents a cradle to gate inventory. It can be used to characterise the supply chain situation of the respective commodity in a representative manner. Combination with individual unit processes using this commodity enables the generation of user-specific (product) LCAs.

## Data sources
- Extrusionslinien zur Herstellung von Alu-Verbundrohre, 2008
- LRS 2008
- POLYSAN 2008
- Documentation of data quality management
- GaBi Database Edition 2021, CUP2021.01
- GaBi database (all versions)
