# Wedi Fundo

Dataset: ILCD process, EPD, specific dataset
Geography: DE
Reference year: 2019
Valid until: 2024
Classification: OEKOBAU.DAT: Gebäudetechnik / Sanitär / Dusch- und Badewannen
Classification: IBUCategories: 02 Bauprodukte / Wärmedämmungsprodukte / Dämmstoffe aus Schaumkunststoffen
Method details: Dämmstoffe aus Schaumkunststoffen.pdf
Generated by: WESSLING GmbH
Registration number: EPD-WDI-20190017-IAA1-DE
Owner: wedi GmbH
Compliance: DIN EN 15804; ISO 14025
Review: Accredited third party review by Institut Bauen und Umwelt e. V.
Amounts: rows without a unit in brackets have none in this file; such an amount is in the reference unit of its flow, which a separate flow dataset defines
copyright: true
licenseType: Free of charge for all users and uses
accessRestrictions: None

## General comment
The wedi Fundo floor-level shower element consists of an extruded rigid polystyrene foam core with double-sided fibre glass reinforcement and a polymer cement mortar layer. Extruded rigid polystyrene foam (XPS) is a plastic foam insulating material which is produced in compliance with /EN 13164/, which is produced in the form of the raw density region of 35 kg/m³ (+/-3). wedi Fundo floor-level showers are supplied in different dimensions.

EU/EFTA regulation no. 305/2011 (CPR) (with the exception of Switzerland) applies for placing the product on the market. The product requires a Declaration of Performance taking into account /ETA 13/0385/, 12/06/2013, wedi building board /Fundo sealing systems and CE labelling. The respective national regulations apply to its use.

## Technology and included processes
XPS is produced from polystyrene granulate in a continuous extrusion process. The polystyrene is melted and homogenised with the additives in a tandem extruder under high pressure. The propellant is dissolved in the melting process and subsequently discharged through a slot die. The propellant foams up the melt in the ambient temperature due to the strongly reducing counter-pressure caused. The melt cools down in the process and the polystyrene foam solidifies. Closed-cell rigid polystyrene foam is produced. This continues to cool down and can be packaged after removal of the extrusion skin. As a first step a prescribed gradient is applied to the XPS base board. To coat the floor-level shower element, polymer-modified cement mortar is mixed with water and dispersion and applied to both sides of the XPS core together with the fibre glass fabric. The dried floor-level shower element can then be cut to size. wedi floor-level shower elements are packed individually in cardboard and piled on pallets with polyethylene foil. XPS from production cuts and milling dust are recycled directly into production and re-used to produce XPS. Polystyrene is a thermoplastic material and can therefore be recycled simply and cheaply through melting.
Declared unit:
The declared unit of this study is a triple-coated floor-level shower system with a surface area of 1 m² and a thickness of 40 mm. The manufacturer’s system designation is wedi Fundo.

## Technical purpose
The wedi Fundo floor-level shower element is deployed in wet rooms and sanitary areas. The wedi Fundo system can be installed on almost any foundation as an individually tileable, floor-level shower system. The system includes a rigid polystyrene foam core with a special polymer cement mortar coating including a prescribed surface slope. The respective national regulations apply to its use.

(Further information at www.wedi.eu)

## Reference product
- wedi Fundo, 40 mm (wedi Fundo, 40 mm ): 1

## Inputs
- Renewable primary energy as energy carrier (PERE) [MJ]: A1-A3 16.8, A5 0.093
- Renewable primary energy resources as material utilization (PERM) [MJ]: A1-A3 14.6, A5 0
- Total use of renewable primary energy resources (PERT) [MJ]: A1-A3 31.4, A5 0.093
- Non renewable primary energy as energy carrier (PENRE) [MJ]: A1-A3 191.9, A5 0.492
- Non renewable primary energy as material utilization (PENRM) [MJ]: A1-A3 60, A5 0
- Total use of non renewable primary energy resources (PENRT) [MJ]: A1-A3 251.9, A5 0.492
- Use of secondary material (SM) [kg]: A1-A3 0, A5 0
- Use of renewable secondary fuels (RSF) [MJ]: A1-A3 0.031, A5 0
- Use of non renewable secondary fuels (NRSF) [MJ]: A1-A3 0.327, A5 0
- Use of net fresh water (FW) [m^3]: A1-A3 0.049, A5 0.004

## Outputs
- Hazardous waste disposed (HWD) [kg]: A1-A3 4.26e-6, A5 1.14e-9
- Non hazardous waste disposed (NHWD) [kg]: A1-A3 0.23, A5 0.0294
- Radioactive waste disposed (RWD) [kg]: A1-A3 0.005, A5 1.98e-5
- Components for re-use (CRU) [kg]: A1-A3 0, A5 0
- Materials for recycling (MFR) [kg]: A1-A3 0, A5 0
- Materials for energy recovery (MER) [kg]: A1-A3 1.36, A5 0
- Exported electrical energy (EEE) [MJ]: A1-A3 0, A5 0
- Exported thermal energy (EET) [MJ]: A1-A3 0, A5 0

## Impact indicators
- Global warming potential (GWP) [kg CO_(2)-Äq.]: A1-A3 10.5, A5 1.54
- Depletion potential of the stratospheric ozone layer (ODP) [kg CFC11-Äq.]: A1-A3 9.81e-8, A5 7.33e-14
- Acidification potential of land and water (AP) [kg SO_(2)-Äq.]: A1-A3 0.025, A5 0.000288
- Eutrophication potential (EP) [kg PO_(4)^(3)-Äq.]: A1-A3 0.003, A5 5.82e-5
- Formation potential of tropospheric ozone photochemical oxidants (POCP) [kg Ethen-Äq.]: A1-A3 0.004, A5 2.06e-5
- Abiotic depletion potential for non fossil resources (ADPE) [kg Sb-Äq.]: A1-A3 9.42e-5, A5 8.65e-9
- Abiotic depletion potential for fossil resources (ADPF) [MJ]: A1-A3 235, A5 0.44

## Use advice
Scope:
The reference period for the data collected is 2017. The data originates from the Emsdetten works in North Rhine-Westphalia, Germany.
System boundary:
The environmental information in this EPD is based on a cradle-to-gate assumption and therefore exclusively includes the modules of the production stage and those of the manufacturing phase A1-A3 as well as Module A5 to describe the End-of-Life process of the packaging material.

A1: Raw materials production and processing

1. Extruded rigid polystyrene foam core

2. Fibre glass fabric reinforcement

3. Plasticised mortar with Dispersion

4. Quartz sand

A2: Transport to manufacturer

The provision of diesel and the use of transport vehicles (trucks) over the specified distances have been included.

A3: wedi production process

The preparation of preliminary products before composition and the general production process up to packaging and storage are included.

A5: Construction stage: packaging material End of Life

For the sake of completeness, disposal of the packaging material used in the plant has been included with Module A5

## Data sources
- GaBi Database (all versions)
- GaBi database SP34 2017
