# Wolfin M

Dataset: ILCD process, EPD, specific dataset
Geography: DE
Reference year: 2020
Valid until: 2025
Classification: OEKOBAU.DAT: Kunststoffe / Dachbahnen / PVC-Dachbahnen
Classification: IBUCategories: 02 Bauprodukte / Abdichtungen / Dach- und Dichtungsbahnsysteme aus Kunststoffen und Elastomeren
Method details: Dach- und Dichtungsbahnsysteme aus Kunststoffen und Elastomeren.pdf
Generated by: PE INTERNATIONAL AG
Registration number: EPD-WOL-20200035-IBA1-DE
Owner: WOLFIN Bautechnik GmbH
Compliance: DIN EN 15804; ISO 14025
Review: Accredited third party review by Institut Bauen und Umwelt e. V.
Amounts: rows without a unit in brackets have none in this file; such an amount is in the reference unit of its flow, which a separate flow dataset defines
copyright: true
licenseType: Free of charge for all users and uses
accessRestrictions: None

## General comment
Wolfin M roofing and sealing membranes are centrally-reinforced, high-polymer, entirely homogeneous (no difference in the top, central or bottom layers) plastic roof and sealing membranes which are manufactured in an extrusion process.

## Technology and included processes
The basic substances in the recipe are blended in a mixer, mixed and then kneaded and plasticised in an extruder. The bottom layer is manufactured by a flat die in the extrusion process, embossed in the roller gap and bonded with the glass scrim. This preliminary material is wound on a large dock along a cooling line. In a second step, the recipe is mixed and plasticised as outlined above. On exiting the flat die, the bottom layer comprising Wolfin sheet material with reinforcement is bonded with the Wolfin top layer by applying heat and pressure inside the roller gap. The sheet is cooled via cooling rolls. On its way to packing, the sheet is imprinted with a unique web imprint, including the batch number and traceability. The sheet is cut to the corresponding width. As the centrally-reinforced Wolfin M sheet features a homogeneous edge on both sides, the edge sections can be fully recycled and redirected to the production process. Production is certified in accordance with DIN EN ISO 9001.
Declared unit:
The declared unit is 1 m² Wolfin M roofing membrane. A thickness of 1.5 mm is declared; the factor for calculating Wolfin M 2 mm is indicated in section 5. The sheets are laid loosely with ballast or fastened mechanically. The ballast or fastening elements are not included in this product declaration.

## Technical purpose
Single-layer, high-polymer synthetic roofing and building waterproofing system. The sheets are laid loosely with ballast (gravel, paving, greenery) or fastened mechanically.

## Reference product
- 1 m² Wolfin M 1,5 mm (): 1

## Inputs
- Renewable primary energy as energy carrier (PERE) [MJ]: A1-A3 -2.05
- Renewable primary energy resources as material utilization (PERM) [MJ]: A1-A3 13
- Total use of renewable primary energy resources (PERT) [MJ]: A1-A3 10.9, C2 0.00382, C4 1.28, D -2.31
- Non renewable primary energy as energy carrier (PENRE) [MJ]: A1-A3 107
- Non renewable primary energy as material utilization (PENRM) [MJ]: A1-A3 60.8
- Total use of non renewable primary energy resources (PENRT) [MJ]: A1-A3 167, C2 0.0644, C4 15, D -22.8
- Use of secondary material (SM) [kg]: A1-A3 0, C2 0, C4 0
- Use of renewable secondary fuels (RSF) [MJ]: A1-A3 0, C2 0, C4 0, D 0
- Use of non renewable secondary fuels (NRSF) [MJ]: A1-A3 0, C2 0, C4 0, D 0
- Use of net fresh water (FW) [m^3]: A1-A3 0.0409, C2 2.47e-6, C4 0.011, D -0.00312

## Outputs
- Hazardous waste disposed (HWD) [kg]: A1-A3 0.00917, C2 2.86e-7, C4 0.00173, D -0.00336
- Non hazardous waste disposed (NHWD) [kg]: A1-A3 0.0798, C2 1.23e-5, C4 3.61, D -0.00566
- Radioactive waste disposed (RWD) [kg]: A1-A3 0.00358, C2 8.98e-8, C4 0.000665, D -0.00129
- Components for re-use (CRU) [kg]: A1-A3 0, C2 0, C4 0
- Materials for recycling (MFR) [kg]: A1-A3 0, C2 0, C4 0
- Materials for energy recovery (MER) [kg]: A1-A3 0, C2 0, C4 0
- Exported electrical energy (EEE) [MJ]: A1-A3 0, C2 0, C4 4.54
- Exported thermal energy (EET) [MJ]: A1-A3 0, C2 0, C4 11.1

## Impact indicators
- Global warming potential (GWP) [kg CO_(2)-Äq.]: A1-A3 8.82, C2 0.00471, C4 5.55, D -1.48
- Depletion potential of the stratospheric ozone layer (ODP) [kg CFC11-Äq.]: A1-A3 2.51e-10, C2 1.13e-14, C4 3.14e-11, D -6.02e-11
- Acidification potential of land and water (AP) [kg SO_(2)-Äq.]: A1-A3 0.0158, C2 2.15e-5, C4 0.00729, D -0.00211
- Eutrophication potential (EP) [kg PO_(4)^(3)-Äq.]: A1-A3 0.00317, C2 5.15e-6, C4 0.000269, D -0.000251
- Formation potential of tropospheric ozone photochemical oxidants (POCP) [kg Ethen-Äq.]: A1-A3 0.00386, C2 -7.24e-6, C4 0.00024, D -0.000195
- Abiotic depletion potential for non fossil resources (ADPE) [kg Sb-Äq.]: A1-A3 2.54e-5, C2 2.21e-10, C4 4.97e-6, D -1.75e-7
- Abiotic depletion potential for fossil resources (ADPF) [MJ]: A1-A3 158, C2 0.0642, C4 13.4, D -19.6

## Use advice
Scope:
This Declaration applies for Wolfin M roofing and sealing membranes with a thickness of 1.5 mm and 2 mm manufactured at the Wächtersbach plant in Germany. The LCA results for Wolfin M 1.5 mm are declared. Section 5 indicates a factor with which the results for Wolfin M 2 mm can be calculated.
System boundary:
Type of EPD: cradle to gate – with options

The Life Cycle Assessment considers the supply of raw materials and energy, raw material transport and product manufacturing (Modules A1-A3) as well as transport after de-construction (Module C2), waste processing (thermal utilisation, Module C4) and use potentials outside the system limit for thermal utilisation (Module D).

## Data sources
- GaBi Database (all versions)
- GaBi database SP25 2014
