# Beton der Druckfestigkeitsklasse C 35/45

Dataset: ILCD process, EPD, average dataset
Geography: DE
Reference year: 2018
Valid until: 2023
Classification: OEKOBAU.DAT: Mineralische Baustoffe / Mörtel und Beton / Beton
Classification: IBUCategories: 02 Bauprodukte / Normal- Leicht- und Porenbeton / Betonbauteile aus Ort- oder Lieferbeton
Method details: Betonbauteile aus Ort- oder Lieferbeton.pdf
Registration number: EPD-IZB-20180098-IBG1-DE
Owner: InformationsZentrum Beton GmbH
Compliance: DIN EN 15804; ISO 14025
Review: Accredited third party review by Institut Bauen und Umwelt e. V.
Amounts: rows without a unit in brackets have none in this file; such an amount is in the reference unit of its flow, which a separate flow dataset defines
copyright: true

## General comment
Beton wird hergestellt durch Mischen von Zement, grober und feiner Gesteinskörnung und Wasser, mit oder ohne Zugabe von Zusatzmitteln und Zusatzstoffen.

Der Frischbeton wird auf der Baustelle oder im Fertigteilwerk in Schalungen eingebracht, verdichtet und erhärtet in der gewünschten Form durch Hydratation des Zements zu einem festen künstlichen Gestein.

Das deklarierte Produkt ist unbewehrter Beton, der als Transportbeton oder als Fertigteil auf die Baustelle geliefert wird. Bei bewehrten Bauteilen ist der Anteil des Bewehrungsstahls gesondert zu berücksichtigen.

Zur Berechnung der Ökobilanz des durchschnittlichen Betons wurden die Ökobilanzen für Transportbeton und für Fertigteilbeton für die betrachtete Druckfestigkeitsklasse auf Grundlage der Produktionsdaten ermittelt. Die Durchschnittsbildung erfolgte gewichtet nach Produktionsvolumen von Transportbeton und Fertigteilbeton für die Druckfestigkeitsklasse C 35/45.

Über die Auswertung der Daten von sowohl Transportbeton- als auch Betonfertigteilherstellern sollen insbesondere Informationen für frühe Planungsphasen, zu deren Zeitpunkt die Entscheidung, ob Transportbeton oder Fertigteile zur Ausführung kommen, noch nicht gefallen ist, kommuniziert werden. Dabei wird der aktuelle Produktionsanteil von Transportbeton und Fertigteilbeton in Deutschland in der Ökobilanzierung für die Druckfestigkeitsklasse C 35/45 statistisch berücksichtigt.

Für die Verwendung von Transportbeton gelten die jeweiligen nationalen Bestimmungen, am Ort der Verwendung, in Deutschland zum Beispiel die /Bauordnungen der Länder/ und die technischen Bestimmungen auf Grund dieser Vorschriften. Das Gleiche gilt für solche Betonfertigteile, für die es keine europäische Produktnorm gibt.

Wird Frischbeton im Fertigteilwerk zu Betonfertigteilen weiterverarbeitet, so gilt für das Inverkehrbringen dieser Produkte in der EU/EFTA (mit Ausnahme der Schweiz) die Verordnung (EU) Nr. 305/2011 /CPR/. Diese Betonfertigteile benötigen eine Leistungserklärung unter Berücksichtigung der entsprechenden harmonisierten Produktnormen /DIN EN 13224/, /DIN EN 13225/, /DIN EN 13747/, /DIN EN 14843/, /DIN EN 14991/, /DIN EN 14992/, /DIN EN 15050/ oder /DIN EN 15258/ und eine CE-Kennzeichnung. Für die Verwendung gelten die jeweiligen nationalen Bestimmungen.

## Technology and included processes
Die dosierten Gesteinskörnungen werden zunächst trocken mit Zement als Bindemittel und weiteren Zusatzstoffen (siehe 2.5 Grundstoffe) vorgemischt. Danach wird die Mischung mit Wasser zu einem plastisch verformbaren Frischbeton gemischt. Dieser wird als Transportbeton ohne Lagerung mit Betonfahrmischern auf die Baustelle transportiert und dort in die vorbereitete Schalung (i. d. R. mit Bewehrung) eingebracht und verdichtet. Im Betonfertigteilwerk wird der Frischbeton über Kübelbahnen und Betonverteiler in die vorbereiteten Schalungen geschüttet und verdichtet. Danach können die Bauteile zur besseren Erhärtung ggf. für einige Stunden wärmebehandelt werden. Nach ca. 12 bis 18 Stunden werden die Teile ausgeschalt und zum weiteren Aushärten auf dem Lagerplatz gelagert, bis sie zur Baustelle transportiert werden. Zur Sicherung der Betonqualität sind heute in allen deutschen Transportbetonwerken Qualitätssicherungssysteme installiert, die sich an den Anforderungen an die werkseigene Produktionskontrolle in /DIN EN 206-1/, /DIN 1045-2/ bzw. der Norm für Qualitätsmanagementsysteme /DIN EN ISO 9001/ orientieren. Die Gütesicherung, Eigen- und Fremdüberwachung der Betonfertigteilwerke erfolgt entsprechend den Vorgaben der Normen (/DIN 1045-4/ bzw. /DIN EN 13369/ und Produktnormen).
Technische Daten:
Beton der Druckfestigkeitsklasse C 35/45 nach /DIN EN 206-1/ hat die folgenden technischen Eigen­schaften:
Deklarierte Einheit:
Die deklarierte Einheit ist 1 m³ unbewehrter Konstruktionsbeton im Hochbau, Tief- oder Ingenieurbau.

Bei bewehrten Bauteilen ist der Anteil des Bewehrungsstahls gesondert zu berücksichtigen.

## Technical purpose
Beton ist im Bauwesen ein vielfältig eingesetzter Baustoff. Er findet Anwendung im Hochbau vor allem für Decken, Wände, Treppen, Fundamente, Stützen und Binder, im Tiefbau bei erdberührten Bauteilen, Fundamenten, Bodenplatten, Bohrpfählen und im Ingenieurbau z. B. bei Brücken.

## Reference product
- 1 m³ Konstruktionsbeton C35/45: 1

## Inputs
- Erneuerbare Primärenergie als Energieträger (PERE) [MJ]: A1-A3 229, A4 8.3, A5 5.89, B1 0, C1 2.8, C2 11, C3 20.7, D -94.1
- Erneuerbare Primärenergie zur stofflichen Nutzung (PERM) [MJ]: A1-A3 0, A4 0, A5 0, B1 0, C1 0, C2 0, C3 0, D 0
- Total erneuerbare Primärenergie (PERT) [MJ]: A1-A3 229, A4 8.3, A5 5.89, B1 0, C1 2.8, C2 11, C3 20.7, D -94.1
- Nicht-erneuerbare Primärenergie als Energieträger (PENRE) [MJ]: A1-A3 1200, A4 124.3, A5 13.66, B1 0, C1 41.9, C2 163, C3 78.7, D -279
- Nicht-erneuerbare Primärenergie zur stofflichen Nutzung (PENRM) [MJ]: A1-A3 0, A4 0, A5 0, B1 0, C1 0, C2 0, C3 0, D 0
- Total nicht erneuerbare Primärenergie (PENRT) [MJ]: A1-A3 1200, A4 124.3, A5 13.66, B1 0, C1 41.9, C2 163, C3 78.7, D -279
- Einsatz von Sekundärstoffen (SM) [kg]: A1-A3 21, A4 0, A5 0, B1 0, C1 0, C2 0, C3 0, D 2400
- Erneuerbare Sekundärbrennstoffe (RSF) [MJ]: A1-A3 233, A4 0, A5 0, B1 0, C1 0, C2 0, C3 0, D 0
- Nicht erneuerbare Sekundärbrennstoffe (NRSF) [MJ]: A1-A3 443, A4 0, A5 0, B1 0, C1 0, C2 0, C3 0, D 0
- Einsatz von Süßwasserressourcen (FW) [m^3]: A1-A3 0.8, A4 0.016, A5 0, B1 0, C1 0, C2 0, C3 0, D -1.28

## Outputs
- Gefährlicher Abfall zur Deponie (HWD) [kg]: A1-A3 0.000336, A4 7.79e-6, A5 1.29e-8, B1 0, C1 2.62e-6, C2 1.02e-5, C3 2.3e-6, D -3.58e-6
- Entsorgter nicht gefährlicher Abfall (NHWD) [kg]: A1-A3 41.8, A4 0.00952, A5 0.0129, B1 0, C1 0.00321, C2 0.0125, C3 0.043, D -46.5
- Entsorgter radioaktiver Abfall (RWD) [kg]: A1-A3 0.047, A4 0.000188, A5 0.00126, B1 0, C1 6.33e-5, C2 0.000242, C3 0.04, D -0.0207
- Komponenten für die Wiederverwendung (CRU) [kg]: A1-A3 0, A4 0, A5 0, B1 0, C1 0, C2 0, C3 0, D 0
- Stoffe zum Recycling (MFR) [kg]: A1-A3 0, A4 0, A5 0, B1 0, C1 0, C2 0, C3 2400, D 0
- Stoffe für die Energierückgewinnung (MER) [kg]: A1-A3 0, A4 0, A5 0, B1 0, C1 0, C2 0, C3 0, D 0
- Exportierte elektrische Energie (EEE) [MJ]: A1-A3 0, A4 0, A5 0, B1 0, C1 0, C2 0, C3 0, D 0
- Exportierte thermische Energie (EET) [MJ]: A1-A3 0, A4 0, A5 0, B1 0, C1 0, C2 0, C3 0, D 0

## Impact indicators
- Globales Erwärmungspotenzial (GWP) [kg CO_(2)-Äq.]: A1-A3 244, A4 9.1, A5 1.08, B1 -10, C1 3.1, C2 12, C3 6.01, D -21.4
- Abbau Potential der stratosphärischen Ozonschicht (ODP) [kg CFC11-Äq.]: A1-A3 6.81e-8, A4 1.81e-12, A5 4.71e-12, B1 0, C1 6.09e-13, C2 2.37e-12, C3 1.31e-11, D -1.32e-10
- Versauerungspotenzial von Boden und Wasser (AP) [kg SO_(2)-Äq.]: A1-A3 0.348, A4 0.0229, A5 0.0016, B1 0, C1 0.03, C2 0.0321, C3 0.0113, D -0.0473
- Eutrophierungspotenzial (EP) [kg PO_(4)^(3)-Äq.]: A1-A3 0.0655, A4 0.00542, A5 0.000257, B1 0, C1 0.00653, C2 0.00765, C3 0.00217, D -0.00886
- Bildungspotential für troposphärisches Ozon (POCP) [kg Ethen-Äq.]: A1-A3 0.0298, A4 -0.00767, A5 0.000111, B1 0, C1 0.00318, C2 -0.0111, C3 0.000974, D -0.00279
- Potenzial für den abiotischen Abbau nicht fossiler Ressourcen (ADPE) [kg Sb-Äq.]: A1-A3 0.000822, A4 9.76e-7, A5 5.36e-7, B1 0, C1 3.28e-7, C2 1.28e-6, C3 1.97e-6, D -8.6e-6
- Potenzial für den abiotischen Abbau fossiler Brennstoffe (ADPF) [MJ]: A1-A3 1080, A4 123.8, A5 10.5, B1 0, C1 41.7, C2 163, C3 68.4, D -227

## Use advice
Gültigkeitsbereich:
Dieses Dokument bezieht sich auf durchschnittliche Zusammensetzungen für Beton in Deutschland zur Verwendung für Bauteile des üblichen Hochbaus, Tief- und Ingenieurbau als Transportbeton oder Beton in Fertigteilen.

Es beruht auf Daten, die für das Jahr 2016 von den Mitgliedern des Bundesverbandes der Deutschen Transportbetonindustrie e.V. und der Forschungsvereinigung der deutschen Beton- und Fertigteilindustrie e.V. erhoben wurden.
Systemgrenze:
Typ der EPD: Wiege-bis-Werkstor mit Optionen. Die gewählten Systemgrenzen umfassen die Herstellung des Betons einschließlich der Rohstoffgewinnung bis zum Einbau des fertigen Produktes.

Modul A1: Gewinnung und Aufbereitung der Betonausgangsstoffe

Modul A2: Transport der Rohstoffe zum Transportbeton-/Fertigteilwerk und interne Transporte

Modul A3: Betonherstellung im Werk (im Fertigteilwerk: inkl. energetische Aufwendungen für Verdichtung und ggf. Wärmebehandlung)

Modul A4: Transport zur Baustelle. Es wird ein gewichteter Mittelwert für den Transport zur Baustelle ausgewiesen. Falls Transportentfernungen im konkreten Projekt bekannt sind, sollten diese berücksichtigt werden.

Modul A5: Einbau von Transportbeton/Fertigteilen auf der Baustelle. Für die Umweltwirkungen werden die konservativeren Werte aus Einbau Transportbeton und Einbau Fertigteilen angegeben

Modul B1: Carbonatisierung während der Nutzungsdauer

Modul B2-B7: Für Betonbauteile sind Instand­haltungs- und Reparaturmaßnahmen während der Referenznutzungsdauer i. d. R. nicht erforderlich, so dass in diesen Modulen keine Umweltlasten anfallen.

Modul C1: Rückbau/Abbruch von Betongebäuden/- bauteilen

Modul C2: Transport von Betonabbruch zur Aufbereitung

Modul C3: Brechen von Beton

Modul D: Gutschrift für Verwendung von Betonabbruch

## Data sources
- Beton der Druckfestigkeitsklasse C 35/45.pdf
- GaBi Database (all versions)
- GaBi database SP35 2018
