# Artificial stone slab (epoxy-resin bound)

Dataset: ILCD process, EPD, generic dataset
Geography: DE
Reference year: 2018
Valid until: 2022
Classification: oekobau.dat: Mineralische Baustoffe / Steine und Elemente / Kunststein
Owner: thinkstep
Compliance: DIN EN 15804
Review: Dependent internal review by thinkstep, IABP-GaBi, IBP-GaBi; Independent external review by GaBi user forum, GaBi bug forum, GaBi user community
Amounts: rows without a unit in brackets have none in this file; such an amount is in the reference unit of its flow, which a separate flow dataset defines
copyright: true

## General comment
This data set has been modeled according to the European Standard EN 15804 for Sustainable Building. Results are depicted in modules that allow the structured expression of results over the entire life cycle.

## Geography
The data set represents the country specific situation in Germany, focusing on the main technologies, the region specific characteristics and / or import statistics.

## Time period
annual average

## Technology and included processes
For the production of artificial stone slab, stone granulate is mixed with a binding agent (here epoxy resin) and cured. After curing, the material is cutted and the surface is treated (grinding/polishing). In this dataset, a market mix was modeled, with 50% of the cast stone originating from China and 50% from Europe. The life cycle assessment is mainly dominated by the required energy (sawing, grinding, etc.) and by the use of the binding agent.

Background system:
Electricity: Electricity from renewable and non- renewable powerplants is modelled so that it represents a countrys specific consumption mix including transmission / distribution losses, own consumption, imports, emissions and efficiency standards, and energy carrier properties. Several factors are taken into account. (1) Energy carrier production - The exploration, mining / production, processing, and transportation of energy carrier supply chains are modelled for each country. The models account for differences among countries in production and processing, including crude oil production technologies, flaring rates, production efficiencies, emissions, etc. (2) Energy carrier supply - Each countrys specific energy carrier supply is modelled, taking into account domestic supply versus imports from abroad. Energy carrier properties (e.g. carbon and energy content), which can vary depending from where an energy carrier is sourced, are adjusted accordingly. (3) Power plants - Models are created to represent energy carrier-specific power plants and electricity generation facilities specific to different renewable energy resources. Energy carrier production and supply models are used to represent power plant inputs. Combined heat and power (CHP) plants are also considered. (4) Electricity grid - Models representing the electricity generation facilities are combined into a larger model that reflects a countrys consumption mix. The larger model accounts for a countrys production mix, internal consumption (e.g. pumped storage for hydro power), transmission / distribution losses, and imported electricity. The country model is also adjusted according to national power plant emission and efficiency standards, as well as the countrys share of electricity plants versus CHP facilities.
Thermal energy, process steam: The thermal energy and process steam supply is modelled to reflect each countrys emission standards and typical energy carriers (e.g., coal, natural gas, etc.) Both thermal energy and process steam are assumed to be produced at heat plants. Thermal energy datasets assume energy carrier inputs are converted to thermal energy with 100% efficiency; process steam datasets assume conversion efficiencies of 85%, 90% to 95%. The energy carriers used for the generation of thermal energy and process steam are modelled according to each countrys import situation (see electricity above).
Transportation: All relevant and known transportation processes are included. Ocean-going and inland ship transport as well as rail, truck and pipeline transport of bulk commodities are considered.
Energy carriers: The energy carriers and their respective properties are modelled according to the specific supply situation (see electricity above).
Refinery products: Diesel fuel, gasoline, technical gases, fuel oils, lubricants and residues such as bitumen are modelled with a parameterised country-specific refinery model. The refinery model aims to represent each countrys refining processes (e.g. emissions levels, internal energy consumption, etc.), as well as the countrys product output spectrum, which can vary significantly among countries. The supply of crude oil is likewise modelled according to the country-specific situation and accounts for differences in resource properties (e.g., crude oil energy content).

## Technical purpose
Artificial stone slab is mainly used as floor and wall covering as well as for the production of kitchen worktops or window sills.

## Safety margin
20 %. Product system depicted except for a few missing processes / flows. Technological, temporal and geographic representativeness partly given.

## Reference product
- Artificial stone slab (epoxy-resin bound) [m2]: 1

## Inputs
- Use of renewable primary energy (PERE) [MJ]: A1-A3 74.4308, A4 0.714779, C1 0.0294556, C2 0.113318, C3 0.68384, D -0.406517
- Primary energy resources used as raw materials (PERM) [MJ]: A1-A3 0, A4 0, C1 0, C2 0, C3 0, D 0
- Total use of renewable primary energy resources (PERT) [MJ]: A1-A3 74.4308, A4 0.714779, C1 0.0294556, C2 0.113318, C3 0.68384, D -0.406517
- Use of non-renewable primary energy (PENRE) [MJ]: A1-A3 507.096, A4 214.912, C1 0.50597, C2 1.94652, C3 6.33534, D -1.42529
- Non-renewable primary energy resources used as raw materials (PENRM) [MJ]: A1-A3 0, A4 0, C1 0, C2 0, C3 0, D 0
- Total use of non-renewable primary energy resources (PENRT) [MJ]: A1-A3 507.096, A4 214.912, C1 0.50597, C2 1.94652, C3 6.33534, D -1.42529
- Input of secondary material (SM) [kg]: A1-A3 0, A4 0, C1 0, C2 0, C3 0, D 0
- Use of renewable secondary fuels (RSF) [MJ]: A1-A3 0, A4 0, C1 0, C2 0, C3 0, D 0
- Use of non renewable secondary fuels (NRSF) [MJ]: A1-A3 0, A4 0, C1 0, C2 0, C3 0, D 0
- Use of net fresh water (FW) [m3]: A1-A3 0.174471, A4 0.00202661, C1 2.63799e-5, C2 0.000101486, C3 0.00162547, D -0.000263627

## Outputs
- Hazardous waste disposed (HWD) [kg]: A1-A3 2.58408e-7, A4 2.16501e-8, C1 1.89076e-8, C2 7.27393e-8, C3 1.14757e-7, D -2.68644e-8
- Non-hazardous waste disposed (NHWD) [kg]: A1-A3 6.51653, A4 0.0149051, C1 8.88066e-5, C2 0.000341648, C3 16.0993, D -0.837777
- Radioactive waste disposed (RWD) [kg]: A1-A3 0.0161281, A4 0.000156426, C1 5.32683e-7, C2 2.04928e-6, C3 6.10567e-5, D -5.30688e-5
- Components for re-use (CRU) [kg]: A1-A3 0, A4 0, C1 0, C2 0, C3 0, D 0
- Materials for Recycling (MFR) [kg]: A1-A3 0, A4 0, C1 0, C2 0, C3 48.2474, D 0
- Material for Energy Recovery (MER) [kg]: A1-A3 0, A4 0, C1 0, C2 0, C3 0, D 0
- Exported electrical energy (EEE) [MJ]: A1-A3 0, A4 0, C1 0, C2 0, C3 0, D 0
- Exported thermal energy (EET) [MJ]: A1-A3 0, A4 0, C1 0, C2 0, C3 0, D 0

## Impact indicators
- Global warming potential (GWP) [kg CO2 eq.]: A1-A3 28.3505, A4 15.9759, C1 0.0373813, C2 0.144823, C3 0.381535, D -0.106807
- Ozone Depletion Potential (ODP) [kg R11 eq.]: A1-A3 2.80518e-13, A4 1.9578e-15, C1 1.24606e-17, C2 4.79371e-17, C3 2.16128e-15, D -2.06137e-15
- Acidification potential (AP) [kg SO2 eq.]: A1-A3 0.0538221, A4 0.274915, C1 0.000130384, C2 0.000292527, C3 0.00246741, D -0.000252222
- Eutrophication potential (EP) [kg Phosphate eq.]: A1-A3 0.00674525, A4 0.0310737, C1 3.07635e-5, C2 6.95418e-5, C3 0.000419839, D -4.90783e-5
- Photochemical Ozone Creation Potential (POCP) [kg Ethene eq.]: A1-A3 0.00625173, A4 0.00800375, C1 1.28833e-5, C2 -8.7641e-5, C3 0.00022392, D 2.31853e-5
- Abiotic depletion potential for non fossil resources (ADPE) [kg Sb eq.]: A1-A3 3.86339e-6, A4 4.82758e-7, C1 3.16784e-9, C2 1.2187e-8, C3 2.05015e-7, D -2.37379e-8
- Abiotic depletion potential for fossil resources (ADPF) [MJ]: A1-A3 466.396, A4 214.516, C1 0.504609, C2 1.94128, C3 6.18111, D -1.29131

## Use advice
This dataset refers to the production of 1 m² of artificial stone slab with a thickness of 2 cm. The surface weight is 52 kg/m². The data set can be used approximately for the estimation of other stone thicknesses.

The data set represents a cradle to gate inventory. It can be used to characterise the supply chain situation of the respective commodity in a representative manner. Combination with individual unit processes using this commodity enables the generation of user-specific (product) LCAs.

## Data sources
- GaBi databases
- GaBi Database Edition 2020, SP40
- GaBi database (all versions)
