# STEICO LVL

Dataset: ILCD process, EPD, specific dataset
Geography: RER
Reference year: 2019
Valid until: 2024
Classification: OEKOBAU.DAT: Holz / Holzwerkstoffe / Laminated Veneer Lumber (LVL)
Classification: IBUCategories: 02 Bauprodukte / Produkte aus Bauholz / Vollholzprodukte
Method details: Vollholzprodukte.pdf
Registration number: EPD-STE-20190005-IBC1-DE
Owner: STEICO SE
Compliance: DIN EN 15804; ISO 14025
Review: Accredited third party review by Institut Bauen und Umwelt e. V.
Amounts: rows without a unit in brackets have none in this file; such an amount is in the reference unit of its flow, which a separate flow dataset defines
copyright: true

## General comment
STEICO LVL laminated veneer lumber as STEICO LVL R, STEICO LVL RS, STEICO LVL RL and STEICO LVL X variants are industrially manufactured products for supporting and non-supporting constructions. They comprise several layers of conifer veneers which are glued together. The natural imperfections in the wood, e.g. knots, are reduced by the production process to the individual veneer layer and distributed evenly across the cross-section, giving rise to an almost homogeneous cross-section of high strength and rigidity. When the veneers are dried, the result is a product with low wood moisture and practically no moisture gradients in the cross-section.

In the case of STEICO LVL R, STEICO LVL RL and STEICO LVL RS, all veneer layers are glued together longitudinally. STEICO LVL X features some veneer layers glued together crosswise.

The STEICO LVL R, STEICO LVL RL and STEICO LVL RS products differ in terms of their rigidity and strength properties.

## Technology and included processes
STEICO LVL Furnierschichthölzer in den Varianten STEICO LVL R, STEICO LVL RS, STEICO LVL RL und STEICO LVL X sind industriell gefertigte Produkte für tragende und nichttragende Konstruktionen. Sie bestehen aus mehreren Lagen miteinander verklebter Nadelholzfurniere. Die natürlichen Fehlstellen des Holzes wie zum Beispiel Äste werden durch den Produktionsprozess auf das einzelne Furnierblatt reduziert und gleichmäßig über den Querschnitt verteilt; es entsteht ein annähernd homogener Querschnitt mit hohen Festigkeiten und Steifigkeiten. Durch die Trocknung der Furniere entsteht ein Produkt mit niedriger Holzfeuchte und nahezu keinem Feuchtegradienten im Querschnitt. Bei den Produkten STEICO LVL R, STEICO LVL RL und STEICO LVL RS sind alle Furnierlagen längsorientiert zueinander verklebt. Bei STEICO LVL X sind einige Furnierlagen kreuzweise zueinander verklebt. Die Produkte STEICO LVL R, STEICO LVL RL und STEICO LVL RS unterscheiden sich in den Steifigkeits- und Festigkeitseigenschaften.
Technical data:
The technical data for STEICO LVL laminated veneer lumber in the STEICO LVL R, STEICO LVL RL, STEICO LVL RS and STEICO LVL X variants is available in the respectively valid declarations of Performance.
Declared unit:
The declared unit of the product under ecological review is one cubic metre of laminated veneer lumber taking consideration of the mix of adhesives used as outlined in 2.5 and a mass of 550 kg/m³ with wood moisture of 9.15%, which complies with a water content of approx. 8%. Adhesives account for 4.56%. All details on adhesives used were calculated on the basis of specific data.

## Technical purpose
STEICO LVL laminated veneer lumber products are used as supporting and non-supporting components in the construction of buildings, bridges and formwork. The products are also used as supporting or non-supporting components in furniture construction, trade fair construction or property construction.

## Reference product
- 1 m³ STEICO LVL: 1

## Inputs
- Renewable primary energy as energy carrier (PERE) [MJ]: A1 32.2989, A2 12.1059, A3 5789.76, A5 128.563, C2 0.487092, C3 27.0522, D -1669.86
- Renewable primary energy resources as material utilization (PERM) [MJ]: A1 9267.81, A2 0, A3 127.613, A5 -127.613, C2 0, C3 -9267.81, D 0
- Total use of renewable primary energy resources (PERT) [MJ]: A1 9300.11, A2 12.1059, A3 5917.37, A5 0.950146, C2 0.487092, C3 -9240.76, D -1669.86
- Non renewable primary energy as energy carrier (PENRE) [MJ]: A1 1299.06, A2 183.237, A3 3046.57, A5 95.9648, C2 8.8312, C3 57.7777, D -7158.84
- Non renewable primary energy as material utilization (PENRM) [MJ]: A1 250.8, A2 0, A3 90.576, A5 -90.576, C2 0, C3 -250.8, D 0
- Total use of non renewable primary energy resources (PENRT) [MJ]: A1 1549.86, A2 183.237, A3 3137.14, A5 5.38881, C2 8.8312, C3 -193.022, D -7158.84
- Use of secondary material (SM) [kg]: A1 0, A2 0, A3 0, A5 0, C2 0, C3 0, D 0
- Use of renewable secondary fuels (RSF) [MJ]: A1 0, A2 0, A3 0, A5 0, C2 0, C3 0, D 9267.81
- Use of non renewable secondary fuels (NRSF) [MJ]: A1 0, A2 0, A3 0, A5 0, C2 0, C3 0, D 250.8
- Use of net fresh water (FW) [m^3]: A1 0.803148, A2 0.0147614, A3 2.53495, A5 0.0446048, C2 0.000897612, C3 0.0171783, D 1.15325

## Outputs
- Hazardous waste disposed (HWD) [kg]: A1 0.00144483, A2 1.16298e-5, A3 1.54439e-5, A5 2.21096e-8, C2 5.10628e-7, C3 4.40648e-8, D -4.01845e-6
- Non hazardous waste disposed (NHWD) [kg]: A1 0.170633, A2 0.0138474, A3 4.6806, A5 0.609974, C2 0.000739789, C3 0.0593649, D 3.82406
- Radioactive waste disposed (RWD) [kg]: A1 0.0073154, A2 0.000224389, A3 0.0285281, A5 0.000227675, C2 1.20862e-5, C3 0.00571594, D -0.358264
- Components for re-use (CRU) [kg]: A1 0, A2 0, A3 0, A5 0, C2 0, C3 0, D 0
- Materials for recycling (MFR) [kg]: A1 0, A2 0, A3 0, A5 0, C2 0, C3 0, D 0
- Materials for energy recovery (MER) [kg]: A1 0, A2 0, A3 0, A5 0, C2 0, C3 550, D 0
- Exported electrical energy (EEE) [MJ]: A1 0, A2 0, A3 0, A5 28.5877, C2 0, C3 0, D 0
- Exported thermal energy (EET) [MJ]: A1 0, A2 0, A3 0, A5 59.4734, C2 0, C3 0, D 0

## Impact indicators
- Global warming potential (GWP) [kg CO_(2)-Äq.]: A1 -829.39, A2 13.7567, A3 284.047, A5 18.6123, C2 0.639919, C3 885.516, D -443.223
- Depletion potential of the stratospheric ozone layer (ODP) [kg CFC11-Äq.]: A1 2.53014e-8, A2 2.95023e-13, A3 1.86572e-8, A5 2.80231e-13, C2 1.76683e-14, C3 6.57922e-12, D -4.11813e-10
- Acidification potential of land and water (AP) [kg SO_(2)-Äq.]: A1 0.132876, A2 0.0557978, A3 1.26267, A5 0.0029421, C2 0.00270068, C3 0.00680786, D -0.45502
- Eutrophication potential (EP) [kg PO_(4)^(3)-Äq.]: A1 0.0249418, A2 0.0142652, A3 0.156506, A5 0.000443579, C2 0.000692638, C3 0.0011088, D -0.0715278
- Formation potential of tropospheric ozone photochemical oxidants (POCP) [kg Ethen-Äq.]: A1 0.021736, A2 -0.0236623, A3 0.170105, A5 0.000132576, C2 -0.001124, C3 0.000451891, D -0.0404132
- Abiotic depletion potential for non fossil resources (ADPE) [kg Sb-Äq.]: A1 9.78409e-6, A2 1.38237e-6, A3 3.68304e-5, A5 6.06438e-7, C2 5.30933e-8, C3 3.04835e-6, D -0.000186874
- Abiotic depletion potential for fossil resources (ADPF) [MJ]: A1 1530.73, A2 182.661, A3 2975.23, A5 4.81402, C2 8.80018, C3 43.3416, D -6378.42

## Use advice
Scope:
This Declaration applies for STEICO LVL laminated veneer lumber which is manufactured in the following variants

STEICO LVL R
STEICO LVL RS
STEICO LVL RL
STEICO LVL XManufacturing plant:

STEICO Sp.z o.o.

Ul. Mickiewicza 10

83-262 Czarna Woda

Polen
System boundary:
The Declaration complies with an EPD "from cradle to plant gate, with options". It includes the production stage, i.e. from provision of the raw materials through to production (cradle to gate, Modules A1 to A3), Module A5, and parts of the end-of-life stage (Modules C2 and C3). It also contains an analysis of the potential benefits and loads over and beyond the product's entire life cycle (Module D).

Module A1 analyses the provision of wood from forestry resources and the provision of adhesives. Transport of these substances is considered in Module A2. Module A3 comprises the provision of fuels, resources and electricity as well as the manufacturing processes on site. These essentially involve debarking, peeling, drying, adhesion, planing and profiling processes as well as packing the products. Module A5 exclusively covers the disposal of product packaging which includes the disposal of biogenic carbon and primary energy (PERM and PENRM).

Module C2 considers transport to the disposal company and Module C3 is concerned with preparing and sorting waste wood. In accordance with /EN 16485/, Module C3 also includes as outflows the CO2 equivalents of the carbon inherent in the wood product as well as the renewable and non-renewable primary energy (PERM and PENRM) contained in the product.

Module D analyses the thermal utilisation of the product at its end of life as well as the ensuing potential benefits and loads in the form of a system Extension.

## Data sources
- STEICO LVL.pdf
- GaBi Database (all versions)
- GaBi database SP35 2018
