# Lime-cement plaster

Dataset: ILCD process, EPD, generic dataset
Geography: DE
Reference year: 2021
Valid until: 2022
Classification: oekobau.dat: Mineralische Baustoffe / Mörtel und Beton / Putz und Putzmörtel
Owner: Sphera Solutions GmbH
Compliance: EN 15804+A2
Review: Dependent internal review by Sphera Solutions GmbH; Independent external review by GaBi user forum
Amounts: rows without a unit in brackets have none in this file; such an amount is in the reference unit of its flow, which a separate flow dataset defines
copyright: true
licenseType: Free of charge for all users and uses
accessRestrictions: The license conditions as stated on https://www.oekobaudat.de/ apply.
accessRestrictions: Es gelten die Lizenzbedingungen wie sie auf https://www.oekobaudat.de/ genannt sind.

## General comment
This data set has been modeled according to the European Standard EN 15804+A2 for Sustainable Building. Results are depicted in modules that allow the structured expression of results over the entire life cycle.

## Geography
The data set represents the country specific situation in Germany, focusing on the main technologies, the region specific characteristics and / or import statistics.

## Time period
Annual average

## Technology and included processes
A dry mortar was assessed (addition of water and mixing takes place at the construction site). The main raw materials are sand, air lime and small amounts of aggregates for better processability. The upstream chain of air lime is dominating the LCA.

In the disposal phase, a manual dismantling (no loads) is assumed in module C1. The transport in module C2 to the landfill site takes place with a truck (50km). In C3, if relevant, a packaging with PE foil is taken into account (for example, for mineral fiber products. 0.0125 kg foil per kg of discarded material). In module C4 the average landfill emissions corresponding to the product (reference country Germany) are shown. The use of landfill gas is not taken into account.

## Technical purpose
Normal plaster without special properties for the production of interior- and exterior plaster.

## Safety margin
10 %. Product system almost completely covered. Good technological, temporal and geographic representativeness.

## Reference product
- Lime-cement plaster: 1

## Inputs
- Use of renewable primary energy as energy carrier (PERE) [MJ]: A1-A3 1178.99, C2 4.50634, C4 53.6727
- Use of renewable primary energy resources used as raw materials (PERM) [MJ]: A1-A3 0, C2 0, C4 0
- Total use of renewable primary energy (PERT) [MJ]: A1-A3 1178.99, C2 4.50634, C4 53.6727
- Use of non renewable primary energy as energy carrier (PENRE) [MJ]: A1-A3 2079.81, C2 77.6444, C4 397.423
- Use of non renewable primary energy resources used as raw materials (PENRM) [MJ]: A1-A3 0, C2 0, C4 0
- Total use of non renewable primary energy resource (PENRT) [MJ]: A1-A3 2079.81, C2 77.6444, C4 397.423
- Use of secondary material (SM) [kg]: A1-A3 0, C2 0, C4 0
- Use of renewable secondary fuels (SF) [MJ]: A1-A3 0, C2 0, C4 0
- Use of non renewable secondary fuels (NRSF) [MJ]: A1-A3 0, C2 0, C4 0
- Net use of fresh water (FW) [m3]: A1-A3 0.680403, C2 0.00400501, C4 0.097894

## Outputs
- Hazardous waste disposed (HWD) [kg]: A1-A3 7.92352e-7, C2 3.24529e-9, C4 4.22816e-8
- Non harzardous waste disposed (NHWD) [kg]: A1-A3 22.6302, C2 0.0125336, C4 1981.95
- Radioactive waste disposed (RWD) [kg]: A1-A3 0.0998761, C2 7.451e-5, C4 0.0041027
- Components for re-use (CRU) [kg]: A1-A3 0, C2 0, C4 0
- Materials for recycling (MFR) [kg]: A1-A3 0, C2 0, C4 0
- Materials for energy recovery (MER) [kg]: A1-A3 0, C2 0, C4 0
- Exported electrical energy (EEE) [MJ]: A1-A3 0, C2 0, C4 0
- Exported thermal energy (EET) [MJ]: A1-A3 0, C2 0, C4 0

## Impact indicators
- Global Warming Potential - total (GWP-total) [kg CO2 eq.]: A1-A3 354.912, C2 5.90944, C4 38.4995
- Global Warming Potential - fossil fuels (GWP-fossil) [kg CO2 eq.]: A1-A3 363.801, C2 5.86917, C4 29.9619
- Global Warming Potential - biogenic (GWP-biogenic) [kg CO2 eq.]: A1-A3 -9.24103, C2 0.00264707, C4 8.44948
- Global Warming Potential - land use and land use change (GWP-luluc) [kg CO2 eq.]: A1-A3 0.352433, C2 0.0376195, C4 0.0880897
- Depletion potenzial of the stratospheric ozone layer (ODP) [kg CFC-11 eq.]: A1-A3 2.91123e-12, C2 1.49882e-15, C4 1.17564e-13
- Acidifcation potential, Accumulated Exceedance (AP) [Mole of H+ eq.]: A1-A3 0.522891, C2 0.0184034, C4 0.21327
- Eutrophication potential - freshwater (EP-freshwater) [kg P eq.]: A1-A3 0.00211631, C2 1.2047e-5, C4 5.0428e-5
- Eutrophication potential - marine (EP-marine) [kg N eq.]: A1-A3 0.190196, C2 0.00859128, C4 0.0553663
- Eutrophication potential - terrestrial (EP-terrestrial) [Mole of N eq.]: A1-A3 2.15666, C2 0.0959288, C4 0.608293
- Photochemical Ozone Creation Potential (POCP) [kg NMVOC eq.]: A1-A3 0.428225, C2 0.0165678, C4 0.167765
- Abiotic depletion potential - non-fossil resources (ADPE) [kg Sb eq.]: A1-A3 0.00146601, C2 5.09535e-7, C4 2.83995e-6
- Abiotic depletion potential - fossil resources (ADPF) [MJ]: A1-A3 2078.6, C2 77.6412, C4 397.213
- Water (user) deprivation potential (WDP) [m³ world equiv.]: A1-A3 9.99134, C2 0.0227708, C4 3.20656

## Use advice
This data set refers to the production of 1 m³ lime cement plaster. The dry bulk density is 1800 kg/m³. The thermal conductivity is 0.8 - 0.9 W/mK. The data set can be used approximately for the estimation of lime cement plaster with a density of 1600 - 1800 kg/m³. It can be used for the estimation of fresh mortars in the above mentioned density range, if the dry bulk density of the fresh mortar is used.

The data set represents a cradle to gate inventory. It can be used to characterise the supply chain situation of the respective commodity in a representative manner. Combination with individual unit processes using this commodity enables the generation of user-specific (product) LCAs.

## Data sources
- GaBi databases
- Documentation of data quality management
- GaBi Database Edition 2021, CUP2021.01
- GaBi database (all versions)
