# Floor plates

Dataset: ILCD process, EPD, average dataset
Geography: DE
Reference year: 2020
Valid until: 2025
Classification: OEKOBAU.DAT: Mineralische Baustoffe / Steine und Elemente / Betonfertigteile und Betonwaren
Classification: IBUCategories: 02 Building products / Normal/lightweight/autoclaved aerated concrete products / Pre-cast concrete components
Method details: Pre-cast concrete components.pdf
Generated by: myclimate Deutschland gGmbH
Registration number: EPD-THO-20200087-IBD1-EN
Owner: thomas gruppe - Geschäftsfeld Betonbauteile
Compliance: DIN EN 15804; ISO 14025
Review: Accredited third party review by Institut Bauen und Umwelt e. V.
Amounts: rows without a unit in brackets have none in this file; such an amount is in the reference unit of its flow, which a separate flow dataset defines
copyright: true
licenseType: Free of charge for all users and uses
accessRestrictions: None

## General comment
Floor plates are manufactured in the automatic circulation systems of the precasted concrete plants. Floor plates consist of prefabricated reinforced concrete slabs and are supplemented by in-situ concrete. They are used as ceiling elements in prefabricated buildings and differ in their size.

## Technology and included processes
Shaping The preliminary products such as aggregates, cement and reinforced steel for the floor plates are delivered. The concrete is mixed together according to predefined recipes. Before casting the floor plates, the formwork is created with the desired dimensions. The reinforcing bars for the reinforced concrete slabs are attached and then filled with concrete. Curing and Outplacement The floor plates are cured for 8-10 hours in drying chambers. After curing, they can be removed and can be loaded. The standard strength is reached after 28 days after production.
Technical data:
The following technical data apply to floor plates. The standard EN 13747:2010, applies.
Declared unit:
The declaration applies to 1 t of floor plates.

Floor plates vary in volume, mass and slightly in composition. The average calculation is based on the average annual production.

## Technical purpose
Floor plates of the thomas group from the concrete components business area are used in prefabricated buildings. They are applicable as load-bearing ceilings, storey ceilings of buildings, parking and traffic areas as well as covers.

## Reference product
- floor plates (): 1000

## Inputs
- Renewable primary energy as energy carrier (PERE) [MJ]: A1-A3 222, C1 0.0535, C2 1.61, C4 26.6
- Renewable primary energy resources as material utilization (PERM) [MJ]: A1-A3 0, C1 0, C2 0, C4 0
- Total use of renewable primary energy resources (PERT) [MJ]: A1-A3 222, C1 0.0535, C2 1.61, C4 26.6
- Non renewable primary energy as energy carrier (PENRE) [MJ]: A1-A3 1010, C1 11.9, C2 25.8, C4 209
- Non renewable primary energy as material utilization (PENRM) [MJ]: A1-A3 0, C1 0, C2 0, C4 0
- Total use of non renewable primary energy resources (PENRT) [MJ]: A1-A3 1010, C1 11.9, C2 25.8, C4 209
- Use of secondary material (SM) [kg]: C1 0, C2 0, C4 0
- Use of renewable secondary fuels (RSF) [MJ]: A1-A3 0, C1 0, C2 0, C4 0
- Use of non renewable secondary fuels (NRSF) [MJ]: A1-A3 0, C1 0, C2 0, C4 0
- Use of net fresh water (FW) [m^3]: A1-A3 0.36, C1 8.45e-5, C2 0.00182, C4 0.0526

## Outputs
- Hazardous waste disposed (HWD) [kg]: A1-A3 0.00335, C1 1.69e-9, C2 1.46e-6, C4 3.56e-6
- Non hazardous waste disposed (NHWD) [kg]: A1-A3 25.8, C1 0.00151, C2 0.00183, C4 971
- Radioactive waste disposed (RWD) [kg]: A1-A3 0.0304, C1 1.18e-5, C2 3.9e-5, C4 0.00277
- Components for re-use (CRU) [kg]: A1-A3 0, C1 0, C2 0, C4 0
- Materials for recycling (MFR) [kg]: A1-A3 0.228, C1 0, C2 30, C4 0
- Materials for energy recovery (MER) [kg]: A1-A3 0, C1 0, C2 0, C4 0
- Exported electrical energy (EEE) [MJ]: A1-A3 0, C1 0, C2 0, C4 0
- Exported thermal energy (EET) [MJ]: A1-A3 0, C1 0, C2 0, C4 0

## Impact indicators
- Global warming potential (GWP) [kg CO_(2)-Äq.]: A1-A3 164, C1 0.863, C2 1.92, C4 14.4
- Depletion potential of the stratospheric ozone layer (ODP) [kg CFC11-Äq.]: A1-A3 5.16e-7, C1 2.84e-16, C2 9.11e-16, C4 8.47e-14
- Acidification potential of land and water (AP) [kg SO_(2)-Äq.]: A1-A3 0.189, C1 0.000606, C2 0.00433, C4 0.0865
- Eutrophication potential (EP) [kg PO_(4)^(3)-Äq.]: A1-A3 0.0459, C1 8.69e-5, C2 0.00106, C4 0.00981
- Formation potential of tropospheric ozone photochemical oxidants (POCP) [kg Ethen-Äq.]: A1-A3 0.0192, C1 9.06e-5, C2 -0.00134, C4 0.00664
- Abiotic depletion potential for non fossil resources (ADPE) [kg Sb-Äq.]: A1-A3 0.000135, C1 3.02e-8, C2 1.86e-7, C4 5.32e-6
- Abiotic depletion potential for fossil resources (ADPF) [MJ]: A1-A3 926, C1 11.8, C2 25.7, C4 202

## Use advice
Scope:
This document refers to Floor plates of the concrete components business area of the thomas group, produced in 1 out of 29 locatios:

thomas betonbauteile Rostock GmbH
Werkstr. 8
18069 Rostock

The declared unit is 1 t of floor plates. The data for the production of the declared product was collected on a plant-specific basis with current annual data from 2018. The declarant is responsible for the underlying data and their verification.
System boundary:
The Life Cycle Assessment considers the system boundaries "cradle to grave" and follows the modular construction system described by EN 15804. The LCA takes into account the following

modules:

A1: Raw material supply: extraction of raw material, production of precursors, processing of cement and aggregates, steel production, casting and processing of recycling materials

A2: Transport of precursors: transport of raw materials to manufacturing plant

A3: Manufacturing: production of floor plates
C1: De-Construction & Demolition of floor plates

C2: Transportation towards disposal

C4: Disposal of floor plates

## Data sources
- ecoinvent database (all versions)
- ecoinvent 3.6 database
