# Hardwood lumber - kiln dried (German average)

Dataset: ILCD process, EPD, representative dataset
Geography: DE
Reference year: 2021
Valid until: 2026
Classification: OEKOBAU.DAT: Holz / Vollholz / Bau-Schnittholz
Method details: EN 15804; ILCD format
Generated by: Thünen-Institut für Holzforschung
Owner: Thünen-Institut für Holzforschung
Compliance: EN 15804+A2; EN 16485
Review: Independent external review by Dr. Frank Werner - Umwelt & Entwicklung
Amounts: rows without a unit in brackets have none in this file; such an amount is in the reference unit of its flow, which a separate flow dataset defines
copyright: true

## General comment
Further information on the declared unit and the inventory analysis based on manufacturer information (input and output of material and energy flows) are available for download as an Excel file within the section “background info”.
The data set was created in 2021 as an update with identical foreground system. All background data sets are taken from the GaBi Professional Database with content version 2021.1. The modeling and calculation of the life cycle assessment is based on the European standards EN 15804:2012+A2:2019 and EN 16485:2014. For questions, please contact holzundklima@thuenen.de.

## Geography
Für die Ökobilanzierung von kammergetrocknetem Laubschnittholz wurden Daten von 5 Werken berücksichtigt. Für alle in Rüter & Diederichs 2012 berücksichtigten Vollholzprodukte wurden von 2009 bis 2011 insgesamt 178 Prozesslinien erfasst. Im Verhältnis zu den vom Statistischen Bundesamt gemeldeten Produktionsmengen im selben Zeitraum entspricht die erreichte Abdeckung von Vollholzprodukten aus Laubschnittholz 2%.

## Time period
The data set is based on production data from the years 2009 to 2011 (foreground system).
The background system was updated in 2021.

## Technology and included processes
Zur Herstellung von kammergetrocknetem Laubschnittholz wird frisches Laubschnittholz genutzt. Es wird zunächst in Paketen voll- oder halbautomatisch gebündelt und dann getrocknet. Dabei kommen bis auf sehr wenige Ausnahmen Trockenkammern mit der Arbeitsweise der Frischluft-Ablufttrocknung zur Anwendung. Das Prinzip besteht darin, das im Holz enthaltene Wasser langsam über die umgebende Luft abzuführen, indem die Fähigkeit der Luft, zusätzliches Wasser aufzunehmen über einen Regelkreis gesteuert wird. Dabei spielt die Zuführung von Wasser und Wärmeenergie in Form von erhitzter Luft eine zentrale Rolle. In Abhängigkeit von der Anfangsfeuchte und der gewünschten Endfeuchte des Holzes, sowie der Dimension der einzelnen Schnittholzelemente, kann die Trocknung mehrere Tage dauern. Andere Trocknungstechniken sind für den heutigen Laubschnittholzmarkt nicht relevant. Nach der Trocknung wird das Produkt für den Transport gestapelt und verpackt.
Die Holzfeuchte des Produktes liegt bei 12%

## Technical purpose
Kiln dried hardwood lumber comes in all typical dimensions as a beam, plank, square timber or lath. It is used in the construction sector and for furniture manufacturing. In the construction sector, timber cladding, railings, stairs, windows and doors as well as floors (planks, parquet or laminate) for indoor use are made from hardwood lumber. It is less often used for outdoor applications.

## Scenarios
- energetisch (Modul D): therm. Verwertung
- stofflich (Modul D): stoffl. Verwertung
- Entsorgung Verpackung (Modul A5): Das Modul A5 enthält ausschließlich die Entsorgung der Verpackungsmaterialien

## Reference product
- Laubschnittholz - getrocknet (Durchschnitt DE): 1

## Inputs
- Use of renewable primary energy (PERE) [MJ]: A1 21.6304, A2 6.65807, A3 9903.97, A1-A3 9932.26, A5 (Entsorgung Verpackung) 0.365813, C2 0.610601, C3 100.439, D (energetisch) 9453.84, D (stofflich) -52.4116
- Use of renewable primary energy resources used as raw materials (PERM) [MJ]: A1 13104.3, A2 0, A3 60.231, A1-A3 13164.5, A5 (Entsorgung Verpackung) -60.231, C2 0, C3 -13104.3, D (energetisch) 0, D (stofflich) 0
- Total use of renewable primary energy resources (PERT) [MJ]: A1 13125.9, A2 6.65807, A3 9964.2, A1-A3 23096.8, A5 (Entsorgung Verpackung) -59.8652, C2 0.610601, C3 -13003.8, D (energetisch) 9453.84, D (stofflich) -52.4116
- Use of non renewable primary energy (PENRE) [MJ]: A1 156.28, A2 114.719, A3 1109.54, A1-A3 1380.54, A5 (Entsorgung Verpackung) 1.92738, C2 10.9559, C3 153.986, D (energetisch) -7318.3, D (stofflich) -264.839
- Use of non renewable primary energy resources used as raw materials (PENRM) [MJ]: A1 0, A2 0, A3 6.048, A1-A3 6.048, A5 (Entsorgung Verpackung) -6.048, C2 0, C3 0, D (energetisch) 0, D (stofflich) 0
- Total use of non renewable primary energy resource (PENRT) [MJ]: A1 156.28, A2 114.719, A3 1115.59, A1-A3 1386.59, A5 (Entsorgung Verpackung) -4.12062, C2 10.9559, C3 153.986, D (energetisch) -7318.3, D (stofflich) -264.839
- Use of secondary material (SM) [kg]: A1 0, A2 0, A3 0, A1-A3 0, A5 (Entsorgung Verpackung) 0, C2 0, C3 0, D (energetisch) 0, D (stofflich) 761.828
- Use of renewable secondary fuels (RSF) [MJ]: A1 0, A2 0, A3 0, A1-A3 0, A5 (Entsorgung Verpackung) 0, C2 0, C3 0, D (energetisch) 0, D (stofflich) 0
- Use of non renewable secondary fuels (NRSF) [MJ]: A1 0, A2 0, A3 0, A1-A3 0, A5 (Entsorgung Verpackung) 0, C2 0, C3 0, D (energetisch) 0, D (stofflich) 0
- Use of net fresh water (FW) [m3]: A1 0.013839, A2 0.00591736, A3 0.25723, A1-A3 0.276986, A5 (Entsorgung Verpackung) 0.0203705, C2 0.000698928, C3 0.0472656, D (energetisch) 1.22543, D (stofflich) -0.0303399

## Outputs
- Hazardous waste disposed (HWD) [kg]: A1 1.24549e-6, A2 4.79487e-9, A3 1.4707e-6, A1-A3 2.72099e-6, A5 (Entsorgung Verpackung) 3.39224e-10, C2 5.52059e-10, C3 5.59893e-8, D (energetisch) -2.53047e-6, D (stofflich) -3.57965e-7
- Non hazardous waste dispose (NHWD) [kg]: A1 0.0387566, A2 0.0185182, A3 6.98562, A1-A3 7.04289, A5 (Entsorgung Verpackung) 0.0740873, C2 0.00162751, C3 0.11997, D (energetisch) 3.44291, D (stofflich) -0.0603755
- Radioactive waste disposed (RWD) [kg]: A1 0.00184771, A2 0.000110088, A3 0.0683626, A1-A3 0.0703204, A5 (Entsorgung Verpackung) 9.89104e-5, C2 1.32525e-5, C3 0.0123357, D (energetisch) -0.448237, D (stofflich) -0.00546688
- Components for re-use (CRU) [kg]: A1 0, A2 0, A3 0, A1-A3 0, A5 (Entsorgung Verpackung) 0, C2 0, C3 0, D (energetisch) 0, D (stofflich) 0
- Materials for recycling (MFR) [kg]: A1 0, A2 0, A3 0, A1-A3 0, A5 (Entsorgung Verpackung) 0, C2 0, C3 761.828, D (energetisch) 0, D (stofflich) 0
- Materials for energy recovery (MER) [kg]: A1 0, A2 0, A3 0, A1-A3 0, A5 (Entsorgung Verpackung) 3.12547, C2 0, C3 761.828, D (energetisch) 0, D (stofflich) 0
- Exported electrical energy (EEE) [MJ]: A1 0, A2 0, A3 0.247778, A1-A3 0.247778, A5 (Entsorgung Verpackung) 12.3628, C2 0, C3 0, D (energetisch) 0, D (stofflich) 0
- Exported thermal energy (EET) [MJ]: A1 0, A2 0, A3 0.575618, A1-A3 0.575618, A5 (Entsorgung Verpackung) 22.6662, C2 0, C3 0, D (energetisch) 0, D (stofflich) 0

## Impact indicators
- Global Warming Potential - total (GWP-total) [kg CO2-Äqv.]: A1 -1234.06, A2 8.61762, A3 96.3148, A1-A3 -1129.13, A5 (Entsorgung Verpackung) 6.35111, C2 0.790486, C3 1258.8, D (energetisch) -539.817, D (stofflich) -20.8749
- Global Warming Potential - fossil fuels (GWP-fossil) [kg CO2-Äqv.]: A1 12.6058, A2 8.61762, A3 102.045, A1-A3 123.268, A5 (Entsorgung Verpackung) 0.621072, C2 0.790486, C3 12.138, D (energetisch) -539.817, D (stofflich) -20.8749
- Global Warming Potential - biogenic (GWP-biogenic) [kg CO2-Äqv.]: A1 -1246.67, A2 0, A3 -5.73004, A1-A3 -1252.4, A5 (Entsorgung Verpackung) 5.73004, C2 0, C3 1246.67, D (energetisch) 0, D (stofflich) 0
- Depletion potential of the stratospheric ozone layer (ODP) [kg CFC 11-Äquiv.]: A1 6.02758e-14, A2 2.2145e-15, A3 2.28948e-12, A1-A3 2.35198e-12, A5 (Entsorgung Verpackung) 1.14817e-15, C2 1.05012e-16, C3 4.15483e-13, D (energetisch) -1.50917e-11, D (stofflich) -1.80958e-13
- Acidification potential, Accumulated Exceedance (AP) [mol H+ eqv.]: A1 0.0902349, A2 0.0507835, A3 1.47317, A1-A3 1.61419, A5 (Entsorgung Verpackung) 0.00124476, C2 0.00477232, C3 0.0174679, D (energetisch) -0.493438, D (stofflich) -0.106504
- Eutrophication potential - freshwater (EP-freshwater) [kg P eqv.]: A1 2.84519e-5, A2 1.77993e-5, A3 0.000341486, A1-A3 0.000387737, A5 (Entsorgung Verpackung) 1.77943e-7, C2 2.43993e-6, C3 5.08852e-5, D (energetisch) -0.00185507, D (stofflich) -4.75466e-5
- Eutrophication potential - marine (EP-marine) [kg N eqv.]: A1 0.0433422, A2 0.025085, A3 0.631057, A1-A3 0.699484, A5 (Entsorgung Verpackung) 0.000403056, C2 0.00233835, C3 0.00558653, D (energetisch) -0.175649, D (stofflich) -0.0493684
- Eutrophication potential - terrestrial (EP-terrestrial) [mol N eqv.]: A1 0.477362, A2 0.277547, A3 7.18996, A1-A3 7.94487, A5 (Entsorgung Verpackung) 0.00594843, C2 0.0258816, C3 0.0583261, D (energetisch) -1.43241, D (stofflich) -0.543156
- Versauerungspotenzial, kumulierte Überschreitung (AP) [kg NMVOC eqv.]: A1 0.126907, A2 0.0469978, A3 1.70542, A1-A3 1.87933, A5 (Entsorgung Verpackung) 0.00107927, C2 0.00441001, C3 0.0138795, D (energetisch) -0.439874, D (stofflich) -0.128386
- Abiotic depletion potential - non-fossil resources (ADPE) [kg Sb-Äqv.]: A1 1.55618e-6, A2 7.52833e-7, A3 7.89354e-5, A1-A3 8.12444e-5, A5 (Entsorgung Verpackung) 1.78809e-8, C2 6.25741e-8, C3 4.98206e-6, D (energetisch) -0.000188813, D (stofflich) -3.33388e-6
- Abiotic depletion potential - fossil resources (ADPF) [MJ]: A1 156.26, A2 114.714, A3 1109.11, A1-A3 1380.08, A5 (Entsorgung Verpackung) 1.92641, C2 10.9413, C3 153.938, D (energetisch) -7316.46, D (stofflich) -264.681
- Water (user) deprivation potential (WDP) [m3 world eqv.]: A1 0.013839, A2 0.00591736, A3 0.25723, A1-A3 0.276986, A5 (Entsorgung Verpackung) 0.0203705, C2 0.000698928, C3 0.0472656, D (energetisch) 1.22543, D (stofflich) -0.0303399
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
## Use advice
Aufgrund der hohen Abdeckung bildet der Datensatz die durchschnittlichen Produktionsverhältnisse und die damit verbundenen Umweltwirkungen repräsentativ für Deutschland ab. Liegen keine herstellerspezifischen Ökobilanzergebnisse des verwendeten Produkts vor, empfiehlt sich die Verwendung dieses Durchschnittsdatensatzes.

## Data sources
- Rüter S, Diederichs S (2012) Ökobilanz Basisdaten für Bauprodukte aus Holz, Hamburg, Johann Heinrich von Thünen Institut, Institut für Holztechnologie und Holzbiologie, Abschlussbericht
- GaBi database (general)
