# Washed pumice; pumice

Dataset: ILCD process, EPD, generic dataset
Geography: DE
Reference year: 2021
Valid until: 2022
Classification: oekobau.dat: Mineralische Baustoffe / Zuschläge / Bims
Owner: Sphera Solutions GmbH
Compliance: EN 15804+A2
Review: Dependent internal review by Sphera Solutions GmbH; Independent external review by GaBi user forum
Amounts: rows without a unit in brackets have none in this file; such an amount is in the reference unit of its flow, which a separate flow dataset defines
copyright: true
licenseType: Free of charge for all users and uses
accessRestrictions: The license conditions as stated on https://www.oekobaudat.de/ apply.
accessRestrictions: Es gelten die Lizenzbedingungen wie sie auf https://www.oekobaudat.de/ genannt sind.

## General comment
This data set has been modeled according to the European Standard EN 15804+A2 for Sustainable Building. Results are depicted in modules that allow the structured expression of results over the entire life cycle.

## Geography
The data set represents the country specific situation in Germany, focusing on the main technologies, the region specific characteristics and / or import statistics.

## Time period
Annual average

## Technology and included processes
The LCA of pumice covers the cradle-to-gate phase, that is, particularly the processes of pumice extraction at open pit mine and the further processing in the pumice scrubber. Between the mine and processing an average transport distance of 40km is assumed. The system boundaries are represented by the finished product at the factory gate. Transports from the factory to the building site are not considered and must be included according to the system boundaries.

## Technical purpose
This product can be used in construction.

## Safety margin
10 %. Product system almost completely covered. Good technological, temporal and geographic representativeness.

## Reference product
- Washed pumice: 1

## Inputs
- Use of renewable primary energy as energy carrier (PERE) [MJ]: A1-A3 0.019843
- Use of renewable primary energy resources used as raw materials (PERM) [MJ]: A1-A3 0
- Total use of renewable primary energy (PERT) [MJ]: A1-A3 0.019843
- Use of non renewable primary energy as energy carrier (PENRE) [MJ]: A1-A3 0.16088
- Use of non renewable primary energy resources used as raw materials (PENRM) [MJ]: A1-A3 0
- Total use of non renewable primary energy resource (PENRT) [MJ]: A1-A3 0.16088
- Use of secondary material (SM) [kg]: A1-A3 0
- Use of renewable secondary fuels (SF) [MJ]: A1-A3 0
- Use of non renewable secondary fuels (NRSF) [MJ]: A1-A3 0
- Net use of fresh water (FW) [m3]: A1-A3 1.19584e-5

## Outputs
- Hazardous waste disposed (HWD) [kg]: A1-A3 1.19187e-11
- Non harzardous waste disposed (NHWD) [kg]: A1-A3 7.63706e-5
- Radioactive waste disposed (RWD) [kg]: A1-A3 1.35395e-6
- Components for re-use (CRU) [kg]: A1-A3 0
- Materials for recycling (MFR) [kg]: A1-A3 0
- Materials for energy recovery (MER) [kg]: A1-A3 0
- Exported electrical energy (EEE) [MJ]: A1-A3 0
- Exported thermal energy (EET) [MJ]: A1-A3 0

## Impact indicators
- Global Warming Potential - total (GWP-total) [kg CO2 eq.]: A1-A3 0.0121817
- Global Warming Potential - fossil fuels (GWP-fossil) [kg CO2 eq.]: A1-A3 0.0120585
- Global Warming Potential - biogenic (GWP-biogenic) [kg CO2 eq.]: A1-A3 4.84111e-5
- Global Warming Potential - land use and land use change (GWP-luluc) [kg CO2 eq.]: A1-A3 7.48103e-5
- Depletion potenzial of the stratospheric ozone layer (ODP) [kg CFC-11 eq.]: A1-A3 5.20531e-17
- Acidifcation potential, Accumulated Exceedance (AP) [Mole of H+ eq.]: A1-A3 5.71182e-5
- Eutrophication potential - freshwater (EP-freshwater) [kg P eq.]: A1-A3 6.54129e-8
- Eutrophication potential - marine (EP-marine) [kg N eq.]: A1-A3 2.78299e-5
- Eutrophication potential - terrestrial (EP-terrestrial) [Mole of N eq.]: A1-A3 0.000306153
- Photochemical Ozone Creation Potential (POCP) [kg NMVOC eq.]: A1-A3 7.62397e-5
- Abiotic depletion potential - non-fossil resources (ADPE) [kg Sb eq.]: A1-A3 1.5452e-9
- Abiotic depletion potential - fossil resources (ADPF) [MJ]: A1-A3 0.160869
- Water (user) deprivation potential (WDP) [m³ world equiv.]: A1-A3 0.00258562

## Use advice
The data set represents a cradle to gate inventory. It can be used to characterise the supply chain situation of the respective commodity in a representative manner. Combination with individual unit processes using this commodity enables the generation of user-specific (product) LCAs.

## Data sources
- Ganzheitliche Bilanzierung von Baustoffen und Gebäuden: Kurzbericht Bimsbaustoffe, 1996
- Ökologische Bilanzierung von Baustoffen und Gebäuden, 2000
- Baustoff-Ökobilanz. Wirkungsabschätzung und Auswertung in der Steine-Erden-Industrie, 1999
- Documentation of data quality management
- GaBi Database Edition 2021, CUP2021.01
- GaBi database (all versions)
