# Lime (CaO; Finelime); CaO finelime, density of CaO: 3,37 g·cm3 (20 °C), molar mass of CaO: 56,08 g·mol1

Dataset: ILCD process, EPD, generic dataset
Geography: DE
Reference year: 2018
Valid until: 2022
Classification: oekobau.dat: Mineralische Baustoffe / Bindemittel / Kalk
Owner: thinkstep
Compliance: DIN EN 15804
Review: Dependent internal review by thinkstep, IABP-GaBi, IBP-GaBi; Independent external review by GaBi user forum, GaBi bug forum, GaBi user community
Amounts: rows without a unit in brackets have none in this file; such an amount is in the reference unit of its flow, which a separate flow dataset defines
copyright: true

## General comment
This data set has been modeled according to the European Standard EN 15804 for Sustainable Building. Results are depicted in modules that allow the structured expression of results over the entire life cycle.

## Geography
The data set represents the country specific situation in Germany, focusing on the main technologies, the region specific characteristics and / or import statistics.

## Time period
Annual average

## Technology and included processes
To produce lime (CaO), limestone (CaCO3) is split into lime and carbon dioxide at elevated temperature. The reaction enthalpy is + 3010 kJ/kg. In the kiln, the gas temperature is usually 1200- 1300°C, at least 900°C is needed for the reaction. The energy consumed by the endothermic reaction is delivered by burning coke. The kilns used are usually vertical- shaft furnaces. At the top, a mixture of limestone and coke enters the furnace. The first step is the preheating zone which is about 800°C hot. As the limestone- fuel- mixtures moves down, it reaches the calcining zone. There, temperatures are 1200- 1300°C caused by the combustion of the fuel. Air is introduced to make the combustion possible. In the calcining zone, the decomposition of limestone takes place. The hot gases (containing CO2) are moving upwards heating the preheating zone. The lime produced by calcining moves down to the last zone, the cooling zone where it cools down. An alternative to the vertical- shaft kiln is a rotary kiln. The preheating and reaction procedure is the same, but the furnace is a horizontal (slightly inclined) rotating drum, the limestone- fuel- mixture moves down the inclined plane.
The lime leaving the furnace is called quicklime, it`s particle size is still to big. Quicklime is milled to finelime in tube mills or roll mills. In many cases it's the custom to use auxiliary materials for milling like alcohols or amines (<0,2%). Partly classifiers were used, in order to get an improved quality with a better regularity. The finished product is then supplied to the finished goods bunker.
Background system:
Electricity: Electricity is modelled according to the individual country-specific situations. The country-specific modelling is achieved on multiple levels. Firstly, individual energy carrier specific power plants and plants for renewable energy sources are modelled according to the current national electricity grid mix. Modelling the electricity consumption mix includes transmission / distribution losses and the own use by energy producers (own consumption of power plants and "other" own consumption e.g. due to pumped storage hydro power etc.), as well as imported electricity. Secondly, the national emission and efficiency standards of the power plants are modelled as well as the share of electricity plants and combined heat and power plants (CHP). Thirdly, the country-specific energy carrier supply (share of imports and / or domestic supply) including the country-specific energy carrier properties (e.g. element and energy content) are accounted for. Fourthly, the exploration, mining/production, processing and transport processes of the energy carrier supply chains are modelled according to the specific situation of each electricity producing country. The different production and processing techniques (emissions and efficiencies) in the different energy producing countries are considered, e.g. different crude oil production technologies or different flaring rates at the oil platforms.
Thermal energy, process steam: The thermal energy and process steam supply is modelled according to the individual country-specific situation with regard to emission standards and considered energy carriers. The thermal energy and process steam are produced at heat plants. Efficiencies for thermal energy production are by definition 100% in relation to the corresponding energy carrier input. For process steam the efficiency ranges from 85%, 90% to 95%. The energy carriers used for the generation of thermal energy and process steam are modelled according to the specific import situation (see electricity above).
Transports: All relevant and known transport processes are included. Ocean-going and inland ship transport as well as rail, truck and pipeline transport of bulk commodities are considered.
Energy carriers: The energy carriers are modelled according to the specific supply situation (see electricity above).
Refinery products: Diesel fuel, gasoline, technical gases, fuel oils, lubricants and residues such as bitumen are modelled with a parameterised country-specific refinery model. The refinery model represents the current national standard in refining techniques (e.g. emission level, internal energy consumption, etc.) as well as the individual country-specific product output spectrum, which can be quite different from country to country. The supply of crude oil is modelled, again, according to the country-specific situation with the respective properties of the resources.

## Technical purpose
This product can be used in construction.

## Safety margin
20 %. Product system depicted except for a few missing processes / flows. Technological, temporal and geographic representativeness partly given.

## Reference product
- Lime finelime (ground): 1

## Inputs
- Use of renewable primary energy (PERE) [MJ]: A1-A3 0.577359
- Primary energy resources used as raw materials (PERM) [MJ]: A1-A3 0
- Total use of renewable primary energy resources (PERT) [MJ]: A1-A3 0.577359
- Use of non-renewable primary energy (PENRE) [MJ]: A1-A3 4.34032
- Non-renewable primary energy resources used as raw materials (PENRM) [MJ]: A1-A3 0
- Total use of non-renewable primary energy resources (PENRT) [MJ]: A1-A3 4.34032
- Input of secondary material (SM) [kg]: A1-A3 0
- Use of renewable secondary fuels (RSF) [MJ]: A1-A3 0
- Use of non renewable secondary fuels (NRSF) [MJ]: A1-A3 0
- Use of net fresh water (FW) [m3]: A1-A3 0.000505446

## Outputs
- Hazardous waste disposed (HWD) [kg]: A1-A3 7.94829e-9
- Non-hazardous waste disposed (NHWD) [kg]: A1-A3 0.00202818
- Radioactive waste disposed (RWD) [kg]: A1-A3 8.23752e-5
- Components for re-use (CRU) [kg]: A1-A3 0
- Materials for Recycling (MFR) [kg]: A1-A3 0
- Material for Energy Recovery (MER) [kg]: A1-A3 0
- Exported electrical energy (EEE) [MJ]: A1-A3 0
- Exported thermal energy (EET) [MJ]: A1-A3 0

## Impact indicators
- Global warming potential (GWP) [kg CO2 eq.]: A1-A3 1.44393
- Ozone Depletion Potential (ODP) [kg R11 eq.]: A1-A3 3.19287e-15
- Acidification potential (AP) [kg SO2 eq.]: A1-A3 0.000323581
- Eutrophication potential (EP) [kg Phosphate eq.]: A1-A3 6.87835e-5
- Photochemical Ozone Creation Potential (POCP) [kg Ethene eq.]: A1-A3 5.4772e-6
- Abiotic depletion potential for non fossil resources (ADPE) [kg Sb eq.]: A1-A3 3.65846e-8
- Abiotic depletion potential for fossil resources (ADPF) [MJ]: A1-A3 4.13234

## Use advice
The data set represents a cradle to gate inventory. It can be used to characterise the supply chain situation of the respective commodity in a representative manner. Combination with individual unit processes using this commodity enables the generation of user-specific (product) LCAs.

## Data sources
- Umweltgesichtspunkte bei der Herstellung und Anwendung von Kalkprodukten, Teil 3
- Umweltgesichtspunkte bei der Herstellung und Anwendung von Kalkprodukten, Teil 2
- Ökologische Bilanzierung von Baustoffen und Gebäuden, 2000
- Umweltgesichtspunkte bei der Herstellung und Anwendung von Kalkprodukten, 1995
- GaBi Database Edition 2020, SP40
- GaBi database (all versions)
