# EGGER Eurodekor - Laminated MDF boards

Dataset: ILCD process, EPD, average dataset
Geography: DE
Reference year: 2021
Valid until: 2026
Classification: OEKOBAU.DAT: Holz / Holzwerkstoffe / Holzfaserplatten
Classification: IBUCategories: 02 Bauprodukte / Holzwerkstoffe / Holzwerkstoffe
Method details: Holzwerkstoffe.pdf
Generated by: Daxner & Merl GmbH
Registration number: EPD-EGG-20200252-IBC1-DE
Owner: Fritz EGGER GmbH & Co. OG
Compliance: DIN EN 15804+A2; ISO 14025
Review: Accredited third party review by Institut Bauen und Umwelt e. V.
Amounts: rows without a unit in brackets have none in this file; such an amount is in the reference unit of its flow, which a separate flow dataset defines
copyright: true
licenseType: Free of charge for all users and uses
accessRestrictions: None

## General comment
Laminated MDF boards Eurodekor are panel-shaped materials according to

· EN 622-5, Fibreboards — Specifications —

Part 5: Rquirements for dry process boards

(MDF) and

· EN 14322:2017-03, Wood-based panels -

Melamine faced boards for interior uses

- Definition, requirements and classification.

These raw material boards are predominantly used as furniture boards. They are used, for example, as deep drawer fronts in the kitchen area. The decorative pattern is achieved by means of printed decor paper.

A corresponding texture is applied to the surface in the course of the pressing.

The average glue mix across all board types is considered. The production conditions of the Brilon site are comparable to those of the other plants. They correspond to the technologies and standards used in all locations.

## Technology and included processes
Production of the rawboards (EGGER MDF): 1. Wood preparation - Roundwood chipping - Chip preparation - Residual wood preparation 2. Cooking the chips 3. Defibration in the refiner 4. Drying the fibres to approximately 2-3 % residual moisture 5. Application of resin to the fibres 6. Spreading the glue-coated fibres onto a forming belt 7. Compression of the fibre mat in a continuously operating hot press 8. Cutting and trimming the fibre strand into rawboard formats 9. Cooling the rawboards in star coolers 10. Piling into large stacks 11. Sanding the upper and lower sides after the climatisation phase Production of impregnates for coating: 1. Processing the base paper 2. Addition of impregnation resins (MUF) in the plant 3. Drying the impregnated paper in heated dryers 4. Formatting the endless paper by means of a cross-cutter 5. Stacking the formatted sheets on pallets Production of the laminated MDF board (EGGER Eurodekor): 1. Laying the impregnated papers onto the upper and lower sides of the rawboard 2. Pressing the board in the hot press with variously structured pressing sheets 3. Sorting by quality and stacking 4. Acclimatisation phase of up to 14 days All waste generated in the course of production (trimming, cutting and milling waste) is used thermally with no exceptions. The quality management system is implemented and certified according to the requirements of ISO 9001.
Technical data:
Definitions, requirements and classifications of melamine faced boards for interior use such as surface properties and dimensional tolerances are provided by the standard EN 14322:2017-03. For detailed information, please refer to the technical data sheets available at www.egger.com.
Declared unit:
This environmental product declaration is based on a declared unit of 1 m³ EGGER Eurodekor laminated MDF board with an average raw density of 13.22 kg/m² and a delivery moisture of approximately 6 %.

## Technical purpose
Coated MDF boards are used indoors for high quality purposes in furniture construction. Due to their homogeneous structure, MDF boards can be milled out three-dimensionally and subsequently

either lacquered or coated with a film in a membrane press. Boards produced in this way can often be used as fronts for high quality kitchens.

## Reference product
- Eurodekor MDF: 1

## Inputs
- Renewable primary energy as energy carrier (PERE) [MJ]: A1-A3 30.5723, C1 0, C2 0.0320797, C3 197.684, C4 0, D -49.2272
- Renewable primary energy resources as material utilization (PERM) [MJ]: A1-A3 200.636, C1 0, C2 0, C3 -196.807, C4 0, D 0
- Total use of renewable primary energy resources (PERT) [MJ]: A1-A3 231.209, C1 0, C2 0.0320797, C3 0.876294, C4 0, D -49.2272
- Non renewable primary energy as energy carrier (PENRE) [MJ]: A1-A3 120.005, C1 0, C2 0.557039, C3 33.3809, C4 0, D -195.527
- Non renewable primary energy as material utilization (PENRM) [MJ]: A1-A3 31.4112, C1 0, C2 0, C3 -31.402, C4 0, D 0
- Total use of non renewable primary energy resources (PENRT) [MJ]: A1-A3 151.416, C1 0, C2 0.557039, C3 1.97886, C4 0, D -195.527
- Use of secondary material (SM) [kg]: A1-A3 0.0030135, C1 0, C2 0, C3 0, C4 0, D 0
- Use of renewable secondary fuels (RSF) [MJ]: A1-A3 14.808, C1 0, C2 0, C3 0, C4 0, D 184.573
- Use of non renewable secondary fuels (NRSF) [MJ]: A1-A3 0, C1 0, C2 0, C3 0, C4 0, D 29.45
- Use of net fresh water (FW) [m^3]: A1-A3 0.0305629, C1 0, C2 3.73837e-5, C3 0.00101322, C4 0, D -0.0398128

## Outputs
- Hazardous waste disposed (HWD) [kg]: A1-A3 1.64243e-6, C1 0, C2 2.57584e-8, C3 8.18635e-10, C4 0, D -6.61734e-8
- Non hazardous waste disposed (NHWD) [kg]: A1-A3 0.134319, C1 0, C2 8.82863e-5, C3 0.00140296, C4 0, D 0.00714826
- Radioactive waste disposed (RWD) [kg]: A1-A3 0.00433523, C1 0, C2 1.02668e-6, C3 0.000300049, C4 0, D -0.0168305
- Components for re-use (CRU) [kg]: A1-A3 0, C1 0, C2 0, C3 0, C4 0, D 0
- Materials for recycling (MFR) [kg]: A1-A3 0, C1 0, C2 0, C3 0, C4 0, D 0
- Materials for energy recovery (MER) [kg]: A1-A3 0, C1 0, C2 0, C3 13.9683, C4 0, D 0
- Exported electrical energy (EEE) [MJ]: A1-A3 0, C1 0, C2 0, C3 0, C4 0, D 0
- Exported thermal energy (EET) [MJ]: A1-A3 0, C1 0, C2 0, C3 0, C4 0, D 0

## Impact indicators
- Global Warming Potential total (GWP-total) [kg CO_(2)-Äq.]: A1-A3 -11.0819, C1 0, C2 0.0420894, C3 19.6226, C4 0, D -9.50619
- Global Warming Potential fossil fuels (GWP-fossil) [kg CO_(2)-Äq.]: A1-A3 8.25906, C1 0, C2 0.0418226, C3 0.112492, C4 0, D -9.46843
- Global Warming Potential biogenic (GWP-biogenic) [kg CO_(2)-Äq.]: A1-A3 -19.3545, C1 0, C2 -6.98079e-5, C3 19.5099, C4 0, D -0.0285193
- Global Warming Potential luluc (GWP-luluc) [kg CO_(2)-Äq.]: A1-A3 0.0134743, C1 0, C2 0.000336591, C3 0.000162981, C4 0, D -0.0092426
- Depletion potential of the stratospheric ozone layer (ODP) [kg CFC11-Äq.]: A1-A3 1.56017e-11, C1 0, C2 7.63192e-18, C3 2.47385e-15, C4 0, D -1.38656e-13
- Acidification potential of land and water (AP) [mol H^(+)-Äq.]: A1-A3 0.0256952, C1 0, C2 0.000141328, C3 0.000248365, C4 0, D 0.00761486
- Eutrophication potential aquatic freshwater (EP-freshwater) [kg PO_(4)-Äq.]: A1-A3 2.55626e-5, C1 0, C2 1.26658e-7, C3 3.00465e-7, C4 0, D -1.69825e-5
- Eutrophication potential aquatic marine (EP-marine) [kg N-Äq.]: A1-A3 0.0113234, C1 0, C2 6.3758e-5, C3 5.51611e-5, C4 0, D 0.00193121
- Eutrophication potential terrestrial (EP-terrestrial) [mol N-Äq.]: A1-A3 0.108966, C1 0, C2 0.000712216, C3 0.000579536, C4 0, D 0.022952
- Formation potential of tropospheric ozone photochemical oxidants (POCP) [kg NMVOC-Äq.]: A1-A3 0.0279385, C1 0, C2 0.000125264, C3 0.000151169, C4 0, D 0.00815703
- Abiotic depletion potential for non fossil resources (ADPE) [kg Sb-Äq.]: A1-A3 3.77663e-6, C1 0, C2 3.36249e-9, C3 3.25541e-8, C4 0, D -2.08473e-6
- Abiotic depletion potential for fossil resources (ADPF) [MJ]: A1-A3 151.381, C1 0, C2 0.554814, C3 1.97846, C4 0, D -195.504
- Water use (WDP) [m^(3) Welt-Äq. entzogen]: A1-A3 0.303357, C1 0, C2 0.00040548, C3 0.0245131, C4 0, D -0.639854
- Incidence of disease due to PM emissions (PM) [Krankheitsfälle]: A1-A3 2.24548e-7, C1 0, C2 7.98542e-10, C3 2.08305e-9, C4 0, D -4.11858e-8
- Human exposure efficiency relative to U235 (IR) [kBq U235-Äq.]: A1-A3 0.429008, C1 0, C2 0.00015146, C3 0.0492278, C4 0, D -2.76121
- Comparative toxic unit for ecosystems (ETP-fw) [CTUe]: A1-A3 42.7166, C1 0, C2 0.415109, C3 0.846711, C4 0, D -47.8851
- Comparative toxic unit for humans (carcinogenic) (HTP-c) [CTUh]: A1-A3 4.17239e-8, C1 0, C2 8.57972e-12, C3 2.33808e-11, C4 0, D -1.89382e-10
- Comparative toxic unit for humans (noncarcinogenic) (HTP-nc) [CTUh]: A1-A3 7.58432e-8, C1 0, C2 4.94367e-10, C3 8.61445e-10, C4 0, D 5.53527e-8
- Soil quality index (SQP) [SQP]: A1-A3 1420.03, C1 0, C2 0.194746, C3 0.629672, C4 0, D -35.9551

## Use advice
Scope:
This document refers to laminated MDF boards EGGER Eurodekor, produced with an average glue mix at the site in Brilon, Germany.

The production conditions in Brilon are comparable to those of the other plants. They correspond to the technologies and standards used in all locations.
System boundary:
The LCA of the average EGGER Eurodekor laminated MDF board includes a cradle-to-gate consideration of the occurring environmental impact with the modules C1-C4 and module D (A1-A3, +C, +D). The following life cycle phases are taken into account in the analysis:

Module A1– A3 | Production stage

The production stage includes the expenses of the raw material supply (logs, scrap wood, sawdust, glue system, auxiliary materials, etc.) as well as the associated transports to the production site in Brilon. Within the plant boundaries, the log yard, wet chip preparation, drying, gluing, spreading, pressing, the sanding line up to the warehouse and shipping are taken into account. The Eurodekor products are also finished by applying an impregnation in the short-cycle presses and then packaged. Thermal and electrical energy, compressed air and water are provided by central suppliers at the Brilon site. The majority of the electrical energy used is obtained from the German power grid. Both internal wood waste and scrap wood sourced externally are used in the in-house biomass power plant. The system boundary for the scrap wood used in the production is set after sorting and chopping. It is assumed that the end of the waste status has been reached. The system boundary for secondary raw materials according to EN 15804 applies.

Module C1 | Dismantling / Demolition

Manual dismantling was assumed for the

laminated MDF boards. The associated efforts are negligible, which means that no environmental impact from the dismantling of the products is declared.

Module C2 | Transport to waste treatment

Module C2 includes transport to waste treatment. For this purpose, transport by lorry over a distance of 50 km is used as a representative scenario.

Module C3 | Waste processing

Chopping after product disassembly is considered in module C3. The wood products and with them the material-inherent properties leave the product system as secondary fuel in module C3.

Module C4 | Disposal

The scenario used declares the energy recovery of the wood products, which means that no environmental impact from the waste treatment of the products in C4 are to be expected.

Module D | Credits and charges beyond the limits of the product system

The energy utilisation of the product at the end of its life cycle is described in Module D, including energetic substitution potentials as a European average scenario.

## Data sources
- GaBi Database (all versions)
- GaBi database SP40 2020
