# Durchschnittlicher Zement D

Dataset: ILCD process, EPD, average dataset
Geography: DE
Reference year: 2017
Valid until: 2022
Classification: OEKOBAU.DAT: Mineralische Baustoffe / Bindemittel / Zement
Classification: IBUCategories: 01 Grundstoffe und Vorprodukte / Zement, Baukalk und andere Bindemittel / Zement
Method details: Zement.pdf
Owner: Verein Deutscher Zementwerke e.V.
Compliance: DIN EN 15804; ISO 14025
Review: Accredited third party review by IBU
Amounts: rows without a unit in brackets have none in this file; such an amount is in the reference unit of its flow, which a separate flow dataset defines
copyright: true

## General comment
Zement ist ein hydraulisch erhärtender Baustoff. Er besteht aus einem Gemisch fein aufgemahlener, nichtmetallisch-anorganischer Bestandteile. Zement kann durch gemeinsames Vermahlen des bis zur Sinterung gebrannten Zementklinkers mit anderen Haupt- und Nebenbestandteilen oder durch Mischen getrennt feingemahlener Haupt- und Nebenbestand- teile hergestellt werden. Nach Zugabe von Wasser entsteht eine Suspension (Zementleim), die aufgrund einsetzender Hydratationsreaktionen sowohl an der Luft als auch unter Wasser erstarrt und erhärtet sowie dauerhaft fest bleibt. Das deklarierte Produkt ist ein Zement mit einer Zusammensetzung, die der durch- schnittlichen Zusammensetzung der in Deutschland im Jahr 2015 produzierten Zemente entspricht.

Für das Inverkehrbringen des Produkts in der EU/EFTA (mit Ausnahme der Schweiz) gilt die Verordnung (EU) Nr. 305/2011 (CPR). Das Produkt benötigt eine Leistungserklärung unter Berück-sichtigung der EN 197-1 oder der EN 14216 und die CE-Kennzeichnung. Für die Verwendung gelten die jeweiligen nationalen Bestimmungen.

Zement wird im Allgemeinen nach:

DIN EN 197-1, Zement - Teil 1: Zusammensetzung, Anforderungen und Konformitätskriterien von Normalzement,
DIN EN 14216, Zement - Zusammensetzung, Anforderungen und Konformitätskriterien von Sonderzement mit sehr niedriger Hydratationswärme oder in Deutschland auch nach
DIN 1164, Teil 10, 11 und 12, Zement mit besonderen Eigenschaften

hergestellt.

Darüber hinaus können allgemein bauaufsichtliche Zulassungen des Deutschen Instituts für Bautechnik (DIBt) oder Europäische Technische Zulassungen für solche Zemente, die von oben genannten Normen abweichen, gelten.

## Technology and included processes
Die wichtigsten Zementrohstoffe Kalkstein, Ton und ihr natürliches Gemisch, der Kalksteinmergel, werden in Steinbrüchen hauptsächlich durch Sprengen gewon-nen. Kreide und Ton lassen sich mit Eimerketten-, Schaufelrad- oder Schürfkübelbaggern unmittelbar von der Bruchwand abtragen. Fahrzeuge befördern das grobstückige Rohmaterial zu Hammerbrechern, in denen es zu Schotter gebrochen wird. Der Schotter kann dann auf Bandförderern vom Bruch in das Zementwerk transportiert werden. Die Rohmaterialkomponenten werden über Dosierein-richtungen einer Mühle in vorbestimmten Mischungs-verhältnissen aufgegeben und zu Rohmehl feinge-mahlen. Zementklinker wird heute in Deutschland zum überwiegenden Teil nach dem Trockenverfahren in Drehrohröfen mit Zyklonvorwärmern hergestellt. Im Vorwärmer wird das Rohmehl von den Abgasen aus dem Drehofen auf >800 °C erhitzt. Das aus der unteren Zyklonstufe des Vorwärmers austretende Material gelangt in den unter 3-4° geneigten Drehofen, in dem das Brenngut vom Ofeneinlauf in Richtung des am Ofenauslauf installierten Brenners bewegt wird. In der so genannten Sinterzone erreicht das Brenngut Temperaturen von etwa 1450 °C. An den Ofenauslauf schließt sich ein Klinkerkühler an. Nach dem Brennen und Kühlen wird der Klinker in Silos oder geschlossenen Hallen gelagert, um Emissionen von Klinkerstaub möglichst zu vermeiden. Zur Herstellung von Zement wird der Klinker allein oder mit weiteren Hauptbestandteilen getrennt oder gemeinsam feingemahlen. Dabei wird dem Mahlgut zur Regelung des Erstarrens ein Sulfatträger zuge-setzt. Dazu verwendet man Gips oder Anhydrit aus natürlichen Vorkommen oder aus Rauchgasent-schwefelungsanlagen. Der fertige Zement wird meist in Silos gelagert, aus denen der Zement als Sack- oder als Siloware zum Versand kommt. Zur Sicherung der Zementqualität sind heute in allen deutschen Zementwerken Qualitätssicherungs-systeme installiert, die sich an den Anforderungen an die werkseigene Produktionskontrolle in DIN EN 197-2 bzw. der Norm für Qualitätsmanagementsysteme DIN EN ISO 9001 orientieren. Neben den konkreten Vorgaben zur Prozesssteuerung sowie zur Über-wachung der Zwischen- und Endprodukte umfassen QM-Systeme nach DIN EN ISO 9001 auch Maß-nahmen zur Verbesserung der Organisationsstruktur und der Produktionsabläufe insgesamt.
Technische Daten:
Die für den durchschnittlichen, in Deutschland im Jahr 2015 hergestellten Zement erfassten Zemente haben Normdruckfestigkeiten entsprechend der Klassen 32,5, 42,5 oder 52,5 nach DIN EN 197-1.
Deklarierte Einheit:
Die deklarierte Einheit ist 1 t.

## Technical purpose
Zement wird hauptsächlich als Bindemittel für Beton, Zementestrich und Zementmörtel verwendet.

## Reference product
- 1 t Zement: 1000

## Inputs
- Erneuerbare Primärenergie als Energieträger (PERE) [MJ]: A1-A3 360
- Erneuerbare Primärenergie zur stofflichen Nutzung (PERM) [MJ]: A1-A3 0
- Total erneuerbare Primärenergie (PERT) [MJ]: A1-A3 360
- Nicht-erneuerbare Primärenergie als Energieträger (PENRE) [MJ]: A1-A3 2050
- Nicht-erneuerbare Primärenergie zur stofflichen Nutzung (PENRM) [MJ]: A1-A3 0
- Total nicht erneuerbare Primärenergie (PENRT) [MJ]: A1-A3 2050
- Einsatz von Sekundärstoffen (SM) [kg]: A1-A3 16.5
- Erneuerbare Sekundärbrennstoffe (RSF) [MJ]: A1-A3 669
- Nicht erneuerbare Sekundärbrennstoffe (NRSF) [MJ]: A1-A3 1274
- Einsatz von Süßwasserressourcen (FW) [m^3]: A1-A3 2

## Outputs
- Gefährlicher Abfall zur Deponie (HWD) [kg]: A1-A3 0.0006
- Entsorgter nicht gefährlicher Abfall (NHWD) [kg]: A1-A3 2.62
- Entsorgter radioaktiver Abfall (RWD) [kg]: A1-A3 0.088
- Komponenten für die Wiederverwendung (CRU) [kg]: A1-A3 0
- Stoffe zum Recycling (MFR) [kg]: A1-A3 0
- Stoffe für die Energierückgewinnung (MER) [kg]: A1-A3 0
- Exportierte elektrische Energie (EEE) [MJ]: A1-A3 0
- Exportierte thermische Energie (EET) [MJ]: A1-A3 0

## Impact indicators
- Globales Erwärmungspotenzial (GWP) [kg CO_(2)-Äq.]: A1-A3 587
- Abbau Potential der stratosphärischen Ozonschicht (ODP) [kg CFC11-Äq.]: A1-A3 2.03e-7
- Versauerungspotenzial von Boden und Wasser (AP) [kg SO_(2)-Äq.]: A1-A3 0.75
- Eutrophierungspotenzial (EP) [kg PO_(4)^(3)-Äq.]: A1-A3 0.187
- Bildungspotential für troposphärisches Ozon (POCP) [kg Ethen-Äq.]: A1-A3 0.12
- Potenzial für den abiotischen Abbau nicht fossiler Ressourcen (ADPE) [kg Sb-Äq.]: A1-A3 0.00416
- Potenzial für den abiotischen Abbau fossiler Brennstoffe (ADPF) [MJ]: A1-A3 1830

## Use advice
Gültigkeitsbereich:
Die vorliegende Umweltproduktdeklaration bildet die Ökobilanz der Herstellung eines Zements mit einer durchschnittlichen Zusammensetzung in Deutschland im Jahr 2015 hergestellter Zemente ab. Die Ökobilanz, die der EPD zugrunde liegt, beruht auf Daten von allen deutschen Zementwerken der VDZ-Mitgliedsunter-nehmen. Die in der Ökobilanz abgebildete Technologie kann aufgrund dieser hohen Beteiligung der Zementwerke als repräsentativ für die Zement-herstellung in Deutschland betrachtet werden.
Systemgrenze:
Typ der EPD: Wiege-bis-Werkstor. Die gewählten Systemgrenzen umfassen die Herstellung des Zements einschließlich der Rohstoffgewinnung bis zum fertigen Produkt am Werkstor. Das Produkt-stadium umfasst:

Modul A1: Gewinnung und Aufbereitung von Rohstoffen.

Modul A2: Transport der Rohstoffe zum Werkstor und interne Transporte.

Modul A3: Zementherstellung.

Das Baustadium, das Nutzungsstadium und das Entsorgungsstadium werden in der Ökobilanz für Zement nicht berücksichtigt. Die Entwicklung von Szenarien für diese Stadien muss am Endprodukt (z.B. Beton) erfolgen.

## Data sources
- Durchschnittlicher Zement D.pdf
- GaBi Database (all versions)
- GaBi database SP29 2016
