# binderholz Brettschichtholz BSH

Dataset: ILCD process, EPD, specific dataset
Geography: DE
Reference year: 2019
Valid until: 2024
Classification: OEKOBAU.DAT: Holz / Vollholz / Brettschichtholz (BSH)
Classification: IBUCategories: 02 Bauprodukte / Produkte aus Bauholz / Vollholzprodukte
Method details: Vollholzprodukte.pdf
Registration number: EPD-BBS-20190164-IBA1-DE
Owner: Binderholz GmbH Brettschichtholzwerk
Compliance: DIN EN 15804; ISO 14025
Review: Accredited third party review by Institut Bauen und Umwelt e. V.
Amounts: rows without a unit in brackets have none in this file; such an amount is in the reference unit of its flow, which a separate flow dataset defines
copyright: true

## General comment
binderholz Brettschichtholz BSH ist ein massives, stabförmiges Holzbauteil, welches aus mindestens drei faserparallelen miteinander verklebten Brettlamellen besteht. Hergestellt wird das binderholz Brettschichtholz BSH nach der /EN 14080/.

## Technology and included processes
binderholz Brettschichtholz BSH wird in Sicht- und Nichtsichtqualitäten aus Fichten- und Tannenholz gefertigt. In der Produktion werden technisch getrocknete Nadelholzlamellen mit einer Holzfeuchte von 9-14 % eingesetzt, die maschinell nach der Festigkeit sortiert werden und mittels einer Keilzinkenverbindung zu praktisch endlos langen Lamellen verbunden werden. Diese werden je nach Bestelllänge gekappt, gehobelt und zu Brettschichtholzträgern verklebt. Die Keilzinkenverklebung und die faserparallele Flächenverklebung erfolgen unter der Verwendung des in Kapitel 2.5 aufgeführten Klebstoffes. Nach vollständiger Aushärtung der Verklebung erfolgt die finale Oberflächenbearbeitung sowie der kundenspezifische Abbund. Je nach Verwendungszweck und Einsatzanforderung kann das binderholz Brettschichtholz BSH mit Holzschutzmittel imprägniert werden.
Technische Daten:
binderholz Brettschichtholz BSH wir mit einer Holzfeuchte von 9-14 % hergestellt.

Es gelten die Daten der Leistungserklärung.

Je nach Querschnittaufbau (Lagenanzahl, Lagendicke) und der Laststellung des binderholz Brettschichtholz BSH variieren die bauphysikalischen Eigenschaften wie Bauteilwiderstand oder Feuerwiderstand. Die üblichen Festigkeitsklassen nach /EN 1995-1-1/ sind GL 24, GL 28 und GL 30. Diese sind im kombinierten (c), wie auch im homogenen Aufbau (h) verfügbar.

Auf Anfrage sind Brettschichtholzträger mit der Festigkeitsklasse GL 32 möglich.

Gemäß /EN 1995-1-1/ kann binderholz Brettschichtholz BSH in den Nutzungsklassen 1 bis 3 verwendet werden.

Ein vorbeugender, chemischer Holzschutz nach /DIN 68800-3/ ist auf Anfrage möglich. Hierbei kann binderholz Brettschichtholz BSH zum Schutz vor Pilz- und Insektenbefall mit einer Imprägnierung der Klasse 2 nach /DIN 68800-3/ behandelt werden.

Generell ist ein konstruktiver Holzschutz nach /DIN 68800-2/ vorzuziehen.
Deklarierte Einheit:
Die deklarierte Einheit der ökologischen Betrachtung ist 1 m³ binderholz Brettschichtholz BSH unter Berücksichtigung des verwendeten Klebstoffes nach Kapitel 2.5 und einer Masse von 459,2 kg/m³ bei einer Holzfeuchte von 12,08 %, was einem Wasseranteil von 10,7 % entspricht. Der Anteil der Klebstoffe liegt bei 0,72 %. Alle Angaben zu eingesetzten Klebstoffen wurden auf Grundlage spezifischer Daten berechnet.

## Technical purpose
binderholz Brettschichtholz BSH wird in allen konstruktiven Bereichen des modernen Holzbaus eingesetzt, vom ingenieursmäßigen Wohn- und Industriebau bis zum Brückenbau.

Für die Verwendung von binderholz BSH gelten die jeweiligen nationalen Vorschriften.

## Reference product
- 1 m³ binderholz Brettschichtholz BSH: 1

## Inputs
- Erneuerbare Primärenergie als Energieträger (PERE) [MJ]: A1 1064.13, A2 5.00802, A3 1397.02, A5 0.213995, C2 0.429411, C3 29.6285, D -1509.97
- Erneuerbare Primärenergie zur stofflichen Nutzung (PERM) [MJ]: A1 7838.67, A2 0, A3 0, A5 0, C2 0, C3 -7838.67, D 0
- Total erneuerbare Primärenergie (PERT) [MJ]: A1 8902.8, A2 5.00802, A3 1397.02, A5 0.213995, C2 0.429411, C3 -7809.04, D -1509.97
- Nicht-erneuerbare Primärenergie als Energieträger (PENRE) [MJ]: A1 1130.92, A2 86.3364, A3 258.869, A5 57.3052, C2 7.40288, C3 54.8761, D -5760.78
- Nicht-erneuerbare Primärenergie zur stofflichen Nutzung (PENRM) [MJ]: A1 43.8181, A2 0, A3 56.16, A5 -56.16, C2 0, C3 -43.8181, D 0
- Total nicht erneuerbare Primärenergie (PENRT) [MJ]: A1 1174.74, A2 86.3364, A3 315.029, A5 1.14522, C2 7.40288, C3 11.058, D -5760.78
- Einsatz von Sekundärstoffen (SM) [kg]: A1 0, A2 0, A3 0, A5 0, C2 0, C3 0, D 0
- Erneuerbare Sekundärbrennstoffe (RSF) [MJ]: A1 0, A2 0, A3 0, A5 0, C2 0, C3 0, D 7838.67
- Nicht erneuerbare Sekundärbrennstoffe (NRSF) [MJ]: A1 0, A2 0, A3 0, A5 0, C2 0, C3 0, D 43.8181
- Einsatz von Süßwasserressourcen (FW) [m^3]: A1 0.549989, A2 0.00846676, A3 0.584424, A5 0.010101, C2 0.000725979, C3 0.0159703, D 1.07085

## Outputs
- Gefährlicher Abfall zur Deponie (HWD) [kg]: A1 3.12781e-5, A2 4.82277e-6, A3 4.05429e-6, A5 5.11344e-9, C2 4.13526e-7, C3 4.26415e-8, D -3.26913e-6
- Entsorgter nicht gefährlicher Abfall (NHWD) [kg]: A1 0.983229, A2 0.00701832, A3 0.899346, A5 0.184819, C2 0.000601783, C3 0.0567517, D 2.84378
- Entsorgter radioaktiver Abfall (RWD) [kg]: A1 0.0525108, A2 0.000117141, A3 0.00792244, A5 4.58869e-5, C2 1.00442e-5, C3 0.00516656, D -0.264633
- Komponenten für die Wiederverwendung (CRU) [kg]: A1 0, A2 0, A3 0, A5 0, C2 0, C3 0, D 0
- Stoffe zum Recycling (MFR) [kg]: A1 0, A2 0, A3 0, A5 0, C2 0, C3 0, D 0
- Stoffe für die Energierückgewinnung (MER) [kg]: A1 0, A2 0, A3 0, A5 0, C2 0, C3 459.201, D 0
- Exportierte elektrische Energie (EEE) [MJ]: A1 0, A2 0, A3 0, A5 8.76034, C2 0, C3 0, D 0
- Exportierte thermische Energie (EET) [MJ]: A1 0, A2 0, A3 0, A5 18.1778, C2 0, C3 0, D 0

## Impact indicators
- Globales Erwärmungspotenzial (GWP) [kg CO_(2)-Äq.]: A1 -660.311, A2 6.25684, A3 14.4019, A5 4.4249, C2 0.53649, C3 749.483, D -394.679
- Abbau Potential der stratosphärischen Ozonschicht (ODP) [kg CFC11-Äq.]: A1 1.5755e-12, A2 1.04854e-15, A3 6.59481e-13, A5 1.15978e-15, C2 8.99065e-17, C3 1.79649e-13, D -9.19842e-12
- Versauerungspotenzial von Boden und Wasser (AP) [kg SO_(2)-Äq.]: A1 0.316893, A2 0.0264252, A3 0.0603587, A5 0.000672824, C2 0.00226582, C3 0.00664178, D -0.361131
- Eutrophierungspotenzial (EP) [kg PO_(4)^(3)-Äq.]: A1 0.0746321, A2 0.00672573, A3 0.0129112, A5 8.89343e-5, C2 0.000576695, C3 0.00107963, D -0.0560869
- Bildungspotential für troposphärisches Ozon (POCP) [kg Ethen-Äq.]: A1 0.0198534, A2 -0.0109116, A3 0.0356861, A5 3.04535e-5, C2 -0.000935611, C3 0.000438767, D -0.0318168
- Potenzial für den abiotischen Abbau nicht fossiler Ressourcen (ADPE) [kg Sb-Äq.]: A1 2.11021e-5, A2 4.89163e-7, A3 1.39869e-5, A5 1.42267e-7, C2 4.19431e-8, C3 1.79504e-6, D -9.38061e-5
- Potenzial für den abiotischen Abbau fossiler Brennstoffe (ADPF) [MJ]: A1 1042.14, A2 86.0358, A3 238.821, A5 1.02939, C2 7.3771, C3 41.8279, D -5129.54

## Use advice
Gültigkeitsbereich:
Die Datengrundlage für die Erstellung der Ökobilanz bilden die Produktionsdaten des Binderholz GmbH Brettschichtholzwerkes in Jenbach.

In Summe bilden diese Produktionsdaten 100 % der Gesamtproduktion an binderholz Brettschichtholz BSH ab.

Die vorliegende Umweltproduktdeklaration ist für binderholz Brettschichtholz BSH gültig.
Systemgrenze:
Der Deklarationstyp entspricht einer EPD „Wiege bis Werkstor - mit Optionen“. Inhalte sind das Stadium der Produktion, also von der Bereitstellung der Rohstoffe bis zum Werkstor der Produktion (cradle-to-gate, Module A1 bis A3), sowie das Modul A5 und Teile des Endes des Lebensweges (Modul C2 und C3). Darüber hinaus erfolgt eine Betrachtung der potenziellen Nutzen und Lasten über den Lebensweg des Produktes hinaus (Modul D).

Im Einzelnen werden in Modul A1 die Bereitstellung der Holzhalbwaren sowie die Bereitstellung der Klebstoffe bilanziert. Die Transporte dieser Stoffe werden in Modul A2 berücksichtigt. Modul A3 umfasst die Bereitstellung der Brennstoffe, der Betriebs- und Verpackungsmittel, des Stroms sowie die Herstellungsprozesse vor Ort. Diese sind im Wesentlichen die Schnittholztrocknung, das Kappen und Längsverleimen, das Egalisieren, die Dickenverleimung, das Hobeln auf Sichtqualität sowie die Verpackung der Produkte. In Modul A5 wird ausschließlich die Entsorgung der Produktverpackung abgedeckt, welche den Ausgang der enthaltenen Primärenergie (PENRM) einschließt.

Modul C2 berücksichtigt den Transport zum Entsorger und Modul C3 die Aufbereitung und Sortierung des Altholzes. Zudem werden in Modul C3 gemäß /EN 16485/ die CO2-Äquivalente des im Produkt befindlichen holzinhärenten Kohlenstoffs sowie die im Produkt enthaltene erneuerbare und nicht erneuerbare Primärenergie (PERM und PENRM) als Abgänge verbucht.

Modul D bilanziert die thermische Verwertung des Produktes am Ende seines Lebenswegs sowie die daraus resultierenden potenziellen Nutzen und Lasten in Form einer Systemerweiterung.

## Data sources
- binderholz Brettschichtholz BSH.pdf
- GaBi Database (all versions)
- GaBi database SP39 2019
