# Steel section; Steel sections

Dataset: ILCD process, EPD, generic dataset
Geography: DE
Reference year: 2021
Valid until: 2022
Classification: oekobau.dat: Metalle / Stahl und Eisen / Stahlprofile
Owner: Sphera Solutions GmbH
Compliance: EN 15804+A2
Review: Dependent internal review by Sphera Solutions GmbH; Independent external review by GaBi user forum
Amounts: rows without a unit in brackets have none in this file; such an amount is in the reference unit of its flow, which a separate flow dataset defines
copyright: true
licenseType: Free of charge for all users and uses
accessRestrictions: The license conditions as stated on https://www.oekobaudat.de/ apply.
accessRestrictions: Es gelten die Lizenzbedingungen wie sie auf https://www.oekobaudat.de/ genannt sind.

## General comment
This data set has been modeled according to the European Standard EN 15804+A2 for Sustainable Building. Results are depicted in modules that allow the structured expression of results over the entire life cycle.

## Geography
The data set represents the country specific situation in Germany, focusing on the main technologies, the region specific characteristics and / or import statistics.

## Time period
Annual average

## Technology and included processes
The steel profile is manufactured with primary and secondary steel. 20% comes from the blast furnace route (primary) and 80% from the electric arc furnace route (secondary). The models of the primary and secondary route represents the country specific material and energy consumption according to their shares. Description of the EAF route: The major feed stock for the EAF is ferrous scrap, which may comprise of scrap from inside the steelworks (e.g. cut-offs), cut-offs from steel product manufacturers (e.g. vehicle builders) and post-consumer scrap (e.g. end of life products). As in the integrated steel plant including blast furnaces and converters, a slag is formed from lime to collect undesirable components in the steel. Thus lime is an additive as well as coal (carbon) as reducing agent. Oxygen lances and / or oxy-fuel burners are used to assist in the early stages of melting. For every material fraction the transport is considered in the data set. For the production of carbon steel and low alloyed steels, following main operations are performed: raw material handling and storage, furnace charging with/without scrap preheating, EAF scrap melting, steel and slag tapping, ladle furnace treatments for quality adjustment, slag handling and finally continuous casting. The output of the continuous casting is the steel slab.

In the disposal phase, mechanical dismantling is accounted for in module C1 for steel products (excavator), for all other metals a manual dismantling is assumed (no loads). Collecting losses are neglected. It is assumed that all metals reach the end of the waste status immediately after dismantling. This means that the loads for processing and the credits for the substitution of primary material are shown in Module D.
The transport in module C2 to the treatment plant takes place with a truck (50km).
Module D includes loads for sorting, remelting, slag treatment, landfill, filtration of dusts and dross treatment. Credits are given for the net scrap amount (amount returned minus secondary material content, minus processing losses) for the average material mix (from different alloys).

## Technical purpose
This product can be used in construction.

## Safety margin
10 %. Product system almost completely covered. Good technological, temporal and geographic representativeness.

## Reference product
- Steel section: 1

## Inputs
- Use of renewable primary energy as energy carrier (PERE) [MJ]: A1-A3 3.75258, C1 0.0002292, C2 0.00200398, D 0.233587
- Use of renewable primary energy resources used as raw materials (PERM) [MJ]: A1-A3 0, C1 0, C2 0, D 0
- Total use of renewable primary energy (PERT) [MJ]: A1-A3 3.75258, C1 0.0002292, C2 0.00200398, D 0.233587
- Use of non renewable primary energy as energy carrier (PENRE) [MJ]: A1-A3 10.7184, C1 0.00394912, C2 0.0345287, D -1.53164
- Use of non renewable primary energy resources used as raw materials (PENRM) [MJ]: A1-A3 0, C1 0, C2 0, D 0
- Total use of non renewable primary energy resource (PENRT) [MJ]: A1-A3 10.7184, C1 0.00394912, C2 0.0345287, D -1.53164
- Use of secondary material (SM) [kg]: A1-A3 0.88276, C1 0, C2 0, D 0
- Use of renewable secondary fuels (SF) [MJ]: A1-A3 0, C1 0, C2 0, D 0
- Use of non renewable secondary fuels (NRSF) [MJ]: A1-A3 0, C1 0, C2 0, D 0
- Net use of fresh water (FW) [m3]: A1-A3 0.00225394, C1 2.03701e-7, C2 1.78104e-6, D -0.000139737

## Outputs
- Hazardous waste disposed (HWD) [kg]: A1-A3 2.48229e-9, C1 1.6506e-13, C2 1.44319e-12, D 2.24713e-10
- Non harzardous waste disposed (NHWD) [kg]: A1-A3 0.00722602, C1 6.37478e-7, C2 5.57372e-6, D -0.00300353
- Radioactive waste disposed (RWD) [kg]: A1-A3 0.000407225, C1 3.78969e-9, C2 3.31348e-8, D 3.01485e-5
- Components for re-use (CRU) [kg]: A1-A3 0, C1 0, C2 0, D 0
- Materials for recycling (MFR) [kg]: A1-A3 0, C1 1, C2 0, D 0
- Materials for energy recovery (MER) [kg]: A1-A3 0, C1 0, C2 0, D 0
- Exported electrical energy (EEE) [MJ]: A1-A3 0, C1 0, C2 0, D 0
- Exported thermal energy (EET) [MJ]: A1-A3 0, C1 0, C2 0, D 0

## Impact indicators
- Global Warming Potential - total (GWP-total) [kg CO2 eq.]: A1-A3 0.964395, C1 0.000295452, C2 0.00262283, D -0.207236
- Global Warming Potential - fossil fuels (GWP-fossil) [kg CO2 eq.]: A1-A3 0.958401, C1 0.00029347, C2 0.00260492, D -0.20763
- Global Warming Potential - biogenic (GWP-biogenic) [kg CO2 eq.]: A1-A3 0.00483583, C1 6.93722e-8, C2 1.17716e-6, D 0.000398191
- Global Warming Potential - land use and land use change (GWP-luluc) [kg CO2 eq.]: A1-A3 0.00115862, C1 1.91339e-6, C2 1.67295e-5, D -4.87973e-6
- Depletion potenzial of the stratospheric ozone layer (ODP) [kg CFC-11 eq.]: A1-A3 1.59454e-14, C1 7.62325e-20, C2 6.66532e-19, D 1.17542e-15
- Acidifcation potential, Accumulated Exceedance (AP) [Mole of H+ eq.]: A1-A3 0.00219631, C1 3.95122e-6, C2 7.38555e-6, D -0.000573589
- Eutrophication potential - freshwater (EP-freshwater) [kg P eq.]: A1-A3 1.97308e-6, C1 6.12728e-10, C2 5.35732e-9, D -3.58836e-8
- Eutrophication potential - marine (EP-marine) [kg N eq.]: A1-A3 0.000539475, C1 1.79756e-6, C2 3.40237e-6, D -0.000119118
- Eutrophication potential - terrestrial (EP-terrestrial) [Mole of N eq.]: A1-A3 0.00578543, C1 1.97643e-5, C2 3.80663e-5, D -0.00129055
- Photochemical Ozone Creation Potential (POCP) [kg NMVOC eq.]: A1-A3 0.00186711, C1 5.38347e-6, C2 6.6347e-6, D -0.000398185
- Abiotic depletion potential - non-fossil resources (ADPE) [kg Sb eq.]: A1-A3 2.3132e-7, C1 2.59158e-11, C2 2.26592e-10, D 5.37388e-9
- Abiotic depletion potential - fossil resources (ADPF) [MJ]: A1-A3 10.6856, C1 0.00394895, C2 0.0345273, D -1.51436
- Water (user) deprivation potential (WDP) [m³ world equiv.]: A1-A3 -0.00226491, C1 1.15816e-6, C2 1.01262e-5, D 0.00516378

## Use advice
The data set represents a cradle to gate inventory. It can be used to characterise the supply chain situation of the respective commodity in a representative manner. Combination with individual unit processes using this commodity enables the generation of user-specific (product) LCAs.

## Data sources
- Documentation of data quality management
- GaBi Database Edition 2021, CUP2021.01
- GaBi database (all versions)
