# Medium Density Fibreboards EGGER MDF

Dataset: ILCD process, EPD, average dataset
Geography: DE
Reference year: 2021
Valid until: 2022
Classification: OEKOBAU.DAT: Holz / Holzwerkstoffe / Holzfaserplatten
Classification: IBUCategories: 02 Bauprodukte / Holzwerkstoffe / Holzwerkstoffe
Method details: Holzwerkstoffe.pdf
Generated by: Daxner & Merl GmbH
Registration number: EPD-EGG-20200250-IBC1-DE
Owner: Fritz EGGER GmbH & Co. OG
Compliance: DIN EN 15804+A2; ISO 14025
Review: Accredited third party review by Institut Bauen und Umwelt e. V.
Amounts: rows without a unit in brackets have none in this file; such an amount is in the reference unit of its flow, which a separate flow dataset defines
copyright: true
licenseType: Free of charge for all users and uses
accessRestrictions: None

## General comment
Raw MDF boards are board-type materials for dry furniture and interior design in accordance with EN 622-5:2009, Fibreboards. Specifications. Requirements for dry process boards (MDF).

The average glue mix across all board types is considered. The production conditions of the Brilon site are comparable to those of the other plants. They correspond to the technologies and standards used in all locations.

## Technology and included processes
1. Peeling logs 2. Chipping the wood to produce chips 3. Cooking the chips 4. Defibration in the refiner 5. Drying the fibres to approximately 2 – 3 % residual moisture 6. Application of resin to the fibres 7. Spreading the glue-coated fibres onto a forming belt 8. Compression of the fibre mat in a continuously operating hot press 9. Cutting and trimming the fibre strand into rawboard formats 10. Cooling the rawboards in star coolers 11. Piling into large stacks 12. Sanding the upper and lower sides after the acclimatisation phase All plants where EGGER MDF boards are produced are certified with a quality management system in accordance with ISO 9001.
Technical data:
Egger MDF boards are building products according to the harmonised standard EN 13986
Declared unit:
This environmental product declaration is based on a declared unit of 1 m³ medium density fibreboard EGGER MDF uncoated with an average density of 736 kg/m³ and a delivery moisture of approximately 6 %.

## Technical purpose
Due to their homogeneous structure, MDF boards can be milled three-dimensionally and then painted or faced with a foil in a membrane press. They are predominantly used coated and as furniture boards. They are used, for example, as deep drawer fronts in the kitchen area.

## Reference product
- mitteldichte Faserplatte MDF (1 m³ MDF Platte unbeschichtet): 1

## Inputs
- Renewable primary energy as energy carrier (PERE) [MJ]: A1-A3 1296.8, C1 0, C2 1.78598, C3 11105, C4 0, D -2772.59
- Renewable primary energy resources as material utilization (PERM) [MJ]: A1-A3 11157.4, C1 0, C2 0, C3 -11056.2, C4 0, D 0
- Total use of renewable primary energy resources (PERT) [MJ]: A1-A3 12454.2, C1 0, C2 1.78598, C3 48.7861, C4 0, D -2772.59
- Non renewable primary energy as energy carrier (PENRE) [MJ]: A1-A3 5180.26, C1 0, C2 31.0121, C3 1784.94, C4 0, D -11012.6
- Non renewable primary energy as material utilization (PENRM) [MJ]: A1-A3 1675.94, C1 0, C2 0, C3 -1674.77, C4 0, D 0
- Total use of non renewable primary energy resources (PENRT) [MJ]: A1-A3 6856.2, C1 0, C2 31.0121, C3 110.169, C4 0, D -11012.6
- Use of secondary material (SM) [kg]: A1-A3 0, C1 0, C2 0, C3 0, C4 0, D 0
- Use of renewable secondary fuels (RSF) [MJ]: A1-A3 0, C1 0, C2 0, C3 0, C4 0, D 10463.9
- Use of non renewable secondary fuels (NRSF) [MJ]: A1-A3 682.866, C1 0, C2 0, C3 0, C4 0, D 1585.05
- Use of net fresh water (FW) [m^3]: A1-A3 1.34171, C1 0, C2 0.00208127, C3 0.0564094, C4 0, D -2.24235

## Outputs
- Hazardous waste disposed (HWD) [kg]: A1-A3 7.56937e-5, C1 0, C2 1.43405e-6, C3 4.55761e-8, C4 0, D -3.72704e-6
- Non hazardous waste disposed (NHWD) [kg]: A1-A3 6.12194, C1 0, C2 0.00491518, C3 0.0781075, C4 0, D 0.402607
- Radioactive waste disposed (RWD) [kg]: A1-A3 0.214737, C1 0, C2 5.71583e-5, C3 0.0167047, C4 0, D -0.947937
- Components for re-use (CRU) [kg]: A1-A3 0, C1 0, C2 0, C3 0, C4 0, D 0
- Materials for recycling (MFR) [kg]: A1-A3 0, C1 0, C2 0, C3 0, C4 0, D 0
- Materials for energy recovery (MER) [kg]: A1-A3 0, C1 0, C2 0, C3 777.66, C4 0, D 0
- Exported electrical energy (EEE) [MJ]: A1-A3 0, C1 0, C2 0, C3 0, C4 0, D 0
- Exported thermal energy (EET) [MJ]: A1-A3 0, C1 0, C2 0, C3 0, C4 0, D 0

## Impact indicators
- Global Warming Potential total (GWP-total) [kg CO_(2)-Äq.]: A1-A3 -709.289, C1 0, C2 2.34325, C3 1102.09, C4 0, D -542.944
- Global Warming Potential fossil fuels (GWP-fossil) [kg CO_(2)-Äq.]: A1-A3 378.618, C1 0, C2 2.3284, C3 6.26277, C4 0, D -540.817
- Global Warming Potential biogenic (GWP-biogenic) [kg CO_(2)-Äq.]: A1-A3 -1088.57, C1 0, C2 -0.00388643, C3 1095.82, C4 0, D -1.60628
- Global Warming Potential luluc (GWP-luluc) [kg CO_(2)-Äq.]: A1-A3 0.666613, C1 0, C2 0.0187391, C3 0.00907369, C4 0, D -0.520566
- Depletion potential of the stratospheric ozone layer (ODP) [kg CFC11-Äq.]: A1-A3 4.62191e-10, C1 0, C2 4.24894e-16, C3 1.37727e-13, C4 0, D -7.80946e-12
- Acidification potential of land and water (AP) [mol H^(+)-Äq.]: A1-A3 1.26948, C1 0, C2 0.00786819, C3 0.0138273, C4 0, D 0.428887
- Eutrophication potential aquatic freshwater (EP-freshwater) [kg PO_(4)-Äq.]: A1-A3 0.00116702, C1 0, C2 7.05144e-6, C3 1.67279e-5, C4 0, D -0.000956495
- Eutrophication potential aquatic marine (EP-marine) [kg N-Äq.]: A1-A3 0.534838, C1 0, C2 0.00354961, C3 0.003071, C4 0, D 0.10877
- Eutrophication potential terrestrial (EP-terrestrial) [mol N-Äq.]: A1-A3 5.52299, C1 0, C2 0.0396514, C3 0.0322646, C4 0, D 1.29271
- Formation potential of tropospheric ozone photochemical oxidants (POCP) [kg NMVOC-Äq.]: A1-A3 1.39653, C1 0, C2 0.00697388, C3 0.00841607, C4 0, D 0.459423
- Abiotic depletion potential for non fossil resources (ADPE) [kg Sb-Äq.]: A1-A3 0.000146754, C1 0, C2 1.87201e-7, C3 1.81239e-6, C4 0, D -0.000117417
- Abiotic depletion potential for fossil resources (ADPF) [MJ]: A1-A3 6854.59, C1 0, C2 30.8883, C3 110.147, C4 0, D -11011.3
- Water use (WDP) [m^(3) Welt-Äq. entzogen]: A1-A3 10.665, C1 0, C2 0.0225744, C3 1.36472, C4 0, D -36.0381
- Incidence of disease due to PM emissions (PM) [Krankheitsfälle]: A1-A3 1.11772e-5, C1 0, C2 4.44574e-8, C3 1.1597e-7, C4 0, D -2.31969e-6
- Human exposure efficiency relative to U235 (IR) [kBq U235-Äq.]: A1-A3 20.965, C1 0, C2 0.00843227, C3 2.74067, C4 0, D -155.518
- Comparative toxic unit for ecosystems (ETP-fw) [CTUe]: A1-A3 1981.61, C1 0, C2 23.1104, C3 47.1391, C4 0, D -2697
- Comparative toxic unit for humans (carcinogenic) (HTP-c) [CTUh]: A1-A3 2.28088e-6, C1 0, C2 4.77661e-10, C3 1.30169e-9, C4 0, D -1.06665e-8
- Comparative toxic unit for humans (noncarcinogenic) (HTP-nc) [CTUh]: A1-A3 3.47023e-6, C1 0, C2 2.7523e-8, C3 4.79594e-8, C4 0, D 3.1176e-6
- Soil quality index (SQP) [SQP]: A1-A3 75314.1, C1 0, C2 10.8421, C3 35.0559, C4 0, D -2025.08

## Use advice
Scope:
This document refers to medium density fibreboards EGGER MDF, produced with an average glue mix at the site in Brilon, Germany.

The production conditions in Brilon are comparable to those of the other plants. They correspond to the technologies and standards used in all locations.
System boundary:
The LCA of the EGGER MDF uncoated includes a cradle-to-gate consideration of the occurring environmental impact with the modules C1-C4 and module D (A1-A3, +C, +D). The following life cycle phases are taken into account in the analysis:

Module A1– A3 | Production stage

The production stage includes the expenses of the raw material supply (logs, scrap wood, sawdust, glue system, auxiliary materials, etc.) as well as the associated transports to the production site in Brilon. Within the plant boundaries, the log yard, wet chip preparation, drying, gluing, spreading, pressing, the sanding line up to the warehouse and shipping are taken into account. Thermal and electrical energy, compressed air and water are provided by central suppliers at the Brilon site. The majority of the electrical energy used is obtained from the German power grid. Both internal wood waste and scrap wood sourced externally are used in the in-house biomass power plant. The system boundary for the scrap wood used in the production is set after sorting and chopping. It is assumed that the end of the waste status has been reached. The system boundary for secondary raw materials according to EN 15804 applies.

Module C1 | Dismantling / Demolition

Manual dismantling was assumed for the MDF boards. The associated efforts are negligible, which means that no environmental impact from the dismantling of the products is declared.

Module C2 | Transport to waste treatment

Module C2 includes transport to waste treatment. For this purpose, transport by lorry over a distance of 50 km is used as a representative scenario.

Module C3 | Waste processing

Chopping after product disassembly is considered in module C3. The wood products and with them the material-inherent properties leave the product system as secondary fuel in module C3.

Module C4 | Disposal

The scenario used declares the energy recovery of the wood products, which means that no environmental impact from the waste treatment of the products in C4 are to be expected.

Module D | Credits and charges beyond the limits of the product system

The energy utilisation of the product at the end of its life cycle is described in Module D, including energetic substitution potentials as a European average scenario.

## Data sources
- GaBi Database (all versions)
- GaBi database SP40 2020
