# Expanded clay granulate; grain size 4/16

Dataset: ILCD process, EPD, generic dataset
Geography: DE
Reference year: 2021
Valid until: 2022
Classification: oekobau.dat: Mineralische Baustoffe / Zuschläge / Blähton
Owner: Sphera Solutions GmbH
Compliance: EN 15804+A2
Review: Dependent internal review by Sphera Solutions GmbH; Independent external review by GaBi user forum
Amounts: rows without a unit in brackets have none in this file; such an amount is in the reference unit of its flow, which a separate flow dataset defines
copyright: true
licenseType: Free of charge for all users and uses
accessRestrictions: The license conditions as stated on https://www.oekobaudat.de/ apply.
accessRestrictions: Es gelten die Lizenzbedingungen wie sie auf https://www.oekobaudat.de/ genannt sind.

## General comment
This data set has been modeled according to the European Standard EN 15804+A2 for Sustainable Building. Results are depicted in modules that allow the structured expression of results over the entire life cycle.

## Geography
The data set represents the country specific situation in Germany, focusing on the main technologies, the region specific characteristics and / or import statistics.

## Time period
Annual average

## Technology and included processes
Expanded clay is an additive which requires specially suited clays with uniform and finely distributed organic components for its production. The clay from the open cast mine is formed into shots and burned in a drum type furnace system at 1.200°C. The addition of iron oxide or bleaching earth can support the swelling process by means of oxygen splitting by up to 7%. The organic constituents in the clay are burned off and the shots swell. The expanded clay can be produced at apparent densities of approx. 300 to 800 kg/m, according to its required use. Expanded clay grains and sand are used for bricks, wall units, light plaster, light concrete and as bulk solids in construction and green areas.

## Technical purpose
This product can be used in construction.

## Safety margin
20 %. Product system depicted except for a few missing processes / flows. Technological, temporal and geographic representativeness partly given.

## Reference product
- Expanded clay granulate: 1

## Inputs
- Use of renewable primary energy as energy carrier (PERE) [MJ]: A1-A3 0.963147
- Use of renewable primary energy resources used as raw materials (PERM) [MJ]: A1-A3 0
- Total use of renewable primary energy (PERT) [MJ]: A1-A3 0.963147
- Use of non renewable primary energy as energy carrier (PENRE) [MJ]: A1-A3 4.94687
- Use of non renewable primary energy resources used as raw materials (PENRM) [MJ]: A1-A3 0
- Total use of non renewable primary energy resource (PENRT) [MJ]: A1-A3 4.94687
- Use of secondary material (SM) [kg]: A1-A3 0
- Use of renewable secondary fuels (SF) [MJ]: A1-A3 0.015855
- Use of non renewable secondary fuels (NRSF) [MJ]: A1-A3 0.0229811
- Net use of fresh water (FW) [m3]: A1-A3 0.000831201

## Outputs
- Hazardous waste disposed (HWD) [kg]: A1-A3 6.15377e-10
- Non harzardous waste disposed (NHWD) [kg]: A1-A3 0.0100527
- Radioactive waste disposed (RWD) [kg]: A1-A3 7.01571e-5
- Components for re-use (CRU) [kg]: A1-A3 0
- Materials for recycling (MFR) [kg]: A1-A3 0
- Materials for energy recovery (MER) [kg]: A1-A3 0
- Exported electrical energy (EEE) [MJ]: A1-A3 0
- Exported thermal energy (EET) [MJ]: A1-A3 0

## Impact indicators
- Global Warming Potential - total (GWP-total) [kg CO2 eq.]: A1-A3 0.371775
- Global Warming Potential - fossil fuels (GWP-fossil) [kg CO2 eq.]: A1-A3 0.386503
- Global Warming Potential - biogenic (GWP-biogenic) [kg CO2 eq.]: A1-A3 -0.014981
- Global Warming Potential - land use and land use change (GWP-luluc) [kg CO2 eq.]: A1-A3 0.000252969
- Depletion potenzial of the stratospheric ozone layer (ODP) [kg CFC-11 eq.]: A1-A3 2.48012e-15
- Acidifcation potential, Accumulated Exceedance (AP) [Mole of H+ eq.]: A1-A3 0.00274451
- Eutrophication potential - freshwater (EP-freshwater) [kg P eq.]: A1-A3 4.65117e-7
- Eutrophication potential - marine (EP-marine) [kg N eq.]: A1-A3 0.000321721
- Eutrophication potential - terrestrial (EP-terrestrial) [Mole of N eq.]: A1-A3 0.00350964
- Photochemical Ozone Creation Potential (POCP) [kg NMVOC eq.]: A1-A3 0.0011009
- Abiotic depletion potential - non-fossil resources (ADPE) [kg Sb eq.]: A1-A3 4.29273e-8
- Abiotic depletion potential - fossil resources (ADPF) [MJ]: A1-A3 4.94593
- Water (user) deprivation potential (WDP) [m³ world equiv.]: A1-A3 0.0217165

## Use advice
The data set represents a cradle to gate inventory. It can be used to characterise the supply chain situation of the respective commodity in a representative manner. Combination with individual unit processes using this commodity enables the generation of user-specific (product) LCAs.

## Data sources
- Ökologische Bilanzierung von Baustoffen und Gebäuden, 2000
- AUB-Zertifkat Fibo ExClay: Blähton (Zertifikat-Nr.: Z.FIB100, Z.FIB200), 2000
- AUB-Zertifkat Liapor: Blähton (Zertifikat-Nr.: Z.LIA102), 2002
- Ganzheitliche Bilanzierung Gips-Baustoffe , 2001
- Documentation of data quality management
- GaBi Database Edition 2021, CUP2021.01
- GaBi database (all versions)
