# wood fibre insulation

Dataset: ILCD process, EPD, average dataset
Geography: FR
Reference year: 2016
Valid until: 2021
Classification: OEKOBAU.DAT: Dämmstoffe / Holzfasern / Holzfaserdämmplatte
Classification: IBUCategories: 02 Bauprodukte / Holzwerkstoffe / Holzwerkstoffe
Method details: Holzwerkstoffe.pdf
Owner: STEICO SE
Compliance: DIN EN 15804; ISO 14025
Review: Accredited third party review by IBU
Amounts: rows without a unit in brackets have none in this file; such an amount is in the reference unit of its flow, which a separate flow dataset defines
copyright: true

## General comment
This Declaration describes a production volume-weighted average of the wood fibre insulation materials STEICOflex, STEICOtherm, STEICOtherm internal, STEICOtherm SD, STEICOfloor, STEICOisorel, STEICOroof, STEICOunderfloor, STEICOprotect M/H, STEICOuniversal and STEICOspecial, which are produced in both wet and dry processes.

The wood fibre insulation materials specified in the Declaration are used uniformly in accordance with DIN EN 13171 as insulating boards and as insulating mats for buildings.

## Technology and included processes
Explanation of the production sequence using the wet process: processing of the raw timber to form wood chips heating of the wood chips under steam pressure defibration of the wood chips through a defibration process mixing of the fibres with water to form a fibre paste (if required with the addition of the necessary additives) formation of the board through pressing cutting the board longitudinally drying the boards (160°C – 200°C) gluing, cutting and profile creation (product-dependent) stacking, packaging Explanation of the production sequence using the dry process: processing of the raw timber to form wood chips heating of the wood chips under steam pressure defibration of the wood chips through a defibration process drying of the fibres in the cyclone dryer addition of the bi-component fibres submitting the mixture to the production line heating and tracing the mixture to form an insulating mat cutting the wood fibre insulation to size stacking, packaging All of the residual products accumulated during production are either redirected into the production process or are directed to an internal energy recovery process. Quality assurance systems: CE marking in acc. with DIN EN 13171, MPA North Rhine-Westphalia, Germany FSC - SGSCH-COC-050039 DIN EN ISO 9001:2008 - 1210019741
Technical data:
The following information refers to the STEICOtherm product range. Information about further products specified within the scope of this EPD can be viewed at www.steico.net.
Declared unit:
The declared unit is 1m³ wood fibre insulation material with an average apparent density of 157.49 kg.

The calculation of the apparent density and of the proportions of the product substances in the declared unit was effected by means of the production volume-weighted calculation of the average of the products manufactured in the plant.

## Technical purpose
The products specified under 2.1 are not only pressure-resistant wood fibre insulation boards produced using the wet process, but also mat-shaped wood fibre insulation mats produced using the dry process.

STEICO wood fibre insulation is highly versatile and can be used for wall, roof and floor systems. It can be used as an acoustic base insulation against impact and airborne sound below parquet or laminate floors, as an insulation element that can be directly plastered for composite thermal insulation systems, and as flexible cavity insulation.

## Reference product
- 1 m³ Holzfaserdämmstoff: 1

## Inputs
- Erneuerbare Primärenergie als Energieträger (PERE) [MJ]: A1 8.74149, A2 0.00685666, A3 1177.1, C2 0.0029541, C3 6.31725, D 2363.05
- Erneuerbare Primärenergie zur stofflichen Nutzung (PERM) [MJ]: A1 2512.17, A2 0, A3 14.9497, C2 0, C3 -2527.12, D 0
- Total erneuerbare Primärenergie (PERT) [MJ]: A1 2520.91, A2 0.00685666, A3 1192.05, C2 0.0029541, C3 -2520.8, D 2363.05
- Nicht-erneuerbare Primärenergie als Energieträger (PENRE) [MJ]: A1 121.777, A2 5.20198, A3 1518.34, C2 2.2412, C3 73.3861, D -2063.52
- Nicht-erneuerbare Primärenergie zur stofflichen Nutzung (PENRM) [MJ]: A1 176.869, A2 0, A3 0, C2 0, C3 -176.869, D 0
- Total nicht erneuerbare Primärenergie (PENRT) [MJ]: A1 298.646, A2 5.20198, A3 1518.34, C2 2.2412, C3 -103.483, D -2063.52
- Einsatz von Sekundärstoffen (SM) [kg]: A1 0, A2 0, A3 0, C2 0, C3 0, D 0
- Erneuerbare Sekundärbrennstoffe (RSF) [MJ]: A2 0, A3 0, C2 0, C3 0
- Nicht erneuerbare Sekundärbrennstoffe (NRSF) [MJ]: A2 0, A3 0, C2 0, C3 0
- Einsatz von Süßwasserressourcen (FW) [m^3]: A1 4.58367, A2 9.75475e-5, A3 210.453, C2 4.2027e-5, C3 14.8075, D -0.316962

## Outputs
- Gefährlicher Abfall zur Deponie (HWD) [kg]: A1 0.00167889, A2 0, A3 1.1254e-5, C2 0, C3 0, D -0.000382159
- Entsorgter nicht gefährlicher Abfall (NHWD) [kg]: A1 0.000884026, A2 0, A3 0.0339905, C2 0, C3 0, D 6.8478e-8
- Entsorgter radioaktiver Abfall (RWD) [kg]: A1 0.00434611, A2 9.15768e-6, A3 0.356528, C2 3.94546e-6, C3 0.0255146, D -0.554699
- Komponenten für die Wiederverwendung (CRU) [kg]: A1 0, A2 0, A3 0, C2 0, C3 0, D 0
- Stoffe zum Recycling (MFR) [kg]: A1 0, A2 0, A3 0, C2 0, C3 157.497, D 0
- Stoffe für die Energierückgewinnung (MER) [kg]: A1 0, A2 0, A3 0.775763, C2 0, C3 157.497, D 0
- Exportierte elektrische Energie (EEE) [MJ]: A1 0, A2 0, A3 0, C2 0, C3 0, D 0
- Exportierte thermische Energie (EET) [MJ]: A1 0, A2 0, A3 0, C2 0, C3 0, D 0

## Impact indicators
- Globales Erwärmungspotenzial (GWP) [kg CO_(2)-Äq.]: A1 -220.716, A2 0.366783, A3 47.5186, C2 0.158023, C3 239.536, D -30.3006
- Abbau Potential der stratosphärischen Ozonschicht (ODP) [kg CFC11-Äq.]: A1 6.0022e-7, A2 7.33094e-10, A3 1.84736e-7, C2 3.15843e-10, C3 1.21101e-8, D -2.40883e-7
- Versauerungspotenzial von Boden und Wasser (AP) [kg SO_(2)-Äq.]: A1 0.0519606, A2 0.00157502, A3 0.251527, C2 0.000678576, C3 0.00220936, D -0.0126732
- Eutrophierungspotenzial (EP) [kg PO_(4)^(3)-Äq.]: A1 0.00935854, A2 0.000364877, A3 0.0600596, C2 0.000157202, C3 0.000235696, D 0.00632658
- Bildungspotential für troposphärisches Ozon (POCP) [kg Ethen-Äq.]: A1 0.00941757, A2 0.000172959, A3 0.0581219, C2 7.45168e-5, C3 0.0001757, D -0.00170857
- Potenzial für den abiotischen Abbau nicht fossiler Ressourcen (ADPE) [kg Sb-Äq.]: A1 1.7649e-5, A2 7.80769e-9, A3 1.92786e-5, C2 3.36383e-9, C3 4.8122e-7, D -9.69216e-6
- Potenzial für den abiotischen Abbau fossiler Brennstoffe (ADPF) [MJ]: A1 284.562, A2 5.15894, A3 617.859, C2 2.22265, C3 8.96006, D -423.889

## Use advice
Scope:
This Declaration is an EPD which reflects an average product of different product ranges which are produced in the following factory:

STEICO SE, Route de Cocumont, 47700 Casteljaloux, France

The following products were included in the calculation of the average:

· STEICOflex

· STEICOtherm

· STEICOtherm internal

· STEICOthermSD

· STEICOunderfloor

· STEICOfloor

· STEICOisorel

· STEICOroof

· STEICOprotect M

· STEICOprotect H

· STEICOuniversal

· STEICOspecial

This document is translated from the German Environmental Product Declaration into English. It is based on the German original version EPD-STE-20150327-IBD1-DE. The verifier has no influence on the quality of the translation.
System boundary:
The declaration type corresponds to an EPD "from cradle to gate, with options". It includes the production stage, i.e. from provision of the raw materials through to the works gate of the door factory (cradle to gate, Modules A1 to A3), and parts of the end-of-life stage (Modules C2 to C4). It also contains an analysis of the potentials and debits over and beyond the product's entire life cycle (Module D).

The information module A1 comprises the provision of all semi-finished goods that can be found in the declared unit as material. Transportation of these substances is considered in Module A2. Module A3 contains all work and expenditures of the manufacture of the product and its packaging from the cradle to the gate, except the aspects already considered in modules A1 and A2. Module C2 describes the transportation as far as the disposal or recycling point, Module C3 the preparation work which makes thermal recycling possible. Furthermore, the CO2 equivalents of the carbon inherent in the wood in the product, as well as the renewable and non-renewable primary energy sources in the product (PERM and PENRM), are booked as outflows in Module C3, in accordance with EN 16485. The debits and potentials resulting from the end-of-life thermal utilisation of the product and its packaging are analysed in Module D.

## Data sources
- Holzfaserdämmstoff.pdf
- GaBi Database (all versions)
- GaBi database SP26 2014
