# Nylon part (PA 6.6)

Dataset: ILCD process, EPD, generic dataset
Geography: DE
Reference year: 2021
Valid until: 2022
Classification: oekobau.dat: Kunststoffe / Profile / Kunststoffprofile hart
Owner: Sphera Solutions GmbH
Compliance: EN 15804+A2
Review: Dependent internal review by Sphera Solutions GmbH; Independent external review by GaBi user forum
Amounts: rows without a unit in brackets have none in this file; such an amount is in the reference unit of its flow, which a separate flow dataset defines
copyright: true
licenseType: Free of charge for all users and uses
accessRestrictions: The license conditions as stated on https://www.oekobaudat.de/ apply.
accessRestrictions: Es gelten die Lizenzbedingungen wie sie auf https://www.oekobaudat.de/ genannt sind.

## General comment
This data set has been modeled according to the European Standard EN 15804+A2 for Sustainable Building. Results are depicted in modules that allow the structured expression of results over the entire life cycle.

## Geography
The data set represents the country specific situation in Germany, focusing on the main technologies, the region specific characteristics and / or import statistics.

## Time period
Annual average

## Technology and included processes
The dataset contains the upstream chain of PA 6.6 and the process steps for the production of a casting. Balancing was conducted with 100% primary nylon without fiber reinforcement. The upstream chain of PA 6.6. dominates the LCA results.

In module C1, a manual dismantling (no loads) is assumed, collecting losses are neglected.
The transport in module C2 to the recycling plant takes place with a truck (50km).
Module C3 takes into account the grinding and thermal treatment (combustion) of the material. When calculating combustion emissions and credits, the specific calorific value of each material and the material composition are taken into account.
In module D credits for the substitution of electricity (German electricity mix) and thermal energy (from natural gas) are given.

## Technical purpose
Due to its high strength and thermal and chemical resistance, nylon parts find widespread application in building materials and building systems, e.g. as oil tank, thermal separation (facades), cable insulation and hoses.

## Safety margin
20 %. Product system depicted except for a few missing processes / flows. Technological, temporal and geographic representativeness partly given.

## Reference product
- Nylon part (PA 6.6): 1

## Inputs
- Use of renewable primary energy as energy carrier (PERE) [MJ]: A1-A3 16.1738, C2 0.00218616, C3 0.186719, D -4.97651
- Use of renewable primary energy resources used as raw materials (PERM) [MJ]: A1-A3 0, C2 0, C3 0, D 0
- Total use of renewable primary energy (PERT) [MJ]: A1-A3 16.1738, C2 0.00218616, C3 0.186719, D -4.97651
- Use of non renewable primary energy as energy carrier (PENRE) [MJ]: A1-A3 164.549, C2 0.0376677, C3 39.9924, D -13.1523
- Use of non renewable primary energy resources used as raw materials (PENRM) [MJ]: A1-A3 32, C2 0, C3 -32, D 0
- Total use of non renewable primary energy resource (PENRT) [MJ]: A1-A3 196.549, C2 0.0376677, C3 7.99243, D -13.1523
- Use of secondary material (SM) [kg]: A1-A3 0, C2 0, C3 0, D 0
- Use of renewable secondary fuels (SF) [MJ]: A1-A3 0, C2 0, C3 0, D 0
- Use of non renewable secondary fuels (NRSF) [MJ]: A1-A3 0, C2 0, C3 0, D 0
- Net use of fresh water (FW) [m3]: A1-A3 0.0258014, C2 1.94295e-6, C3 0.00683616, D -0.00184746

## Outputs
- Hazardous waste disposed (HWD) [kg]: A1-A3 3.28559e-8, C2 1.57439e-12, C3 4.19823e-10, D -4.66541e-9
- Non harzardous waste disposed (NHWD) [kg]: A1-A3 0.0987103, C2 6.08042e-6, C3 0.0143543, D -0.00727197
- Radioactive waste disposed (RWD) [kg]: A1-A3 0.00183969, C2 3.61471e-8, C3 2.28858e-5, D -0.000535249
- Components for re-use (CRU) [kg]: A1-A3 0, C2 0, C3 0, D 0
- Materials for recycling (MFR) [kg]: A1-A3 0, C2 0, C3 0, D 0
- Materials for energy recovery (MER) [kg]: A1-A3 0, C2 0, C3 1, D 0
- Exported electrical energy (EEE) [MJ]: A1-A3 0, C2 0, C3 3.98959, D 0
- Exported thermal energy (EET) [MJ]: A1-A3 0, C2 0, C3 7.57644, D 0

## Impact indicators
- Global Warming Potential - total (GWP-total) [kg CO2 eq.]: A1-A3 10.8046, C2 0.00286116, C3 2.87913, D -0.857712
- Global Warming Potential - fossil fuels (GWP-fossil) [kg CO2 eq.]: A1-A3 10.7302, C2 0.00284173, C3 2.87863, D -0.846627
- Global Warming Potential - biogenic (GWP-biogenic) [kg CO2 eq.]: A1-A3 0.0695327, C2 1.17716e-6, C3 0.000438642, D -0.00971333
- Global Warming Potential - land use and land use change (GWP-luluc) [kg CO2 eq.]: A1-A3 0.00490887, C2 1.82504e-5, C3 6.23521e-5, D -0.00137157
- Depletion potenzial of the stratospheric ozone layer (ODP) [kg CFC-11 eq.]: A1-A3 6.88015e-14, C2 7.27125e-19, C3 7.64138e-16, D -2.17341e-14
- Acidifcation potential, Accumulated Exceedance (AP) [Mole of H+ eq.]: A1-A3 0.0134953, C2 8.05696e-6, C3 0.00555419, D -0.00090447
- Eutrophication potential - freshwater (EP-freshwater) [kg P eq.]: A1-A3 1.78113e-5, C2 5.84435e-9, C3 1.32787e-7, D -2.27986e-6
- Eutrophication potential - marine (EP-marine) [kg N eq.]: A1-A3 0.00501093, C2 3.71167e-6, C3 0.00279206, D -0.000327624
- Eutrophication potential - terrestrial (EP-terrestrial) [Mole of N eq.]: A1-A3 0.051739, C2 4.15269e-5, C3 0.0314422, D -0.00348028
- Photochemical Ozone Creation Potential (POCP) [kg NMVOC eq.]: A1-A3 0.0180247, C2 7.23785e-6, C3 0.00710795, D -0.000851991
- Abiotic depletion potential - non-fossil resources (ADPE) [kg Sb eq.]: A1-A3 1.43776e-6, C2 2.47191e-10, C3 1.45014e-8, D -2.86649e-7
- Abiotic depletion potential - fossil resources (ADPF) [MJ]: A1-A3 202.939, C2 0.0376661, C3 1.59221, D -13.1502
- Water (user) deprivation potential (WDP) [m³ world equiv.]: A1-A3 0.0743545, C2 1.10468e-5, C3 0.289101, D -0.0111948

## Use advice
This dataset refers to the production of 1 kg nylon part (polyamide 6.6). Fiber reinforcement was not considered. The bulk density is 1130 - 1150 kg/m³. The data set can be used as an approximation for the estimation of parts from PA 6, as well as for the estimation of glass fiber reinforced parts from PA 6 and PA 6.6. (worst-case estimation).

The data set represents a cradle to gate inventory. It can be used to characterise the supply chain situation of the respective commodity in a representative manner. Combination with individual unit processes using this commodity enables the generation of user-specific (product) LCAs.

## Data sources
- GaBi databases
- Documentation of data quality management
- GaBi Database Edition 2021, CUP2021.01
- GaBi database (all versions)
