# Aluminium billets

Dataset: ILCD process, EPD, average dataset
Geography: EU-27
Reference year: 2021
Valid until: 2026
Classification: OEKOBAU.DAT: Metalle / Aluminium / Gussteile aus Aluminium
Classification: IBUCategories: 02 Bauprodukte / Metallbauprodukte und Zubehör / Produkte aus Aluminium und Aluminiumlegierungen
Method details: Produkte aus Aluminium und Aluminiumlegierungen.pdf
Generated by: Daxner & Merl GmbH
Registration number: EPD-ALU-20210069-IBB1-DE
Owner: Aluminium GmbH Nachrodt
Compliance: DIN EN 15804+A2; ISO 14025
Review: Accredited third party review by Institut Bauen und Umwelt e. V.
Amounts: rows without a unit in brackets have none in this file; such an amount is in the reference unit of its flow, which a separate flow dataset defines
copyright: true
licenseType: Free of charge for all users and uses
accessRestrictions: None

## General comment
Bei den hergestellten Strangpressbolzen der Aluminium-Legierung 6000 handelt es sich um Halbzeuge für die Herstellung von Aluminiumprofilen.

Die Strangpressbolzen können in verschiedenen Durchmessern produziert werden. Die Strangpressbolzen werden bis zu einer maximalen Länge von 8 Metern gefertigt.

## Technology and included processes
Charging - The metal mix for the required specification / alloy is created. Melting - The melting furnace is filled with the aluminum scrap according to the specification. Transfer - The liquid aluminum is transferred to the casting furnace. Alloying - The alloy is checked in the casting furnace. If necessary, missing alloying elements are added. Pouring - The aluminum is directed onto a so-called pouring table. Depending on the bolt diameter, there is a corresponding number of molds on this. The liquid aluminum flows through this and freezes within this mold. The extruded billets are created by continuously lowering the solidified aluminum. Testing - When the casting is finished, the bolts are pulled out of the casting pit and subjected to an ultrasonic test in order to be able to exclude possible defects and inclusions. Homogenization - In the next step, the extruded billets are subjected to a heat treatment in order to obtain a uniform structure within the aluminum. Sawing - The extruded billets are sawed to the length requested by the customer. Packaging - The bolts are tied together in bundles of at least two pieces and are ready for delivery. The entire manufacturing process is monitored by a certified quality management system (ISO 9001).

## Technical purpose
Aluminium-Strangpressbolzen werden in den Presswerken zu Aluminiumprofilen weiterverarbeitet. Die Anwendung ist somit von der Weiterverarbeitung und der Ausgestaltung des Endproduktes abhängig.

## Reference product
- Aluminium-Strangpressbolzen: 1

## Inputs
- Renewable primary energy as energy carrier (PERE) [MJ]: A1-A3 16.2209, C1 0, C2 0.00229661, C3 0, C4 0.00247131, D -5.6221
- Renewable primary energy resources as material utilization (PERM) [MJ]: A1-A3 0.0807855, C1 0, C2 0, C3 0, C4 0, D 0
- Total use of renewable primary energy resources (PERT) [MJ]: A1-A3 16.3017, C1 0, C2 0.00229661, C3 0, C4 0.00247131, D -5.6221
- Non renewable primary energy as energy carrier (PENRE) [MJ]: A1-A3 18.5735, C1 0, C2 0.0398788, C3 0, C4 0.0353129, D -12.0653
- Non renewable primary energy as material utilization (PENRM) [MJ]: A1-A3 0, C1 0, C2 0, C3 0, C4 0, D 0
- Total use of non renewable primary energy resources (PENRT) [MJ]: A1-A3 18.5735, C1 0, C2 0.0398788, C3 0, C4 0.0353129, D -12.0653
- Use of secondary material (SM) [kg]: A1-A3 0.826264, C1 0, C2 0, C3 0, C4 0, D 0
- Use of renewable secondary fuels (RSF) [MJ]: A1-A3 0, C1 0, C2 0, C3 0, C4 0, D 0
- Use of non renewable secondary fuels (NRSF) [MJ]: A1-A3 0, C1 0, C2 0, C3 0, C4 0, D 0
- Use of net fresh water (FW) [m^3]: A1-A3 0.0497912, C1 0, C2 2.67632e-6, C3 0, C4 4.71665e-7, D -0.0145238

## Outputs
- Hazardous waste disposed (HWD) [kg]: A1-A3 3.68497e-8, C1 0, C2 1.84406e-9, C3 0, C4 1.59996e-10, D -6.84454e-9
- Non hazardous waste disposed (NHWD) [kg]: A1-A3 0.829699, C1 0, C2 6.32048e-6, C3 0, C4 0.0500681, D -0.292289
- Radioactive waste disposed (RWD) [kg]: A1-A3 0.000178069, C1 0, C2 7.35004e-8, C3 0, C4 4.18186e-7, D -0.000724847
- Components for re-use (CRU) [kg]: A1-A3 0, C1 0, C2 0, C3 0, C4 0, D 0
- Materials for recycling (MFR) [kg]: A1-A3 0, C1 0, C2 0, C3 0.123578, C4 0, D 0
- Materials for energy recovery (MER) [kg]: A1-A3 0, C1 0, C2 0, C3 0, C4 0, D 0
- Exported electrical energy (EEE) [MJ]: A1-A3 0, C1 0, C2 0, C3 0, C4 0, D 0
- Exported thermal energy (EET) [MJ]: A1-A3 0, C1 0, C2 0, C3 0, C4 0, D 0

## Impact indicators
- Global Warming Potential total (GWP-total) [kg CO_(2)-Äq.]: A1-A3 1.89594, C1 0, C2 0.00303, C3 0, C4 0.00247, D -0.967372
- Global Warming Potential fossil fuels (GWP-fossil) [kg CO_(2)-Äq.]: A1-A3 1.88951, C1 0, C2 0.00299, C3 0, C4 0.00247, D -0.965104
- Global Warming Potential biogenic (GWP-biogenic) [kg CO_(2)-Äq.]: A1-A3 0.0057334, C1 0, C2 0.00957, C3 0, C4 0, D -0.00191751
- Global Warming Potential luluc (GWP-luluc) [kg CO_(2)-Äq.]: A1-A3 0.000689912, C1 0, C2 2.40968e-5, C3 0, C4 2.3996e-6, D -0.00035073
- Depletion potential of the stratospheric ozone layer (ODP) [kg CFC11-Äq.]: A1-A3 3.31443e-15, C1 0, C2 5.46374e-19, C3 0, C4 5.47224e-18, D -7.80981e-16
- Acidification potential of land and water (AP) [mol H^(+)-Äq.]: A1-A3 0.0106887, C1 0, C2 1.01178e-5, C3 0, C4 7.92422e-6, D -0.00500533
- Eutrophication potential aquatic freshwater (EP-freshwater) [kg PO_(4)-Äq.]: A1-A3 1.49827e-6, C1 0, C2 9.0675e-9, C3 0, C4 1.88839e-9, D -3.59989e-7
- Eutrophication potential aquatic marine (EP-marine) [kg N-Äq.]: A1-A3 0.00175715, C1 0, C2 4.56448e-6, C3 0, C4 1.92694e-6, D -0.000623729
- Eutrophication potential terrestrial (EP-terrestrial) [mol N-Äq.]: A1-A3 0.0192144, C1 0, C2 5.0988e-5, C3 0, C4 2.11443e-5, D -0.00680441
- Formation potential of tropospheric ozone photochemical oxidants (POCP) [kg NMVOC-Äq.]: A1-A3 0.00519521, C1 0, C2 8.96777e-6, C3 0, C4 6.10247e-6, D -0.00194893
- Abiotic depletion potential for non fossil resources (ADPE) [kg Sb-Äq.]: A1-A3 7.34563e-7, C1 0, C2 2.40723e-10, C3 0, C4 1.66733e-10, D -1.10881e-7
- Abiotic depletion potential for fossil resources (ADPF) [MJ]: A1-A3 18.5284, C1 0, C2 0.0397195, C3 0, C4 0.0353063, D -12.0614
- Water use (WDP) [m^(3) Welt-Äq. entzogen]: A1-A3 0.590567, C1 0, C2 2.90286e-5, C3 0, C4 -2.65715e-5, D -0.150335
- Incidence of disease due to PM emissions (PM) [Krankheitsfälle]
- Human exposure efficiency relative to U235 (IR) [kBq U235-Äq.]
- Comparative toxic unit for ecosystems (ETP-fw) [CTUe]
- Comparative toxic unit for humans (carcinogenic) (HTP-c) [CTUh]
- Comparative toxic unit for humans (noncarcinogenic) (HTP-nc) [CTUh]
- Soil quality index (SQP) [SQP]

## Use advice
Gültigkeitsbereich:
Die vorliegende Produktdeklaration bezieht sich auf eine deklarierte Einheit von 1 kg Aluminium-Strangpressbolzen produziert an den beiden Giesserein in Nachrodt (Deutschland) und Schlins (Österreich).

Es handelt sich um einen gewichteten Durchschnitt der beiden Werke. Dieser bildet die Gesamtproduktion der Alu-met GmbH ab.
Systemgrenze:
Die Ökobilanz für Strangpressbolzen beinhaltet eine cradle-to-gate-Betrachtung (Wiege bis zum Werkstor) der auftretenden Umweltwirkungen mit Optionen.

Die folgenden Lebenszyklusphasen werden in der Analyse berücksichtigt:

Modul A1–A3 | Produktionsstadium

Das Produktionsstadium beinhaltet die Aufwendungen der Herstellung der eingesetzten Grundstoffe (Primäraluminium, Legierungselemente, Betriebsstoffe etc.), die Transporte aller Rohstoffe inklusive der eingesetzten Aluminiumschrotte sowie die Umweltaufwendungen aus den Gießereien an den Standorten Schlins (AT) und Nachrodt (DE). Eingesetztes Sekundäraluminium geht dabei lastenfrei in die Berechnung ein. Innerhalb der Werksgrenzen werden die Umweltwirkungen des Umschmelz-Prozesses betrachtet. Die Energiebereitstellung am Standort erfolgt über Erdgas und elektrische Energie aus dem regionalen Stromnetz. Auch die Produktion der Verpackung der Strangpressbolzen ist in Modul A1–A3 erfasst.

Modul C1 | Rückbau

Für das End-of-Life-Szenario wird angenommen, dass das Endprodukt nicht mit anderen Materialien verbunden ist und sortenrein rückgebaut werden kann. Die mit dem Rückbau verbundenen Aufwände werden damit als gering eingeschätzt und sind somit vernachlässigbar.

Modul C2 | Transport

Modul C2 beinhaltet den Transport zur Abfallbehandlung. Dazu wird der Transport via LKW über 50 km Transportdistanz als repräsentatives Szenario angesetzt.

Modul C3 | Abfallbehandlung

Der Produktfluss, der das Modul D zum Recycling erreicht, verlässt das Produktsystem in C3.

Aufwendungen für die Zerkleinerung und Sortierung des Aluminiumschrottes sind aufgrund der Geringfügigkeit der zu erwartenden Umweltwirkungen nicht enthalten.

Modul C4 | Entsorgung

Das Modul C4 deklariert die durch die Deponierung

(5 % des Produktes) entstehenden Umweltwirkungen.

Modul D | Gutschriften und Lasten außerhalb der Systemgrenze

Im Modul D werden die Substitutionspotenziale von Primäraluminium durch ein Recyclingszenario (95 % des Produktes) dargestellt.

## Data sources
- GaBi Database (all versions)
- GaBi database SP40 2020
