# EVALON®dual, mechanisch befestigt oder lose unter Auflast

Dataset: ILCD process, EPD, specific dataset
Geography: DE
Reference year: 2016
Valid until: 2021
Classification: OEKOBAU.DAT: Kunststoffe / Dachbahnen / EVA-Dachbahnen (Etylen-Vinylacetat)
Classification: IBUCategories: 02 Bauprodukte / Abdichtungen / Dach- und Dichtungsbahnsysteme aus Kunststoffen und Elastomeren
Method details: Dach- und Dichtungsbahnsysteme aus Kunststoffen und Elastomeren.pdf
Owner: alwitra
Compliance: DIN EN 15804; ISO 14025
Review: Accredited third party review by IBU
Amounts: rows without a unit in brackets have none in this file; such an amount is in the reference unit of its flow, which a separate flow dataset defines
copyright: true

## General comment
In dieser Umweltproduktdeklaration werden bitumen-verträgliche Dach- und Dichtungsbahnensysteme aus EVAC -Ethylen-Vinyalcetat-Copolymere (in Deutschland EVA) beschrieben. Das deklarierte Produkt besteht aus einer Hochpolymerlegierung aus EVA-Terpolymer und PVC inkl. Zusatzstoffen. Die Dach- und Dichtungsbahnen werden mit einer innenliegenden Verstärkung im Kalanderverfahren hergestellt.
Die Nahtfügung erfolgt mit Heißluft oder Quellschweißmittel.

## Technology and included processes
Grundstoffe/Hilfsstoffe: EVALON® -Dach- und Dichtungsbahnen bestehen aus (25 – 50 %) Ethylen-Vinylacetat-Terpolymer -EVA; (25-40 %) Polyvinylchlorid-PVC; (10 – 15 %) mineralischen Flammschutz; (1-2 %) Ca/Zn-Stabilisator; (3-6 %) epoxidiertes Sojabohnenöl; (5- 10 %) Ruß und Additiven; (0-12 %) Titandioxid; (0-25%) Pigmente -je nach Farbe und (3-5%) Gewebe/Gelege aus Polyester- oder Glasgitter. Herstellung: Die Grundstoffe und Vorprodukte werden in einem Mischer vorgemischt und anschließend zusammen mit den anderen Rezepturbestandteilen in einem Extruder plastifiziert. Die Kunststoffmasse wird über ein Mischwalzwerk als Zwischenstufe einem Kalander zugeführt, hier zu einer homogenen Dach- oder Dichtungsbahn ausgewalzt und mit der innenliegenden Verstärkung. Über spezielle Kühlwalzen erfolgt die Abkühlung der fertigen Bahn, die anschließend zu den endgültigen Maßen beschnitten und als Rollenware konfektioniert wird. Alle anfallenden unverstärkten Produktionsreste (Randstreifen) werden recycelt, d.h. der Produktion wieder direkt zugeführt. Die Herstellung unterliegt dem eingeführten Qualitätsmanagementsystem nach /ISO 9001/ (Zertifikat Nr. 01 100 5463). Zertifizierungsstelle ist der TÜV Rheinland, Cert GmbH. Außerdem erfolgen externe Qualitätsüberprüfungen (Fremdüberwachungen) durch die Staatliche Materialprüfungsanstalt Darmstadt.
Technische Daten:
Es gelten die Daten der DoP EVALON® dual Dach- und Dichtungsbahn
Deklarierte Einheit:
Die deklarierte Einheit ist 1 m² installiertes EVALON©dual Dach-und Dichtungsbahnensystem

## Technical purpose
Die Einsatzzwecke des deklarierten Produktes sind:

Dachabdichtung

Einlagige Abdichtung von nicht genutzten und genutzten Dächern in flacher und geneigter Form. Die Bahnen werden je nach Anforderung wie folgt verlegt:

- mechanisch befestigt oder

- lose unter Auflast (Bekiesung, Platten, Begrünung)

Bei der Verarbeitung ist die Verlegeanleitung des Herstellers einzuhalten.

## Scenarios
- S1: 100% Energierückgewinnung
- S2: 100% Recycling

## Reference product
- 1m² Dach- und Dichtungsbahn EVALON® dual: 1

## Inputs
- Erneuerbare Primärenergie als Energieträger (PERE) [MJ]: A1-A3 18.1, A4 0.0289, A5 0.944, C2 (S1) 0.00421, C2 (S2) 0.062, C3 (S1) 0.329, C3 (S2) 4.27, D (S1) -6.1, D (S2) -7.63
- Erneuerbare Primärenergie zur stofflichen Nutzung (PERM) [MJ]: A1-A3 0
- Total erneuerbare Primärenergie (PERT) [MJ]: A1-A3 18.1, A4 0.0289, A5 0.944, C2 (S1) 0.00421, C2 (S2) 0.062, C3 (S1) 0.329, C3 (S2) 4.27, D (S1) -6.1, D (S2) -7.63
- Nicht-erneuerbare Primärenergie als Energieträger (PENRE) [MJ]: A1-A3 96, A4 0.426, A5 7.67, C2 (S1) 0.0619, C2 (S2) 0.913, C3 (S1) 1.63, C3 (S2) 11.7, D (S1) -35.3, D (S2) -71.9
- Nicht-erneuerbare Primärenergie zur stofflichen Nutzung (PENRM) [MJ]: A1-A3 53
- Total nicht erneuerbare Primärenergie (PENRT) [MJ]: A1-A3 149, A4 0.426, A5 7.67, C2 (S1) 0.0619, C2 (S2) 0.913, C3 (S1) 1.63, C3 (S2) 11.7, D (S1) -35.3, D (S2) -71.9
- Einsatz von Sekundärstoffen (SM) [kg]: A1-A3 0, A4 0, A5 0, C2 (S1) 0, C2 (S2) 0, C3 (S1) 0, C3 (S2) 0, D (S1) 0, D (S2) 0
- Erneuerbare Sekundärbrennstoffe (RSF) [MJ]: A1-A3 0, A4 0, A5 0, C2 (S1) 0, C2 (S2) 0, C3 (S1) 0, C3 (S2) 0, D (S1) 0, D (S2) 0
- Nicht erneuerbare Sekundärbrennstoffe (NRSF) [MJ]: A1-A3 0, A4 0, A5 0, C2 (S1) 0, C2 (S2) 0, C3 (S1) 0, C3 (S2) 0, D (S1) 0, D (S2) 0
- Einsatz von Süßwasserressourcen (FW) [m^3]: A1-A3 0.0894, A4 4.37e-5, A5 0.00487, C2 (S1) 6.35e-6, C2 (S2) 9.36e-5, C3 (S1) 0.00899, C3 (S2) 0.00325, D (S1) -0.00458, D (S2) -0.0447

## Outputs
- Gefährlicher Abfall zur Deponie (HWD) [kg]: A1-A3 0.00183, A4 5.48e-8, A5 9.16e-5, C2 (S1) 7.97e-9, C2 (S2) 1.17e-7, C3 (S1) 1.89e-8, C3 (S2) 1.3e-7, D (S1) -2.18e-8, D (S2) -0.00191
- Entsorgter nicht gefährlicher Abfall (NHWD) [kg]: A1-A3 0.513, A4 5.26e-5, A5 0.0263, C2 (S1) 7.66e-6, C2 (S2) 0.000113, C3 (S1) 0.369, C3 (S2) 0.00964, D (S1) -0.0162, D (S2) -0.255
- Entsorgter radioaktiver Abfall (RWD) [kg]: A1-A3 0.00429, A4 5.77e-7, A5 0.000224, C2 (S1) 8.39e-8, C2 (S2) 1.24e-6, C3 (S1) 7.7e-5, C3 (S2) 0.00101, D (S1) -0.00147, D (S2) -0.00202
- Komponenten für die Wiederverwendung (CRU) [kg]: D (S1) 0, D (S2) 0
- Stoffe zum Recycling (MFR) [kg]: C3 (S1) 0, C3 (S2) 1.99, D (S1) 0, D (S2) 0
- Stoffe für die Energierückgewinnung (MER) [kg]: C3 (S1) 1.99, D (S1) 0, D (S2) 0
- Exportierte elektrische Energie (EEE) [MJ]: A5 0.249, C3 (S1) 6.94
- Exportierte thermische Energie (EET) [MJ]: A5 0.544, C3 (S1) 17

## Impact indicators
- Globales Erwärmungspotenzial (GWP) [kg CO_(2)-Äq.]: A1-A3 6.44, A4 0.0311, A5 0.483, C2 (S1) 0.00452, C2 (S2) 0.0666, C3 (S1) 3.65, C3 (S2) 0.899, D (S1) -2.42, D (S2) -2.96
- Abbau Potential der stratosphärischen Ozonschicht (ODP) [kg CFC11-Äq.]: A1-A3 1.07e-9, A4 6.46e-14, A5 5.44e-11, C2 (S1) 9.39e-15, C2 (S2) 1.38e-13, C3 (S1) 3.83e-12, C3 (S2) 5.01e-11, D (S1) -7.24e-11, D (S2) -5.93e-10
- Versauerungspotenzial von Boden und Wasser (AP) [kg SO_(2)-Äq.]: A1-A3 0.0186, A4 7.22e-5, A5 0.000966, C2 (S1) 1.05e-5, C2 (S2) 0.000155, C3 (S1) 0.000851, C3 (S2) 0.00135, D (S1) -0.00255, D (S2) -0.00827
- Eutrophierungspotenzial (EP) [kg PO_(4)^(3)-Äq.]: A1-A3 0.00295, A4 1.8e-5, A5 0.000153, C2 (S1) 2.62e-6, C2 (S2) 3.86e-5, C3 (S1) 7.09e-5, C3 (S2) 0.000229, D (S1) -0.000398, D (S2) -0.00133
- Bildungspotential für troposphärisches Ozon (POCP) [kg Ethen-Äq.]: A1-A3 0.00756, A4 -2.27e-5, A5 0.000671, C2 (S1) -3.3e-6, C2 (S2) -4.86e-5, C3 (S1) 4.51e-5, C3 (S2) 4.04e-5, D (S1) -0.000283, D (S2) -0.00378
- Potenzial für den abiotischen Abbau nicht fossiler Ressourcen (ADPE) [kg Sb-Äq.]: A1-A3 4.38e-5, A4 2.36e-9, A5 2.19e-6, C2 (S1) 3.43e-10, C2 (S2) 5.06e-9, C3 (S1) 5.42e-7, C3 (S2) 3.78e-7, D (S1) -5.93e-7, D (S2) -2.21e-5
- Potenzial für den abiotischen Abbau fossiler Brennstoffe (ADPF) [MJ]: A1-A3 138, A4 0.424, A5 7.1, C2 (S1) 0.0617, C2 (S2) 0.91, C3 (S1) 1.44, C3 (S2) 9.13, D (S1) -31.7, D (S2) -66.8

## Use advice
Gültigkeitsbereich:
EVALON®dual Dach-und Dichtungsbahnen der Fa. alwitra GmbH & Co. Klaus Göbel werden am Standort 54411 Hermeskeil gefertigt.
Systemgrenze:
Diese Ökobilanz adressiert neben dem Lebenszyklusstadium der Produktherstellung (Wiege bis Werkstor) weitere Optionen, die nachfolgend aufgelistet werden:

- Rohstoffgewinnung und –bereitstellung (A1)

- Transporte der Grundstoffe (A2)

- ggfs. Kaschierung (A1)

- Herstellung der Bahnen (A3)

- Verpackung der Bahnen (inklusive Transporte der Verpackungsmaterialien und End of life)

- Transport zur Baustelle (A4)

- Installation auf der Baustelle (Lagesicherung mit Klebstoffen und Nahtverschweißung) (A5)

- End of life der Bahnen (inklusive Transporte) – stofflich und thermisch (Module C2, C3 und D)

## Data sources
- EVALON®dual, mechanisch befestigt oder lose unter Auflast.pdf
- GaBi Database (all versions)
- GaBi database SP29 2016
