# PU thermal insulation boards with mineral fleece facing

Dataset: ILCD process, EPD, average dataset
Geography: DE
Reference year: 2021
Valid until: 2026
Classification: OEKOBAU.DAT: Dämmstoffe / Polyurethan-Hartschaum (PU) / PU mit Mineralvlies
Classification: IBUCategories: 02 Bauprodukte / Wärmedämmungsprodukte / Dämmstoffe aus Schaumkunststoffen
Method details: Dämmstoffe aus Schaumkunststoffen.pdf
Generated by: PE INTERNATIONAL AG
Registration number: EPD-IVP-20210002-IBE2-DE
Owner: Industrieverband Polyurethan-Hartschaum e.V.
Compliance: DIN EN 15804; ISO 14025
Review: Accredited third party review by Institut Bauen und Umwelt e. V.
Amounts: rows without a unit in brackets have none in this file; such an amount is in the reference unit of its flow, which a separate flow dataset defines
copyright: true
licenseType: Free of charge for all users and uses
accessRestrictions: None

## General comment
Polyurethane rigid foam (PU) is a closed-cell foam and factory-made thermal insulating material, which is used in the form of insulation boards for insulating buildings, as well as for the insulation of building equipment and industrial installations. The polyurethane insulating material (PU) product family consists mostly of the product variant polyurethane (PUR) - see EN 13165. PU insulating materials are produced, inter alia, as insulation boards with flexible facings.

This Product Declaration covers PU insulation boards with mineral fleece facings on both sides.

## Technology and included processes
Polyurethane rigid foam insulation boards with flexible mineral fleece facings are produced in a continuous process on a double belt line. In this process, the polyurethane reaction mixture pours from a mixing head onto the bottom mineral fleece facing, where it foams up and glues – still within the line’s pressure area – with the top mineral fleece facing. After passing the double belt line, the foam boards are cut to the desired dimensions. Quality assurance The declared products are subject to quality controls. Quality assurance is based on surveillance and certification by independent Notified Bodies.
Technical data:
For determining technical data, testing methods as stated in DIN EN 13165 are used. The gross density of PU insulation boards with mineral fleece facings for building construction is approx. 31 - 32 kg/m³.

Depending on their thickness, the boards are manufactured with thermal conductivity levels WLS 026 up to WLS 029. These levels are equivalent to thermal conductivity design values from 0.026 W/(m.K) up to 0.029 W/(m.K). Capillary-actively modified insulation boards have design values of 0.031 W/(m.K). In addition, the nominal value of the thermal resistance from RD = 4.29 (m².K)/W to 4.80 (m².K)/W and the thickness from 25 mm to 28 mm of the insulation board at RD = 1 (m².K)/W can be specified.

Nominal compressive stress or nominal compressive strength at 10% deformation is 100 kPa (dh) or 150 kPa (ds) acc. to DIN 4108-10. Higher compressive strength is possible. Nominal tensile strength perpendicular to the insulation board plane is 40 kPa. Higher tensile strength is possible.

The water vapour diffusion resistance factor µ of polyurethane rigid foam is between 40 and 200 acc. to DIN 4108-4.

Maximum moisture absorption of polyurethane rigid foam at diffusion and condensation is at approx. 6 % by volume. Water absorption at total immersion of a 60 mm thick PU insulation board with mineral fleece facings was measured at 1.3 % by volume after 28 days. Moisture absorption after freezing and thawing was between 2 % and 7 % by volume (measured at insulating material without facings).

Polyurethane rigid foam is a distinctive thermosetting material and therefore cannot be melted.
Declared unit:
The declared unit is 1 m² of installed PU thermal insulation board with mineral fleece facing (on both sides) and has the following specifications:

## Technical purpose
The scope of application of PU rigid foam insulation materials includes thermal insulation in building construction (e.g. pitched roofs, flat roofs, floors, ceilings and exterior walls (inside and outside)).

Furthermore, PU rigid foam is used for insulating building equipment and industrial installations.

## Reference product
- 1 m² installierte PU-Dämmplatte mit Mineralvlies-Deckschicht: 1

## Inputs
- Renewable primary energy as energy carrier (PERE) [MJ]: A1-A3 17.1, A4 0.357, A5 1.26, C2 0.0689, C3 1.144, D -14.1
- Renewable primary energy resources as material utilization (PERM) [MJ]: A1-A3 1.23, A4 0, A5 -1.23, C2 0, C3 0, D 0
- Total use of renewable primary energy resources (PERT) [MJ]: A1-A3 18.3, A4 0.357, A5 0.028, C2 0.0689, C3 1.144, D -14.1
- Non renewable primary energy as energy carrier (PENRE) [MJ]: A1-A3 89.9, A4 6.36, A5 22.5, C2 1.23, C3 174.01, D -66.2
- Non renewable primary energy as material utilization (PENRM) [MJ]: A1-A3 192, A4 0, A5 -22.4, C2 0, C3 -170, D 0
- Total use of non renewable primary energy resources (PENRT) [MJ]: A1-A3 282, A4 6.36, A5 0.113, C2 1.23, C3 4.33, D -66.2
- Use of secondary material (SM) [kg]: A1-A3 0, A4 0, A5 0, C2 0, C3 0, D 0
- Use of renewable secondary fuels (RSF) [MJ]: A1-A3 0, A4 0, A5 0, C2 0, C3 0, D 0
- Use of non renewable secondary fuels (NRSF) [MJ]: A1-A3 0, A4 0, A5 0, C2 0, C3 0, D 0
- Use of net fresh water (FW) [m^3]: A1-A3 0.0814, A4 0.000414, A5 0.000887, C2 7.98e-5, C3 0.02259, D -0.0164

## Outputs
- Hazardous waste disposed (HWD) [kg]: A1-A3 1.13e-5, A4 2.96e-7, A5 8.44e-11, C2 5.71e-8, C3 3.309e-9, D -2.65e-8
- Non hazardous waste disposed (NHWD) [kg]: A1-A3 0.259, A4 0.000974, A5 0.00378, C2 0.000188, C3 0.14623, D -0.0301
- Radioactive waste disposed (RWD) [kg]: A1-A3 0.00629, A4 7.88e-6, A5 8.97e-6, C2 1.52e-6, C3 0.000368, D -0.00482
- Components for re-use (CRU) [kg]: A1-A3 0, A4 0, A5 0, C2 0, C3 0, D 0
- Materials for recycling (MFR) [kg]: A1-A3 0, A4 0, A5 0, C2 0, C3 0, D 0
- Materials for energy recovery (MER) [kg]: A1-A3 0, A4 0, A5 0, C2 0, C3 0, D 3.81
- Exported electrical energy (EEE) [MJ]: A1-A3 0, A4 0, A5 0.411, C2 0, C3 15.4, D 0
- Exported thermal energy (EET) [MJ]: A1-A3 0, A4 0, A5 0.731, C2 0, C3 27.8, D 0

## Impact indicators
- Global warming potential (GWP) [kg CO_(2)-Äq.]: A1-A3 11.6, A4 0.465, A5 0.392, C2 0.0896, C3 9.2968, D -3.82
- Depletion potential of the stratospheric ozone layer (ODP) [kg CFC11-Äq.]: A1-A3 1.91e-5, A4 7.65e-17, A5 1.11e-16, C2 1.47e-17, C3 4.51e-15, D -5.31e-14
- Acidification potential of land and water (AP) [kg SO_(2)-Äq.]: A1-A3 0.022, A4 0.000376, A5 9.08e-5, C2 7.26e-5, C3 0.003747, D -0.00429
- Eutrophication potential (EP) [kg PO_(4)^(3)-Äq.]: A1-A3 0.00314, A4 7.01e-5, A5 2.2e-5, C2 1.35e-5, C3 0.0009177, D -0.000576
- Formation potential of tropospheric ozone photochemical oxidants (POCP) [kg Ethen-Äq.]: A1-A3 0.0121, A4 -6.12e-6, A5 6.31e-6, C2 -1.18e-6, C3 0.0002415, D -0.000437
- Abiotic depletion potential for non fossil resources (ADPE) [kg Sb-Äq.]: A1-A3 1.6e-6, A4 3.43e-8, A5 1.29e-9, C2 6.61e-9, C3 5.17e-8, D -6.62e-7
- Abiotic depletion potential for fossil resources (ADPF) [MJ]: A1-A3 267, A4 6.34, A5 0.0908, C2 1.22, C3 3.39, D -54.1

## Use advice
Scope:
This EPD applies to all declared products of the IVPU's member companies Karl Bachl GmbH & Co KG, Paul Bauder GmbH & Co KG, IKO Insulation BV, Kingspan Insulation GmbH & Co KG, Linzmeier Bauelemente GmbH, puren gmbh, Recticel Dämmsysteme GmbH, Steinbacher Dämmstoff-GmbH, Unilin Insulation bv. The IVPU represents more than 90% of the companies within the German polyurethane insulating materials market. This EPD is based on weighted averages which have been determined on the basis of the single values originating from the factories of the aforementioned manufacturing companies (see section 3.1).
System boundary:
Type of EPD: cradle to gate - with options

The life cycle assessment considers the following steps of the life cycle:

· production and supply of raw materials (A1)

· transporting raw materials (A2)

· production including packaging (A3)

· transport to construction site (A4)

· installation in buildings (recycling or thermal treatment of cutting leftovers and packaging waste) (A5)

· transport to End-of-Life (C2)

· waste treatment: energy for shredders (C3)

· thermal treatment (PU foam) (C3)

· recycling or use potentials beyond the system's boundary (D).

## Data sources
- GaBi Database (all versions)
- GaBi database SP40 2020
