# Door - Lindab A/S - Sectional door LDC

Dataset: ILCD process, EPD, specific dataset
Geography: DK
Reference year: 2017
Valid until: 2022
Classification: OEKOBAU.DAT: Komponenten von Fenstern und Vorhangfassaden / Türen und Tore / Stahl
Synonyms: Sektionaltor; Combined; LDC Steel
Method details: EPD Sectional doors; Produktkategorieregeln Teil A; Produktkategorieregeln Teil B – für Türen und Tore
Owner: Lindab A/S
Compliance: EN 15804
Review: Independent external review by Patrick Wortner
Amounts: rows without a unit in brackets have none in this file; such an amount is in the reference unit of its flow, which a separate flow dataset defines
copyright: true

## General comment
This dataset is modelled according to the European Standard EN 15804 for Sustainable Construction. Results are declared in modules, which allow the structured expression of results throughout the life cycle. It contains the modules A1-A3, A4, A5, B1, B2, B3, B4, B5, B6, B7, C1, C2, C3, C4, D.
The comparison with other products is only permissible if the application in the building is comparable. A comparison or the evaluation of EPD data is only possible, if the datasets have been created according to EN 15804. The building context or the product-specific performance characteristics must be considered.

## Geography
This data set represents the company Lindab A/S, Denmark considering the most important technologies and the legal framework.

## Time period
annual average

## Technology and included processes
The LCA results include the lifecycle stages for the raw material extraction and processing, processing of secondary material input, their transport to the manufacturer as well as the maufacturing itself, including provision of all materials, products and energy, as well as waste processing up to the end-of waste

## Technical purpose
LDC overhead sectional door are suitable for nearly all building types, regarding function, design and installation.

## Reference product
- Door - Lindab A/S - Sectional door LDC: 1

## Inputs
- Use of net fresh water (FW) [m3]: A1-A3 0.193, A4 0.000209, A5 0.00301, B1 0, B4 0, B5 0, B6 0.00709, B7 0, C1 0.00219, C2 0.000103, C3 0.000515, C4 0.00591, D -0.274
- Use of non renewable primary energy (PENRE) [MJ]: A1-A3 708, A4 1.47, A5 7.87, B1 0, B4 0, B5 0, B6 27.8, B7 0, C1 4.28, C2 0.729, C3 1.19, C4 65.9, D -181
- Use of non renewable primary energy resources used as raw materials (PENRM) [MJ]: A1-A3 65.2, A4 0, A5 0, B1 0, B2 0, B3 0, B4 0, B5 0, B6 0, B7 0, C1 0, C2 0, C3 0, C4 -65.2, D 0
- Use of non renewable secondary fuels (NRSF) [MJ]: A1-A3 0, A4 0, A5 0, B1 0, B2 0, B3 0, B4 0, B5 0, B6 0, B7 0, C1 0, C2 0, C3 0, C4 0, D 0
- Use of renewable primary energy (PERE) [MJ]: A1-A3 45.4, A4 0.0834, A5 47.7, B1 0, B4 0, B5 0, B6 37.4, B7 0, C1 1.61, C2 0.0413, C3 0.334, C4 0.09, D -114
- Use of renewable primary energy resources used as raw materials (PERM) [MJ]: A1-A3 47.4, A4 0, A5 -47.4, B1 0, B2 0, B3 0, B4 0, B5 0, B6 0, B7 0, C1 0, C2 0, C3 0, C4 0, D 0
- Use of renewable secondary fuels (RSF) [MJ]: A1-A3 0, A4 0, A5 0, B1 0, B2 0, B3 0, B4 0, B5 0, B6 0, B7 0, C1 0, C2 0, C3 0, C4 0, D 0
- Use of secondary material (SM) [kg]: A1-A3 0, A4 0, A5 0, B1 0, B2 0, B3 0, B4 0, B5 0, B6 0, B7 0, C1 0, C2 0, C3 0, C4 0, D 0
- Total use of non renewable primary energy resource (PENRT) [MJ]: A1-A3 773, A4 1.47, A5 7.87, B1 0, B4 0, B5 0, B6 27.8, B7 0, C1 4.28, C2 0.729, C3 1.19, C4 0.749, D -181
- Total use of renewable primary energy resources (PERT) [MJ]: A1-A3 92.8, A4 0.0834, A5 0.376, B1 0, B4 0, B5 0, B6 37.4, B7 0, C1 1.61, C2 0.0413, C3 0.334, C4 0.09, D -114

## Outputs
- Components for re-use (CRU) [kg]: A1-A3 0, A4 0, A5 0, B1 0, B2 0, B3 0, B4 0, B5 0, B6 0, B7 0, C1 0, C2 0, C3 0, C4 0, D 0
- Exported electrical energy (EEE) [MJ]: A1-A3 0, A4 0, A5 0, B1 0, B2 0, B3 0, B4 0, B5 0, B6 0, B7 0, C1 0, C2 0, C3 0, C4 0, D 0
- Exported thermal energy (EET) [MJ]: A1-A3 0, A4 0, A5 0, B1 0, B2 0, B3 0, B4 0, B5 0, B6 0, B7 0, C1 0, C2 0, C3 0, C4 0, D 0
- Hazardous waste disposed (HWD) [kg]: A1-A3 0.00096, A4 1.11e-7, A5 5.65e-9, B1 0, B2 2.85e-9, B3 7.32e-8, B4 0, B5 0, B6 4.55e-8, B7 0, C1 2.01e-9, C2 5.51e-8, C3 7.57e-10, C4 9.83e-9, D -1.58e-5
- Materials for energy recovery (MER) [kg]: A1-A3 0, A4 0, A5 0, B1 0, B2 0, B3 0, B4 0, B5 0, B6 0, B7 0, C1 0, C2 0, C3 2.59, C4 0, D 0
- Materials for recycling (MFR) [kg]: A1-A3 0.137, A4 0, A5 0, B1 0, B2 0, B3 0, B4 0, B5 0, B6 0, B7 0, C1 0, C2 0, C3 17.5, C4 0, D 0
- Non hazardous waste dispose (NHWD) [kg]: A1-A3 1.74, A4 0.000124, A5 0.0394, B1 0, B2 9.55e-5, B3 0.0678, B4 0, B5 0, B6 0.101, B7 0, C1 0.00301, C2 6.13e-5, C3 0.00072, C4 1.94, D -5.27
- Radioactive waste disposed (RWD) [kg]: A1-A3 0.00892, A4 2.11e-6, A5 7.23e-5, B1 0, B2 2.47e-5, B3 0.00298, B4 0, B5 0, B6 6.99e-5, B7 0, C1 0.000709, C2 1.04e-6, C3 0.00018, C4 2.73e-5, D -0.0207

## Impact indicators
- Abiotic depletion potential for non fossil resources (ADPE) [kg Sb-Äqv.]: A1-A3 0.000346, A4 7.09e-9, A5 4.01e-8, B1 0, B4 0, B5 0, B6 1.67e-6, B7 0, C1 1.24e-7, C2 3.51e-9, C3 2.22e-8, C4 2.49e-8, D -9.92e-6
- Abiotic depletion potential for fossil resources (ADPF) [MJ]: A1-A3 750, A4 1.47, A5 7.69, B1 0, B4 0, B5 0, B6 27.6, B7 0, C1 2.49, C2 0.726, C3 0.741, C4 0.68, D -129
- Acidification potential of soil and water (AP) [kg SO2-Äqv.]: A1-A3 0.143, A4 0.000649, A5 0.00215, B1 0, B4 0, B5 0, B6 0.00396, B7 0, C1 0.000665, C2 0.000321, C3 0.000191, C4 0.000359, D -0.0525
- Eutrophication potential (EP) [kg Phosphat-Äqv.]: A1-A3 0.0148, A4 0.000162, A5 0.00023, B1 0, B4 0, B5 0, B6 0.000534, B7 0, C1 6.23e-5, C2 8.04e-5, C3 1.7e-5, C4 6.18e-5, D -0.00207
- Global warming potential (GWP) [kg CO2-Äqv.]: A1-A3 49.2, A4 0.107, A5 1.96, B1 0, B4 0, B5 0, B6 2.79, B7 0, C1 0.234, C2 0.0528, C3 0.0684, C4 2.73, D -9.67
- Depletion potential of the stratospheric ozone layer (ODP) [kg CFC 11 eq.]: A1-A3 2.6e-7, A4 4.9e-13, A5 9.47e-14, B1 0, B4 0, B5 0, B6 1.72e-13, B7 0, C1 1.04e-12, C2 2.42e-13, C3 4.86e-11, C4 5.91e-12, D -6.6e-9
- Formation potential of tropospheric ozone (POCP) [kg Ethen-Äqv.]: A1-A3 0.0563, A4 -0.00027, A5 0.000268, B1 0, B4 0, B5 0, B6 0.000284, B7 0, C1 4.16e-5, C2 -0.000134, C3 1.31e-5, C4 4.01e-5, D 0.000544

## Use advice
A1-A3 such as modules A4, A5, B1, B2, B3, B4, B5, B6, B7, C1, C2, C3, C4, D. The environmental profile includes the lifecycle stages cradle to gate (module A1-A3). The production of the packaging was considered within modules A1-A3.

## Review details
The LCI method applied is in compliance with ISO 14040 and 14044. The documentation includes all relevant information in view of the data quality and scope of the application of the respective LCI result / data set. The dataset represents the state-of-the-art in view of the referenced functional unit.

## Data sources
- GaBi database (all versions)
