# Fortrac® MPT

Dataset: ILCD process, EPD, specific dataset
Geography: DE
Reference year: 2016
Valid until: 2021
Classification: OEKOBAU.DAT: Kunststoffe / Folien und Vliese / Technische Textilien
Classification: IBUCategories: 02 Bauprodukte / Bedachungen / Technische Textilien
Method details: Technische Textilien.pdf
Owner: HUESKER Synthetic GmbH
Compliance: DIN EN 15804; ISO 14025
Review: Accredited third party review by IBU
Amounts: rows without a unit in brackets have none in this file; such an amount is in the reference unit of its flow, which a separate flow dataset defines
copyright: false

## General comment
Fortrac® MPT is a flexible, high-strength geosynthetic grid which has been used in soil reinforcement for more than 20 years. Fortrac® MPT geogrids are made from high-modulus, low-creep synthetic materials enclosed in a protective polymer coating. Fortrac® MPT geogrids are manufactured in such a way as to guarantee high stability at the intersections accompanied by a high degree of interaction flexibility, i.e. capable of adapting to soils to be reinforced. Fortrac® MPT geogrids are manufactured from polyvinyl alcohol (MD) and polyamide (CMD). A protective polymer coating is also applied to the grid. Polyvinyl alcohol in the main direction of reinforcement offers high tensile stiffness in conjunction with enhanced resistance to chemicals in the soil, particularly in alkaline environments.
This Life Cycle Assessment examines an average product. The following products are reviewed:

Fortrac® 35/20-20/30 MPT (woven)
Fortrac® 55/25-20/30 MPT (woven)
Fortrac® R 80/25-20/30 MPT (knitted)
Fortrac® R 110/25-20/30 MPT (knitted)
Fortrac® R 150/30-30/30 MPT (knitted)
Fortrac® R 200/30-30/30 MPT (knitted)
The average was established by adding the LCA results for each individual product and dividing by the total quantity produced. The products differ in their composition. Depending on the product, the percentages of polyvinyl alcohol, polyamides and polymer coating differ. Polyester is also added to warp-knitted products. Other differences are to be found in the mass per unit area and the technical characteristics.

## Technology and included processes
The grid structure is manufactured on textile machines. The weft yarns (CMD) are made entirely of polyamide while the warp yarns (MD) are made of polyvinyl alcohol. The grid structure is manufactured either by weaving or knitting. In contrast to the weaving process the knitting process also uses Polyester as a binding thread. Following that, a polymer coating is applied to protect the geogrids. Standard geosynthetic grid rolls have an area of 1000 m² and are 5 metres wide. The goods are packaged by winding onto cardboard cores followed by sheathing in PE foil.
Technical data:
The following section outlines details on product performance in terms of their essential characteristics in accordance with EN 13249 et seq. were included and specified in the Declaration of Performance.
Declared unit:
The LCA was set up separately for each individual product. The LCA results were then added and averaged across the entire production volume. 1 m² geosynthetic geogrid was selected as the declared unit in accordance with /PCR, Part B/. The conversion factor and surface reference for individual products are indicated in the following table.

## Technical purpose
Fortrac® MPT geogrids stand for innovative design offering technical and economic advantages. The Fortrac® MPT product group is installed and used as primary reinforcement in a wide variety of earthwork structures. For example, in the following areas of application:

Dam construction
Landfill construction
Groundwater protection
Geosynthetic reinforced soil
Sludge lagoon remediation
Base reinforcement
Reservoirs

## Reference product
- 1 m2 geosynthetisches Gitter: 1

## Inputs
- Erneuerbare Primärenergie als Energieträger (PERE) [MJ]: A1-A3 1.57301
- Erneuerbare Primärenergie zur stofflichen Nutzung (PERM) [MJ]
- Total erneuerbare Primärenergie (PERT) [MJ]: A1-A3 1.57301
- Nicht-erneuerbare Primärenergie als Energieträger (PENRE) [MJ]: A1-A3 23
- Nicht-erneuerbare Primärenergie zur stofflichen Nutzung (PENRM) [MJ]: A1-A3 6.07
- Total nicht erneuerbare Primärenergie (PENRT) [MJ]: A1-A3 29.1
- Einsatz von Sekundärstoffen (SM) [kg]
- Erneuerbare Sekundärbrennstoffe (RSF) [MJ]
- Nicht erneuerbare Sekundärbrennstoffe (NRSF) [MJ]
- Einsatz von Süßwasserressourcen (FW) [m^3]: A1-A3 0.00832632

## Outputs
- Gefährlicher Abfall zur Deponie (HWD) [kg]: A1-A3 4.28636e-6
- Entsorgter nicht gefährlicher Abfall (NHWD) [kg]: A1-A3 1.71676
- Entsorgter radioaktiver Abfall (RWD) [kg]: A1-A3 0.000686845
- Komponenten für die Wiederverwendung (CRU) [kg]
- Stoffe zum Recycling (MFR) [kg]
- Stoffe für die Energierückgewinnung (MER) [kg]
- Exportierte elektrische Energie (EEE) [MJ]
- Exportierte thermische Energie (EET) [MJ]

## Impact indicators
- Globales Erwärmungspotenzial (GWP) [kg CO_(2)-Äq.]: A1-A3 1.37556
- Abbau Potential der stratosphärischen Ozonschicht (ODP) [kg CFC11-Äq.]: A1-A3 2.67092e-8
- Versauerungspotenzial von Boden und Wasser (AP) [kg SO_(2)-Äq.]: A1-A3 0.00455321
- Eutrophierungspotenzial (EP) [kg PO_(4)^(3)-Äq.]: A1-A3 0.000553245
- Bildungspotential für troposphärisches Ozon (POCP) [kg Ethen-Äq.]: A1-A3 0.000688126
- Potenzial für den abiotischen Abbau nicht fossiler Ressourcen (ADPE) [kg Sb-Äq.]: A1-A3 0.0053608
- Potenzial für den abiotischen Abbau fossiler Brennstoffe (ADPF) [MJ]: A1-A3 24.6145

## Use advice
Scope:
Fortrac® MPT geosynthetic grid is manufactured in the HUESKER Synthetic GmbH plants in Dülmen and Gescher, Germany. This EPD was created for an average product in the Fortrac® MPT product range.
System boundary:
This Environmental Product Declaration is a cradle-to-gate EPD, i.e. all potential environmental impacts by the product from the cradle to the plant gate are considered. According to /DIN EN 15804/, this complies with product phases A1-A3. The following production steps are considered during the manufacturing phase:

Manufacture of the synthetic yarn
Manufacture of the coating paste
Transport between the Dülmen and Gescher plants
Manufacture of the geosynthetic grid (twisting process, warp production, weaving/warp-knitting process, coating process)
Packing the geosynthetic grid

## Data sources
- Fortrac® MPT.pdf
- GaBi Database (all versions)
- GaBi database SP29 2016
