# End of Life steel profile

Dataset: ILCD process, EPD, generic dataset
Geography: DE
Reference year: 2018
Valid until: 2022
Classification: oekobau.dat: End of Life / Generisch / Metalle
Owner: thinkstep
Compliance: DIN EN 15804
Review: Dependent internal review by thinkstep, IABP-GaBi, IBP-GaBi; Independent external review by GaBi user forum, GaBi bug forum, GaBi user community
Amounts: rows without a unit in brackets have none in this file; such an amount is in the reference unit of its flow, which a separate flow dataset defines
copyright: true

## General comment
Dieser Datensatz wurde nach der Europäischen Norm EN 15804 modelliert. Die Ergebnisse werden entsprechend den Modulen (z.B. A1-A3) nach EN 15804 dargestellt.

## Geography
Der Datensatz bildet die länderspezifische Situation in Deutschland ab. Dabei werden Haupttechnologien, spezifische regionale Charakteristiken und ggf. Importstatistiken berücksichtigt.

## Time period
Jährlicher Durchschnitt

## Technology and included processes
Das Stahlprofil wird mit Primär- und Sekundärstahl hergestellt. 20 % stammen aus Hochöfen (primär) und 80 % aus Lichtbögenöfen (sekundär). In diesem Datensatz wird nur der Primäranteil an Stahl als Gutschrift vergeben. Der primäre Stahlanteil im Stahlprofil beträgt 12,7%, 87,3% sind Stahlschrott.
Bei den Recyclingprozessen dieses Datensatzes wurden 5% Verluste angenommen, die deponiert werden (s. Werte in Modul C4). Die restlichen 95% werden stofflich recycled (siehe Gutschriften in Modul D), es werden also 0,12kg Primärstahl gutgeschrieben.

Bei abweichendem Verhältnis von Primär-und Sekundärstahl kann die Verwendung des Datensatzes zu fehlerhaften Ergebnissen führen. Gegebenenfalls kann die Gutschrift über einen Sicherheitsabschlag vermindert werden.

## Technical purpose
End-of-life of metals

## Safety margin
0 %.

## Reference product
- Steel scrap: 1

## Inputs
- Use of renewable primary energy (PERE) [MJ]: C4 0.0013067, D 0.339114
- Primary energy resources used as raw materials (PERM) [MJ]: C4 0, D 0
- Total use of renewable primary energy resources (PERT) [MJ]: C4 0.0013067, D 0.339114
- Use of non-renewable primary energy (PENRE) [MJ]: C4 0.00995576, D -2.97201
- Non-renewable primary energy resources used as raw materials (PENRM) [MJ]: C4 0, D 0
- Total use of non-renewable primary energy resources (PENRT) [MJ]: C4 0.00995576, D -2.97201
- Input of secondary material (SM) [kg]: C4 0, D 0
- Use of renewable secondary fuels (RSF) [MJ]: C4 0, D 0
- Use of non renewable secondary fuels (NRSF) [MJ]: C4 0, D 0
- Use of net fresh water (FW) [m3]: C4 2.50491e-6, D -0.000267727

## Outputs
- Hazardous waste disposed (HWD) [kg]: C4 1.5174e-10, D -2.51716e-9
- Non-hazardous waste disposed (NHWD) [kg]: C4 0.050048, D -0.00566007
- Radioactive waste disposed (RWD) [kg]: C4 1.1163e-7, D 5.39266e-5
- Components for re-use (CRU) [kg]: C4 0, D 0
- Materials for Recycling (MFR) [kg]: C4 0, D 0
- Material for Energy Recovery (MER) [kg]: C4 0, D 0
- Exported electrical energy (EEE) [MJ]: C4 0, D 0
- Exported thermal energy (EET) [MJ]: C4 0, D 0

## Impact indicators
- Global warming potential (GWP) [kg CO2 eq.]: C4 0.00068207, D -0.393
- Ozone Depletion Potential (ODP) [kg R11 eq.]: C4 3.78913e-18, D 2.4141e-15
- Acidification potential (AP) [kg SO2 eq.]: C4 4.33298e-6, D -0.000906522
- Eutrophication potential (EP) [kg Phosphate eq.]: C4 4.87507e-7, D -7.53026e-5
- Photochemical Ozone Creation Potential (POCP) [kg Ethene eq.]: C4 3.33083e-7, D -0.000118393
- Abiotic depletion potential for non fossil resources (ADPE) [kg Sb eq.]: C4 6.91359e-11, D 9.35399e-9
- Abiotic depletion potential for fossil resources (ADPF) [MJ]: C4 0.00967389, D -3.10861

## Data sources
- GaBi Database Edition 2020, SP40
- GaBi database (all versions)
