# Beton-Pflastersteine mit bis zu 40 % Recyclinganteil

Dataset: ILCD process, EPD, average dataset
Geography: DE
Reference year: 2021
Valid until: 2026
Classification: OEKOBAU.DAT: Mineralische Baustoffe / Steine und Elemente / Betonfertigteile und Betonwaren
Classification: IBUCategories: 02 Bauprodukte / Tiefbauprodukte / Oberbaumaterialien für Verkehrswege im Aussenbereich
Method details: Oberbaumaterialien für Verkehrswege im Aussenbereich.pdf
Generated by: Life Cycle Engineering Experts GmbH
Registration number: EPD-RIN-20210087-ICL1-DE
Owner: Rinn Beton- und Naturstein GmbH & Co.KG
Compliance: DIN EN 15804+A2; ISO 14025
Review: Accredited third party review by Institut Bauen und Umwelt e. V.
Amounts: rows without a unit in brackets have none in this file; such an amount is in the reference unit of its flow, which a separate flow dataset defines
copyright: false
licenseType: Free of charge for all users and uses
accessRestrictions: None

## General comment
Die deklarierten Produkte sind Pflastersteine aus Beton unterschiedlicher Formate und Größen zur Verwendung als Bodenbelag im Freien, in Räumen und auf Dächern. Der Beton wird aus Gesteinskörnungen (Zuschlägen) mit bis zu 40 % Recyclinganteil, sowie Wasser, hydraulischen Bindemitteln (Zement), Zusatzmitteln und Zusatzstoffen hergestellt. Diese Deklaration ist erstellt für das Produkt mit den höchsten Umweltauswirkungen (Worst- Case) und dessen LCA- Ergebnisse werden deklariert.. Die hier dargestellten Produkte sind Beton-Pflastersteine je Quadratmeter mit einem mittleren Flächengewicht von ca.180 kg/m² für einen Pflasterstein mit 8 cm Dicke. Sie werden im Markt mit ihrer Handelsbezeichnung z.B. Lukano Pflaster und dem Zusatz „RC 25" bzw. „RC 40“ verwendet.

## Technology and included processes
The entire production of the company Rinn Beton- und Naturstein GmbH & Co. KG has been CO2-neutral in all plants since 2014. You get 100% green electricity (from hydropower). All paving stones examined consist of a two-layer concrete, the facing and core concrete. During production, the core concrete and the facing concrete are mixed in two separate mixers according to fixed recipes. For this purpose, the concrete raw materials sand, chippings, gravel, cement, stone dust, recycled aggregates, additives and, if necessary, concrete paints are dosed in a mixer and mixed with the addition of service and fresh water to form an earth-moist concrete. The finished fresh concrete is transported to a paver and processed there. In a pressure and vibration process, the concrete is compacted in a steel mold into paving stones of various sizes and looks. The core concrete and the approx. 10 mm thick facing concrete are inseparably connected. The facing layer consists of differently colored aggregates, cements and colors and forms the later visible surface and wear layer of the paving stone. Immediately after production, the paving stones are moved into a thermally regulated hardening chamber. The stones remain there for at least 24 hours until they are removed from storage or further surface treatment. When the stones are outsourced or processed, they already have a typical stone strength of at least 50% of their normal strength. This is sufficient to carry out further surface treatments such as B. to carry out grinding, blasting, sticking or coating. The standard strength is reached no later than 28 days after manufacture. Production is controlled according to defined quality criteria of a modern, integrated QM system and documented at all levels. During the manufacturing process, the paving stones are regularly checked for appearance, dimensional accuracy and dimensional stability. Paving stones that do not meet Rinn's quality criteria are divided into B-goods and rejects. the B-goods are sold at a significantly lower price. The paving stones marked as scrap are fed into a recycling process and reused as recycled aggregates. Dusts, fine grains and residual concrete generated in the manufacturing process are fed back into the manufacturing process in the processing plants.

## Technical purpose
Beton-Pflastersteine für die Verwendung als Bodenbelag im Freien, in Räumen und auf Dächern.

## Reference product
- Beton- Pflastersteine mit bis zu 40 % Recyclinganteil aus CO2 neutraler Produktion / 1m² (): 1

## Inputs
- Renewable primary energy as energy carrier (PERE) [MJ]: A1 15.3, A2 0.43, A3 5.53, A4 1.16, C1 0, C2 0.454, C3 0.713, C4 0.293, D -1.79
- Renewable primary energy resources as material utilization (PERM) [MJ]: A1 0, A2 0, A3 0, A4 0, C1 0, C2 0, C3 0, C4 0, D 0
- Total use of renewable primary energy resources (PERT) [MJ]: A1 15.3, A2 0.43, A3 5.53, A4 1.116, C1 0, C2 0.454, C3 0.713, C4 0.293, D -1.79
- Non renewable primary energy as energy carrier (PENRE) [MJ]: A1 75.3, A2 7.38, A3 2.59, A4 20, C1 0, C2 7.8, C3 8.48, C4 2.23, D -31.2
- Non renewable primary energy as material utilization (PENRM) [MJ]: A1 0, A2 0, A3 0, A4 0, C1 0, C2 0, C3 0, C4 0, D 0
- Total use of non renewable primary energy resources (PENRT) [MJ]: A1 75.3, A2 7.38, A3 2.59, A4 20, C1 0, C2 7.8, C3 8.48, C4 2.23, D -41.2
- Use of secondary material (SM) [kg]: A1 40.84, A2 0, A3 0, A4 0, C1 0, C2 0, C3 0, C4 0, D 0
- Use of renewable secondary fuels (RSF) [MJ]: A1 0, A2 0, A3 0, A4 0, C1 0, C2 0, C3 0, C4 0, D 0
- Use of non renewable secondary fuels (NRSF) [MJ]: A1 0, A2 0, A3 0, A4 0, C1 0, C2 0, C3 0, C4 0, D 0
- Use of net fresh water (FW) [m^3]: A1 0.0159, A2 0.000385, A3 0.0155, A4 0.00104, C1 0, C2 0.000407, C3 0.00222, C4 0.000561, D -0.00554

## Outputs
- Hazardous waste disposed (HWD) [kg]: A1 2.21e-7, A2 2.76e-7, A3 6.61e-10, A4 7.46e-7, C1 0, C2 2.91e-7, C3 1.78e-7, C4 3.4e-8, D -1.27e-7
- Non hazardous waste disposed (NHWD) [kg]: A1 2.34, A2 0.0013, A3 0.00363, A4 0.0035, C1 0, C2 0.00137, C3 0.00255, C4 11.2, D -3.53
- Radioactive waste disposed (RWD) [kg]: A1 0.00219, A2 7.77e-6, A3 9.42e-6, A4 2.1e-5, C1 0, C2 8.21e-6, C3 6.81e-5, C4 2.5e-5, D -0.00023
- Components for re-use (CRU) [kg]: A1 0, A2 0, A3 0, A4 0, C1 0, C2 0, C3 0, C4 0, D 0
- Materials for recycling (MFR) [kg]: A1 0, A2 0, A3 0, A4 0, C1 0, C2 0, C3 0, C4 0, D 0
- Materials for energy recovery (MER) [kg]: A1 0, A2 0, A3 0, A4 0, C1 0, C2 0, C3 0, C4 0, D 0
- Exported electrical energy (EEE) [MJ]: A1 0, A2 0, A3 0, A4 0, C1 0, C2 0, C3 0, C4 0, D 0
- Exported thermal energy (EET) [MJ]: A1 0, A2 0, A3 0, A4 0, C1 0, C2 0, C3 0, C4 0, D 0

## Impact indicators
- Global Warming Potential total (GWP-total) [kg CO_(2)-Äq.]: A1 17.8, A2 0.559, A3 0.13, A4 1.51, C1 0, C2 0.59, C3 0.452, C4 0.157, D -2.63
- Global Warming Potential fossil fuels (GWP-fossil) [kg CO_(2)-Äq.]: A1 17.8, A2 0.556, A3 0.13, A4 1.5, C1 0, C2 0.587, C3 0.449, C4 0.17, D -2.63
- Global Warming Potential biogenic (GWP-biogenic) [kg CO_(2)-Äq.]: A1 0.0186, A2 0.000224, A3 0.000138, A4 0.000605, C1 0, C2 0.000236, C3 0.000858, C4 -0.0135, D -0.00178
- Global Warming Potential luluc (GWP-luluc) [kg CO_(2)-Äq.]: A1 0.00714, A2 0.00233, A3 2.69e-5, A4 0.00629, C1 0, C2 0.00246, C3 0.00166, C4 0.00049, D -0.00159
- Depletion potential of the stratospheric ozone layer (ODP) [kg CFC11-Äq.]: A1 6.42e-14, A2 1.36e-16, A3 2.69e-16, A4 3.69e-16, C1 0, C2 1.44e-16, C3 1.91e-15, C4 6.37e-16, D -6.65e-15
- Acidification potential of land and water (AP) [mol H^(+)-Äq.]: A1 0.0176, A2 0.000516, A3 0.000626, A4 0.0014, C1 0, C2 0.000545, C3 0.00422, C4 0.00122, D -0.00292
- Eutrophication potential aquatic freshwater (EP-freshwater) [kg PO_(4)-Äq.]: A1 9.81e-6, A2 1.21e-6, A3 1.36e-7, A4 3.27e-6, C1 0, C2 1.28e-6, C3 1.08e-6, C4 2.93e-7, D -1.66e-6
- Eutrophication potential aquatic marine (EP-marine) [kg N-Äq.]: A1 0.00618, A2 0.000161, A3 0.000101, A4 0.000434, C1 0, C2 0.00017, C3 0.00208, C4 0.000314, D -0.00108
- Eutrophication potential terrestrial (EP-terrestrial) [mol N-Äq.]: A1 0.0674, A2 0.00195, A3 0.00109, A4 0.00527, C1 0, C2 0.00206, C3 0.0229, C4 0.00345, D -0.0119
- Formation potential of tropospheric ozone photochemical oxidants (POCP) [kg NMVOC-Äq.]: A1 0.0189, A2 0.000425, A3 0.00034, A4 0.00115, C1 0, C2 0.000449, C3 0.00603, C4 0.00095, D -0.00291
- Abiotic depletion potential for non fossil resources (ADPE) [kg Sb-Äq.]: A1 9.44e-7, A2 4.62e-8, A3 6.79e-8, A4 1.25e-7, C1 0, C2 4.88e-8, C3 4.95e-7, C4 1.53e-8, D -2.24e-7
- Abiotic depletion potential for fossil resources (ADPF) [MJ]: A1 75.3, A2 7.38, A3 2.59, A4 20, C1 0, C2 7.8, C3 8.48, C4 2.23, D -41.2
- Water use (WDP) [m^(3) Welt-Äq. entzogen]: A1 0.199, A2 0.00239, A3 0.431, A4 0.00647, C1 0, C2 0.00253, C3 0.0759, C4 0.0178, D -0.0188
- Incidence of disease due to PM emissions (PM) [Krankheitsfälle]
- Human exposure efficiency relative to U235 (IR) [kBq U235-Äq.]
- Comparative toxic unit for ecosystems (ETP-fw) [CTUe]
- Comparative toxic unit for humans (carcinogenic) (HTP-c) [CTUh]
- Comparative toxic unit for humans (noncarcinogenic) (HTP-nc) [CTUh]
- Soil quality index (SQP) [SQP]

## Use advice
Gültigkeitsbereich:
Die vorliegende Umweltproduktdeklaration bildet Beton- Pflastersteine mit bis zu 40 % Recyclinganteil hergestellt von der Rinn Beton und Naturstein GmbH & Co. KG ab. Betrachtet wurden die Produktionsstandorte in Heuchelheim, Steinbach und Stadtroda. Die Ergebnisse der Ökobilanz beruhen auf dem Produkt (Beton- Pflastersteine mit bis zu 40 % Recyclinganteil) mit den höchsten Umweltauswirkungen (Muster- EPD) in den o. g. Werken. Die in den Werken hergestellten Pflastersteine aus Beton haben eine Rohdichte von 2,40 t/m³. Als Grundlage für die Berechnung dient eine im Jahr 2020 durchgeführte Datenerhebung in den oben genannten Werken.
Systemgrenze:
Typ der EPD: Cradle to gate (von der Wiege bis zum Werkstor)- mit Optionen.

Die Ökobilanz berücksichtigt die Rohstoffgewinnung, die Rohstofftransporte und die eigentliche Produktherstellung inklusive der Verpackungsmaterialien (Module A1- A3).sowie den Transport zur Baustelle (Modul A4). Nach Ablauf der Nutzungsdauer wird das Produkt rückgebaut (Modul C1). Der energetische Einsatz ist bezogen auf die deklarierte Einheit so marginal, dass dieser unter

Beachtung der 1 %- Regel abgeschnitten wurde.

Die Sammelquote wird mit 100 % angesetzt.

Nach dem Transport des rückgebauten Produktes (Modul C2) ist für rund 6% der Betonpflastersteine eine Deponierung auf einer Inertstoffdeponie vorgesehen (Modul C4), 94% können weiterverwertet werden. Gutschriften infolge des Recyclings von Betonpflastersteinen sind in Modul D deklariert. Das Nutzungsstadium (Modul B1- B7) wird in dieser Studie nicht berücksichtigt.

## Data sources
- GaBi Database (all versions)
- GaBi database SP40 2020
