# Eurospan Raw Chipboard

Dataset: ILCD process, EPD, average dataset
Geography: DE
Reference year: 2021
Valid until: 2022
Classification: OEKOBAU.DAT: Holz / Holzwerkstoffe / Spanplatten
Classification: IBUCategories: 02 Bauprodukte / Holzwerkstoffe / Holzwerkstoffe
Method details: Holzwerkstoffe.pdf
Generated by: Daxner & Merl GmbH
Registration number: EPD-EGG-20200249-IBC1-DE
Owner: Fritz EGGER GmbH & Co. OG
Compliance: DIN EN 15804+A2; ISO 14025
Review: Accredited third party review by Institut Bauen und Umwelt e. V.
Amounts: rows without a unit in brackets have none in this file; such an amount is in the reference unit of its flow, which a separate flow dataset defines
copyright: true
licenseType: Free of charge for all users and uses
accessRestrictions: None

## General comment
Eurospan raw chipboards are board-shaped wood-based materials according to EN 312. The board types are primarily differentiated or classified in their application as non-load-bearing and load-bearing elements in dry and humid conditions:

P1: General purpose boards for use in dry conditions, P2: Boards for interior furnishings (including furniture) for use in dry conditions, P3: Boards for non-load-bearing purposes for use in humid conditions, P4: Boards for load-bearing purposes for use in dry conditions, P5: Load-bearing boards for use in humid conditions, P6: heavy-duty load-bearing boards for use in dry conditions, P7: heavy-duty load-bearing boards for use in humid conditions (are not produced).

The average glue mix across all board types is considered. The production conditions of the Brilon site are comparable to those of the other plants. They correspond to the technologies and standards used in all locations.

## Technology and included processes
The production process of Eurospan raw chipboard is identical at all producing locations and proceeds according to the following steps: 1. Wood preparation - roundwood chipping - chip preparation - residual wood preparation 2. Drying the chips to approximately 2 – 3 % residual moisture 3. Sorting the chips 4. Applying glue to the chips 5. Spreading the glue-coated chips onto a forming belt 6. Pressing the chip cake in a continuously operating hot press 7. Formatting of the raw boards 8. Cooling the rawboards in star coolers 9. Sanding the upper and lower sides 10. Stacking into large stacks. All scraps produced during production (trimming, cutting and milling scraps) are processed and fed back into the production process. All sites maintain a certified quality management system according to ISO 9001.
Declared unit:
This environmental product declaration is based on a declared unit of 1 m³ EGGER raw chipboard with an average raw density of 655 kg/m³ and a delivery moisture of approximately 6 %.

## Technical purpose
Raw chipboard is mainly used in decorative interior design and furniture construction. It is used in residential and project furnishings. Raw chipboards Eurospan E1E05 TSCA P2 and Eurospan JP F0.3 F**** MR are used especially for furniture and interior design with increased requirements for formaldehyde emission.

## Reference product
- Rohspanplatte (1 m3 Rohspanplatte): 1

## Inputs
- Renewable primary energy as energy carrier (PERE) [MJ]: A1-A3 5316.42, C1 0, C2 1.58943, C3 10343.3, C4 0, D -2480.2
- Renewable primary energy resources as material utilization (PERM) [MJ]: A1-A3 10412.9, C1 0, C2 0, C3 -10299.9, C4 0, D 0
- Total use of renewable primary energy resources (PERT) [MJ]: A1-A3 15729.4, C1 0, C2 1.58943, C3 43.417, C4 0, D -2480.2
- Non renewable primary energy as energy carrier (PENRE) [MJ]: A1-A3 2122.37, C1 0, C2 27.5991, C3 1188.62, C4 0, D -9851.19
- Non renewable primary energy as material utilization (PENRM) [MJ]: A1-A3 1098.48, C1 0, C2 0, C3 -1090.58, C4 0, D 0
- Total use of non renewable primary energy resources (PENRT) [MJ]: A1-A3 3220.86, C1 0, C2 27.5991, C3 98.0447, C4 0, D -9851.19
- Use of secondary material (SM) [kg]: A1-A3 271.33, C1 0, C2 0, C3 0, C4 0, D 0
- Use of renewable secondary fuels (RSF) [MJ]: A1-A3 550.764, C1 0, C2 0, C3 0, C4 0, D 9807.63
- Use of non renewable secondary fuels (NRSF) [MJ]: A1-A3 0, C1 0, C2 0, C3 0, C4 0, D 1038.45
- Use of net fresh water (FW) [m^3]: A1-A3 0.49613, C1 0, C2 0.00185222, C3 0.0502013, C4 0, D -2.00587

## Outputs
- Hazardous waste disposed (HWD) [kg]: A1-A3 0.000137886, C1 0, C2 1.27623e-6, C3 4.05602e-8, C4 0, D -3.33399e-6
- Non hazardous waste disposed (NHWD) [kg]: A1-A3 3.6954, C1 0, C2 0.00437425, C3 0.0695115, C4 0, D 0.360149
- Radioactive waste disposed (RWD) [kg]: A1-A3 0.0662288, C1 0, C2 5.08678e-5, C3 0.0148663, C4 0, D -0.847969
- Components for re-use (CRU) [kg]: A1-A3 0, C1 0, C2 0, C3 0, C4 0, D 0
- Materials for recycling (MFR) [kg]: A1-A3 0, C1 0, C2 0, C3 0, C4 0, D 0
- Materials for energy recovery (MER) [kg]: A1-A3 0, C1 0, C2 0, C3 692.075, C4 0, D 0
- Exported electrical energy (EEE) [MJ]: A1-A3 0, C1 0, C2 0, C3 0, C4 0, D 0
- Exported thermal energy (EET) [MJ]: A1-A3 0, C1 0, C2 0, C3 0, C4 0, D 0

## Impact indicators
- Global Warming Potential total (GWP-total) [kg CO_(2)-Äq.]: A1-A3 -867.775, C1 0, C2 2.08537, C3 1025.11, C4 0, D -512.698
- Global Warming Potential fossil fuels (GWP-fossil) [kg CO_(2)-Äq.]: A1-A3 146.698, C1 0, C2 2.07215, C3 5.57352, C4 0, D -510.795
- Global Warming Potential biogenic (GWP-biogenic) [kg CO_(2)-Äq.]: A1-A3 -1014.72, C1 0, C2 -0.00345871, C3 1019.53, C4 0, D -1.43688
- Global Warming Potential luluc (GWP-luluc) [kg CO_(2)-Äq.]: A1-A3 0.246609, C1 0, C2 0.0166768, C3 0.00807509, C4 0, D -0.465668
- Depletion potential of the stratospheric ozone layer (ODP) [kg CFC11-Äq.]: A1-A3 3.11486e-10, C1 0, C2 3.78132e-16, C3 1.2257e-13, C4 0, D -6.98589e-12
- Acidification potential of land and water (AP) [mol H^(+)-Äq.]: A1-A3 0.424908, C1 0, C2 0.00700227, C3 0.0123055, C4 0, D 0.383657
- Eutrophication potential aquatic freshwater (EP-freshwater) [kg PO_(4)-Äq.]: A1-A3 0.000407494, C1 0, C2 6.2754e-6, C3 1.48869e-5, C4 0, D -0.000855624
- Eutrophication potential aquatic marine (EP-marine) [kg N-Äq.]: A1-A3 0.135373, C1 0, C2 0.00315896, C3 0.00273302, C4 0, D 0.0972996
- Eutrophication potential terrestrial (EP-terrestrial) [mol N-Äq.]: A1-A3 1.53631, C1 0, C2 0.0352876, C3 0.0287138, C4 0, D 1.15638
- Formation potential of tropospheric ozone photochemical oxidants (POCP) [kg NMVOC-Äq.]: A1-A3 0.310579, C1 0, C2 0.00620637, C3 0.00748984, C4 0, D 0.410973
- Abiotic depletion potential for non fossil resources (ADPE) [kg Sb-Äq.]: A1-A3 9.3816e-5, C1 0, C2 1.66598e-7, C3 1.61293e-6, C4 0, D -0.000105034
- Abiotic depletion potential for fossil resources (ADPF) [MJ]: A1-A3 3220.01, C1 0, C2 27.4889, C3 98.0249, C4 0, D -9850.03
- Water use (WDP) [m^(3) Welt-Äq. entzogen]: A1-A3 5.19432, C1 0, C2 0.0200899, C3 1.21453, C4 0, D -32.2376
- Incidence of disease due to PM emissions (PM) [Krankheitsfälle]: A1-A3 4.45442e-6, C1 0, C2 3.95647e-8, C3 1.03207e-7, C4 0, D -2.07505e-6
- Human exposure efficiency relative to U235 (IR) [kBq U235-Äq.]: A1-A3 6.82784, C1 0, C2 0.00750426, C3 2.43905, C4 0, D -139.117
- Comparative toxic unit for ecosystems (ETP-fw) [CTUe]: A1-A3 754.763, C1 0, C2 20.567, C3 41.9513, C4 0, D -2412.58
- Comparative toxic unit for humans (carcinogenic) (HTP-c) [CTUh]: A1-A3 1.37555e-7, C1 0, C2 4.25092e-10, C3 1.15843e-9, C4 0, D -9.54159e-9
- Comparative toxic unit for humans (noncarcinogenic) (HTP-nc) [CTUh]: A1-A3 1.45298e-6, C1 0, C2 2.4494e-8, C3 4.26813e-8, C4 0, D 2.78882e-6
- Soil quality index (SQP) [SQP]: A1-A3 24919.5, C1 0, C2 9.64892, C3 31.1978, C4 0, D -1811.52

## Use advice
Scope:
This environmental product declaration is based on a declared unit of 1 m³ raw chipboard with an average density of 655 kg/m³ produced with an average glue mix in the plant of Brilon, Germany.

The production conditions in Brilon are comparable to those of the other plants. They correspond to the technologies and standards used in all locations.
System boundary:
The LCA of the average EGGER raw chipboard includes a cradle-to-gate consideration of the occurring environmental impact with the modules C1-C4 and module D (A1-A3, +C, +D). The following life cycle phases are taken into account in the analysis:

Module A1– A3 | Production stage
The production stage includes the expenses of the raw material supply (logs, scrap wood, sawdust, glue system, auxiliary materials, etc.) as well as the associated transports to the production site in Brilon. Within the plant boundaries, the log yard, wet chip preparation, drying, gluing, spreading, pressing, the sanding line up to the warehouse and shipping are taken into account. Thermal and electrical energy, compressed air and water are provided by central suppliers at the Brilon site. The majority of the electrical energy used is obtained from the German power grid. Both internal wood waste and scrap wood sourced externally are used in the in-house biomass power plant. The system boundary for the scrap wood used in the production is set after sorting and chopping. It is assumed that the end of the waste status has been reached. The system boundary for secondary raw materials according to EN 15804 applies.

Module C1 | Dismantling / Demolition

Manual dismantling was assumed for the raw chipboard. The associated efforts are negligible, which means that no environmental impact from the dismantling of the products is declared.

Module C2 | Transport to waste treatment

Module C2 includes transport to waste treatment. For this purpose, transport by lorry over a distance of 50 km is used as a representative scenario.

Module C3 | Waste processing

Chopping after product disassembly is considered in module C3. The wood products and with them the material-inherent properties leave the product system as secondary fuel in module C3.

Module C4 | Disposal

The scenario used declares the energy recovery of the wood products, which means that no environmental impact from the waste treatment of the products in C4 are to be expected.

Module D | Credits and charges beyond the limits of the product system

The energy utilisation of the product at the end of its life cycle is described in Module D, including energetic substitution potentials as a European average scenario.

## Data sources
- GaBi Database (all versions)
- GaBi database SP40 2020
