# Galvanized steel suspended ceiling panel

Dataset: ILCD process, EPD, average dataset
Geography: TR
Reference year: 2019
Valid until: 2024
Classification: OEKOBAU.DAT: Mineralische Baustoffe / Steine und Elemente / Deckenplatten
Classification: IBUCategories: 02 Building products / Internal and external wall and ceiling finishes / Metal ceilings
Method details: Metal ceilings.pdf
Generated by: ERKE Sustainable Building Design LCC.
Registration number: EPD-BUT-20190023-IAC2-EN
Owner: Butem Metal Form San. Ve Tic. A.S.
Compliance: DIN EN 15804; ISO 14025
Review: Accredited third party review by Institut Bauen und Umwelt e. V.
Amounts: rows without a unit in brackets have none in this file; such an amount is in the reference unit of its flow, which a separate flow dataset defines
copyright: true
licenseType: Free of charge for all users and uses
accessRestrictions: None

## General comment
Steel ceiling systems are manufactured from folded, roll-formed and partially punched steel as complete ceiling kits or as individual components. The ceiling kit comprises the membrane component, e.g. tile panels or plank panel ceilings, as well as substructure for suspending the metal ceiling. The substructure is usually made of steel. It can have various suspension heights and its design is governed by the form, functional requirements and weight of the membrane components.

For the use and application of the product the respective national provisions at the place of use apply, in Germany for example the building codes of the federal states and the corresponding national specifications.

The ceiling systems are manufactured by considering /TS EN 13964/ and /TS EN ISO 9224/.

## Technology and included processes
The system components for metal ceilings are manufactured in a continuous manufacturing process. The sheet of steel comes mainly in coils, perforated (optional), punched (aligned as an option), bended, welded (optional) and cut to size. Where the membrane components do not comprise pre-coated material, they are usually powder or spray-painted after the cleaning process. A layer of acoustic tissue can then be applied to the back using a heating process. Adding heat activates a hot-melt adhesive embedded in the tissue, which causes it to adhere to the back of the panel. Punching and perforation waste is gathered, collected by local disposal companies and redirected to the recycling facilities. All production steps are carried out in accordance with the requirements and test guidelines outlined in /TS EN 13964/. Galvanized steel ceiling panel production in the factory is included the stages supply of raw material from stock, cutting, bending, dying, packaging and stockpiling in sequence.
Technical data:
Butem Metal ceiling system made of steel is manufactured under the warranty of the /ISO 9001/ Quality Management System to comply with the product requirement specifications. The manufacturing system has /OHSAS 18001/ Occupational Health and Safety and /ISO 14001/ Environmental Management systems.

Depending on the project requirements; Butem Metal can supply additional acoustic enhancement materials, which provides sound absorption value as follows:

The weighted sound absorption coefficient (αw) value: aw= 0.35 in accordance with /TS EN ISO 11654/.
Declared unit:
The declared unit is 1 m2 of 1 galvanized steel ceiling panel with the average thickness of 0.5 mm. The area weights for each product in steel product group varies depend on sheet thicknesses; accordingly the average thickness is accepted as 0.5 mm. All declared products are produced in the same production procedure with some minor differences like using several membrane elements for certain products or geometrical shape of the final product.

## Technical purpose
The metal ceiling systems made of steel outlined in this LCA study are used in interior and exterior designs as rectangular panels, strip panel ceilings, square tiles, chilled ceilings, expanded metal ceilings, ceiling grids, special geometrical design panels or canopy ceilings, all functioning as cladding of the interior ceiling. It is also a low VOC emitted interior product in compliance with /CDPH - CA Section 01350 v1.2/. Metal ceiling systems made of steel are produced in accordance with customer's requirements. In addition, metal ceiling panels can provide sound absorption.

## Reference product
- Steel Suspended Ceiling Panel (): 1

## Inputs
- Renewable primary energy as energy carrier (PERE) [MJ]: A1-A3 14.19, A5 0.0168
- Renewable primary energy resources as material utilization (PERM) [MJ]
- Total use of renewable primary energy resources (PERT) [MJ]: A1-A3 14.19, A5 0.0168
- Non renewable primary energy as energy carrier (PENRE) [MJ]: A1-A3 221.37, A5 0.133
- Non renewable primary energy as material utilization (PENRM) [MJ]
- Total use of non renewable primary energy resources (PENRT) [MJ]: A1-A3 221.37, A5 0.133
- Use of secondary material (SM) [kg]
- Use of renewable secondary fuels (RSF) [MJ]
- Use of non renewable secondary fuels (NRSF) [MJ]
- Use of net fresh water (FW) [m^3]: A1-A3 11.1, A5 0.0146

## Outputs
- Hazardous waste disposed (HWD) [kg]: A1-A3 3.86e-7, A5 2.95e-10
- Non hazardous waste disposed (NHWD) [kg]: A1-A3 94.6, A5 0.0254
- Radioactive waste disposed (RWD) [kg]: A1-A3 0.00312, A5 8.05e-6
- Components for re-use (CRU) [kg]
- Materials for recycling (MFR) [kg]
- Materials for energy recovery (MER) [kg]
- Exported electrical energy (EEE) [MJ]
- Exported thermal energy (EET) [MJ]

## Impact indicators
- Global warming potential (GWP) [kg CO_(2)-Äq.]: A1-A3 18, A5 0.0188
- Depletion potential of the stratospheric ozone layer (ODP) [kg CFC11-Äq.]: A1-A3 3.65e-10, A5 2.01e-12
- Acidification potential of land and water (AP) [kg SO_(2)-Äq.]: A1-A3 0.0681, A5 7.73e-5
- Eutrophication potential (EP) [kg PO_(4)^(3)-Äq.]: A1-A3 0.00547, A5 1.47e-5
- Formation potential of tropospheric ozone photochemical oxidants (POCP) [kg Ethen-Äq.]: A1-A3 0.00847, A5 6.12e-6
- Abiotic depletion potential for non fossil resources (ADPE) [kg Sb-Äq.]: A1-A3 0.0014, A5 7.45e-9
- Abiotic depletion potential for fossil resources (ADPF) [MJ]: A1-A3 213, A5 0.113

## Use advice
Scope:
Within this study a life cycle analysis according to /ISO14040/44/ is performed for galvanized suspended ceiling panel manufactured by Butem Metal at the production plant in Istanbul, Turkey. The EPD for Butem Metal for galvanized suspended ceiling panel is an average EPD which represents the life cycle analysis of the product group. The area weights for each product in steel product group varies depend on sheet thicknesses; accordingly the average thickness is accepted as 0.5 mm.
System boundary:
This is a cradle-to-gate Life Cycle Analysis study. The product stage information modules A1, A2, and A3 are considered. In addition to the product stage, Module A5 is also considered within LCA scope. In detail, this LCA study includes production of raw material extraction and processing (A1), transport of the raw materials (A2) and transport the packaging materials to the manufacturer (A2), manufacturing of the product with the stages supply of raw material from stock, cutting, bending, dying, packaging and stockpiling (A3), recycling of recyclable waste generated during manufacturing (A3), and disposal of packaging materials (A5).

## Data sources
- GaBi Database (all versions)
- GaBi database SP29 2016
