# Cobiax CLS structural formers

Dataset: ILCD process, EPD, average dataset
Geography: DE
Reference year: 2021
Valid until: 2026
Classification: OEKOBAU.DAT: Mineralische Baustoffe / Mörtel und Beton / Beton
Classification: IBUCategories: 02 Bauprodukte / Normal- Leicht- und Porenbeton / Betonbauteile aus Ort- oder Lieferbeton
Method details: Betonbauteile aus Ort- oder Lieferbeton.pdf
Generated by: CSD Ingenieure GmbH
Registration number: EPD-COB-20210105-IBB1-DE
Owner: Cobiax Technologies GmbH
Compliance: DIN EN 15804; ISO 14025
Review: Accredited third party review by Institut Bauen und Umwelt e. V.
Amounts: rows without a unit in brackets have none in this file; such an amount is in the reference unit of its flow, which a separate flow dataset defines
copyright: true
licenseType: Free of charge for all users and uses
accessRestrictions: None

## General comment
Die deklarierten Produkte umfassen Ortbetondecken unterschiedlicher Bauteilhöhen mit Strukturgebern aus 100% rezykliertem Kunststoff.
Die CLS Strukturgeber werden als Halbschalen vermarktet und finden bei Deckenstärken von 20 bis 80 cm Verwendung.

## Technology and included processes
The Cobiax CLS structural formers are mainly manufactured using the injection molding process in Herford, Germany. As raw materials, the injection molding machine is supplied with plastic recyclates in granulated form, and these are converted into thermoplastics with the addition of energy in the form of electricity. With the help of compressed air, half-shell elements are formed, which can be put together to form hollow bodies without additional energy supply.

## Technical purpose
COBIAX-Einbauelemente werden für die Herstellung von Stahlbetondecken aus Normalbeton zur vertikalen und horizontalen Lastabtragung im Geschossbau

verwendet.
Die Einbauelemente werden mit dem Ziel eingesetzt,
die Eigenlast des Tragwerks sowie den Materialverbrauch zu reduzieren und damit materialeffizientere Tragwerke zu ermöglichen.

## Reference product
- Strukturgeber Cobiax CLS-P-200 (): 1

## Inputs
- Renewable primary energy as energy carrier (PERE) [MJ]: A1-A3 672, A4 11.5
- Renewable primary energy resources as material utilization (PERM) [MJ]: A1-A3 0, A4 0
- Total use of renewable primary energy resources (PERT) [MJ]: A1-A3 672, A4 11.5
- Non renewable primary energy as energy carrier (PENRE) [MJ]: A1-A3 1920, A4 81.5
- Non renewable primary energy as material utilization (PENRM) [MJ]: A1-A3 0, A4 0
- Total use of non renewable primary energy resources (PENRT) [MJ]: A1-A3 1920, A4 81.5
- Use of secondary material (SM) [kg]
- Use of renewable secondary fuels (RSF) [MJ]
- Use of non renewable secondary fuels (NRSF) [MJ]
- Use of net fresh water (FW) [m^3]: A1-A3 0.786, A4 0.00431

## Outputs
- Hazardous waste disposed (HWD) [kg]: A1-A3 8.81e-6, A4 3.03e-6
- Non hazardous waste disposed (NHWD) [kg]: A1-A3 70.7, A4 0.0146
- Radioactive waste disposed (RWD) [kg]: A1-A3 0.0826, A4 0.000108
- Components for re-use (CRU) [kg]
- Materials for recycling (MFR) [kg]
- Materials for energy recovery (MER) [kg]
- Exported electrical energy (EEE) [MJ]
- Exported thermal energy (EET) [MJ]

## Impact indicators
- Global warming potential (GWP) [kg CO_(2)-Äq.]: A1-A3 274.15, A4 6.05
- Depletion potential of the stratospheric ozone layer (ODP) [kg CFC11-Äq.]: A1-A3 3.66e-12, A4 2.78e-15
- Acidification potential of land and water (AP) [kg SO_(2)-Äq.]: A1-A3 0.378, A4 0.0147
- Eutrophication potential (EP) [kg PO_(4)^(3)-Äq.]: A1-A3 0.0643, A4 0.00353
- Formation potential of tropospheric ozone photochemical oxidants (POCP) [kg Ethen-Äq.]: A1-A3 0.0296, A4 -0.00496
- Abiotic depletion potential for non fossil resources (ADPE) [kg Sb-Äq.]: A1-A3 4.05e-5, A4 5.31e-7
- Abiotic depletion potential for fossil resources (ADPF) [MJ]: A1-A3 1706.56, A4 81.21

## Use advice
Gültigkeitsbereich:
Das vorliegende Dokument gilt für Ortbetondecken mit CLS Strukturgebern des Systems "COBIAX". Die Daten der Ökobilanz beruhen auf langjährigen Projektdaten der Heinze Cobiax Deutschland GmbH. Die Daten stammen aus dem Produktionsstandort Herford

des Kunststoffherstellers der Heinze-Gruppe. An diesem Standort werden die Strukturgeber hergestellt und für den Transport zum Einbauort verladen, wo sie dann montiert werden.

Die Deklaration gilt für sämtliche COBIAX-Standorte und Verkaufspartner, die im Umkreis von 400km der Produktionsstandorte beliefert werden.
Systemgrenze:
Typ der EPD: Wiege bis zum Werkstor mit Optionen

Es wurden folgende Module und Prozesse berücksichtigt:

Produktionsstadium A1 bis A3:

- Betonherstellungsprozess einschließlich Rohstoffversorgung und -antransport

-Stahlherstellungsprozess einschließlich Rohstoffversorgung und -antransport

- Herstellung Kunststoffrecyclat (alloziert gemäß ISO 14040)
- Strommix Deutschland für die Regranulierung von Kunststoff-Produktionsabfällen (ca. 60 % des verarbeiteten Kunststoffanteils) und für die Hohlkörperherstellung einschließlich Erzeugung und Verteilung

- Transport der Kunststoffregranulate vom Herstellungsort zur Produktionsstätte der Cobiax-Module

Transport zur Baustelle A4:

- LKW-Transport des Betons zur Baustelle
- LKW-Transport des Bewehrungsstahls zur Baustelle
- LKW-Transport der Hohlkörper zur Baustelle

## Data sources
- GaBi Database (all versions)
- GaBi database SP37 2019
