# FW 50+ BF.HI

Dataset: ILCD process, EPD, average dataset
Geography: DE
Reference year: 2017
Valid until: 2022
Classification: OEKOBAU.DAT: Komponenten von Fenstern und Vorhangfassaden / Rahmen / Profile / Aluminium
Classification: IBUCategories: 02 Bauprodukte / Fassaden / Vorhangfassaden
Method details: Vorhangfassaden.pdf
Owner: Schüco International KG
Compliance: DIN EN 15804; ISO 14025
Review: Accredited third party review by IBU
Amounts: rows without a unit in brackets have none in this file; such an amount is in the reference unit of its flow, which a separate flow dataset defines
copyright: true

## General comment
Das Schüco Fassadensystem FWS (Façade Wall System) besteht aus gedämmten Aluminiumverbundprofilen. Das Fassadensystem Schüco FWS bietet funktionelle Vorteile verbunden mit architektonischen und gestalterischen Aspekten. In aufeinander abgestimmten Bauteilen vereinen sich Vorzüge wie hohe Wärmedämmungen, schlanke Ansichtsbreiten. In der Fassade können die Schüco Fenstersysteme AWS und die Schüco Türsysteme ADS integriert eingebaut werden. Die Profiloberflächen der Fassadenelemente können nach Wahl eloxiert oder nass oder pulverbeschichtet ausgeführt werden.

Das deklarierte Fassadenelement FWS besteht aus folgenden Elementen:

• Hauptprofile, bestehend aus:

Aluminium

• Zubehör, bestehend aus:

Aluminium

EPDM (Ethylen-Propylen-Dien)

INOX A2 (Edelstahl A2)

INOX A4 (Edelstahl A4)

INOX (Edelstahl)

Polypropylen

Zellkautschuk

Zinkdruckguss

• Zubehörprofile, bestehend aus:

Aluminium

PVC/PE Schaum (Polyvinylchlorid/Polyethylen

Schaum)

• Dichtungen, bestehend aus:

EPDM (Ethylen-Propylen-Dien)

PE Schaum (Polyethylen)

• Verglasung, bestehend aus:

3-fach Isolierglas

• Beschichtung, bestehend aus:

Pulver

Das Schüco Fassadensystem FWS (Façade Wall System)

besteht aus folgenden Ausführungen:

FWS 35 PD.HI

FWS 35 PD.SI

FWS 50

FWS 50.HI

FWS 60

FWS 60.HI

FWS 50.SI

FWS 60.SI

FWS 50 S

FWS 50.SI Green

FW 60+SG.SI

FW 50+SG

FW 50+ BF

FW 60+ BF

FW 50+FR60

AOC 75

AOC 60

AOC 50

USC 65

SFC 85

Mit dieser Deklaration wird folgendes Element aus dem Schüco Fassadensystem FWS beschrieben:

Systemausführung: Schüco FWS 50+ BF.HI

B x H: 3050 mm x 3050 mm

Oberfläche Profile: Pulverbeschichtet

Anlagen: Elementübersicht

## Technology and included processes
Die oberflächenbehandelten Aluminiumprofile werden auf Maß geschnitten und für die entsprechende Rahmengröße konfektioniert. Der dabei entstehende Verschnitt an Aluminiumprofilen wird dem Recycling zugeführt. Die Isolationsprofile werden mit den Aluminiumprofilen fest verbunden. Anschließend werden die Profile am Baukörper zu Rahmen fest verbunden und die Dichtungen in die vorgesehenen Nuten eingezogen. Danach wird die Verglasung eingesetzt und mit Verglasungsprofilen gesichert. In die Fassadenrahmenkonstruktion können auch fertige Fensterlemente Schüco AWS eingebaut werden. Abschließend erfolgt eine Funktionskontrolle.
Technische Daten:
Gemäß CE-Kennzeichnung sind für Feld 1 folgende bautechnische Daten für das Element zu nennen:
Deklarierte Einheit:
Die deklarierte Einheit ist ein Fassadenelement mit der Größe 3050 mm x 3050 mm.

## Technical purpose
Das Produkt wird im Allgemeinen als äußerer Gebäudeabschluss eingebaut. Integrierte Fenster dienen dem Luftaustausch und dem Lichteinfall ins Gebäude.

## Reference product
- FW 50+ BF.HI B x H: 3050 mm x 3050 mm: 1

## Inputs
- Erneuerbare Primärenergie als Energieträger (PERE) [MJ]: A1-A3 9396.63, A4 0, B6 0, C4 0, D 0
- Erneuerbare Primärenergie zur stofflichen Nutzung (PERM) [MJ]: A1-A3 4.53, A4 0, B6 0, C4 0, D 0
- Total erneuerbare Primärenergie (PERT) [MJ]: A1-A3 9401.16, A4 0.433, B6 0, C4 4.91, D -2213.69
- Nicht-erneuerbare Primärenergie als Energieträger (PENRE) [MJ]: A1-A3 41945.6, A4 0, B6 0, C4 0, D 0
- Nicht-erneuerbare Primärenergie zur stofflichen Nutzung (PENRM) [MJ]: A1-A3 961.97, A4 0, B6 0, C4 0, D 0
- Total nicht erneuerbare Primärenergie (PENRT) [MJ]: A1-A3 42907.5, A4 7.64, B6 0, C4 37.56, D -8073.61
- Einsatz von Sekundärstoffen (SM) [kg]: A1-A3 46.14, A4 0, B6 0, C4 0, D 0
- Erneuerbare Sekundärbrennstoffe (RSF) [MJ]: A1-A3 0, A4 0, B6 0, C4 0, D 0
- Nicht erneuerbare Sekundärbrennstoffe (NRSF) [MJ]: A1-A3 0, A4 0, B6 0, C4 0, D 0
- Einsatz von Süßwasserressourcen (FW) [m^3]: A1-A3 14.49, A4 0.00108, B6 0, C4 0.149, D -4.69

## Outputs
- Gefährlicher Abfall zur Deponie (HWD) [kg]: A1-A3 6.06, A4 5.78e-7, B6 0, C4 4.81e-7, D -3.49e-6
- Entsorgter nicht gefährlicher Abfall (NHWD) [kg]: A1-A3 289.45, A4 0.000642, B6 0, C4 50.19, D -170.61
- Entsorgter radioaktiver Abfall (RWD) [kg]: A1-A3 1.72, A4 1.09e-5, B6 0, C4 0.00136, D -0.675
- Komponenten für die Wiederverwendung (CRU) [kg]: A1-A3 0, A4 0, B6 0, C4 0, D 0
- Stoffe zum Recycling (MFR) [kg]: A1-A3 0, A4 0, B6 0, C4 0, D 669.54
- Stoffe für die Energierückgewinnung (MER) [kg]: A1-A3 0, A4 0, B6 0, C4 0, D 0
- Exportierte elektrische Energie (EEE) [MJ]: A1-A3 0, A4 0, B6 0, C4 104.94, D 0
- Exportierte thermische Energie (EET) [MJ]: A1-A3 0, A4 0, B6 0, C4 240.74, D 0

## Impact indicators
- Globales Erwärmungspotenzial (GWP) [kg CO_(2)-Äq.]: A1-A3 2837.82, A4 0.553, B6 0, C4 69.68, D -594.04
- Abbau Potential der stratosphärischen Ozonschicht (ODP) [kg CFC11-Äq.]: A1-A3 3.16e-5, A4 2.54e-12, B6 0, C4 2.05e-10, D -2.41e-5
- Versauerungspotenzial von Boden und Wasser (AP) [kg SO_(2)-Äq.]: A1-A3 13.84, A4 0.00135, B6 0, C4 0.0286, D -2.74
- Eutrophierungspotenzial (EP) [kg PO_(4)^(3)-Äq.]: A1-A3 1.52, A4 0.000314, B6 0, C4 0.00413, D -0.148
- Bildungspotential für troposphärisches Ozon (POCP) [kg Ethen-Äq.]: A1-A3 0.859, A4 -0.000378, B6 0, C4 0.00165, D -0.165
- Potenzial für den abiotischen Abbau nicht fossiler Ressourcen (ADPE) [kg Sb-Äq.]: A1-A3 0.0397, A4 3.68e-8, B6 0, C4 4.56e-6, D -0.00351
- Potenzial für den abiotischen Abbau fossiler Brennstoffe (ADPF) [MJ]: A1-A3 38710.9, A4 7.61, B6 0, C4 34.15, D -6432.05

## Use advice
Gültigkeitsbereich:
Die Umweltproduktdeklaration bezieht sich auf eine Fassade Typ Schüco FW 50+ BF.HI in spezifischer Abmessung Breite x Höhe. Die für die Systembauteile Schüco FW 50+ BF.HI verwendeten Kennwerte in der Ökobilanz werden von der Schüco International KG bereitgestellt. Produktionsort ist der Standort des Erstellers. Der Ersteller ist für die in dieser EPD beschriebenen Spezifikation und die Herstellung der Fassade verantwortlich.
Systemgrenze:
Bei dieser EPD handelt es sich um eine EPD vom Typ Wiege bis Werkstor - mit Optionen. Die Ökobilanz berücksichtigt das Produktstadium (Modul A1-A3, inklusive Rohstoffbereitstellung, Transport zum Werk und Herstellung), den Transport zur Baustelle (Modul A4), sowie die End-of-Life- Module C4: Abfallbehandlung und D: Gutschriften und Lasten außerhalb der Systemgrenzen.

## Data sources
- FW 50+ BF.HI.pdf
- GaBi Database (all versions)
- GaBi database SP29 2016
