# binderholz CLT BBS

Dataset: ILCD process, EPD, average dataset
Geography: DE
Reference year: 2019
Valid until: 2024
Classification: OEKOBAU.DAT: Holz / Vollholz / Brettschichtholzplatte
Classification: IBUCategories: 02 Bauprodukte / Produkte aus Bauholz / Vollholzprodukte
Method details: Vollholzprodukte.pdf
Generated by: Thünen-Institut für Holzforschung
Registration number: EPD-BBS-20190021-IBB1-DE
Owner: Thünen-Institut für Holzforschung
Compliance: DIN EN 15804; ISO 14025
Review: Accredited third party review by Institut Bauen und Umwelt e. V.
Amounts: rows without a unit in brackets have none in this file; such an amount is in the reference unit of its flow, which a separate flow dataset defines
copyright: true
licenseType: Free of charge for all users and uses
accessRestrictions: None

## General comment
binderholz Brettsperrholz BBS ist ein massives, plattenförmiges Holzbauelement, welches aus zueinander rechtwinklig verklebten Nadelholzlagen besteht. Hergestellt wird das binderholz Brettsperrholz BBS nach der /ETA-06/0009/ or /PRG-320/ and /ESR-4081/ according to the respective project-specific requirements.

binderholz CLT (Cross Laminated Timber) BBS is a solid, wooden construction element in panel form that consists of softwood layers that are glued together at right angles to each other. binderholz CLT BBS is produced in accordance with /ETA-06/0009/.

The crosswise orientation of the individual lamellae and the usually symmetrical construction of binderholz CLT BBS has the benefit of extremely high dimensional stability, as well as load-bearing potential both lengthways and transversely to the main load-bearing direction.

The cross-section structure of binderholz CLT BBS is characterised by a minimised number of layers, with no less than three and no more than nine layers.

binderholz CLT BBS is available in 2 different formats:

- System format BBS 125: system width 125 cm

- Large format BBS XL: max. width 350 cm

A very high degree of pre-fabrication and thus an extremely short building time can be achieved, thanks to the existing trimming options that are integrated at the production facilities.

## Technology and included processes
binderholz Brettsperrholz BBS sind flächige Holzbauteile aus mindestens drei kreuzweise verklebten Brettlagen aus Nadelholz. Benachbarte Lagen sind unter einem Winkel von 90° miteinander verklebt. Der Querschnitt der Bauteile ist symmetrisch. Die Bauteile sind eben. Bis zu zwei benachbarte Lagen können faserparallel verklebt sein, solange ein symmetrischer, kreuzweise gesperrter Aufbau erhalten bleibt. Nichttragende äußere Lagen sind zulässig. Einzelne Lagen (maximal 50% des Querschnitts) dürfen durch ein- und mehrschichtige Massivholzplatten nach EN 13986 in tragender Qualität ersetzt werden. Die Holzbauteile werden mit einer Breite von bis zu 3,5 m und einer Länge von bis zu 22 m als Großformat oder mit einer Breite von bis zu 1,25 m und einer Länge von bis zu 5 m als Systemformat hergestellt. Bauteile im Systemformat mit einer Breite von bis zu 1,25 m können werksmäßig in Längsrichtung durch Universal-KeiIzinkenverbindungen gemäß EN 14080 bis zu einer Länge von 20 m verbunden sein. Die Holzbauteile werden durch einen automatisierten Herstellungsprozess, entsprechend der hinterlegten und durch Inspektion überprüften technischen Dokumentation, gefertigt. Das Dickenspektrum der gehobelten Einzellamellen liegt im Bereich von 18 mm bis 45 mm, bei einer Breite von 80 mm bis 250 mm. Die einzelnen Lagen sind bis zur geforderten Bauteildicke verklebt. Die Bretter werden visuell oder maschinell sortiert. Nur technisch getrocknetes Holz wird eingesetzt (Holzfeuchte = 12 % +/- 2 %). Nur beidseitig auf den Deckflächen gehobelte Bretter werden verwendet. Die Bretter der einzelnen Lagen dürfen durch Keilzinkenverbindungen nach EN 14080 in Längsrichtung verbunden werden. Stumpfstöße sind nicht möglich. Die einzelnen Bretter der in Bauteillängsachse verlaufenden Brettlagen können an ihren Schmalseiten verklebt sein. Materialeigenschaften, Abmessungen und Toleranzen des Brettsperrholzes, sind in der technischen Dokumentation der Europäischen Technischen Bewertung (ETA-06/0009) enthalten. Spezifizierung des Verwendungszwecks gemäß dem anwendbaren Europäischen Bewertungsdokument. Die Elemente sind für eine Verwendung als tragende und/oder aussteifende oder als nicht tragende Wand-‚ Decken-, Boden-, Dach- oder Sonderbauteile für Holzbauwerke vorgesehen. Dabei dürfen sie zur Aufnahme und Weiterleitung von Lasten sowohl rechtwinklig zur Elementebene als auch in Elementebene beansprucht werden. Die Anwendung darf nur in Bauwerken unter statischen bzw. quasi-statischen Einwirkungen erfolgen. Die Elemente sind für eine Verwendung in den Nutzungsklassen 1 und 2 gemäß EN 1995-1-1 vorgesehen. Die Elemente sind während Einbau und Nutzung mit einem ausreichenden Wetterschutz zu versehen. Ein kunden- bzw. objektspezifischer Abbund ist möglich.
Technical data:
binderholz CLT BBS is produced with a wood moisture content of 12 % +/- 2 %.

The data included in the declaration of performance applies.

Building-physical properties, such as component resistance and fire resistance, vary depending on the cross-section structure (number of layers, layer thickness) and the load position of the binderholz CLT BBS product. These therefore have to be determined for the structure in question, based on the applicable measurement regulations.

Pursuant to /EN 1995-1-1/ binderholz CLT BBS can be used in service classes 1 and 2 with predominantly static loads.

Preventive chemical wood treatment in accordance with /DIN 68800-3/ can be applied by request. In this context, binderholz CLT BBS can be treated with a class 2 impregnation pursuant to /DIN 68800-3/ to protect it against fungi and insect infestation.

Structural wood protection according to /DIN 68800-2/ is generally preferable.
Declared unit:
The declared unit for the ecological assessment is 1 m³ of CLT BBS, under consideration of the mixture of adhesive used according to chapter 2.5 and a mass of 470.88 kg/m³ at 12.1 % wood moisture content, which corresponds to a water content of 10.7 %. The proportion of adhesives is 1.015 %. All specifications regarding adhesives used were calculated based on specific data.

## Technical purpose
binderholz CLT BBS is used in all constructional areas of modern timber construction, ranging from traditional single-family house construction through to structural and bridge engineering.

The respective national regulations apply for using binderholz CLT BBS.

## Reference product
- Brettsperrholz BBS: 1

## Inputs
- Renewable primary energy as energy carrier (PERE) [MJ]: A1 1893.6, A2 5.75786, A3 988.561, A5 0.282886, C2 0.417022, C3 27.0522, D -1417.52
- Renewable primary energy resources as material utilization (PERM) [MJ]: A1 8011.22, A2 0, A3 0, A5 0, C2 0, C3 -8011.22, D 0
- Total use of renewable primary energy resources (PERT) [MJ]: A1 9904.82, A2 5.75786, A3 988.561, A5 0.282886, C2 0.417022, C3 -7984.17, D -1417.52
- Non renewable primary energy as energy carrier (PENRE) [MJ]: A1 1147.15, A2 104.393, A3 299.021, A5 60.6552, C2 7.56079, C3 57.7777, D -6077.01
- Non renewable primary energy as material utilization (PENRM) [MJ]: A1 47.7902, A2 0, A3 59.04, A5 -59.04, C2 0, C3 -47.7902, D 0
- Total use of non renewable primary energy resources (PENRT) [MJ]: A1 1194.94, A2 104.393, A3 358.061, A5 1.6152, C2 7.56079, C3 9.98748, D -6077.01
- Use of secondary material (SM) [kg]: A1 0, A2 0, A3 0, A5 0, C2 0, C3 0, D 0
- Use of renewable secondary fuels (RSF) [MJ]: A1 0, A2 0, A3 0, A5 0, C2 0, C3 0, D 8011.22
- Use of non renewable secondary fuels (NRSF) [MJ]: A1 0, A2 0, A3 0, A5 0, C2 0, C3 0, D 47.7902
- Use of net fresh water (FW) [m^3]: A1 0.953113, A2 0.0106106, A3 0.342989, A5 0.0101163, C2 0.000768487, C3 0.0171783, D 0.921125

## Outputs
- Hazardous waste disposed (HWD) [kg]: A1 0.0468304, A2 6.03608e-6, A3 0.000147693, A5 8.92495e-9, C2 4.37172e-7, C3 4.40648e-8, D -3.4701e-6
- Non hazardous waste disposed (NHWD) [kg]: A1 0.690067, A2 0.00874496, A3 0.374031, A5 0.380443, C2 0.000633367, C3 0.0593649, D -0.894444
- Radioactive waste disposed (RWD) [kg]: A1 0.0445169, A2 0.00014287, A3 0.0139126, A5 7.81294e-5, C2 1.03476e-5, C3 0.00571594, D -0.300909
- Components for re-use (CRU) [kg]: A1 0, A2 0, A3 0, A5 0, C2 0, C3 0, D 0
- Materials for recycling (MFR) [kg]: A1 0, A2 0, A3 0, A5 0, C2 0, C3 0, D 0
- Materials for energy recovery (MER) [kg]: A1 0, A2 0, A3 0, A5 0, C2 0, C3 470.877, D 0
- Exported electrical energy (EEE) [MJ]: A1 0, A2 0, A3 0, A5 9.05015, C2 0, C3 0, D 0
- Exported thermal energy (EET) [MJ]: A1 0, A2 0, A3 0, A5 16.3148, C2 0, C3 0, D 0

## Impact indicators
- Global warming potential (GWP) [kg CO_(2)-Äq.]: A1 -683.432, A2 7.56441, A3 18.3894, A5 4.07777, C2 0.547864, C3 766.059, D -411.861
- Depletion potential of the stratospheric ozone layer (ODP) [kg CFC11-Äq.]: A1 3.56903e-7, A2 2.08855e-13, A3 8.37915e-9, A5 1.02313e-13, C2 1.51266e-14, C3 6.57922e-12, D -3.45886e-10
- Acidification potential of land and water (AP) [kg SO_(2)-Äq.]: A1 0.284888, A2 0.0319244, A3 0.098845, A5 0.000974228, C2 0.00231217, C3 0.00680786, D -0.389094
- Eutrophication potential (EP) [kg PO_(4)^(3)-Äq.]: A1 0.065418, A2 0.0081876, A3 0.0207298, A5 7.94462e-5, C2 0.000592999, C3 0.0011088, D -0.0603592
- Formation potential of tropospheric ozone photochemical oxidants (POCP) [kg Ethen-Äq.]: A1 0.0681584, A2 -0.0132867, A3 0.0125868, A5 3.37662e-5, C2 -0.00096231, C3 0.000451891, D -0.0341036
- Abiotic depletion potential for non fossil resources (ADPE) [kg Sb-Äq.]: A1 8.01223e-5, A2 6.2761e-7, A3 2.4736e-5, A5 2.89074e-7, C2 4.54556e-8, C3 3.04835e-6, D -0.000162521
- Abiotic depletion potential for fossil resources (ADPF) [MJ]: A1 1076.84, A2 104.026, A3 263.744, A5 1.41804, C2 7.53423, C3 43.3416, D -5353.69

## Use advice
Scope:
The CLT (Cross Laminated Timber) production data from the CLT production facility of Binderholz Unternberg GmbH in Lungau (AT) and the CLT production facility of Binderholz Burgbernheim GmbH based in Burgbernheim in Middle Franconia in Germany, is used as the basis for the life cycle assessment. Together these facilities account for 100 % of the total production of binderholz CLT BBS.

This Environmental Product Declaration applies for binderholz CLT BBS.
System boundary:
The declaration type corresponds to a “cradle to gate with options” EPD. It covers the production phase from provision of the raw materials through to the factory gates (cradle-to-gate, modules A1 to A3), as well as module A5 and parts of end-of-life (modules C2 and C3). In addition to this, potential benefits and burdens are considered beyond the product’s life cycle (module D).

The provision of wood from the forest and provision of glues are considered in module A1. The transport of these materials is considered in module A2. Module A3 covers the provision of fuels, operating materials, and electricity, as well as the production processes on site. These are primarily trimming, gluing, planing, and profiling processes, as well as packaging of the products. Module A5 covers solely the disposal of the product packaging, including the output of contained biomass carbon and contained primary energy (PERM and PENRM).

Transport to the disposer is considered in module C2, and module C3 covers the processing and sorting of waste wood. In addition to this, the CO2 equivalents of the inherent carbon stored in the wood and renewable and non-renewable primary energy (PERM and PENRM) in accordance with /EN 16485/, are registered as output in module C3.

Thermal recovery of the product at the end of its life, and the resulting benefits and burdens are addressed in module D in the form of a system Extension.

## Data sources
- GaBi Database (all versions)
- GaBi database SP39 2019
