# Kaiflex EPDMplus

Dataset: ILCD process, EPD, average dataset
Geography: DE
Reference year: 2020
Valid until: 2025
Classification: OEKOBAU.DAT: Dämmstoffe / Kautschuk / Schaum
Classification: IBUCategories: 02 Building products / Thermal insulation products / Insulating materials made of foam plastics
Method details: Insulating materials made of foam plastics.pdf
Generated by: GreenDelta GmbH
Registration number: EPD-KAI-20200015-IBC1-EN
Owner: Kaimann GmbH
Compliance: DIN EN 15804; ISO 14025
Review: Accredited third party review by Institut Bauen und Umwelt e. V.
Amounts: rows without a unit in brackets have none in this file; such an amount is in the reference unit of its flow, which a separate flow dataset defines
copyright: true
licenseType: Free of charge for all users and uses
accessRestrictions: None

## General comment
Kaiflex EPDMplus is a flexible closed cell rubber insulation that prevents condensation and reduces energy loss. By incorporating a water vapour barrier into the insulation cell structure Kaiflex EPDMplus can eliminate water vapour migration and retain its performance over the entire system life. This EPD covers the Kaiflex EPDMplus product family including Kaiflex EPDMplus tubes and sheets.

For the placing on the market of the product in the European Union/European Free Trade Association (EU/EFTA) (with the exception of Switzerland) Regulation (EU) No. 305/2011 (CPR) applies. The product needs a declaration of performance taking into consideration EN 14304:2009 Thermal insulation products for building equipment and industrial installations - Factory made flexible elastomeric foam (FEF) products - Specification, and the CE-marking. For the application and use the respective national provisions apply.

## Technology and included processes
Manufacturing happens in a single plant in Germany. Upon delivery, the raw materials are either stored in a warehouse or used in the production shortly after. The first step in the production of Kaiflex EPDMplus is to mix the raw materials in a kneader and to roll-out the resulting mixture which is then cut into sheets. The flat sheets are passed through an industrial cooler and cooled-off. The cooled-off sheets are granulated and the granulates are temporarily stored at room temperature before entering the compounding plant. In a next step, the different types of granulates enter the compounding plant for mixing. The resulting elastomer compound is pushed through one of five extruders and carried on a conveyer belt through an industrial furnace for foaming. After foaming, the endless sheets are passed through an industrial cooler upon which a continuous longitudinal cut is applied to cut sheets into the right width. If applicable, adhesive coating is applied on one side of the sheets. Finally, a traverse cut trims the continuous sheet into sheets of various sizes.
Declared unit:
The declared unit is 1 m³ of the thermal insulation material for technical building equipment and industrial installations Kaiflex EPDMplus including packaging materials. The declared unit refers to the product as it leaves the factory gate. The gross density is the average density of al declared products, weighted by production volume.

## Technical purpose
Kaiflex EPDMplus is available in tube and sheets for use on air-conditioning, refrigeration, chilled water, heating and hot water pipes and air-distribution ductwork. In addition to preventing condensation and saving energy, Kaiflex EPDMplus also performs an acoustic function, absorbing sound and dampening duct wall vibration. With inherent anti-microbial resistance as standard, and a Class D fire rated, closed cell rubber that is completely dust and fibre free, Kaiflex EPDMplus can be used in any kind of public, commercial or industrial building without impacting on health or the quality of air. Outdoor application requires protection against UV-radiation.

## Reference product
- Kaiflex EPDMplus (): 1

## Inputs
- Renewable primary energy as energy carrier (PERE) [MJ]: A1 258.548, A2 1.03651, A3 278.565, A4 1.1894, A5 7.79955, C2 0.175285, C4 22.9528, D -528.322
- Renewable primary energy resources as material utilization (PERM) [MJ]: A1 10.1124, A2 0, A3 234.914, A4 0, A5 0, C2 0, C4 0, D -234.914
- Total use of renewable primary energy resources (PERT) [MJ]: A1 268.661, A2 1.03651, A3 513.479, A4 1.1894, A5 7.79955, C2 0.175285, C4 22.9528, D -763.236
- Non renewable primary energy as energy carrier (PENRE) [MJ]: A1 1295.97, A2 131.757, A3 224.377, A4 111.94, A5 223.821, C2 16.4493, C4 3409.3, D -1700.09
- Non renewable primary energy as material utilization (PENRM) [MJ]: A1 3326.4, A2 0, A3 115.623, A4 0, A5 -115.623, C2 0, C4 -3326.4, D 0
- Total use of non renewable primary energy resources (PENRT) [MJ]: A1 4622.37, A2 131.757, A3 340, A4 111.94, A5 108.198, C2 16.4493, C4 82.8993, D -1700.09
- Use of secondary material (SM) [kg]: A1 0, A2 0, A3 0, A4 0, A5 0, C2 0, C4 0, D 0
- Use of renewable secondary fuels (RSF) [MJ]: A1 0, A2 0, A3 0, A4 0, A5 0, C2 0, C4 0, D 0
- Use of non renewable secondary fuels (NRSF) [MJ]: A1 0, A2 0, A3 0, A4 0, A5 0, C2 0, C4 0, D 0
- Use of net fresh water (FW) [m^3]: A1 6.91163, A2 0.0164123, A3 0.723969, A4 0.0188202, A5 0.104762, C2 0.00277356, C4 0.637861, D -3.88545

## Outputs
- Hazardous waste disposed (HWD) [kg]: A1 0.030498, A2 5.2108e-9, A3 0.00949594, A4 4.87726e-11, A5 5.22978e-8, C2 0, C4 5.33235e-7, D -0.00170504
- Non hazardous waste disposed (NHWD) [kg]: A1 78.6256, A2 0.101992, A3 9.01282, A4 0.000954633, A5 5.67444, C2 0, C4 66.0711, D -317.777
- Radioactive waste disposed (RWD) [kg]: A1 0.0163412, A2 5.82819e-5, A3 0.00279107, A4 5.45513e-7, A5 0.00100612, C2 0, C4 0.00390742, D -0.00488243
- Components for re-use (CRU) [kg]: A1 0, A2 0, A3 0, A4 0, A5 13.7, C2 0, C4 0, D 0
- Materials for recycling (MFR) [kg]: A1 0, A2 0, A3 0, A4 0, A5 0, C2 0, C4 0, D 0
- Materials for energy recovery (MER) [kg]: A1 0, A2 0, A3 0, A4 0, A5 0, C2 0, C4 0, D 0
- Exported electrical energy (EEE) [MJ]: A1 0, A2 0, A3 0, A4 0, A5 0, C2 0, C4 0, D 0
- Exported thermal energy (EET) [MJ]: A1 0, A2 0, A3 0, A4 0, A5 69.3738, C2 0, C4 1995.84, D 0

## Impact indicators
- Global warming potential (GWP) [kg CO_(2)-Äq.]: A1 207.332, A2 9.29967, A3 26.4143, A4 7.1407, A5 12.6953, C2 1.04806, C4 195.617, D -220.394
- Depletion potential of the stratospheric ozone layer (ODP) [kg CFC11-Äq.]: A1 5.11947e-5, A2 9.90115e-7, A3 2.23109e-7, A4 1.32527e-6, A5 2.03764e-7, C2 1.95538e-7, C4 1.35201e-13, D -2.23109e-7
- Acidification potential of land and water (AP) [kg SO_(2)-Äq.]: A1 1.27487, A2 0.134944, A3 0.0869145, A4 0.0291335, A5 0.0136416, C2 0.00414111, C4 0.0228781, D -0.214085
- Eutrophication potential (EP) [kg PO_(4)^(3)-Äq.]: A1 0.757058, A2 0.0171298, A3 0.0204827, A4 0.00673422, A5 0.00593288, C2 0.000976778, C4 0.00524324, D -0.0514282
- Formation potential of tropospheric ozone photochemical oxidants (POCP) [kg Ethen-Äq.]: A1 0.0557803, A2 0.00404919, A3 0.00507137, A4 0.00120031, A5 0.0017884, C2 0.000172715, C4 0.00133127, D -0.0109436
- Abiotic depletion potential for non fossil resources (ADPE) [kg Sb-Äq.]: A1 0.00368419, A2 1.60442e-5, A3 9.33366e-6, A4 2.13495e-5, A5 8.88232e-6, C2 3.1499e-6, C4 1.31594e-6, D -1.30497e-5
- Abiotic depletion potential for fossil resources (ADPF) [MJ]: A1 4321.27, A2 130.567, A3 319.313, A4 110.347, A5 106.491, C2 16.2142, C4 82.8993, D -1697.24

## Use advice
Scope:
Product line Kaiflex EPDMplus

Thermal insulation material made of flexible elastomeric foam for technical building equipment and industrial installations.

The EPD is performed in agreement with the demands of PCR Part A with reference to EN 15804+A1:2013 and PCR Part B: Requirements on the EPD for insulating materials made of foam plastics.

The EPD is based on the average Kaiflex EPDMplus production from two different variations produced in one plant in Germany.
System boundary:
The type of EPD is cradle to gate with options. The system boundaries of the EPD follow the modular structure of EN 15804 (according to EN 15804, section 6.2.1). Only the declaration of the product stage modules A1 to A3 is mandatory for compliance with EN15804. The declaration of the modules of other life cycle stages is optional. Resources from the ecosphere and technosphere enter the system on stage A1 and leave the system on stage C4. The following life cycle stages are considered:

Module A1: The system boundaries comprise raw material extraction and supply from cradle to factory gate and is represented through generic background data sets.

Module A2: The transport of the raw materials from the factory gate to the point of manufacturing is represented through generic background data sets. The transportation distances have been provided by the manufacturer.

Module A3: The manufacturing includes manufacturer-specific material and energy data which are represented through generic data sets. Machinery as well as buildings to manufacture the declared unit are neglected. On average, 0.49 kWh electricity and 2.65 kWh natural gas are required for the manufacturing of 1m³ Kaiflex EPDMplus. This data was provided by Kaimann GmbH. This module also includes packaging with plastics and cardboard and wooden pallets. The biogenic carbon stored is declared in the result section.

Module A4: The transport of Kaiflex EPDMplus from the factory gate to the site of assembly is represented through generic background data. The transportation distances are based on average transportation data provided by the manufacturer.

Module A5: The assembly can be done manually without the use of any electrical equipment. Only glue (Kaiflex Special glue) is required for the assembly of Kaiflex EPDMplus. Packaging material from module A3 is disposed of here: Plastic packaging is incinerated, and cardboard and the wooden pallet are re-used.

Modules B1-B7: No resource use and impacts occur during the use phase of the products.

Modules C1&C3: Dismantling of Kaiflex EPDMplus is done manually without using any electrical equipment. No processing is required before disposal. Therefore, module C1 and C3 are disregarded.

Module C2: The products to be disposed of are transported to the waste treatment facility.

Module C4: The waste is treated according to the waste framework directive of the European Union.

Module D: Potential impacts and benefits from energy recovery and recycling are described.

## Data sources
- GaBi Database (all versions)
- GaBi database SP39 2019
