# Electricity grid mix scenario 2030; <1kV

Dataset: ILCD process, EPD, generic dataset
Geography: DE
Reference year: 2018
Valid until: 2022
Classification: oekobau.dat: Sonstige / Energieträger - Bereitstellung frei Verbraucher / Strom
Owner: thinkstep
Compliance: DIN EN 15804
Review: Dependent internal review by thinkstep, IABP-GaBi, IBP-GaBi; Independent external review by GaBi user forum, GaBi bug forum, GaBi user community
Amounts: rows without a unit in brackets have none in this file; such an amount is in the reference unit of its flow, which a separate flow dataset defines
copyright: true

## General comment
The data set represents the average country or region specific electricity supply for final consumers, including electricity own consumption, transmission/distribution losses of low voltage electricity supply and electricity imports from neighbouring countries. The national energy carrier mixes used for electricity production, the power plant efficiency data, shares on direct to combined heat and power generation (CHP), as well as transmission/distribution losses and own consumption values are taken from official statistics (International Energy Agency, and US-EPA eGRID for USA regions) for the corresponding reference year. Detailed power plant models were used, which combine measured (e.g. NOx) with calculated emission values (e.g. heavy metals). The inventory is partly based on primary industry data, partly on secondary literature data (EU Energy, Transport and GHG Emissions - Trends to 2050 - Reference Scenario 2013 of the European Commission).

## Geography
The data set represents the average national or region specific electricity mix including main activity producers and autoproducers as well as electricity imports. Main technologies for firing, flue gas cleaning and electricity generation are considered according to the national or region specific situation.

## Time period
annual average

## Technology and included processes
Foreground system:
The national or regional specific electricity consumption mix is provided by the conversion of the different energy carriers to electricity and imports from neighbouring countries, as illustrated in the pie chart "Electricity Mix".
The electricity is either produced in energy carrier specific power plants and/or combined heat and power plants (CHP). Also considered are the national and regional specific technology standards of the power plants in regard to efficiency, firing technology, flue-gas desulphurisation, NOx removal and de-dusting. The electricity provided by non-combustible renewable energy sources also considers the national or regional situation, such as solar radiation (photovoltaic), annual full load hours (wind power), and share of hydro power stations by type (run-of-river, storage and pumped storage).
The fossil power plant models combine emission data from literature with calculated values for non-measured emissions e.g. organics or heavy metals. For the emissions CO2, SO2, NOx, CO, CH4, N2O, NMVOC and particulate matter (PM) measured/calculated data are used, taken from national inventory reports, emission inventory data bases, utility companies and other sources. The calculation of other emissions within the models are based on energy carrier properties, transfer coefficients and power plant thermodynamics representing the applied flue gas treatment technologies and standards (flue gas desulphurisation, dust filter etc.). Combustion residues from solid fuels, such as gypsum, bottom ash or fly ash are assumed to be reused e.g. in construction work. Waste treatment for these substances is therefore not considered. Radioactive emissions from ashes are not considered in the coal power plant model.
The energy carrier supply considers the whole supply chain of the energy carrier from exploration, production, processing and transport of the fuels to the power plants. The supply chain is modelled in specific national / regional energy carrier consumption mixes (i.e. domestic production and imports), and considers national / regional average energy carrier properties (e.g. elemental composition and energy content).
The electricity grid mix includes imported electricity from neighbouring countries, transmission / distribution losses of low voltage electricity supply and the own use of electricity by energy producers (own consumption of power plants, and "other" own consumption e.g. due to pumped storage hydro power etc.). The logic of modelling the electricity consumption mix is represented in the flow diagram "Modelling of Electricity Consumption Mixes".
Background system:
Electricity: Electricity is modelled according to the individual country-specific situations. The country-specific modelling is achieved on multiple levels. Firstly, individual energy carrier specific power plants and plants for renewable energy sources are modelled according to the current national electricity grid mix. Modelling the electricity consumption mix includes transmission / distribution losses and the own use by energy producers (own consumption of power plants and "other" own consumption e.g. due to pumped storage hydro power etc.), as well as imported electricity. Secondly, the national emission and efficiency standards of the power plants are modelled as well as the share of electricity plants and combined heat and power plants (CHP). Thirdly, the country-specific energy carrier supply (share of imports and / or domestic supply) including the country-specific energy carrier properties (e.g. element and energy content) are accounted for. Fourthly, the exploration, mining/production, processing and transport processes of the energy carrier supply chains are modelled according to the specific situation of each electricity producing country. The different production and processing techniques (emissions and efficiencies) in the different energy producing countries are considered, e.g. different crude oil production technologies or different flaring rates at the oil platforms.
Thermal energy, process steam: The thermal energy and process steam supply is modelled according to the individual country-specific situation with regard to emission standards and considered energy carriers. The thermal energy and process steam are produced at heat plants. Efficiencies for thermal energy production are by definition 100% in relation to the corresponding energy carrier input. For process steam the efficiency ranges from 85%, 90% to 95%. The energy carriers used for the generation of thermal energy and process steam are modelled according to the specific import situation (see electricity above).
Transports: All relevant and known transport processes are included. Ocean-going and inland ship transport as well as rail, truck and pipeline transport of bulk commodities are considered.
Energy carriers: The energy carriers are modelled according to the specific supply situation (see electricity above).
Refinery products: Diesel fuel, gasoline, technical gases, fuel oils, lubricants and residues such as bitumen are modelled with a parameterised country-specific refinery model. The refinery model represents the current national standard in refining techniques (e.g. emission level, internal energy consumption, etc.) as well as the individual country-specific product output spectrum, which can be quite different from country to country. The supply of crude oil is modelled, again, according to the country-specific situation with the respective properties of the resources.

## Technical purpose
Supply of 1 kWh low voltage (<1kV) electricity to final consumers.

## Safety margin
0 %.

## Reference product
- Electricity: 3.6

## Inputs
- Use of renewable primary energy (PERE) [MJ]: B6 5.67643
- Primary energy resources used as raw materials (PERM) [MJ]: B6 0
- Total use of renewable primary energy resources (PERT) [MJ]: B6 5.67643
- Use of non-renewable primary energy (PENRE) [MJ]: B6 5.30758
- Non-renewable primary energy resources used as raw materials (PENRM) [MJ]: B6 0
- Total use of non-renewable primary energy resources (PENRT) [MJ]: B6 5.30758
- Input of secondary material (SM) [kg]: B6 0
- Use of renewable secondary fuels (RSF) [MJ]: B6 0
- Use of non renewable secondary fuels (NRSF) [MJ]: B6 0
- Use of net fresh water (FW) [m3]: B6 0.00167395

## Outputs
- Hazardous waste disposed (HWD) [kg]: B6 4.84428e-9
- Non-hazardous waste disposed (NHWD) [kg]: B6 0.00560505
- Radioactive waste disposed (RWD) [kg]: B6 7.97647e-5
- Components for re-use (CRU) [kg]: B6 0
- Materials for Recycling (MFR) [kg]: B6 0
- Material for Energy Recovery (MER) [kg]: B6 0
- Exported electrical energy (EEE) [MJ]: B6 0
- Exported thermal energy (EET) [MJ]: B6 0

## Impact indicators
- Global warming potential (GWP) [kg CO2 eq.]: B6 0.502802
- Ozone Depletion Potential (ODP) [kg R11 eq.]: B6 3.88283e-14
- Acidification potential (AP) [kg SO2 eq.]: B6 0.000631873
- Eutrophication potential (EP) [kg Phosphate eq.]: B6 0.000116061
- Photochemical Ozone Creation Potential (POCP) [kg Ethene eq.]: B6 5.11019e-5
- Abiotic depletion potential for non fossil resources (ADPE) [kg Sb eq.]: B6 3.28745e-7
- Abiotic depletion potential for fossil resources (ADPF) [MJ]: B6 5.10394

## Use advice
The data set represents a projected electricity supply in the future. The projection includes changes from policies that have been already implemented but also planned policies and policies that are needed to fullfill certain mitigation targets (especially primary energy consumption and GHG emissions). The data set can be used for all LCA/CF studies where low voltage electricity is needed. Combination with individual unit processes using this commodity enables the generation of user-specific (product) LCAs.

## Data sources
- K.Weissermel, H.- J. Arpe: Industrial organic chemistry
- Copper development association: Overview of Recycled Copper
- Smelter Tech: The Reverberatory Furnace
- Process for the production of a plasticized polyvinyl butyral for gluing a base onto a glazing
- LookChem: Manufacture of 1.12-Dodecanedioic Acid
- Methods of making cyclododecatriene and
- EPA - Health and Environmental Effects Profile for 2-Chloro-1,3-Butadiene, 1984
- Chlorpropanes, Chlorobutanes, and Chlorobutenes: Chapter in Ullmann's, 2011
- Chloroprene - Données technico-économiques sur les substances chimiques en France - 2006
- Renewables Information 2011
- eGrid2012 Version 1.0
- Update of the Environmental Indicators and Energy Payback Time of CIS Modules in Europe, 2010
- Sustainability Evaluation of Solar Energy Systems: LCA Analysis (LCA of Thin Film Technologies)
- Life Cycle Inventories and Life Cycle Assessments of Photovoltaic Systems, 2011
- Environmental Life Cycle Inventory of Crystalline Silicon Photovoltaic System Production, 2006
- Update of environmental indicators and energy payback time of CdTe PV systems in Europe, 2011
- Energy payback, life cycle CO2 emissions of the BOS in optimized 3.5 MW PV installation
- Methodology Guidelines on Life Cycle Assessment of Photovoltaic Electricity, 2009
- Annual European Union greenhouse gas inventory 1990 - 2008 and inventory report 2010
- Air pollutant emissions in Finland 1990-2008 Informative Inventory report
- Air pollutant emissions from stationary installations using bioenergy in the NLs BOLK Phase 2
- 2da Comunicacion Nacional de la Republica Argentina
- 2006 IPCC Guidelines for National Greenhouse Gas Inventories
- 13. Verordnung zur Durchführung des Bundes-Immissionsschutzgesetzes
- Auswertung PV-Leistung
- Austria's National Inventory Report 2010
- Austria's Informative Inventory Report (IIR) 2010
- Australian National Greenhouse Accounts (NIR)
- Australian electricity generation report 2008
- Appendix H: Calorific Value, Price, and Emission Coefficients of Energy Kinds
- Appendix 17 Thermal values and Emission factors energy.xls GWP conversion factors 2006
- Anthropogenic Emissions from Energy Activities in India
- Emission Estimation Technique Manual for Fossil Fuel Electric Power Generation Version 2.3
- Emisiones atmosféricas de las centrales eléctricas en América del Norte
- EMEP/EEA air pollutant emission inventory guidebook - 2009
- EMEP/CORINAIR Emission Inventory Guidebook - 2006
- Electricity Gas Australia
- Electric Power Industry 2009: Year in Review
- Directive 2009/28/EC of the European Parliament and of the Council of 23 April 2009
- Digest of United Kingdom Energy Statistics 2010
- Denmark's National Inventory report 2010
- Danish Emission inventories for stationary combustion plants
- Compilation of Air Pollutant Emission Factors
- Climate change - Immision Inventory
- BVT - Festlegung in ausgewählten industriellen Bereichen als Beitrag zur Erfüllung der Klimasch...
- Brennstoffe und Verbrennungsrechnung, 2. Auflage
- Brennstoffe und Verbrennungsrechnung
- Belgium's Greenhouse Gas Inventory (1990-2008)
- Greenhouse Gas Emissions in the Netherlands 1990-2008
- Greenhouse Gas Emissions in Finland 1990-2008
- Greenhouse Gas Emissions in Estonia 1990-2008
- Greenhouse Gas Emission in Estonia
- GHG Inventories 2008 - Common Reporting Format (CRF)
- Full fuel cycle greenhouse gas emission analysis for proposed Kwinana CCGT power station
- Ermittlung und Evaluierung von Emissionsfaktoren für Feuerungsanlagen in Deutschland
- Erarbeitung der Grundlagen für das BVT - Merkblatt Großfeuerungsanlagen
- Environmental Report 2008
- Energy Statistics Imports Electricity
- Energy Futures and Urban Air Pollution: Challenges for China and the United States
- Energy Consumption, Energy Savings and Emission Analysis for Industrial Motors
- Emissoes dos Gases Geradores do Efeito Estufa por Termelctricas no Periodo 2000 a 2020
- Emissionsschätzungen für SO2, NO2, NMVOC und NH3 in Deutschland 2000-2020
- Emissionsfaktoren und Kohlenstoffgehalte
- Emissions of greenhouse gases in Iceland from 1990 to 2008
- Evaluation Criteria Investment Proposals (translated from hellenic)
- Greenhouse Gas Emissions Inventory Reports of Spain 1990-2008
- Life Cycle Inventory for Electricity Generation in China
- Liechtenstein`s Greenhouse Gas Inventory Report 1990 -2008
- Latvia's Informative Inventory 1990- 2008
- Italian Greenhouse Gas Inventory 1990-2008
- Ireland - Informative Inventory Report 2010
- Inventory of the U.S. Greenhouse Gas Emissions and Sinks (1990 -2008)
- Inventaire des emissions des grandes installations de combustion en France
- Integrated Report 2010
- Integrated Pollution Prevention and Control (IPPC) - Ref. Doc. on the BAT for Large Combustion Plant
- Integrated Pollution Prevention and Control
- Informative Inventory Report
- India's Initial National Communication to the United Nations Framework Convention on Climate Change
- Organisation et methodes des inventaires nationaux des emission atmospheriques en France
- NIR pour la France au titre de la convention cadre des Nations Unies sur les changements climatiques
- New Zealand's Greenhouse Gas Inventory 1990 - 2007
- National Inventory Report for 1985-2008 - Hungary
- National Inventory Report 2010 Sweden
- National Inventory Report 2010 Norway
- National Inventory Report 2010 for Greenhouse Gas Emissions
- National Inventory Report 2010
- National Inventory Report
- National Greenhouse Gas Inventory Report of the Czech Republic, NIR
- National Greenhouse Gas Inventory Report of Japan
- National Greenhouse Gas Emission Inventory Report 2009 of the Republic of Lithuania
- Luxembourg´s National Inventory Report 2010 (1990 -2008)
- Lithuanians's Informative Inventory 2008
- Switzerland's Greenhouse Gas Inventory 1990-2008
- Sumas Energy 2 Generation Facility Air Quality Issue Summary
- Submission under the UN Framework Convention on Climate Change and under the Kyoto Protocol 2010
- Slovenia's National Inventory Report 2010
- Slovak Republic National Inventory Report 2010
- Romania's Greenhouse Gas Inventory 1989-2008
- Romanian Informative Inventory 2008
- Richtlinie 2009/28/EG des Europäischen Parlaments und des Rates vom 23. April 2009
- Renewables 2010
- Power Hungry: Reinventing The U.S. Electric Grid
- Power Connections: Canadian Electricity Trade and Foreign Policy
- Portuguese National Inventory Report on Grennhouse Gases, 1990-2008
- Portuguese Informative Inventory 1990-2008
- Poland's Informative Inventory 2010
- Verhaltenes Lächeln auf langen Gesichtern
- UK Greenhouse gas inventory, 1990 to 2008
- Turkey Greenhouse gas Inventory, 1990 to 2008
- The European Pollutant Release and Transfer Register
- The CEA Mercury program
- Telefonische Recherche - Preis Kraftwerksnebenprodukte
- EU Energy Trends to 2050
- Plant-by-Plant emissions reported under LCP directive
- The European offshore wind industry - key trends and statistics 2014
- China Electric Power Yearbook 2015
- Wind in power 2016 - European statistics
- The European offshore wind industry - key trends and statistics 2015
- IEA Wind - 2016 Annual report
- Statistical Yearbook 2015
- Energy Balances of OECD Countries 2017
- Energy Statistics of OECD Countries 2017
- Energy Balances of Non-OECD Countries 2017
- Energy Statistics of Non-OECD Countries 2017
- World Energy Statistics 2017
- Electricity Information 2017
- Bruttostromerzeugung in Deutschland ab 1990 nach Energieträgern
- GaBi database (all versions)
