# STEICO Holzfaserdämmplatten aus dem Nassverfahren

Dataset: ILCD process, EPD, specific dataset
Geography: RER
Reference year: 2020
Valid until: 2025
Classification: OEKOBAU.DAT: Dämmstoffe / Holzfasern / Holzfaserdämmplatte
Classification: IBUCategories: 02 Bauprodukte / Holzwerkstoffe / Holzwerkstoffe
Method details: Holzwerkstoffe.pdf
Registration number: EPD-STE-20200174-IBA1-DE
Owner: STEICO SE
Compliance: DIN EN 15804; ISO 14025
Review: Accredited third party review by Institut Bauen und Umwelt e. V.
Amounts: rows without a unit in brackets have none in this file; such an amount is in the reference unit of its flow, which a separate flow dataset defines
copyright: true

## General comment
Die vorliegende Deklaration beschreibt einen produktionsmassengewichteten Durchschnitt der im Nassverfahren produzierten Holzfaserdämmstoffe STEICObase, STEICOduo, STEICOfloor, STEICOinternal, STEICOisorel, STEICOprotect H, STEICOprotect M, STEICOroof, STEICOspecial, STEICOtherm, STEICOtherm SD, STEICOunderfloor, STEICOuniversal.

## Technology and included processes
Das Nassverfahren zur Herstellung der STEICO Holzfaserdämmplatten beinhaltet folgende Prozessschritte: Verarbeitung des Rohholzes zu Hackschnitzeln Erhitzen der Hackschnitzel unter Dampfdruck Zerfaserung der Hackschnitzel im Refiner Vermischung der Fasern mit Wasser zu einem Faserbrei ggf. Zugabe der notwendigen Zusatzstoffe (produktabhängig) Formung der Dämmstoffplatte durch Pressen Längszuschnitt der Dämmstoffplatte Trocknen der Platten ( 160°C – 200°C) ggf. Verleimung (produktabhängig) Zuschnitt und Profilierung Abstapelung, Verpackung Alle während der Produktion anfallenden Reststoffe werden entweder erneut der Produktion oder intern einer energetischen Verwertung zugeführt. Systeme zur Gütesicherung: Qualitätsmanagementsystem nach /DIN EN ISO 9001:2015/ Umweltmanagementsystem nach /DIN EN ISO 14001:2015/ CE-Kennzeichnung nach /DIN EN 13171/MPA Nordrhein-Westfalen, D FSC Zertifikat /CU-COC-841217/ PEFC Zertifikat /CU-PEFC-841217/
Technische Daten:
Die folgenden Angaben beziehen sich auf die Produktlinie STEICOprotect M im Auslieferungszustand. Angaben zu weiteren im Gültigkeitsbereich dieser EPD genannten Produkte sind unter www.steico.com einsehbar.
Deklarierte Einheit:
Die deklarierte Einheit ist 1 m³ Holzfaserdämmstoff mit einer mittleren Rohdichte von 237,84 kg bei einem Wasseranteil von 4,81 %. Der Anteil der Zusatzstoffe liegt bei 3,55 %.

Die Berechnung der Rohdichte und der Inhaltsstoffanteile der deklarierten Einheit erfolgte über die produktionsmassengewichtete

Durchschnittsbildung der im Werk hergestellten Holzfaserdämmstoffe aus dem Nassverfahren (ohne bitumenhaltige Dämmstoffe). Es handelt sich gemäß des Punktes 5.2.1c der PCR Teil A um eine "Deklaration eines durchschnittlichen Produkts aus einem Werk eines Herstellers".

## Technical purpose
STEICO Holzfaserdämmstoffe können vielseitig für Wand-, Dach-, und Bodensysteme verwendet werden.

Die Anwendung reicht von Unterdeckungen und Aufsparrendämmung im Dachbereich bis hin zu allen Dämmanwendungen im Wandbereich, Dämmung von Installationsebenen und ebenso im Bereich Decken und Dämmung der oberen Geschossdecke. Ferner sind sie als tritt- und raumschalldämmende Unterlage unterhalb von Parkett- und Laminatböden sowie als direkt verputzbares Dämmelement für Wärmedämmverbundsysteme einsetzbar.

## Reference product
- Holzfaserdämmstoff (Nassverfahren) (): 1

## Inputs
- Erneuerbare Primärenergie als Energieträger (PERE) [MJ]: A1 55.4564, A2 3.00102, A3 532.121, A5 1.9884, C2 0.556476, C3 1.4609, D -784.633
- Erneuerbare Primärenergie zur stofflichen Nutzung (PERM) [MJ]: A1 4199.78, A2 0, A3 261.453, A5 -261.453, C2 0, C3 -4199.78, D 0
- Total erneuerbare Primärenergie (PERT) [MJ]: A1 4255.24, A2 3.00102, A3 793.574, A5 -259.465, C2 0.556476, C3 -4198.32, D -784.633
- Nicht-erneuerbare Primärenergie als Energieträger (PENRE) [MJ]: A1 476.141, A2 53.4411, A3 2872.17, A5 9.64622, C2 9.90954, C3 25.0952, D -2866.71
- Nicht-erneuerbare Primärenergie zur stofflichen Nutzung (PENRM) [MJ]: A1 304.816, A2 0, A3 37.4444, A5 -37.4444, C2 0, C3 -304.816, D 0
- Total nicht erneuerbare Primärenergie (PENRT) [MJ]: A1 780.957, A2 53.4411, A3 2909.61, A5 -27.7982, C2 9.90954, C3 -279.721, D -2866.71
- Einsatz von Sekundärstoffen (SM) [kg]: A1 0, A2 0, A3 0, A5 0, C2 0, C3 0, D 0
- Erneuerbare Sekundärbrennstoffe (RSF) [MJ]: A1 0, A2 0, A3 1391.92, A5 0, C2 0, C3 0, D 4199.78
- Nicht erneuerbare Sekundärbrennstoffe (NRSF) [MJ]: A1 0, A2 0, A3 0, A5 0, C2 0, C3 0, D 304.816
- Einsatz von Süßwasserressourcen (FW) [m^3]: A1 0.379848, A2 0.00347497, A3 1.12522, A5 0.0897745, C2 0.000644361, C3 0.00130867, D 0.427713

## Outputs
- Gefährlicher Abfall zur Deponie (HWD) [kg]: A1 0.000829349, A2 2.48698e-6, A3 3.05491e-6, A5 3.07464e-8, C2 4.61159e-7, C3 9.37977e-7, D -1.48703e-6
- Entsorgter nicht gefährlicher Abfall (NHWD) [kg]: A1 0.631132, A2 0.00817853, A3 3.11925, A5 0.487525, C2 0.00151654, C3 0.00440416, D 2.9601
- Entsorgter radioaktiver Abfall (RWD) [kg]: A1 0.00352612, A2 6.61459e-5, A3 0.0168899, A5 0.00029708, C2 1.22654e-5, C3 2.6424e-5, D -0.113732
- Komponenten für die Wiederverwendung (CRU) [kg]: A1 0, A2 0, A3 0, A5 0, C2 0, C3 0, D 0
- Stoffe zum Recycling (MFR) [kg]: A1 0, A2 0, A3 0, A5 0, C2 0, C3 0, D 0
- Stoffe für die Energierückgewinnung (MER) [kg]: A1 0, A2 0, A3 0, A5 0, C2 0, C3 237.84, D 0
- Exportierte elektrische Energie (EEE) [MJ]: A1 0, A2 0, A3 0, A5 47.7745, C2 0, C3 0, D 660.249
- Exportierte thermische Energie (EET) [MJ]: A1 0, A2 0, A3 0, A5 108.882, C2 0, C3 0, D 1323.08

## Impact indicators
- Globales Erwärmungspotenzial (GWP) [kg CO_(2)-Äq.]: A1 -381.075, A2 3.85932, A3 262.845, A5 28.0979, C2 0.715631, C3 401.463, D -177.394
- Abbau Potential der stratosphärischen Ozonschicht (ODP) [kg CFC11-Äq.]: A1 6.87756e-8, A2 6.4243e-16, A3 7.28074e-13, A5 1.09707e-14, C2 1.19125e-16, C3 6.17753e-16, D -4.46873e-12
- Versauerungspotenzial von Boden und Wasser (AP) [kg SO_(2)-Äq.]: A1 0.0595153, A2 0.0161703, A3 0.612806, A5 0.00480942, C2 0.00299845, C3 0.0169225, D -0.156714
- Eutrophierungspotenzial (EP) [kg PO_(4)^(3)-Äq.]: A1 0.012855, A2 0.00406792, A3 0.0630974, A5 0.000989499, C2 0.000754312, C3 0.00365406, D -0.0266573
- Bildungspotential für troposphärisches Ozon (POCP) [kg Ethen-Äq.]: A1 0.00908198, A2 -0.0068002, A3 0.0884878, A5 0.00024193, C2 -0.00126096, C3 0.00165403, D -0.0148954
- Potenzial für den abiotischen Abbau nicht fossiler Ressourcen (ADPE) [kg Sb-Äq.]: A1 2.78076e-5, A2 3.24972e-7, A3 2.03354e-5, A5 5.96662e-7, C2 6.02594e-8, C3 1.72266e-7, D -4.57309e-5
- Potenzial für den abiotischen Abbau fossiler Brennstoffe (ADPF) [MJ]: A1 467.196, A2 53.2722, A3 2829.92, A5 8.89642, C2 9.87823, C3 25.0277, D -2579.62

## Use advice
Gültigkeitsbereich:
Diese Deklaration ist eine EPD, die ein Durchschnittsprodukt verschiedener Produktlinien aus dem Nassverfahren abbildet, welche in folgendem Werk hergestellt werden:

STEICO Sp. z o.o.

ul. Przemysłowa 2

64-700 Czarnków

Die Berechnung der Ökobilanz bezieht sich auf ein Produkt mit einer Rohdichte von 237,84 kg/m3.

Folgende Dämmstoffplatten aus dem Nassverfahren sind in die Durchschnittsbildung eingeflossen:

STEICOfloor (160 kg/m3)
STEICOinternal (160 kg/m³)
STEICOtherm (160 kg/m3)
STEICOtherm SD (160 kg/m3)
STEICOisorel (230 kg/m3)
STEICOprotect M (230 kg/m3)
STEICOroof (230 kg/m3)
STEICOspecial (240 kg/m3)
STEICObase (250 kg/m3)
STEICOunderfloor (250 kg/m3)
STEICOduo (265 kg/m3)
STEICOprotect H (265 kg/m3)
STEICOuniversal (270 kg/m3)
Systemgrenze:
Der Deklarationstyp entspricht einer EPD „Wiege bis Werkstor – mit Optionen“. Inhalte sind das Stadium der Produktion, d. h. von der Bereitstellung der Rohstoffe bis zum Werkstor der Produktion (cradle-to-gate, Module A1 bis A3), sowie das Modul A5 und Teile des Endes des Lebensweges (Modul C2 und C3). Darüber hinaus erfolgt eine Betrachtung der potenziellen Nutzen und Lasten über den Lebensweg des Produktes hinaus (Modul D).

Das Modul A1 umfasst die Bereitstellung des Holzes aus dem Forst sowie die Bereitstellung der Additive. Die Transporte dieser Stoffe werden in Modul A2 berücksichtigt. Modul A3 beinhaltet die Aufwendungen der Herstellung des Produktes, wie die Bereitstellung der Brennstoffe, Betriebsmittel und Energie, sowie die Verpackung des Produktes.

In Modul A5 wird ausschließlich die Entsorgung der Produktverpackung abgedeckt, welche den Ausgang des enthaltenen biogenen Kohlenstoffs sowie der enthaltenen Primärenergie (PERM und PENRM) einschließt.

Modul C2 berücksichtigt den Transport zum Entsorger und Modul C3 die Aufbereitung und Sortierung des Altholzes. Zudem werden in Modul C3 gemäß EN 16485 die CO2-Äquivalente des im Produkt befindlichen holzinhärenten Kohlenstoffs sowie die im Produkt enthaltene erneuerbare und nicht erneuerbare Primärenergie (PERM und PENRM) als Abgänge verbucht.

In Modul D werden die thermische Verwertung des Produktes am Ende seines Lebenswegs sowie die daraus resultierenden potenziellen Nutzen und Lasten in Form einer Systemerweiterung bilanziert.

## Data sources
- STEICO Holzfaserdämmplatten aus dem Nassverfahren.pdf
- GaBi Database (all versions)
- GaBi database SP40 2020
