# Resilient floor coverings

Dataset: ILCD process, EPD, average dataset
Geography: DE
Reference year: 2019
Valid until: 2024
Classification: OEKOBAU.DAT: Holz / Holzböden / Mehrschichtig modulare Bodenbeläge
Classification: IBUCategories: 02 Bauprodukte / Bodenbeläge / Bodenbeläge
Method details: Bodenbeläge.pdf
Generated by: brands and values GmbH
Registration number: EPD-PAR-20180164-IBC1-DE
Owner: Parador GmbH
Compliance: DIN EN 15804; ISO 14025
Review: Accredited third party review by Institut Bauen und Umwelt e. V.
Amounts: rows without a unit in brackets have none in this file; such an amount is in the reference unit of its flow, which a separate flow dataset defines
copyright: true
licenseType: Free of charge for all users and uses
accessRestrictions: None

## General comment
Modular ONE
The multi-layered structure of the Modular ONE flooring is characterised by the coating of decor paper with the plasticiser-free material polypropylene. This coating allows for an authentic structuring of the decor paper and thus enables the realistic reproduction of real wood surfaces.

The core material of the Modular ONE flooring is a high-density fibreboard, which is specially adapted for wet rooms. It gives the floor a flexible strength and thanks to its special coating guarantees water resistance of the flooring for up to 4 hours in the case of standing water.

Eco Balance PUR

Similar to the Modular ONE flooring, Eco Balance PUR is a coated high-density fibreboard. The decor layer consists of the plasticiser-free material polyurethane, which is produced from renewable resources. This coating allows for an authentic structuring of the decor paper and thus enables the realistic reproduction of real wood surfaces.

## Technology and included processes
The HDF core board, the wear layer, and the cork backing are pressed together using a glue. The planks are then provided with a longitudinal and transverse profile. After quality control of the individual flooring elements, they are packed in half-shell cartons and shrink-wrapped in PE film. These individual packaging units are stacked on pallets according to the different formats and made available in the warehouse for subsequent delivery. All processes are continually checked and documented as part of the in-house Factory Production Control (FPC).
Declared unit:
The declared unit is one square metre (1 m²) of resilient floor coverings including packaging material.

The average sales shares over 6 months for the Eco Balance PUR and Modular ONE products were used to calculate the average for this declaration. The variants contained in the average differ with regard to the wear layer material (PUR or PP).

## Technical purpose
Resilient floor coverings are suitable for private and commercial indoor use. They are either laid floating on screed or other existing subfloors in conjunction with suitable underlays (insulating underlays) or glued to the full surface of the screed. The principles of proper installation are available in the enclosed installation instructions or in the "Resilient floor coverings advice section".

## Reference product
- Elastische Bodenbeläge: 1

## Inputs
- Renewable primary energy as energy carrier (PERE) [MJ]: A1-A3 -2.74, A4 0.24942, A5 1.49722, C2 0.030559, C3 129.75, D -11.554
- Renewable primary energy resources as material utilization (PERM) [MJ]: A1-A3 130.8, A4 0, A5 -1.49, C2 0, C3 -129.31, D 0
- Total use of renewable primary energy resources (PERT) [MJ]: A1-A3 128.06, A4 0.24942, A5 0.0072209, C2 0.030559, C3 0.43974, D -11.554
- Non renewable primary energy as energy carrier (PENRE) [MJ]: A1-A3 104.45, A4 4.7786, A5 0.521769, C2 0.58548, C3 11.2002, D -60.087
- Non renewable primary energy as material utilization (PENRM) [MJ]: A1-A3 8.37, A4 0, A5 -0.47, C2 0, C3 -7.9, D 0
- Total use of non renewable primary energy resources (PENRT) [MJ]: A1-A3 112.82, A4 4.7786, A5 0.051769, C2 0.58548, C3 3.3002, D -60.087
- Use of secondary material (SM) [kg]: A1-A3 6.419, A4 0, A5 0, C2 0, C3 0, D 0
- Use of renewable secondary fuels (RSF) [MJ]: A1-A3 0, A4 0, A5 0, C2 0, C3 0, D 0
- Use of non renewable secondary fuels (NRSF) [MJ]: A1-A3 0, A4 0, A5 0, C2 0, C3 0, D 0
- Use of net fresh water (FW) [m^3]: A1-A3 0.4732, A4 0.00045932, A5 0.00044279, C2 5.6277e-5, C3 0.027183, D -0.015752

## Outputs
- Hazardous waste disposed (HWD) [kg]: A1-A3 1.4838e-6, A4 2.5197e-7, A5 5.4291e-10, C2 3.0872e-8, C3 6.5804e-8, D -2.4469e-8
- Non hazardous waste disposed (NHWD) [kg]: A1-A3 0.069436, A4 0.00038375, A5 0.0031632, C2 4.7019e-5, C3 0.048355, D -0.025703
- Radioactive waste disposed (RWD) [kg]: A1-A3 0.0053041, A4 9.9847e-6, A5 2.6707e-6, C2 1.2234e-6, C3 0.00017339, D -0.0050791
- Components for re-use (CRU) [kg]: A1-A3 0, A4 0, A5 0, C2 0, C3 0, D 0
- Materials for recycling (MFR) [kg]: A1-A3 0, A4 0, A5 0, C2 0, C3 0, D 0
- Materials for energy recovery (MER) [kg]: A1-A3 0, A4 0, A5 0, C2 0, C3 0, D 0
- Exported electrical energy (EEE) [MJ]: A1-A3 0, A4 0, A5 0.27, C2 0, C3 14.27, D 0
- Exported thermal energy (EET) [MJ]: A1-A3 0.66, A4 0, A5 0.48, C2 0, C3 26.03, D 0

## Impact indicators
- Global warming potential (GWP) [kg CO_(2)-Äq.]: A1-A3 -4.3791, A4 0.35069, A5 0.16138, C2 0.04281, C3 11.882, D -3.4329
- Depletion potential of the stratospheric ozone layer (ODP) [kg CFC11-Äq.]: A1-A3 3.5488e-7, A4 1.453e-14, A5 3.8231e-15, C2 1.7803e-15, C3 4.4672e-11, D -7.451e-12
- Acidification potential of land and water (AP) [kg SO_(2)-Äq.]: A1-A3 0.018477, A4 0.0008531, A5 2.9733e-5, C2 0.00011126, C3 0.0038286, D -0.005764
- Eutrophication potential (EP) [kg PO_(4)^(3)-Äq.]: A1-A3 0.0064704, A4 0.0002153, A5 5.8079e-6, C2 2.8006e-5, C3 0.00094626, D -0.00062359
- Formation potential of tropospheric ozone photochemical oxidants (POCP) [kg Ethen-Äq.]: A1-A3 0.0044306, A4 -0.00028967, A5 1.3197e-6, C2 -3.8955e-5, C3 0.00024333, D -0.00045177
- Abiotic depletion potential for non fossil resources (ADPE) [kg Sb-Äq.]: A1-A3 1.0903e-5, A4 3.096e-8, A5 2.8032e-9, C2 3.7933e-9, C3 1.4204e-7, D -9.694e-7
- Abiotic depletion potential for fossil resources (ADPF) [MJ]: A1-A3 93.89, A4 4.7531, A5 0.045036, C2 0.58236, C3 2.8627, D -47.286

## Use advice
Scope:
This EPD relates to the manufacture, transport, installation, and disposal of an average square metre of Parador resilient floor coverings. The technical characteristics are described in chapter 2.3. The product is manufactured in Coesfeld, Germany.

The owner of the declaration is liable for the underlying information and evidence; IBU is not liable for manufacturer information, ecological assessment data, and verification.
System boundary:
Type of EPD: Cradle to factory gate with options.

Modules A1-3, A4, and A5

The product stage (A1-3) begins with considering the production of the necessary raw materials and energies, including all corresponding upstream chains and the actual procurement transports. Furthermore, the entire manufacturing phase was mapped, including treatment of production waste until end-of-waste status (EoW) was reached. In addition, both the distribution transports from Coesfeld / DE (A4) and the packaging waste generated during installation (A5) were taken into account. Product losses as well as power consuming tools, auxiliary materials, and installation materials were not considered in A5.

Modules C2-C3

The modules include the environmental impacts for the treatment of the waste categories until end-of-waste status (EoW) is reached, including the associated transports at the end of the product life cycle.

Module DIdentification of the benefits and costs of the product outside the system boundary. These consist of energy credits from thermal utilisation (C3) in the form of the average European electricity mix or thermal energy from natural gas.

## Data sources
- GaBi Database (all versions)
- GaBi database SP35 2018
