# Cold Rolled Stainless Steel

Dataset: ILCD process, EPD, specific dataset
Geography: RER
Reference year: 2019
Valid until: 2024
Classification: OEKOBAU.DAT: Metalle / Edelstahl / Edelstahlbleche
Classification: IBUCategories: 02 Building products / Metallic products and ancillaries / Structural steels
Method details: Structural steels.pdf
Registration number: EPD-OTO-20190002-IBD1-EN
Owner: Outokumpu
Compliance: DIN EN 15804; ISO 14025
Review: Accredited third party review by Institut Bauen und Umwelt e. V.
Amounts: rows without a unit in brackets have none in this file; such an amount is in the reference unit of its flow, which a separate flow dataset defines
copyright: true

## General comment
This EPD describes cold rolled stainless steel products produced by Outokumpu Oyj. Cold rolled products are supplied as coil, sheet or plate. Cold rolled stainless steel has excellent dimensional tolerances and high surface quality. A number of sheet widths and heights are available to meet the various design specifications and requirements. A multitude of surface finishes are also available, including patterned, wet or dry polished. This EPD is applicable to homogeneous Outokumpu cold rolled products which are used in the construction and building industry.

## Technology and included processes
The steel scrap is melted in an electric arc furnace to obtain a steel melt. The liquid steel is further refined (adjustment of sulphur, carbon and phosphorous) and alloyed to give stainless steel the required characteristics. The molten steel is then cast into semi-finished steel products like slabs or billets. The semi-finished steel products are hot rolled and then annealed and pickled and cold rolled to a desired thickness. If required, they can also be pattern rolled or polished.
Declared unit:
The declaration applies to one ton of cold rolled stainless steel product. The declared unit is the production and recycling of one ton of cold rolled stainless steel product.

## Technical purpose
Cold rolled products are used in a wide range of applications in building and construction. Typical applications are building envelopes, interior cladding and paneling, heating, cooling and ventilation, lifts and elevators.

## Reference product
- Cold Rolled Stainless Steel (1t Cold Rolled Stainless Steel): 1

## Inputs
- Renewable primary energy as energy carrier (PERE) [MJ]: A1-A3 8794, C3 11.98, D -2870
- Renewable primary energy resources as material utilization (PERM) [MJ]: A1-A3 0, C3 0, D 0
- Total use of renewable primary energy resources (PERT) [MJ]: A1-A3 8794, C3 11.98, D -2870
- Non renewable primary energy as energy carrier (PENRE) [MJ]: A1-A3 55890, C3 40.73, D -18280
- Non renewable primary energy as material utilization (PENRM) [MJ]: A1-A3 0, C3 0, D 0
- Total use of non renewable primary energy resources (PENRT) [MJ]: A1-A3 55890, C3 40.73, D -18280
- Use of secondary material (SM) [kg]: A1-A3 652, C3 0, D 0
- Use of renewable secondary fuels (RSF) [MJ]: A1-A3 0, C3 0, D 0
- Use of non renewable secondary fuels (NRSF) [MJ]: A1-A3 0, C3 0, D 0
- Use of net fresh water (FW) [m^3]: A1-A3 38.19, C3 0.01654, D -21.02

## Outputs
- Hazardous waste disposed (HWD) [kg]: A1-A3 0.04858, C3 3.282e-7, D -0.1885
- Non hazardous waste disposed (NHWD) [kg]: A1-A3 340.8, C3 50.11, D 19.9
- Radioactive waste disposed (RWD) [kg]: A1-A3 2.31, C3 0.004795, D -0.1542
- Components for re-use (CRU) [kg]: A1-A3 0, C3 0, D 0
- Materials for recycling (MFR) [kg]: A1-A3 0, C3 950, D 0
- Materials for energy recovery (MER) [kg]: A1-A3 0, C3 0, D 0
- Exported electrical energy (EEE) [MJ]: A1-A3 0, C3 0, D 0
- Exported thermal energy (EET) [MJ]: A1-A3 0, C3 0, D 0

## Impact indicators
- Global warming potential (GWP) [kg CO_(2)-Äq.]: A1-A3 3387, C3 2.481, D -1496
- Depletion potential of the stratospheric ozone layer (ODP) [kg CFC11-Äq.]: A1-A3 4.868e-9, C3 6.998e-12, D -1.155e-12
- Acidification potential of land and water (AP) [kg SO_(2)-Äq.]: A1-A3 16.57, C3 0.009606, D -9.437
- Eutrophication potential (EP) [kg PO_(4)^(3)-Äq.]: A1-A3 1.161, C3 0.00119, D -0.5217
- Formation potential of tropospheric ozone photochemical oxidants (POCP) [kg Ethen-Äq.]: A1-A3 1.11, C3 0.0006985, D -0.5637
- Abiotic depletion potential for non fossil resources (ADPE) [kg Sb-Äq.]: A1-A3 0.1893, C3 1.136e-6, D -0.08233
- Abiotic depletion potential for fossil resources (ADPF) [MJ]: A1-A3 50260, C3 28.65, D -17960

## Use advice
Scope:
The declaration applies to 1 ton of cold rolled stainless steel product produced by Outokumpu.

The Life Cycle Assessment is based on data from the following Outokumpu production plants:

- Outokumpu Nirosta GmbH, Dillenburg, Germany

- Outokumpu Nirosta GmbH, Krefeld, Germany

- Outokumpu Stainless AB, Avesta, Sweden

- Outokumpu Stainless AB, Nyby, Torshalla, Sweden

- Outokumpu Stainless Oy, Tornio, Finland

- Outokumpu Stainless USA LLC, Calvert, AL, USA

- Outokumpu Mexinox S.A de C.V., San Luis Potosi, Mexico

Production has been modeled using annual production data from 2017. Where required averaging is based on production output from each site.
System boundary:
This EPD is cradle-to-gate with options, and includes the following process steps:
Upstream production of raw materials, fuels and energy and all relevant upstream transport processes.
Production/manufacturing of the stainless steel product.
Waste water and treatment of wastes generated on site including swarf, dusts, scrap, slag and waste water.
End-of-life (recycling, remelting or disposal of steel scrap).

## Data sources
- Cold Rolled Stainless Steel.pdf
- GaBi Database (all versions)
- GaBi database SP36 2018
