# STEICOflex

Dataset: ILCD process, EPD, specific dataset
Geography: RER
Reference year: 2020
Valid until: 2025
Classification: OEKOBAU.DAT: Dämmstoffe / Holzfasern / Holzfaserdämmplatte
Classification: IBUCategories: 02 Bauprodukte / Holzwerkstoffe / Holzwerkstoffe
Method details: Holzwerkstoffe.pdf
Registration number: EPD-STE-20200175-IBA1-DE
Owner: STEICO SE
Compliance: DIN EN 15804; ISO 14025
Review: Accredited third party review by Institut Bauen und Umwelt e. V.
Amounts: rows without a unit in brackets have none in this file; such an amount is in the reference unit of its flow, which a separate flow dataset defines
copyright: true

## General comment
STEICOflex sind flexible Holzfaserdämmplatten, die
im Trockenverfahren produziert werden. Zur Erzielung
der Flexibilität des Produktes ist die Zugabe einer
geringen Menge textiler Bindefaser notwendig.

## Technology and included processes
STEICOflex wird im Trockenverfahren hergestellt: Verarbeitung des Rohholzes zu Hackschnitzeln Erhitzen der Hackschnitzel unter Dampfdruck Zerfaserung der Hackschnitzel durch Defibrationsverfahren Trocknung der Fasern im Zyclontrockner Zumischung der Bikomponentenfaser Aufgabe des Gemenges auf die Produktionslinie Erwärmen und Pressen des Gemenges zur Dämmmatte Zuschnitt der Holzfaserdämmung Abstapelung, Verpackung Alle während der Produktion anfallenden Reststoffe werden entweder erneut der Produktion oder intern einer energetischen Verwertung zugeführt. Systeme zur Gütesicherung: Qualitätsmanagementsystem nach /DIN EN ISO 9001:2015/ Umweltmanagementsystem nach /DIN EN ISO 14001:2015/ CE-Kennzeichnung nach /DIN EN 13171/MPA Nordrhein-Westfalen, D FSC Zertifikat /CU-COC-841217/ PEFC Zertifikat /CU-PEFC-841217/
Technische Daten:
Die folgenden Angaben beziehen sich auf das Produkt STEICOflex im Auslieferungszustand.
Weitere Daten stehen unter www.steico.com zum Download zur Verfügung.
Deklarierte Einheit:
Die deklarierte Einheit ist 1 m³ Holzfaserdämmstoff mit einer mittleren Rohdichte von 50,00 kg/m³ bei einem Wasseranteil von 4 %. Der Anteil der Zusatzstoffe liegt bei 11,03 %.

Es handelt sich gemäß des Punktes 5.2.1a der PCR Teil A um eine „Deklaration eines spezifischen Produkts aus einem Werk eines Herstellers“.

## Technical purpose
Die flexible Holzfaser-Wärmedämmung STEICOflex wird als Gefachdämmung in Dach-, Wand- und
Deckenkonstruktionen sowie als Hohlraumdämmung
bei Trennwänden, Vorsatzschalen und
Installationsebenen eingesetzt.

## Reference product
- STEICOflex (): 1

## Inputs
- Erneuerbare Primärenergie als Energieträger (PERE) [MJ]: A1 5.70487, A2 0.645099, A3 155.594, A5 0.881618, C2 0.112821, C3 0.318186, D -212.001
- Erneuerbare Primärenergie zur stofflichen Nutzung (PERM) [MJ]: A1 818.728, A2 0, A3 103.331, A5 -103.331, C2 0, C3 -818.728, D 0
- Total erneuerbare Primärenergie (PERT) [MJ]: A1 824.433, A2 0.645099, A3 258.925, A5 -102.449, C2 0.112821, C3 -818.41, D -212.001
- Nicht-erneuerbare Primärenergie als Energieträger (PENRE) [MJ]: A1 182.708, A2 11.4877, A3 640.397, A5 4.28906, C2 2.00907, C3 5.46577, D -771.472
- Nicht-erneuerbare Primärenergie zur stofflichen Nutzung (PENRM) [MJ]: A1 198.54, A2 0, A3 32.148, A5 -32.148, C2 0, C3 -198.54, D 0
- Total nicht erneuerbare Primärenergie (PENRT) [MJ]: A1 381.248, A2 11.4877, A3 672.545, A5 -27.8589, C2 2.00907, C3 -193.074, D -771.472
- Einsatz von Sekundärstoffen (SM) [kg]: A1 0, A2 0, A3 0, A5 0, C2 0, C3 0, D 0
- Erneuerbare Sekundärbrennstoffe (RSF) [MJ]: A1 0, A2 0, A3 80.7286, A5 0, C2 0, C3 0, D 818.728
- Nicht erneuerbare Sekundärbrennstoffe (NRSF) [MJ]: A1 0, A2 0, A3 0, A5 0, C2 0, C3 0, D 198.54
- Einsatz von Süßwasserressourcen (FW) [m^3]: A1 0.0679277, A2 0.000746981, A3 0.156237, A5 0.0384672, C2 0.000130639, C3 0.00028503, D 0.0994287

## Outputs
- Gefährlicher Abfall zur Deponie (HWD) [kg]: A1 3.76752e-7, A2 5.34602e-7, A3 9.26387e-7, A5 1.40996e-8, C2 9.34959e-8, C3 2.04293e-7, D -3.92746e-7
- Entsorgter nicht gefährlicher Abfall (NHWD) [kg]: A1 0.0477462, A2 0.00175806, A3 0.354721, A5 0.30897, C2 0.000307465, C3 0.000959233, D 1.46029
- Entsorgter radioaktiver Abfall (RWD) [kg]: A1 0.00140731, A2 1.42188e-5, A3 0.00369559, A5 0.000136666, C2 2.4867e-6, C3 5.75519e-6, D -0.0306944
- Komponenten für die Wiederverwendung (CRU) [kg]: A1 0, A2 0, A3 0, A5 0, C2 0, C3 0, D 0
- Stoffe zum Recycling (MFR) [kg]: A1 0, A2 0, A3 0, A5 0, C2 0, C3 0, D 0
- Stoffe für die Energierückgewinnung (MER) [kg]: A1 0, A2 0, A3 0, A5 0, C2 0, C3 50, D 0
- Exportierte elektrische Energie (EEE) [MJ]: A1 0, A2 0, A3 0, A5 21.5541, C2 0, C3 0, D 169.638
- Exportierte thermische Energie (EET) [MJ]: A1 0, A2 0, A3 0, A5 47.8524, C2 0, C3 0, D 336.011

## Impact indicators
- Globales Erwärmungspotenzial (GWP) [kg CO_(2)-Äq.]: A1 -71.4022, A2 0.829601, A3 42.2569, A5 12.3071, C2 0.145088, C3 78.3072, D -40.1044
- Abbau Potential der stratosphärischen Ozonschicht (ODP) [kg CFC11-Äq.]: A1 6.2897e-11, A2 1.38097e-16, A3 1.55224e-13, A5 4.80318e-15, C2 2.41517e-17, C3 1.34547e-16, D -1.20791e-12
- Versauerungspotenzial von Boden und Wasser (AP) [kg SO_(2)-Äq.]: A1 0.0120472, A2 0.00347597, A3 0.0876449, A5 0.00218192, C2 0.000607909, C3 0.00368575, D -0.0421342
- Eutrophierungspotenzial (EP) [kg PO_(4)^(3)-Äq.]: A1 0.00206502, A2 0.000874442, A3 0.0106651, A5 0.000413739, C2 0.00015293, C3 0.000795859, D -0.00742405
- Bildungspotential für troposphärisches Ozon (POCP) [kg Ethen-Äq.]: A1 0.0022304, A2 -0.00146177, A3 0.0158342, A5 0.00010504, C2 -0.000255648, C3 0.000360251, D -0.00405804
- Potenzial für den abiotischen Abbau nicht fossiler Ressourcen (ADPE) [kg Sb-Äq.]: A1 1.98262e-6, A2 6.98561e-8, A3 4.81772e-6, A5 3.18227e-7, C2 1.22171e-8, C3 3.75198e-8, D -1.19757e-5
- Potenzial für den abiotischen Abbau fossiler Brennstoffe (ADPF) [MJ]: A1 179.154, A2 11.4514, A3 631.133, A5 3.94418, C2 2.00272, C3 5.45106, D -693.992

## Use advice
Gültigkeitsbereich:
Diese Umwelt-Produktdeklaration gilt für die flexiblen Holzfaserdämmplatten STEICOflex 036/038,
welche in folgendem Werk hergestellt werden:

STEICO Sp. z o.o.

ul. Przemysłowa 2

64-700 Czarnków
Systemgrenze:
Der Deklarationstyp entspricht einer EPD „Wiege bis Werkstor – mit Optionen“. Inhalte sind das Stadium der Produktion, d. h. von der Bereitstellung der Rohstoffe bis zum Werkstor der Produktion (cradle-to-gate, Module A1 bis A3), sowie das Modul A5 und Teile des Endes des Lebensweges (Modul C2 und C3). Darüber hinaus erfolgt eine Betrachtung der potenziellen Nutzen und Lasten über den Lebensweg des Produktes hinaus (Modul D).

Das Modul A1 umfasst die Bereitstellung des Holzes aus dem Forst sowie die Bereitstellung der Additive. Die Transporte dieser Stoffe werden in Modul A2 berücksichtigt. Modul A3 beinhaltet die Aufwendungen der Herstellung des Produktes, wie die Bereitstellung der Brennstoffe, Betriebsmittel und Energie, sowie die Verpackung des Produktes.

In Modul A5 wird ausschließlich die Entsorgung der Produktverpackung abgedeckt, welche den Ausgang des enthaltenen biogenen Kohlenstoffs sowie der enthaltenen Primärenergie (PERM und PENRM) einschließt.

Modul C2 berücksichtigt den Transport zum Entsorger und Modul C3 die Aufbereitung und Sortierung des Altholzes. Aufgrund von Datenmangel wurde die konservative Annahme getroffen, dass das Material, wie es bei Altholz der Fall wäre, zerkleinert wird, bevor es zur Nachnutzung bereit ist. Zudem werden in Modul C3 gemäß EN 16485 die CO2-Äquivalente des im Produkt befindlichen holzinhärenten Kohlenstoffs sowie die im Produkt enthaltene erneuerbare und nicht-erneuerbare Primärenergie (PERM und PENRM) als Abgänge verbucht.

In Modul D werden die thermische Verwertung des Produktes am Ende seines Lebenswegs sowie die daraus resultierenden potenziellen Nutzen und Lasten in Form einer Systemerweiterung bilanziert.

## Data sources
- STEICOflex.pdf
- GaBi Database (all versions)
- GaBi database SP40 2020
