# Dachziegel Neufahrn

Dataset: ILCD process, EPD, average dataset
Geography: DE
Reference year: 2020
Valid until: 2025
Classification: OEKOBAU.DAT: Mineralische Baustoffe / Steine und Elemente / Dachziegel
Classification: IBUCategories: 02 Bauprodukte / Bedachungen / Dachziegel
Method details: Dachziegel.pdf
Generated by: Sphera Solutions GmbH
Registration number: EPD-ERL-20200029-IAC1-DE
Owner: ERLUS AG
Compliance: DIN EN 15804; ISO 14025
Review: Accredited third party review by Institut Bauen und Umwelt e. V.
Amounts: rows without a unit in brackets have none in this file; such an amount is in the reference unit of its flow, which a separate flow dataset defines
copyright: true
licenseType: Free of charge for all users and uses
accessRestrictions: None

## General comment
Tondachziegel inkl. dem keramischen Zubehör mit den Modellbezeichnungen E58, E58 S, E58 MAX, E58 SL, Großfalz, Großfalz XXL, Reformpfanne XXL, Reformpfanne SL, Karat und Forma.
Die Flächenziegel und das keramische Zubehör (Sonderziegel) der jeweiligen Modelle wurden nach ihrem Produktionsanteil im Betrachtungszeitraum 07/2013-06/2014 berücksichtigt. Die verschiedenen Produkte unterscheiden sich lediglich in Form und Farbe (Engobe). Die maßgebliche Zusammensetzung, d. h. der Ton- und Lehmanteil, ist weitgehend einheitlich.

## Technology and included processes
Mining operations The main components (loess loam and clay) are extracted in the open pit. Prospective areas are drilled according to geological considerations. If it turns out that raw materials are available in economically justifiable quantities and that these can also be mined, an application for a mining permit is submitted. Dismantling takes place after removing the topsoil and, if necessary, processing archaeological sites, usually with backhoe excavators. The transport is carried out with suitable trucks depending on the road conditions. When the pits are exhausted, they are recultivated in accordance with nature conservation guidelines and, for the most part, returned to their previous use. Processing of raw materials The individual raw material components are sampled and analyzed in the in-house laboratory for their ceramic properties and their mineralogical and chemical compositions. During processing, the components are combined, homogenized and stored according to their ceramic properties to form the operating mass. Shaping The operating mass is pressed into chunks in extrusion presses under vacuum, which are then pressed into brick shape in turret or rotary table presses using plaster molds. Various parameters such as press vacuum, lump properties (moisture, plasticity and weight) are checked regularly. Excess operating mass and incorrect pressings are completely fed back into the mass cycle. Drying The drying serves as preparation of the plastic roof tile for the subsequent firing process and takes place depending on the model over 1-2 days at approx. 100-120 ° C. Due to the shrinkage behavior, the ceramic material reacts very sensitively and must therefore be dried under defined conditions. Various drying parameters as well as the residual moisture are constantly monitored. Sorted out dried bricks (dry breakage) are returned to the operational mass in raw material processing. Color scheme If necessary, the dried roof tiles are coated with engobes or noble engobes. The density of the engobes and the thickness of the layer are checked regularly. Any engobe residues and engobe washing water are treated and fed into the raw material cycle. Burn The bricks are burned in tunnel kilns using natural gas at around 1000-1100 ° C. The burning time including the heating and cooling phase is approx. 1-2 days. The fire gives the bricks their ceramic properties, which make them extremely durable and resistant. Sorted out burnt bricks (burnt breakage) are used in the pits to secure the driveways. Waterproofing In order to improve the water penetration properties, the bricks are made hydrophobic in an immersion bath before they are packaged. Quality control The required ceramic quality properties according to / DIN EN 1304 / and the product dimensions to be adhered to are regularly checked internally in the factory production control (FPC) and also monitored externally at least every six months. A quality management system according to / DIN EN ISO 9001 / has been introduced and certified at the production site for many years.

## Technical purpose
Tondachziegel werden zum Eindecken von geneigten Dächern verwendet.

## Reference product
- 1 t Tondachziegel (): 1000

## Inputs
- Renewable primary energy as energy carrier (PERE) [MJ]: A1-A3 436.2
- Renewable primary energy resources as material utilization (PERM) [MJ]: A1-A3 0
- Total use of renewable primary energy resources (PERT) [MJ]: A1-A3 436.2
- Non renewable primary energy as energy carrier (PENRE) [MJ]: A1-A3 4973
- Non renewable primary energy as material utilization (PENRM) [MJ]: A1-A3 0
- Total use of non renewable primary energy resources (PENRT) [MJ]: A1-A3 4973
- Use of secondary material (SM) [kg]: A1-A3 0.3678
- Use of renewable secondary fuels (RSF) [MJ]: A1-A3 0
- Use of non renewable secondary fuels (NRSF) [MJ]: A1-A3 0
- Use of net fresh water (FW) [m^3]: A1-A3 0.461

## Outputs
- Hazardous waste disposed (HWD) [kg]: A1-A3 0.283
- Non hazardous waste disposed (NHWD) [kg]: A1-A3 21.9
- Radioactive waste disposed (RWD) [kg]: A1-A3 0.1093
- Components for re-use (CRU) [kg]: A1-A3 0
- Materials for recycling (MFR) [kg]: A1-A3 0
- Materials for energy recovery (MER) [kg]: A1-A3 0
- Exported electrical energy (EEE) [MJ]: A1-A3 0
- Exported thermal energy (EET) [MJ]: A1-A3 0

## Impact indicators
- Global warming potential (GWP) [kg CO_(2)-Äq.]: A1-A3 297.3
- Depletion potential of the stratospheric ozone layer (ODP) [kg CFC11-Äq.]: A1-A3 5.21e-9
- Acidification potential of land and water (AP) [kg SO_(2)-Äq.]: A1-A3 0.467
- Eutrophication potential (EP) [kg PO_(4)^(3)-Äq.]: A1-A3 0.047
- Formation potential of tropospheric ozone photochemical oxidants (POCP) [kg Ethen-Äq.]: A1-A3 0.0399
- Abiotic depletion potential for non fossil resources (ADPE) [kg Sb-Äq.]: A1-A3 5.21e-5
- Abiotic depletion potential for fossil resources (ADPF) [MJ]: A1-A3 4699

## Use advice
Gültigkeitsbereich:
Diese EPD beruht auf den Daten der ERLUS AG aus dem Produktionszeitraum Juli 2013 bis Juni 2014. Sie gilt für durchschnittliche Tondachziegel inkl. den keramischen Zubehörziegeln, produziert in Deutschland, im Werk Neufahrn/NB.
Systemgrenze:
Die Systemgrenzen der EPD folgen dem modularen Ansatz der /EN 15804/. Betrachtet wird das aggregierte Modul (A1 - A3), bestehend aus:
- die Rohstoffbereitstellung,
- der Transport zum Werk und
- die eigentliche Herstellung und Herstellung von Verpackung.

Einflüsse von Abfällen werden in den Modulen berücksichtigt, in denen diese anfallen.

Transportaufwendungen werden für alle wesentlichen Basismaterialien eingerechnet. In der Herstellung benötigte Maschinen, Anlagen und Infrastruktur werden vernachlässigt.

## Data sources
- GaBi Database (all versions)
- GaBi database SP20 2013
