# Rohr- und Schachtsysteme aus Beton - Betonwerk Bieren GmbH - C40/50 sofort entschalt; Rohdichte 2,25 – 2,45 kg/dm³

Dataset: ILCD process, EPD, specific dataset
Geography: DE
Reference year: 2019
Valid until: 2026
Classification: OEKOBAU.DAT: Mineralische Baustoffe / Mörtel und Beton / Beton
Synonyms: Rohrsystem; Schachtsystem
Method details: Produktkategorieregeln Teil A; Produktkategorieregeln Teil B – für Bauprodukte aus Beton und Betonelemente; EPD Rohr- und Schachtsysteme aus Beton
Owner: Betonwerk Bieren GmbH
Compliance: EN 15804
Review: Independent external review by Eric Brehm
Amounts: rows without a unit in brackets have none in this file; such an amount is in the reference unit of its flow, which a separate flow dataset defines
copyright: true

## General comment
A1-A3 sowie Module C1, C2, C3, C4, D. Das Umweltprofil beinhaltet die Aufwendungen für die Lebenszyklus-Stadien cradle to gate mit Optionen (Modul A1-A3). Die Herstellung der Verpackung wurde innerhalb der Module A1-A3 berücksichtigt.

## Geography
Dieser Datensatz repräsentiert die Situation des Unternehmens Betonwerk Bieren GmbH in 1836 Hückelhoven, 32289 Rödinghausen und 32549 Bad Oeynhausen im Hinblick auf die wichtigsten Technologien und die gesetzlichen Rahmenbedingungen.

## Time period
jährlicher Durchschnitt

## Technology and included processes
Die Ökobilanzergebnisse umfassen die Lebenszyklusstadien der Herstellung der Vorprodukte bis hin zur Rohstoffgewinnung und Verarbeitungsprozesse von als Input dienenden Sekundärstoffen (z.B. Recyclingprozesse), deren Transporte zum Werk sowie die Produktion selbst, einschließlich der Bereitstellung von allen Hilfs- und Betriebsstoffen, Energie, sowie die vollständige Abfallbehandlung oder die Deponierung der Restabfälle während des Stadiums der Produktion. Die Module A1, A2 und A3 sind hier als ein aggregiertes Modul A1-A3 ausgewiesen. Falls für diesen Datensatz weitere Module berechnet wurden, sind diese separat zu finden und können für eine Betrachtung des gesamten Lebenszyklus zusammengeführt werden.

## Technical purpose
Rohr- und Schachtsysteme aus Beton zur Ableitung von Regen-, Schmutz- und Mischwasser.

## Reference product
- Rohr- und Schachtsysteme aus Beton - Betonwerk Bieren GmbH - C40/50 sofort entschalt: 1

## Inputs
- Use of net fresh water (FW) [m3]: A1-A3 0.00017, C1 0, C2 2.06e-6, C3 1.31e-5, C4 0, D -6.56e-6
- Use of non renewable primary energy (PENRE) [MJ]: A1-A3 0.37, C1 0, C2 0.0395, C3 0.0502, C4 0, D -0.0354
- Use of non renewable primary energy resources used as raw materials (PENRM) [MJ]: A1-A3 0, C1 0, C2 0, C3 0, C4 0, D 0
- Use of non renewable secondary fuels (NRSF) [MJ]: A1-A3 0, C1 0, C2 0, C3 0, C4 0, D 0
- Use of renewable primary energy (PERE) [MJ]: A1-A3 0.075, C1 0, C2 0.0023, C3 0.00422, C4 0, D -0.0101
- Use of renewable primary energy resources used as raw materials (PERM) [MJ]: A1-A3 0, C1 0, C2 0, C3 0, C4 0, D 0
- Use of renewable secondary fuels (RSF) [MJ]: A1-A3 0, C1 0, C2 0, C3 0, C4 0, D 0
- Use of secondary material (SM) [kg]: A1-A3 0, C1 0, C2 0, C3 0, C4 0, D 0
- Total use of non renewable primary energy resource (PENRT) [MJ]: A1-A3 0.37, C1 0, C2 0.0395, C3 0.0502, C4 0, D -0.0354
- Total use of renewable primary energy resources (PERT) [MJ]: A1-A3 0.075, C1 0, C2 0.0023, C3 0.00422, C4 0, D -0.0101

## Outputs
- Components for re-use (CRU) [kg]: A1-A3 0, C1 0, C2 0, C3 0, C4 0, D 0
- Exported electrical energy (EEE) [MJ]: A1-A3 0, C1 0, C2 0, C3 0, C4 0, D 0
- Exported thermal energy (EET) [MJ]: A1-A3 0, C1 0, C2 0, C3 0, C4 0, D 0
- Hazardous waste disposed (HWD) [kg]: A1-A3 3.4e-6, C1 0, C2 1.48e-9, C3 1.06e-9, C4 0, D -6.68e-10
- Materials for energy recovery (MER) [kg]: A1-A3 0, C1 0, C2 0, C3 0, C4 0, D 0
- Materials for recycling (MFR) [kg]: A1-A3 0, C1 0, C2 0, C3 1, C4 0, D 0
- Non hazardous waste dispose (NHWD) [kg]: A1-A3 0.02, C1 0, C2 6.93e-6, C3 1.51e-5, C4 0, D -0.0208
- Radioactive waste disposed (RWD) [kg]: A1-A3 6.3e-6, C1 0, C2 4.16e-8, C3 4.03e-7, C4 0, D -1.32e-6

## Impact indicators
- Abiotic depletion potential for non fossil resources (ADPE) [kg Sb eq.]: A1-A3 4.6e-5, C1 0, C2 2.71e-10, C3 2.95e-9, C4 0, D -7.15e-10
- Abiotic depletion potential for fossil resources (ADPF) [MJ]: A1-A3 0.36, C1 0, C2 0.0394, C3 0.0492, C4 0, D -0.0321
- Acidification potential of soil and water (AP) [kg SO2 eq.]: A1-A3 0.00011, C1 0, C2 1.98e-6, C3 1.73e-5, C4 0, D -6.53e-6
- Eutrophication potential (EP) [kg (PO4)3- eq.]: A1-A3 2.9e-5, C1 0, C2 4.23e-7, C3 4.23e-6, C4 0, D -1.25e-6
- Global warming potential (GWP) [kg CO2 eq.]: A1-A3 0.088, C1 0, C2 0.00294, C3 0.0026, C4 0, D -0.047
- Depletion potential of the stratospheric ozone layer (ODP) [kg CFC 11 eq.]: A1-A3 7.2e-10, C1 0, C2 9.73e-19, C3 1.51e-17, C4 0, D -5.13e-17
- Formation potential of tropospheric ozone (POCP) [kg C2H2 eq.]: A1-A3 8.7e-6, C1 0, C2 -5.05e-8, C3 1.89e-6, C4 0, D 5.77e-7

## Use advice
Dieser Datensatz beinhaltet die Ergebnisse für die Module A1-A3 sowie die Module C1, C2, C3, C4, D gemäß EN 15804.
Ein Vergleich mit anderen Produkten ist nur mit einer vergleichbaren Anwendung im Gebäude zulässig. Grundsätzlich ist eine Gegenüberstellung oder die Bewertung von EPD Daten nur möglich, wenn alle zu vergleichenden Datensätze nach EN 15804 erstellt wurden und der Gebäudekontext, bzw. die produktspezifischen Leistungsmerkmale berücksichtigt werden.

## Review details
Die angewendete LCI Methode ist in Übereinstimmung mit ISO 14040 und 14044. Die Dokumentation enthält alle relevanten Informationen im Hinblick auf die Datenqualität und den Umfang der Anwendung der jeweiligen LCI Ergebnisse bzw. der Datensätze. Der Datensatz repräsentiert den Stand der Technik bezogen auf die funktionelle Einheit.

## Data sources
- GaBi database (general)
