# Polyurethane thermal insulation spray foam (blowing agent HFO; density 40 kg/m3)

Dataset: ILCD process, EPD, average dataset
Geography: RER
Reference year: 2019
Valid until: 2024
Classification: OEKOBAU.DAT: Dämmstoffe / Zellulosefaser / Zellulose-Einblas-Dämmstoff
Classification: IBUCategories: 02 Building products / Thermal insulation products / Insulating materials made of foam plastics
Method details: Insulating materials made of foam plastics.pdf
Generated by: Sphera Solutions GmbH
Registration number: EPD-PUE-20190008-CBE1-EN
Owner: PU Europe
Compliance: DIN EN 15804; ISO 14025
Review: Accredited third party review by Institut Bauen und Umwelt e. V.
Amounts: rows without a unit in brackets have none in this file; such an amount is in the reference unit of its flow, which a separate flow dataset defines
copyright: true
licenseType: Free of charge for all users and uses
accessRestrictions: None

## General comment
Polyurethane (PU) is a high performance thermal insulation material that offers one of the lowest thermal conductivity of all insulation products commonly available in the market. It offers excellent compressive strength at low densities. PU includes both PUR (polyurethane) and PIR (polyisocyanurate) products.

The product covered by this EPD is a closed-cell PU spray foam, using a blowing agent from the HFO (HydroFluoro-Olefins) family, of a density of 40 kg/m3 without facing.

## Technology and included processes
This life cycle assessment for the production of polyurethane insulation spray foam considers the life cycle from the supply of raw materials to the manufacturer´s gate (cradle-to-gate with options). It also includes the transport to the construction site, the installation and the end-of-life stage of the used polyurethane insulation spray foam. In the model, all related data from the production have been considered, i.e. all raw materials used for foam formulation, utilised thermal energy, internal fuel consumption and electric power consumption, direct production waste, and all emission data available. For all considered inputs and outputs assumptions have been made on the expenditures for transports. Thus also material and energy flows with a proportion of less than 1% have been considered. All material flows going into the system on the input side which contributes is more than 1 % of the total mass or more than 1 % of the primary energy demand were considered. All material flows, which exit the system on the output side and which environmental impacts contribute more than 1 % of the total impacts of the considered impact categories are included. It can be assumed that the total sum of neglected processes does not exceed 5% of the results displayed in the impact categories. Machines and facilities required during production will be neglected.
Technical data:
In this Life Cycle Assessment, a PU spray insulation foam with the following properties has been regarded:
Declared unit:
The declared unit is 1 m² of polyurethane insulation spray foam with the following specifications:

## Technical purpose
This EPD covers PU in-situ foam for the thermal insulation of residential and commercial buildings according to /hEN 14315-1/ (e.g. interior and exterior insulation for roofs, floors, ceilings and walls). Part 2 of /EN14315/ should be followed together with part 1 during construction works.

## Reference product
- 1 m² installed PU insulation spray foam – blowing agent HFO (closed-cell; density 40 kg/m3) (): 1

## Inputs
- Renewable primary energy as energy carrier (PERE) [MJ]: A1-A3 19.4
- Renewable primary energy resources as material utilization (PERM) [MJ]: A1-A3 0
- Total use of renewable primary energy resources (PERT) [MJ]: A1-A3 19.4, A4 0.205, A5 0.157, C2 0.0216, C3 0.409, C4 0.178, D -7.62
- Non renewable primary energy as energy carrier (PENRE) [MJ]: A1-A3 248
- Non renewable primary energy as material utilization (PENRM) [MJ]: A1-A3 130
- Total use of non renewable primary energy resources (PENRT) [MJ]: A1-A3 378, A4 5.22, A5 1.12, C2 0.552, C3 2.46, C4 3.2, D -113
- Use of secondary material (SM) [kg]
- Use of renewable secondary fuels (RSF) [MJ]: A1-A3 0, A4 0, A5 0, C2 0, C3 0, C4 0, D 0
- Use of non renewable secondary fuels (NRSF) [MJ]: A1-A3 0, A4 0, A5 0, C2 0, C3 0, C4 0, D 0
- Use of net fresh water (FW) [m^3]

## Outputs
- Hazardous waste disposed (HWD) [kg]
- Non hazardous waste disposed (NHWD) [kg]
- Radioactive waste disposed (RWD) [kg]
- Components for re-use (CRU) [kg]: D 0
- Materials for recycling (MFR) [kg]: D 0.443
- Materials for energy recovery (MER) [kg]: D 5.33
- Exported electrical energy (EEE) [MJ]: A1-A3 0, A4 0, A5 2.47, C2 0, C3 0, C4 16.9
- Exported thermal energy (EET) [MJ]: A1-A3 0, A4 0, A5 6.85, C2 0, C3 0, C4 46.6

## Impact indicators
- Global warming potential (GWP) [kg CO_(2)-Äq.]: A1-A3 16.6, A4 0.377, A5 1.08, C2 0.0398, C3 0.139, C4 11.5, D -7.05
- Depletion potential of the stratospheric ozone layer (ODP) [kg CFC11-Äq.]: A1-A3 2.11e-5, A4 6.58e-12, A5 1.32e-10, C2 6.96e-13, C3 1.25e-10, C4 1.15e-10, D -2.31e-9
- Acidification potential of land and water (AP) [kg SO_(2)-Äq.]: A1-A3 0.0432, A4 0.00236, A5 0.000612, C2 0.000243, C3 0.000659, C4 0.00474, D -0.0185
- Eutrophication potential (EP) [kg PO_(4)^(3)-Äq.]: A1-A3 0.00549, A4 0.000566, A5 0.000106, C2 5.82e-5, C3 3.47e-5, C4 0.00117, D -0.0013
- Formation potential of tropospheric ozone photochemical oxidants (POCP) [kg Ethen-Äq.]: A1-A3 0.00668, A4 -0.000954, A5 3.83e-5, C2 -9.76e-5, C3 3.88e-5, C4 0.000316, D -0.00162
- Abiotic depletion potential for non fossil resources (ADPE) [kg Sb-Äq.]: A1-A3 3.97e-5, A4 1.4e-8, A5 1.28e-8, C2 1.48e-9, C3 1.92e-8, C4 8.01e-8, D -5.46e-7
- Abiotic depletion potential for fossil resources (ADPF) [MJ]: A1-A3 377, A4 5.22, A5 1.12, C2 0.552, C3 2.45, C4 3.2, D -113

## Use advice
Scope:
This EPD is a generic association EPD covering polyurethane in-situ insulation foam produced by PU Europe members. These members represent 90 % of this market segment and use similar production techniques across Europe.

The EPD therefore represents an average of these producers.
System boundary:
This life cycle assessment for the production of polyurethane insulation spray foam considers the life cycle from the supply of raw materials to the manufacturer´s gate (cradle-to-gate with options). It also includes the transport to the construction site, the installation and the end-of-life stage of the used polyurethane insulation spray foam. The life cycle is split into the following individual phases:
A1 - Raw material formulation (foam materials)

A2 - Raw material transport
A3 - Production of the polyurethane insulation spray foam in liquid form (energy demands, waste, auxiliaries, etc.) at system house site

A4 - Transport system house to ware house and from ware house to the construction site

A5 - Emissions during installation and packaging disposal
C2 - Transport of the used product from the building site to the waste management site
C3/C4 - End of Life: waste management (thermal recovery)
D - Benefits and loads beyond system boundary

## Data sources
- GaBi Database (all versions)
- GaBi database SP20 2013
