# STEICO joist/wall Stegträger

Dataset: ILCD process, EPD, specific dataset
Geography: RER
Reference year: 2019
Valid until: 2024
Classification: OEKOBAU.DAT: Holz / Holzwerkstoffe / Laminated Veneer Lumber (LVL)
Classification: IBUCategories: 02 Bauprodukte / Produkte aus Bauholz / Vorgefertigte tragende Elemente aus Holz und Holzwerkstoffen
Method details: Vorgefertigte tragende Elemente aus Holz und Holzwerkstoffen .pdf
Registration number: EPD-STE-20190106-IBC1-DE
Owner: STEICO SE
Compliance: DIN EN 15804; ISO 14025
Review: Accredited third party review by Institut Bauen und Umwelt e. V.
Amounts: rows without a unit in brackets have none in this file; such an amount is in the reference unit of its flow, which a separate flow dataset defines
copyright: true

## General comment
STEICOwall and STEICOjoist I-joist products are industrially manufactured products for load-bearing and non load-bearing constructions where a thin high load-bearing hardboard (hard fibre joist) or OSB (oriented strand board) web connects two STEICO LVL R or solid timber flanges. The LVL (laminated veneer lumber) flanges comprise several layers of conifer veneer glued together. The natural wood defects, e.g. knots, are reduced to the individual veneer sheet during the production process and are distributed evenly across the cross-section during layup. This produces an almost homogeneous cross-section of high strength and rigidity.

The STEICOwall and STEICOjoist I-joist products are identical in terms of manufacturing. They differ in terms of application depending on the type of load.

## Technology and included processes
During the manufacture of STEICO LVL flanges, conifer logs (pine, spruce) are debarked and heated with warm water for the peeling process. The warm logs are peeled and the peeled veneer ribbons are cut into individual veneer sheets. The veneer sheets are dried in a continuous dryer before being sorted according to quality. The individual veneer sheets are laid on the press line in accordance with the recipe and pressed to billets. The billets are cut into flanges and the flanges are glued together with the web material (hardboard or OSB). Solid timber can also be used as an alternative to STEICO LVL. Production is certified to /ISO 9001/ via a Quality Management System
Technical data:
The technical data on the products within the scope of the EPD are listed below:
Declared unit:
The declared unit of the ecological life cycle assessment is one running metre (1 run. m.) joists taking consideration of the mix of semi-finished wood products and adhesives used in accordance with section 2.5 and a mass of 4.4 kg per running metre where wood moisture is equal to 7.38%, which corresponds with a water content of 6.9%. Adhesive content accounts for 4.98% and the density of the average product accounts for 619.47 kg/m³.
All information on semi-finished products and adhesives used was calculated on the basis of specific data. The life cycle assessment results refer to the average production of all joists during the period under review and can be scaled by mass to the respective product variants.

## Technical purpose
STEICO I-joist products are used as rafters, beams, wall studs, in facades or as spacers.

## Reference product
- STEICO joist/wall: 1

## Inputs
- Renewable primary energy as energy carrier (PERE) [MJ]: A1 33.3605, A2 0.0974199, A3 1.71497, A5 1.07614, C2 0.00411457, C3 0.210447, D -14.8024
- Renewable primary energy resources as material utilization (PERM) [MJ]: A1 74.7142, A2 0, A3 1.0628, A5 -1.0628, C2 0, C3 -74.7142, D 0
- Total use of renewable primary energy resources (PERT) [MJ]: A1 108.075, A2 0.0974199, A3 2.77777, A5 0.013342, C2 0.00411457, C3 -74.5038, D -14.8024
- Non renewable primary energy as energy carrier (PENRE) [MJ]: A1 41.8223, A2 1.67948, A3 10.9362, A5 1.6406, C2 0.0709335, C3 0.389777, D -56.3283
- Non renewable primary energy as material utilization (PENRM) [MJ]: A1 2.1931, A2 0, A3 1.57194, A5 -1.57194, C2 0, C3 -2.1931, D 0
- Total use of non renewable primary energy resources (PENRT) [MJ]: A1 44.0154, A2 1.67948, A3 12.5082, A5 0.0686694, C2 0.0709335, C3 -1.80332, D -56.3283
- Use of secondary material (SM) [kg]: A1 0, A2 0, A3 0, A5 0, C2 0, C3 0, D 0
- Use of renewable secondary fuels (RSF) [MJ]: A1 0.0233439, A2 0, A3 0.20283, A5 0, C2 0, C3 0, D 74.4881
- Use of non renewable secondary fuels (NRSF) [MJ]: A1 0, A2 0, A3 0, A5 0, C2 0, C3 0, D 2.1931
- Use of net fresh water (FW) [m^3]: A1 0.0323263, A2 0.000164702, A3 0.00270535, A5 0.000512135, C2 6.95625e-6, C3 0.000113434, D 0.00990924

## Outputs
- Hazardous waste disposed (HWD) [kg]: A1 0.000220084, A2 9.38161e-8, A3 6.6332e-7, A5 3.14656e-10, C2 3.96236e-9, C3 3.02876e-10, D -3.17725e-8
- Non hazardous waste disposed (NHWD) [kg]: A1 0.0315016, A2 0.000136526, A3 0.00569574, A5 0.0112379, C2 5.76622e-6, C3 0.000403098, D 0.0360514
- Radioactive waste disposed (RWD) [kg]: A1 0.000260051, A2 2.27872e-6, A3 9.98443e-5, A5 2.84535e-6, C2 9.62425e-8, C3 3.66973e-5, D -0.00262634
- Components for re-use (CRU) [kg]: A1 0, A2 0, A3 0, A5 0, C2 0, C3 0, D 0
- Materials for recycling (MFR) [kg]: A1 0, A2 0, A3 0, A5 0, C2 0, C3 0, D 0
- Materials for energy recovery (MER) [kg]: A1 0, A2 0, A3 0, A5 0, C2 0, C3 4.4, D 0
- Exported electrical energy (EEE) [MJ]: A1 0, A2 0, A3 0, A5 0.363915, C2 0, C3 0, D 0
- Exported thermal energy (EET) [MJ]: A1 0, A2 0, A3 0, A5 0.722144, C2 0, C3 0, D 0

## Impact indicators
- Global warming potential (GWP) [kg CO_(2)-Äq.]: A1 -3.71016, A2 0.121713, A3 0.770728, A5 0.21187, C2 0.00514059, C3 7.13325, D -3.47499
- Depletion potential of the stratospheric ozone layer (ODP) [kg CFC11-Äq.]: A1 4.31263e-10, A2 2.0397e-17, A3 3.33182e-12, A5 7.25442e-17, C2 8.61473e-19, C3 1.27602e-15, D -8.62313e-15
- Acidification potential of land and water (AP) [kg SO_(2)-Äq.]: A1 0.0124286, A2 0.000514043, A3 0.00261951, A5 3.81909e-5, C2 2.17108e-5, C3 4.71755e-5, D -0.00357601
- Eutrophication potential (EP) [kg PO_(4)^(3)-Äq.]: A1 0.00146341, A2 0.000130834, A3 0.000218747, A5 4.78338e-6, C2 5.52582e-6, C3 7.66848e-6, D -0.000568044
- Formation potential of tropospheric ozone photochemical oxidants (POCP) [kg Ethen-Äq.]: A1 0.00184661, A2 -0.000212261, A3 0.000217149, A5 1.59283e-6, C2 -8.96491e-6, C3 3.11649e-6, D -0.000319287
- Abiotic depletion potential for non fossil resources (ADPE) [kg Sb-Äq.]: A1 6.46155e-7, A2 9.51557e-9, A3 6.75555e-8, A5 8.69586e-9, C2 4.01894e-10, C3 1.27499e-8, D -8.61754e-7
- Abiotic depletion potential for fossil resources (ADPF) [MJ]: A1 43.3625, A2 1.67363, A3 10.6862, A5 0.0614873, C2 0.0706865, C3 0.297097, D -51.0321

## Use advice
Scope:
This Declaration applies for STEICOwall and STEICOjoist I-joist products which are manufactured in the following variants:

STEICOjoist

STEICOjoist HB
STEICOjoist OSB
STEICOjoist LVL
STEICOjoist LVL OSBSTEICOwall

STEICOwall LVL HB
STEICOwall LVL OSB
STEICOwall HB
STEICOwall OSBManufacturing plant
STEICO Sp. z o.o.
Ul. Przemyslowa 2
64-700 Czarnkow
Poland
System boundary:
The Declaration complies with an EPD "from cradle to plant gate, with options". It includes the production stage, i.e. from provision of the raw materials through to production (cradle to gate, Modules A1 to A3), Module A5, and parts of the end-of-life stage (Modules C2 and C3). It also contains an analysis of the potential benefits and loads over and beyond the product's entire life cycle (Module D).

Module A1 assesses the provision of semi-finished wood products and the provision of adhesives. Transport of these substances is considered in Module A2. Module A3 comprises the provision of fuels, resources and electricity as well as the manufacturing processes on site. Essentially, these are bonding and cutting to size as well as packing the product. Module A5 exclusively covers the disposal of product packaging which includes the disposal of biogenic carbon and renewable and non-renewable primary energy (PERM and PENRM).

Module C2 considers transport to the disposal company and Module C3 is concerned with preparing and sorting waste wood. In accordance with /EN 16485/, Module C3 also includes as outflows the CO2 equivalents of the carbon inherent in the wood product as well as the renewable and non-renewable primary energy (PERM and PENRM) contained in the product.

Module D assesses thermal utilisation of the product at its end of life and the ensuing potential benefits and loads in the form of a system extension.

## Data sources
- STEICO joist/wall Stegträger.pdf
- GaBi Database (all versions)
- GaBi database SP37 2019
