# Meister Longlife Parkett

Dataset: ILCD process, EPD, specific dataset
Geography: DE
Reference year: 2016
Valid until: 2021
Classification: OEKOBAU.DAT: Holz / Holzböden / Parkett
Classification: IBUCategories: 02 Bauprodukte / Produkte aus Bauholz / Vollholzprodukte
Method details: Vollholzprodukte.pdf
Owner: MeisterWerke Schulte GmbH
Compliance: DIN EN 15804; ISO 14025
Review: Accredited third party review by IBU
Amounts: rows without a unit in brackets have none in this file; such an amount is in the reference unit of its flow, which a separate flow dataset defines
copyright: false

## General comment
Multi-layer parquet flooring made of three layers with a high-density fibreboard (HDF) as the middle layer, a solid wood cover layer made of oak and a backing. Depending on the design, the cover layer consists of
an individual segment (plank) or cut sections (ship- deck). The products are furnished with an oiled or lacquered surface ready for residential use, and can be connected with each other as elements by means of
the tongue-and-groove geometry without gluing. MeisterWerke distributes parquet products under the name of Longlife parquet with the brand MEISTER (http://www.meister.com) and (http://markenboden.de)
or Schulte Räume (http://schulte-raeume.de). For the placing on the market of the product in the European Union/EFTA (with the exception of Switzerland) the Regulation /(EU) No 305/2011/ applies. The products have a Declaration of Performance (DoP) under consideration of the harmonized product standard /EN 14342:2012/ ("Wood flooring - Characteristics, evalu- ation of conformity and marking") and the CE-marking.

## Technology and included processes
Area weight: 11 kg / m² Arithmetic average from the Two Longlife parquet products Landhausdiele & Schiffsboden. The production of the floor covering comprises the following processes: - Purchasing - if necessary, drying processes of the outer layer - Shaving and cutting (top layer) - Separation in slats (outer layer) - Technical drying of the slats (outer layer) - Gluing of the top layers and counterparts on the HDF board - Cutting into floor formats - Grinding + painting / oiling of the boards - milling the click system - Packing
Technical data:
Essential features and performance according to the Declaration of Performance and the underlying harmonized product standard /EN 14342:2012/:
Gross density and thickness > 500 kg/m³, > 10 mm
Fire behaviour Dfl-s1
Formaldehyde emissions E1
Pentachlorophenol content ≤ 5 ppm
Breaking strength NPD*
Slipping behaviour NPD*
Thermal conductivity [W/mK] ≤ 0.14 W/mK
Biological durability NPD*
* NPD = no performance determination

Additionally, the following structural data are relevant:
Total thickness: 13 mm (+/- 1 mm)
Length (min. - max.): 700 - 2400 mm
Width (min. - max.): 140 - 255 mm
Wear layer thickness: ≥ 2.5 mm
Surface weight: approx. 11 kg/m² (+/- 0.5 kg/m²)
Wood moisture of the cover layer /EN 13183-1/: 7 % (+/- 2 %)
Declared unit:
1 m² of multi-layer parquet flooring "Longlife parquet"
(surface weight 11 kg/m², moisture 7 %). An arithmetic
average from the two products, plank (Landhausdiele)
& ship deck (Schiffsboden), has been calculated (EPD
class 1c), since the production quantities are only
slightly different. Deviations of the Life Cycle
Assessment results of both product variants against
the declared average amount to max. 5 %, only for
ADPE and ADPF 13 % as well as for PENRT 8 %.

## Technical purpose
MeisterWerke Longlife parquet stands for wooden products as per /EN 13489/ which, depending on the structural design, are suited for residential and commercial use indoors. The floor coverings are
suitable for floating installation on screeds or wooden substructures in combination with suitable base layers (insulating underlay), or for full-surface gluing on a screed. Corresponding installation conditions and subfloor requirements by MeisterWerke must be observed at all times.

## Reference product
- 1m² Longlife-Parkett: 1

## Inputs
- Erneuerbare Primärenergie als Energieträger (PERE) [MJ]: A1-A3 101, A4 0.103, A5 0.0248, B2 0.847, D -35.2
- Erneuerbare Primärenergie zur stofflichen Nutzung (PERM) [MJ]: A1-A3 167, A4 0, A5 0, B2 0, D 0
- Total erneuerbare Primärenergie (PERT) [MJ]: A1-A3 268, A4 0.103, A5 0.0248, B2 0.847, D -35.2
- Nicht-erneuerbare Primärenergie als Energieträger (PENRE) [MJ]: A1-A3 108, A4 1.82, A5 0.19, B2 3.5, D -198
- Nicht-erneuerbare Primärenergie zur stofflichen Nutzung (PENRM) [MJ]: A1-A3 32, A4 0, A5 0, B2 0, D 0
- Total nicht erneuerbare Primärenergie (PENRT) [MJ]: A1-A3 140, A4 1.82, A5 0.19, B2 3.5, D -198
- Einsatz von Sekundärstoffen (SM) [kg]: A1-A3 0, A4 0, A5 0, B2 0, D 0
- Erneuerbare Sekundärbrennstoffe (RSF) [MJ]: A1-A3 0, A4 0, A5 0, B2 0, D 0
- Nicht erneuerbare Sekundärbrennstoffe (NRSF) [MJ]: A1-A3 0, A4 0, A5 0, B2 0, D 0
- Einsatz von Süßwasserressourcen (FW) [m^3]: A1-A3 0.0415, A4 0.000259, A5 0.00194, B2 0.00167, D -0.0395

## Outputs
- Gefährlicher Abfall zur Deponie (HWD) [kg]: A1-A3 2.04e-6, A4 1.38e-7, A5 4.57e-10, B2 5.52e-5, D -7.82e-8
- Entsorgter nicht gefährlicher Abfall (NHWD) [kg]: A1-A3 0.125, A4 0.000153, A5 0.0105, B2 0.0125, D 0.0096
- Entsorgter radioaktiver Abfall (RWD) [kg]: A1-A3 0.00577, A4 2.61e-6, A5 1.15e-5, B2 0.000115, D -0.019
- Komponenten für die Wiederverwendung (CRU) [kg]: A1-A3 0, A4 0, A5 0, B2 0, D 0
- Stoffe zum Recycling (MFR) [kg]: A1-A3 0, A4 0, A5 0, B2 0, D 0
- Stoffe für die Energierückgewinnung (MER) [kg]: A1-A3 0, A4 0, A5 0, B2 0, D 0
- Exportierte elektrische Energie (EEE) [MJ]: A1-A3 0, A4 0, A5 1.06, B2 0, D 54
- Exportierte thermische Energie (EET) [MJ]: A1-A3 0, A4 0, A5 2.47, B2 0, D 64.7

## Impact indicators
- Globales Erwärmungspotenzial (GWP) [kg CO_(2)-Äq.]: A1-A3 -7.59, A4 0.133, A5 0.961, B2 0.19, C3 16.8, D -9.84
- Abbau Potential der stratosphärischen Ozonschicht (ODP) [kg CFC11-Äq.]: A1-A3 1.19e-9, A4 6.06e-13, A5 2.79e-12, B2 1.09e-8, D -5.12e-9
- Versauerungspotenzial von Boden und Wasser (AP) [kg SO_(2)-Äq.]: A1-A3 0.032, A4 0.000574, A5 9.34e-5, B2 0.000442, D 0.00824
- Eutrophierungspotenzial (EP) [kg PO_(4)^(3)-Äq.]: A1-A3 0.00605, A4 0.000141, A5 1.63e-5, B2 0.000157, D -9.86e-5
- Bildungspotential für troposphärisches Ozon (POCP) [kg Ethen-Äq.]: A1-A3 0.0103, A4 -0.000196, A5 7.71e-6, B2 0.000132, D 0.00152
- Potenzial für den abiotischen Abbau nicht fossiler Ressourcen (ADPE) [kg Sb-Äq.]: A1-A3 2.63e-6, A4 8.78e-9, A5 1.29e-8, B2 -1.78e-8, D -2.49e-6
- Potenzial für den abiotischen Abbau fossiler Brennstoffe (ADPF) [MJ]: A1-A3 125, A4 1.82, A5 0.161, B2 3.21, D -150

## Use advice
Scope:
This core EPD applies to one square metre of Longlife parquet in the plank (Landhausdiele) and ship deck (Schiffsboden) variants, manufactured in 59602 Rüthen-Meiste, Germany. An average of these two products is declared.
System boundary:
Type of EPD: Cradle to gate with options.

Modules A1-A3:
The manufacturing phase includes:
A1: Raw material extraction and processing, and
A2: Transport to the manufacturer;
A3: Manufacturing;
This includes provision of all materials, products and
energy, as well as the complete waste processing.

Module A4 includes the transport to the point of
installation.

Module A5 considers product packaging at the
construction site. The way of disposal is thermal
utilization; potential benefits from energy substitution
are declared in module D. It is assumed that no waste
is generated during installation.

Module B2 includes the regular cleaning of the floor
covering. Both wet and dry cleaning (vacuum cleaning)
are considered here. The results of module B2 in this
EPD are declared for one year of usage.

At the end-of-life stage, the parquet flooring reaches
the end-of-waste state directly after it has been
removed from the building. Parquet flooring can be
subjected to thermal utilization in a biomass plant.
Potential benefits from energy substitution resulting
from this are declared in module D. Only the biogenic
CO2 emissions generated during incineration are
declared in C3.

## Data sources
- Meister Longlife Parkett.pdf
- GaBi Database (all versions)
- GaBi database SP29 2016
