# Calcium silicate board

Dataset: ILCD process, EPD, generic dataset
Geography: DE
Reference year: 2021
Valid until: 2022
Classification: oekobau.dat: Dämmstoffe / Calciumsilikat / Calcium-Silikathydrat / Calciumsilikat
Owner: Sphera Solutions GmbH
Compliance: EN 15804+A2
Review: Dependent internal review by Sphera Solutions GmbH; Independent external review by GaBi user forum
Amounts: rows without a unit in brackets have none in this file; such an amount is in the reference unit of its flow, which a separate flow dataset defines
copyright: true
licenseType: Free of charge for all users and uses
accessRestrictions: The license conditions as stated on https://www.oekobaudat.de/ apply.
accessRestrictions: Es gelten die Lizenzbedingungen wie sie auf https://www.oekobaudat.de/ genannt sind.

## General comment
This data set has been modeled according to the European Standard EN 15804+A2 for Sustainable Building. Results are depicted in modules that allow the structured expression of results over the entire life cycle.

## Geography
The data set represents the country specific situation in Germany, focusing on the main technologies, the region specific characteristics and / or import statistics.

## Time period
Annual average

## Technology and included processes
The main raw materials are cement, mineral aggregates, quicklime and gypsum. These are mixed with the addition of water, pressed and then cured in an autoclave using pressure, temperature and steam. The life cycle assessment is dominated by the use of binding agents and thermal energy.

In the disposal phase, a mechanical dismantling (excavator) is assumed in module C1. The transport in module C2 to the treatment plant takes place with a truck (50km). In module C3, the material is processed, any reinforcement is fed to a sink (no loads, no credits). A treatment loss of 25% was assumed. This loss is fed to an inert material landfill within Module C3 (average landfill emissions). In Module D, a credit for the net amount of material (excluding reinforcement and treatment losses) for the substitution of natural gravel as backfill material is given.

## Technical purpose
Calcium silicate boards are generally used in the field of constructional fire protection (temperature resistance of about 1100 ° C) or as internal insulation (high pH value, counteracts mold formation).

## Safety margin
20 %. Product system depicted except for a few missing processes / flows. Technological, temporal and geographic representativeness partly given.

## Reference product
- Calcium silicate board: 1

## Inputs
- Use of renewable primary energy as energy carrier (PERE) [MJ]: A1-A3 570.095, C1 0.0562581, C2 0.491887, C3 2.97611, D -1.16528
- Use of renewable primary energy resources used as raw materials (PERM) [MJ]: A1-A3 0, C1 0, C2 0, C3 0, D 0
- Total use of renewable primary energy (PERT) [MJ]: A1-A3 570.095, C1 0.0562581, C2 0.491887, C3 2.97611, D -1.16528
- Use of non renewable primary energy as energy carrier (PENRE) [MJ]: A1-A3 7034.55, C1 0.969329, C2 8.47523, C3 26.7367, D -4.27946
- Use of non renewable primary energy resources used as raw materials (PENRM) [MJ]: A1-A3 0, C1 0, C2 0, C3 0, D 0
- Total use of non renewable primary energy resource (PENRT) [MJ]: A1-A3 7034.55, C1 0.969329, C2 8.47523, C3 26.7367, D -4.27946
- Use of secondary material (SM) [kg]: A1-A3 0, C1 0, C2 0, C3 0, D 0
- Use of renewable secondary fuels (SF) [MJ]: A1-A3 0, C1 0, C2 0, C3 0, D 0
- Use of non renewable secondary fuels (NRSF) [MJ]: A1-A3 0, C1 0, C2 0, C3 0, D 0
- Net use of fresh water (FW) [m3]: A1-A3 2.05711, C1 4.99994e-5, C2 0.000437165, C3 0.00676243, D -0.000706396

## Outputs
- Hazardous waste disposed (HWD) [kg]: A1-A3 0, C1 4.05148e-11, C2 3.54237e-10, C3 2.18782e-9, D -6.89488e-10
- Non harzardous waste disposed (NHWD) [kg]: A1-A3 25.8702, C1 0.000156472, C2 0.0013681, C3 65.5433, D -2.84183
- Radioactive waste disposed (RWD) [kg]: A1-A3 0.227261, C1 9.30198e-7, C2 8.13309e-6, C3 0.000235756, D -0.00012621
- Components for re-use (CRU) [kg]: A1-A3 0, C1 0, C2 0, C3 0, D 0
- Materials for recycling (MFR) [kg]: A1-A3 0, C1 0, C2 0, C3 163.688, D 0
- Materials for energy recovery (MER) [kg]: A1-A3 0, C1 0, C2 0, C3 0, D 0
- Exported electrical energy (EEE) [MJ]: A1-A3 0, C1 0, C2 0, C3 0, D 0
- Exported thermal energy (EET) [MJ]: A1-A3 0, C1 0, C2 0, C3 0, D 0

## Impact indicators
- Global Warming Potential - total (GWP-total) [kg CO2 eq.]: A1-A3 564.895, C1 0.0725187, C2 0.643761, C3 5.93586, D -0.326068
- Global Warming Potential - fossil fuels (GWP-fossil) [kg CO2 eq.]: A1-A3 569.135, C1 0.0720335, C2 0.63939, C3 1.71142, D -0.324297
- Global Warming Potential - biogenic (GWP-biogenic) [kg CO2 eq.]: A1-A3 -4.23963, C1 1.56087e-5, C2 0.00026486, C3 4.21758, D -0.000289214
- Global Warming Potential - land use and land use change (GWP-luluc) [kg CO2 eq.]: A1-A3 0, C1 0.00046965, C2 0.00410634, C3 0.00685998, D -0.00148149
- Depletion potenzial of the stratospheric ozone layer (ODP) [kg CFC-11 eq.]: A1-A3 6.5511e-7, C1 1.87116e-17, C2 1.63603e-16, C3 7.10106e-15, D -4.18731e-15
- Acidifcation potential, Accumulated Exceedance (AP) [Mole of H+ eq.]: A1-A3 0.721797, C1 0.000969846, C2 0.00181282, C3 0.0137683, D -0.00107407
- Eutrophication potential - freshwater (EP-freshwater) [kg P eq.]: A1-A3 0.00239802, C1 1.50397e-7, C2 1.31498e-6, C3 3.30862e-6, D -9.02373e-7
- Eutrophication potential - marine (EP-marine) [kg N eq.]: A1-A3 0.215227, C1 0.000441218, C2 0.000835126, C3 0.00515305, D -0.000417732
- Eutrophication potential - terrestrial (EP-terrestrial) [Mole of N eq.]: A1-A3 2.27162, C1 0.00485125, C2 0.00934355, C3 0.0566251, D -0.00459871
- Photochemical Ozone Creation Potential (POCP) [kg NMVOC eq.]: A1-A3 0.610826, C1 0.0013214, C2 0.00162852, C3 0.0152042, D -0.000988028
- Abiotic depletion potential - non-fossil resources (ADPE) [kg Sb eq.]: A1-A3 2.33683e-5, C1 6.36114e-9, C2 5.5618e-8, C3 8.88054e-7, D -6.62322e-8
- Abiotic depletion potential - fossil resources (ADPF) [MJ]: A1-A3 7034.31, C1 0.969288, C2 8.47487, C3 26.7289, D -4.2786
- Water (user) deprivation potential (WDP) [m³ world equiv.]: A1-A3 88.3529, C1 0.000284275, C2 0.00248553, C3 0.22706, D -0.00790514

## Use advice
This dataset refers to 1 m³ of calcium silicate board with a bulk density of 225 kg/m³. The thermal conductivity is 0.053-0.07 W/mK. The data set can be used for approximate estimation of other bulk densities of 200 - 800 kg/m³.

The data set represents a cradle to gate inventory. It can be used to characterise the supply chain situation of the respective commodity in a representative manner. Combination with individual unit processes using this commodity enables the generation of user-specific (product) LCAs.

## Data sources
- GaBi databases
- Documentation of data quality management
- GaBi Database Edition 2021, CUP2021.01
- GaBi database (all versions)
