# Gravel 2/32 dried; dried

Dataset: ILCD process, EPD, generic dataset
Geography: DE
Reference year: 2018
Valid until: 2022
Classification: oekobau.dat: Mineralische Baustoffe / Zuschläge / Sand und Kies
Owner: thinkstep
Compliance: DIN EN 15804
Review: Dependent internal review by thinkstep, IABP-GaBi, IBP-GaBi; Independent external review by GaBi user forum, GaBi bug forum, GaBi user community
Amounts: rows without a unit in brackets have none in this file; such an amount is in the reference unit of its flow, which a separate flow dataset defines
copyright: true

## General comment
This data set has been modeled according to the European Standard EN 15804 for Sustainable Building. Results are depicted in modules that allow the structured expression of results over the entire life cycle.

## Geography
The data set represents the country specific situation in Germany, focusing on the main technologies, the region specific characteristics and / or import statistics.

## Time period
Annual average

## Technology and included processes
The processing of the raw materials starts with the washing of the rock, which has been extracted at open pit mine. With the addition of clear water the raw material is cleaned from desludging substances in various washing stages (clay) and from foreign matters (wood, kaolin, carbon, metals etc.). Then, a sorting with the help of a screen riddle and/or a preceding sorting machine. Sand and gravel with a SiO2 content of more than 96% are knwon as silica sand or quartz gravel. This is succeeded by the drying. In a hot-gas generator air is heated to 450° with a gas burner. With the hot air the drying of the granulate in the kiln is done, until the moisture content falls below 0.2%. The LCA of gravel covers the process of the extraction of natural aggregate and the processing in the gravel plant as well as the following drying. The system boundaries are represented by the finished product gravel 2/32 (dried) at the factory gate. Transports from the factory to the building site are not considered and must be included according to the system boundaries.
A transport distance of 10km is used between the quarry and the plant.

Background system:
Electricity: Electricity is modelled according to the individual country-specific situations. The country-specific modelling is achieved on multiple levels. Firstly, individual energy carrier specific power plants and plants for renewable energy sources are modelled according to the current national electricity grid mix. Modelling the electricity consumption mix includes transmission / distribution losses and the own use by energy producers (own consumption of power plants and "other" own consumption e.g. due to pumped storage hydro power etc.), as well as imported electricity. Secondly, the national emission and efficiency standards of the power plants are modelled as well as the share of electricity plants and combined heat and power plants (CHP). Thirdly, the country-specific energy carrier supply (share of imports and / or domestic supply) including the country-specific energy carrier properties (e.g. element and energy content) are accounted for. Fourthly, the exploration, mining/production, processing and transport processes of the energy carrier supply chains are modelled according to the specific situation of each electricity producing country. The different production and processing techniques (emissions and efficiencies) in the different energy producing countries are considered, e.g. different crude oil production technologies or different flaring rates at the oil platforms.
Thermal energy, process steam: The thermal energy and process steam supply is modelled according to the individual country-specific situation with regard to emission standards and considered energy carriers. The thermal energy and process steam are produced at heat plants. Efficiencies for thermal energy production are by definition 100% in relation to the corresponding energy carrier input. For process steam the efficiency ranges from 85%, 90% to 95%. The energy carriers used for the generation of thermal energy and process steam are modelled according to the specific import situation (see electricity above).
Transports: All relevant and known transport processes are included. Ocean-going and inland ship transport as well as rail, truck and pipeline transport of bulk commodities are considered.
Energy carriers: The energy carriers are modelled according to the specific supply situation (see electricity above).
Refinery products: Diesel fuel, gasoline, technical gases, fuel oils, lubricants and residues such as bitumen are modelled with a parameterised country-specific refinery model. The refinery model represents the current national standard in refining techniques (e.g. emission level, internal energy consumption, etc.) as well as the individual country-specific product output spectrum, which can be quite different from country to country. The supply of crude oil is modelled, again, according to the country-specific situation with the respective properties of the resources.

## Technical purpose
This product can be used in construction.

## Safety margin
20 %. Product system depicted except for a few missing processes / flows. Technological, temporal and geographic representativeness partly given.

## Reference product
- Gravel (2/32): 1

## Inputs
- Use of renewable primary energy (PERE) [MJ]: A1-A3 0.0143774, C1 0.000566453, C2 0.0021792, C3 0.0131508, D -0.00781763
- Primary energy resources used as raw materials (PERM) [MJ]: A1-A3 0, C1 0, C2 0, C3 0, D 0
- Total use of renewable primary energy resources (PERT) [MJ]: A1-A3 0.0143774, C1 0.000566453, C2 0.0021792, C3 0.0131508, D -0.00781763
- Use of non-renewable primary energy (PENRE) [MJ]: A1-A3 0.542523, C1 0.0097302, C2 0.037433, C3 0.121834, D -0.0274094
- Non-renewable primary energy resources used as raw materials (PENRM) [MJ]: A1-A3 0, C1 0, C2 0, C3 0, D 0
- Total use of non-renewable primary energy resources (PENRT) [MJ]: A1-A3 0.542523, C1 0.0097302, C2 0.037433, C3 0.121834, D -0.0274094
- Input of secondary material (SM) [kg]: A1-A3 0, C1 0, C2 0, C3 0, D 0
- Use of renewable secondary fuels (RSF) [MJ]: A1-A3 0, C1 0, C2 0, C3 0, D 0
- Use of non renewable secondary fuels (NRSF) [MJ]: A1-A3 0, C1 0, C2 0, C3 0, D 0
- Use of net fresh water (FW) [m3]: A1-A3 7.05236e-5, C1 5.07306e-7, C2 1.95166e-6, C3 3.12591e-5, D -5.06974e-6

## Outputs
- Hazardous waste disposed (HWD) [kg]: A1-A3 1.00935e-9, C1 3.63607e-10, C2 1.39883e-9, C3 2.20686e-9, D -5.16622e-10
- Non-hazardous waste disposed (NHWD) [kg]: A1-A3 0.0251455, C1 1.70782e-6, C2 6.57015e-6, C3 0.309602, D -0.0161111
- Radioactive waste disposed (RWD) [kg]: A1-A3 1.56538e-6, C1 1.02439e-8, C2 3.94093e-8, C3 1.17417e-6, D -1.02055e-6
- Components for re-use (CRU) [kg]: A1-A3 0, C1 0, C2 0, C3 0, D 0
- Materials for Recycling (MFR) [kg]: A1-A3 0, C1 0, C2 0, C3 0.927835, D 0
- Material for Energy Recovery (MER) [kg]: A1-A3 0, C1 0, C2 0, C3 0, D 0
- Exported electrical energy (EEE) [MJ]: A1-A3 0, C1 0, C2 0, C3 0, D 0
- Exported thermal energy (EET) [MJ]: A1-A3 0, C1 0, C2 0, C3 0, D 0

## Impact indicators
- Global warming potential (GWP) [kg CO2 eq.]: A1-A3 0.0332595, C1 0.000718871, C2 0.00278506, C3 0.00733722, D -0.00205398
- Ozone Depletion Potential (ODP) [kg R11 eq.]: A1-A3 6.87963e-17, C1 2.39627e-19, C2 9.21867e-19, C3 4.15632e-17, D -3.96418e-17
- Acidification potential (AP) [kg SO2 eq.]: A1-A3 2.30524e-5, C1 2.50738e-6, C2 5.62553e-6, C3 4.74501e-5, D -4.85042e-6
- Eutrophication potential (EP) [kg Phosphate eq.]: A1-A3 4.10634e-6, C1 5.91605e-7, C2 1.33734e-6, C3 8.07382e-6, D -9.43813e-7
- Photochemical Ozone Creation Potential (POCP) [kg Ethene eq.]: A1-A3 1.54938e-6, C1 2.47755e-7, C2 -1.6854e-6, C3 4.30615e-6, D 4.45872e-7
- Abiotic depletion potential for non fossil resources (ADPE) [kg Sb eq.]: A1-A3 2.53879e-9, C1 6.09201e-11, C2 2.34365e-10, C3 3.9426e-9, D -4.56497e-10
- Abiotic depletion potential for fossil resources (ADPF) [MJ]: A1-A3 0.538568, C1 0.00970402, C2 0.0373323, C3 0.118868, D -0.024833

## Use advice
The data set represents a cradle to gate inventory. It can be used to characterise the supply chain situation of the respective commodity in a representative manner. Combination with individual unit processes using this commodity enables the generation of user-specific (product) LCAs.

## Data sources
- Waschen und Entwässern. Immer wichtiger bei der Aufbereitung von Kies, Sand und Naturstein, 2000
- Ökologische Bilanzierung von Baustoffen und Gebäuden, 2000
- Baustoff-Ökobilanz. Wirkungsabschätzung und Auswertung in der Steine-Erden-Industrie, 1999
- GaBi Database Edition 2020, SP40
- GaBi database (all versions)
