# Tufted modular carpet tiles with CQuest Bio backing, aqueous dyed surface and a max. total pile material of 1500 g/m² PA 6 with 100% recycled content

Dataset: ILCD process, EPD, average dataset
Geography: RER
Reference year: 2021
Valid until: 2026
Classification: OEKOBAU.DAT: Kunststoffe / Bodenbeläge / Textile Bodenbeläge
Classification: IBUCategories: 02 Building products / Floor coverings / Floor coverings
Method details: Floor coverings.pdf
Generated by: Gemeinschaft umweltfreundlicher Teppichboden (GUT) e.V.
Registration number: EPD-INT-20210152-CBB2-EN
Owner: Interface Europe Manufacturing BV
Compliance: DIN EN 15804; ISO 14025
Review: Accredited third party review by Institut Bauen und Umwelt e. V.
Amounts: rows without a unit in brackets have none in this file; such an amount is in the reference unit of its flow, which a separate flow dataset defines
copyright: true
licenseType: Free of charge for all users and uses
accessRestrictions: None

## General comment
Tufted modular carpet tiles having a surface pile of continues-dyed polyamide 6 with 100% recycled content and a CQuest Bio backing system.

CQuest Bio backing system: Backing compound based on wood resin, containing a recycled filler, glass-fleece reinforcement and polypropylene covering fleece.

The minimum recycled content with a total pile weight of 1500 g/m2 is 71%. The declaration applies to a group if products with a maximum total pile weight of 1500 g/m2. LCA results for poducts with a maximum total pile weight of 600 g/m2 can be taken from the corresponding tables of the annexe. Results for specific products with other total pile weights can be calculated by using equation 1 given in the annexe (see annexe chapter: 'General information on the annexe')

## Technology and included processes
Tufted modular carpet tiles having a surface pile of continues-dyed polyamide 6 with 100% recycled content and a CQuest Bio backing system. CQuest Bio backing system: Backing compound based on wood resin, containing a recycled filler, glass-fleece reinforcement and polypropylene covering fleece. The minimum recycled content with a total pile weight of 1500 g/m2 is 71%. The declaration applies to a group if products with a maximum total pile weight of 1500 g/m2.
Technical data:
The performance data listed in the DoP apply.

## Technical purpose
According to the use class as defined in EN 1307 the products can be used in all professional areas which require class 33 or less.

## Scenarios
- S1: 100% municipal waste incineration
- S2: 100% recycling in the cement industry
- S3: Scenario 3

## Reference product
- 1 m² floorcovering (): 1

## Inputs
- Renewable primary energy as energy carrier (PERE) [MJ]: A1-A3 84.942, A4 0.2426, A5 3.37007, B1 0, B2 1.238, C2 0.03385, C3 (S2) 14.6536, C3 (S3) 14.9301, C4 0.4064, D (S0) -0.07707, D (S1) 0, D (S2) -1.27, D (S3) -0.3415
- Renewable primary energy resources as material utilization (PERM) [MJ]: A1-A3 14.418, A4 0, A5 -0.363, B1 0, B2 0, C2 0, C3 (S2) -14.055, C3 (S3) -14.055, C4 0, D (S0) 0, D (S1) 0, D (S2) 0, D (S3) 0
- Total use of renewable primary energy resources (PERT) [MJ]: A1-A3 99.36, A4 0.2426, A5 3.00707, B1 0, B2 1.238, C2 0.03385, C3 (S2) 0.5986, C3 (S3) 0.8751, C4 0.4064, D (S0) -0.07707, D (S1) 0, D (S2) -1.27, D (S3) -0.3415
- Non renewable primary energy as energy carrier (PENRE) [MJ]: A1-A3 104.55, A4 4.353, A5 3.9491, B1 0, B2 7.862, C2 0.6074, C3 (S2) 12.882, C3 (S3) 14.016, C4 5.601, D (S0) -0.343, D (S1) 0, D (S2) -5.739, D (S3) -21.78
- Non renewable primary energy as material utilization (PENRM) [MJ]: A1-A3 8.95, A4 0, A5 -0.275, B1 0, B2 0, C2 0, C3 (S2) -8.675, C3 (S3) -8.675, C4 0, D (S0) 0, D (S1) 0, D (S2) 0, D (S3) 0
- Total use of non renewable primary energy resources (PENRT) [MJ]: A1-A3 113.5, A4 4.353, A5 3.6741, B1 0, B2 7.862, C2 0.6074, C3 (S2) 4.207, C3 (S3) 5.341, C4 5.601, D (S0) -0.343, D (S1) 0, D (S2) -5.739, D (S3) -21.78
- Use of secondary material (SM) [kg]: A1-A3 4.28, A4 0, A5 0.1284, B1 0, B2 0, C2 0, C3 (S2) 0, C3 (S3) 0, C4 0, D (S0) 0, D (S1) 0, D (S2) 0, D (S3) 0.26
- Use of renewable secondary fuels (RSF) [MJ]: A1-A3 0, A4 0, A5 0, B1 0, B2 0, C2 0, C3 (S2) 0, C3 (S3) 0, C4 0, D (S0) 0, D (S1) 0, D (S2) 0, D (S3) 0
- Use of non renewable secondary fuels (NRSF) [MJ]: A1-A3 0, A4 0, A5 0, B1 0, B2 0, C2 0, C3 (S2) 0, C3 (S3) 0, C4 0, D (S0) 0, D (S1) 0, D (S2) 0, D (S3) 0
- Use of net fresh water (FW) [m^3]: A1-A3 0.4932, A4 0.0002777, A5 0.0154584, B1 0, B2 0.004127, C2 3.875e-5, C3 (S2) 0.02034, C3 (S3) 0.02061, C4 5.163e-5, D (S0) -7.528e-5, D (S1) 0, D (S2) -0.001241, D (S3) -0.002062

## Outputs
- Hazardous waste disposed (HWD) [kg]: A1-A3 0.004228, A4 2.194e-10, A5 0.000126841, B1 0, B2 5.902e-10, C2 3.061e-11, C3 (S2) 1.692e-8, C3 (S3) 1.709e-8, C4 1.007e-9, D (S0) -7.7e-11, D (S1) 0, D (S2) -1.285e-9, D (S3) -1.668e-9
- Non hazardous waste disposed (NHWD) [kg]: A1-A3 0.809, A4 0.0006467, A5 0.06868, B1 0, B2 0.005624, C2 9.023e-5, C3 (S2) 1.477, C3 (S3) 1.478, C4 5.339, D (S0) -0.0001605, D (S1) 0, D (S2) -0.002666, D (S3) -0.1622
- Radioactive waste disposed (RWD) [kg]: A1-A3 0.002191, A4 5.266e-6, A5 7.0286e-5, B1 0, B2 0.0003315, C2 7.348e-7, C3 (S2) 0.0001416, C3 (S3) 0.0002207, C4 6.503e-5, D (S0) -2.48e-5, D (S1) 0, D (S2) -0.0004085, D (S3) -8.83e-5
- Components for re-use (CRU) [kg]: A1-A3 0, A4 0, A5 0, B1 0, B2 0, C2 0, C3 (S2) 0, C3 (S3) 0, C4 0, D (S0) 0, D (S1) 0, D (S2) 0, D (S3) 0
- Materials for recycling (MFR) [kg]: A1-A3 0, A4 0, A5 0.121, B1 0, B2 0, C2 0, C3 (S2) 0, C3 (S3) 1.7, C4 0, D (S0) 0, D (S1) 0, D (S2) 0, D (S3) 0
- Materials for energy recovery (MER) [kg]: A1-A3 0, A4 0, A5 0, B1 0, B2 0, C2 0, C3 (S2) 0, C3 (S3) 0, C4 0, D (S0) 0, D (S1) 0, D (S2) 0, D (S3) 0
- Exported electrical energy (EEE) [MJ]: A1-A3 0, A4 0, A5 0.278, B1 0, B2 0, C2 0, C3 (S2) 7.85, C3 (S3) 0, C4 0, D (S0) 0, D (S1) 0, D (S2) 0, D (S3) 0
- Exported thermal energy (EET) [MJ]: A1-A3 0, A4 0, A5 0.517, B1 0, B2 0, C2 0, C3 (S2) 14.7, C3 (S3) 74.5, C4 0, D (S0) 0, D (S1) 0, D (S2) 0, D (S3) 0

## Impact indicators
- Global warming potential (GWP) [kg CO_(2)-Äq.]: A1-A3 5.259, A4 0.3185, A5 0.59317, B1 0, B2 0.2909, C2 0.04445, C3 (S2) 7.034, C3 (S3) 7.107, C4 1.264, D (S0) -0.01953, D (S1) 0, D (S2) -0.3269, D (S3) -0.2415
- Depletion potential of the stratospheric ozone layer (ODP) [kg CFC11-Äq.]: A1-A3 2.74e-8, A4 5.563e-17, A5 8.22e-10, B1 0, B2 1.212e-8, C2 7.763e-18, C3 (S2) 2.545e-15, C3 (S3) 3.498e-15, C4 1.235e-15, D (S0) -2.991e-16, D (S1) 0, D (S2) -4.928e-15, D (S3) -1.457e-15
- Acidification potential of land and water (AP) [kg SO_(2)-Äq.]: A1-A3 0.02331, A4 0.001318, A5 0.0008929, B1 0, B2 0.001143, C2 0.0001839, C3 (S2) 0.004994, C3 (S3) 0.005236, C4 0.0009443, D (S0) -2.265e-5, D (S1) 0, D (S2) -0.0003754, D (S3) -0.0008627
- Eutrophication potential (EP) [kg PO_(4)^(3)-Äq.]: A1-A3 0.005947, A4 0.0003356, A5 0.00022716, B1 0, B2 0.0003165, C2 4.683e-5, C3 (S2) 0.001255, C3 (S3) 0.001309, C4 0.001025, D (S0) -3.11e-6, D (S1) 0, D (S2) -5.173e-5, D (S3) -0.0001135
- Formation potential of tropospheric ozone photochemical oxidants (POCP) [kg Ethen-Äq.]: A1-A3 0.001422, A4 -0.0005644, A5 3.3655e-5, B1 6.286e-5, B2 0.0001473, C2 -7.876e-5, C3 (S2) 0.0003027, C3 (S3) 0.0002281, C4 8.498e-5, D (S0) -2.077e-6, D (S1) 0, D (S2) -3.46e-5, D (S3) -8.03e-5
- Abiotic depletion potential for non fossil resources (ADPE) [kg Sb-Äq.]: A1-A3 9.95e-6, A4 2.825e-8, A5 3.06459e-7, B1 0, B2 4.428e-6, C2 3.942e-9, C3 (S2) 2.313e-7, C3 (S3) 2.451e-7, C4 6.985e-8, D (S0) -3.669e-9, D (S1) 0, D (S2) -6.072e-8, D (S3) -1.904e-7
- Abiotic depletion potential for fossil resources (ADPF) [MJ]: A1-A3 107.4, A4 4.34, A5 3.4797, B1 0, B2 6.771, C2 0.6056, C3 (S2) 3.85, C3 (S3) 4.785, C4 5.436, D (S0) -0.2806, D (S1) 0, D (S2) -4.711, D (S3) -21.55

## Use advice
Scope:
The manufacturer declaration applies to modular carpet tiles with CQuest Bio backing and a total pile material of max. 1500 g/m2 PA 6 with 100% recycled content. The products are tufted in Scherpenzeel, The Netherlands, or in Craigavon, Ireland. Dyeing of the surface is performed externally. The dyed carpets are back coated in Scherpenzeel.

The declaration is only valid in conjunction with a valid GUT-PRODIS license of the product.

LCA results for products with a maximum total pile weight of 600 g/m2 can be taken from the corresponding tables of the annexe. Specific data for every product within the declared group of products in relation to its total pile weight can be calculated by using equation 1 given in the annexe (see annexe chapter: 'General information on the annexe')
System boundary:
Type of EPD: Cradle-to-grave

System boundaries of modules A, B, C, D:

Modules C3, C4 and D are indicated separately for three end-of-life scenarios:
- 1 landfill disposal
- 2 municipal waste incineration
- 3 recovery in a cement plant

A1-A3 Production:

Energy supply and production of the basic material, processing of secondary material, auxiliary material, transport of the material to the manufacturing site, emissions, waste water treatment, packaging material and waste processing up to the landfill disposal of residual waste (except radioactive waste). Benefits for generated electricity and steam due to the incineration of production waste are aggregated.
Biogenic carbon that is stored in renewable material (wood resin, renewable additives, packaging paper) is taken into account as well as the associated carbon dioxide uptake from the air from which this biogenic carbon comes.

A4 Transport:

Transport of the packed textile floor covering from factory gate to the place of installation.

A5 Installation:

Installation of the textile floor covering, processing of installation waste and packaging waste up to the landfill disposal of residual waste (except radioactive waste), the production of the amount of carpet that occurs as installation waste including its transport to the place of installation. Generated electricity and steam due to the incineration of waste are listed in the result table as exported energy.
Biogenic carbon that is stored in renewable materials in installation waste and packaging paper is released as carbon dioxide emissions into the air at the end of life in module A5.

Preparation of the floor and auxiliary materials (adhesives, fixing agents, PET connectors) are beyond the system boundaries and not taken into account.

B1 Use:

Indoor emissions during the use stage. After the first year, no product- related Volatile Organic Compound (VOC) emissions are relevant due to known VOC decay curves of the product.

B2 Maintenance:

Cleaning of the textile floor covering for a period of 1 year:

Vacuum cleaning – electricity supply.

Wet cleaning – electricity, water consumption, production of the cleaning agent, waste water treatment.

The declared values in this module have to be multiplied by the assumed service life of the floor covering in the building in question.

B3 - B7:

The modules are not relevant and therefore not declared.

C1 De-construction:

The floor covering is de-constructed manually and no additional environmental impact is caused.

C2 Transport:

Transport of the carpet waste to a landfill, to the municipal waste incineration plant (MWI) or to the waste collection facility for recycling.

C3 Waste processing:

C3-1: Landfill disposal needs no waste processing.

C3-2: The impact from waste incineration (plant with R1>0.6), generated electricity and steam are listed in the result table as exported energy. The biogenic carbon that is stored in the renewable materials of the floor covering is released into the air as carbon dioxide emissions.

C3-3: Collection of the carpet waste for recovery in the cement industry, waste processing (granulating), transport to the cement plant, emissions from the incineration. The biogenic carbon that is stored in the renewable materials of the floor covering is released into the air as carbon dioxide emissions.

C4 Disposal

C4-1: Impact from landfill disposal. The biogenic carbon that is stored in the renewable materials of the floor covering is released into the air as carbon dioxide emissions.

C4-2: The carpet waste leaves the system in

module C3-2.

C4-3: The pre-processed carpet waste leaves the system in module C3-3.

D Recycling potential:

Calculated benefits result from materials exclusive secondary materials (net materials).

D-A5: Benefits for generated energy due to incineration of packaging and installation waste (incineration plant with R1 > 0.6),

D-1: Benefits for generated energy due to landfill disposal of carpet waste at the end-of-life,

D-2: Benefits for generated energy due to incineration of carpet waste at the end-of-life (incineration plant with R1 > 0.6),

D-3: Benefits for saved fossil energy and saved inorganic material due to recovery of the carpet in a cement plant.

## Data sources
- GaBi Database (all versions)
- GaBi Database Edition 2021, CUP 2021.01
