# Oriented Strand Board (Durchschnitt DE)

Dataset: ILCD process, EPD, representative dataset
Geography: DE
Reference year: 2020
Valid until: 2025
Classification: OEKOBAU.DAT: Holz / Holzwerkstoffe / OSB-Platte
Method details: EN 15804; ILCD format
Owner: Thünen-Institut für Holzforschung
Compliance: EN 15804
Review: Independent external review by Dr. Frank Werner - Umwelt & Entwicklung
Amounts: rows without a unit in brackets have none in this file; such an amount is in the reference unit of its flow, which a separate flow dataset defines
copyright: true

## General comment
Weitere Informationen zur deklarierten Einheit (Zusammensetzung) und die auf Herstellerangaben beruhende Sachbilanz (In- und Output der Stoff- und Energieströme) stehen als Excel-Datei unter dem Unterpunkt Hintergrund-Bericht zum Download bereit.
Der Datensatz wurde 2020 als Aktualisierung mit gleichbleibendem Vordergrundsystem erstellt. Alle Hintergrunddaten entstammen der GaBi Professional Datenbank 2020 im Service Pack 40. Die Modellierung und Berechnung der Ökobilanz basiert auf den europäischen Normen EN 15804:2012+A1:2013 und EN 16485:2014. Bei Rückfragen wenden Sie sich bitte an holzundklima@thuenen.de.

## Geography
Die Produktion der an der Ökobilanzstudie beteiligten Projektpartner lag bei 300.000 m³/a, was einer deutschlandweiten Abdeckung von 28 % entspricht.

## Time period
Der Datensatz basiert auf Produktionsdaten aus den Jahren 2009 bis 2011 (Vordergrundsystem).
Eine Aktualisierung des Hintergrundsystems erfolgte 2020.

## Technology and included processes
Oriented Strand Boards (OSB) sind plattenförmige Holzwerkstoffe auf Basis von großen Spänen, sogenannten Strands. Neben Strands besteht OSB aus duroplastischen Bindemitteln. Entrindetes Rundholz wird im feuchten Zustand zerspant und der Feingutanteil wird ausgesiebt. Die Strands werden getrocknet, beleimt und zum Pressen gestreut. Die verpressten Platten bzw. der verpresste Plattenstrang wird aufgetrennt und formatiert. Nachdem der Klebstoff vollständig ausgehärtet ist, werden die Platten verpackt.
Die Holzfeuchte des Produktes liegt bei 5%.

## Technical purpose
OSB-Platten werden als Bauplatten beim Rohbau und im Innenausbau als Wand- oder Dachbeplankung eingesetzt. Im Fußbodenbereich werden sie als Verlegeplatten genutzt. Darüber hinaus werden sie für Regale, Gestelle Verpackungen und als Betonschalung verwendet.

## Scenarios
- energetisch: therm. Verwertung
- stofflich: stoffl. Verwertung

## Reference product
- OSB: 1

## Inputs
- Use of renewable primary energy (PERE) [MJ]: A1 261.98, A2 4.29516, A3 2406.5, A1-A3 2672.78, A5 0.250191, C2 0.510277, C3 30.8332, D (energetisch) 7630.8, D (stofflich) -37.0126
- Use of renewable primary energy resources used as raw materials (PERM) [MJ]: A1 10230.2, A2 0, A3 141.114, A1-A3 10371.3, A5 -141.114, C2 0, C3 -10230.2, D (energetisch) 0, D (stofflich) 0
- Total use of renewable primary energy resources (PERT) [MJ]: A1 10492.2, A2 4.29516, A3 2547.62, A1-A3 13044.1, A5 -140.863, C2 0.510277, C3 -10199.4, D (energetisch) 7630.8, D (stofflich) -37.0126
- Use of non renewable primary energy (PENRE) [MJ]: A1 4234.08, A2 76.4867, A3 3659.27, A1-A3 7969.83, A5 1.33799, C2 9.08683, C3 53.6094, D (energetisch) -6113.75, D (stofflich) -193.783
- Use of non renewable primary energy resources used as raw materials (PENRM) [MJ]: A1 421.378, A2 0, A3 1.836, A1-A3 423.214, A5 -1.836, C2 0, C3 -421.378, D (energetisch) 0, D (stofflich) 0
- Total use of non renewable primary energy resource (PENRT) [MJ]: A1 4655.46, A2 76.4867, A3 3661.1, A1-A3 8393.05, A5 -0.498007, C2 9.08683, C3 -367.769, D (energetisch) -6113.75, D (stofflich) -193.783
- Use of secondary material (SM) [kg]: A1 0, A2 0, A3 0, A1-A3 0, A5 0, C2 0, C3 0, D (energetisch) 0, D (stofflich) 599.998
- Use of renewable secondary fuels (RSF) [MJ]: A1 0, A2 0, A3 0, A1-A3 0, A5 0, C2 0, C3 0, D (energetisch) 0, D (stofflich) 0
- Use of non renewable secondary fuels (NRSF) [MJ]: A1 0, A2 0, A3 0, A1-A3 0, A5 0, C2 0, C3 0, D (energetisch) 0, D (stofflich) 0
- Use of net fresh water (FW) [m3]: A1 0.91454, A2 0.0049735, A3 0.730711, A1-A3 1.65022, A5 0.0138102, C2 0.000590865, C3 0.0166923, D (energetisch) 1.16783, D (stofflich) -0.0230761

## Outputs
- Hazardous waste disposed (HWD) [kg]: A1 9.29778e-5, A2 3.55945e-6, A3 4.6151e-5, A1-A3 0.000142688, A5 3.71787e-9, C2 4.22872e-7, C3 3.60527e-8, D (energetisch) -3.15481e-6, D (stofflich) -6.73223e-6
- Non hazardous waste dispose (NHWD) [kg]: A1 1.30533, A2 0.0117054, A3 2.84645, A1-A3 4.16349, A5 0.0585937, C2 0.00139063, C3 0.0412596, D (energetisch) 21.6394, D (stofflich) -0.049567
- Radioactive waste disposed (RWD) [kg]: A1 0.0387166, A2 9.46704e-5, A3 0.0910581, A1-A3 0.129869, A5 6.94167e-5, C2 1.12471e-5, C3 0.00448112, D (energetisch) -0.377669, D (stofflich) -0.00447552
- Components for re-use (CRU) [kg]: A1 0, A2 0, A3 0, A1-A3 0, A5 0, C2 0, C3 0, D (energetisch) 0, D (stofflich) 0
- Materials for recycling (MFR) [kg]: A1 0, A2 0, A3 0, A1-A3 0, A5 0, C2 0, C3 599.998, D (energetisch) 0, D (stofflich) 0
- Materials for energy recovery (MER) [kg]: A1 0, A2 0, A3 0, A1-A3 0, A5 0, C2 0, C3 599.998, D (energetisch) 0, D (stofflich) 0
- Exported electrical energy (EEE) [MJ]: A1 0, A2 0, A3 0.0614692, A1-A3 0.0614692, A5 8.0962, C2 0, C3 0, D (energetisch) 0, D (stofflich) 0
- Exported thermal energy (EET) [MJ]: A1 0, A2 0, A3 0.1428, A1-A3 0.1428, A5 14.8843, C2 0, C3 0, D (energetisch) 0, D (stofflich) 0

## Impact indicators
- Global warming potential (GWP) [kg CO2-Äqv.]: A1 -795.89, A2 5.5236, A3 170.994, A1-A3 -619.372, A5 13.6317, C2 0.656218, C3 976.81, D (energetisch) -250.142, D (stofflich) -14.9827
- Depletion potential of the stratospheric ozone layer (ODP) [kg R11 eq.]: A1 1.43645e-12, A2 9.19469e-16, A3 7.2154e-12, A1-A3 8.65276e-12, A5 1.06688e-15, C2 1.09235e-16, C3 1.7597e-13, D (energetisch) -1.48297e-11, D (stofflich) -1.73344e-13
- Acidification potential of soil and water (AP) [kg SO2-Äqv.]: A1 0.257668, A2 0.0231435, A3 0.315179, A1-A3 0.595991, A5 0.000621141, C2 0.00274951, C3 0.00587833, D (energetisch) -0.398387, D (stofflich) -0.0576181
- Eutrophication potential (EP) [kg Phosphat-Äqv.]: A1 0.0599606, A2 0.00582215, A3 0.0673541, A1-A3 0.133137, A5 0.000128588, C2 0.000691688, C3 0.00104827, D (energetisch) -0.0700474, D (stofflich) -0.0136138
- Formation potential of tropospheric ozone (POCP) [kg Ethen-Äqv.]: A1 0.0399847, A2 -0.00973269, A3 0.573319, A1-A3 0.603571, A5 3.97034e-5, C2 -0.00115627, C3 0.000414745, D (energetisch) -0.0329776, D (stofflich) -0.000308469
- Abiotic depletion potential for non fossil resources (ADPE) [kg Sb-Äqv.]: A1 0.000363835, A2 4.65112e-7, A3 0.000227881, A1-A3 0.000592182, A5 7.87002e-8, C2 5.52565e-8, C3 1.75259e-6, D (energetisch) -0.000118265, D (stofflich) -2.58761e-6
- Abiotic depletion potential for fossil resources (ADPF) [MJ]: A1 4557.7, A2 76.245, A3 3432.66, A1-A3 8066.61, A5 1.16318, C2 9.05812, C3 42.2985, D (energetisch) -4739.08, D (stofflich) -182.483

## Use advice
Aufgrund der hohen Abdeckung bildet der Datensatz die durchschnittlichen Produktionsverhältnisse und die damit verbundenen Umweltwirkungen repräsentativ für Deutschland ab. Liegen keine herstellerspezifischen Ökobilanzergebnisse des verwendeten Produkts vor, empfiehlt sich die Verwendung dieses Durchschnittsdatensatzes.

## Data sources
- Rüter S, Diederichs S (2012) Ökobilanz Basisdaten für Bauprodukte aus Holz, Hamburg, Johann Heinrich von Thünen Institut, Institut für Holztechnologie und Holzbiologie, Abschlussbericht
- GaBi database SP40 2020
- GaBi database (general)
