# AQUAPANEL® Cement Board Outdoor

Dataset: ILCD process, EPD, specific dataset
Geography: DE
Reference year: 2019
Valid until: 2024
Classification: OEKOBAU.DAT: Komposite / Systembauteile / Aussenwände
Classification: IBUCategories: 02 Bauprodukte / Normal- Leicht- und Porenbeton / Faserzement / Faserbeton
Method details: Faserzement / Faserbeton.pdf
Registration number: EPD-USG-20190019-IAA1-DE
Owner: Knauf AQUAPANEL GmbH & Co. KG
Compliance: DIN EN 15804; ISO 14025
Review: Accredited third party review by Institut Bauen und Umwelt e. V.
Amounts: rows without a unit in brackets have none in this file; such an amount is in the reference unit of its flow, which a separate flow dataset defines
copyright: true

## General comment
Zementgebundene, mineralische Bauplatte mit flächigen Gitterstrukturen aus in Längs- und Querrichtung angeordneten Glasgelegen für den Außenbereich.

## Technology and included processes
Die Zuschlagsstoffe und Bindemittel werden in Silos außerhalb der Produktionshalle bevorratet. Über Bandwaagen und Differentialdosierer werden die Rohstoffe für den Plattenkern rezepturmäßig dosiert und über eine zentrale Fördereinrichtung zum Wägebehälter transportiert. Das Bindemittel zur Herstellung der Deckschicht wird direkt über einen Schneckenförderer zur Fertigungseinheit des „slurry“ transportiert. Die zur Herstellung erforderlichen Glasgewebe werden im Untergeschoß der Produktionshalle gelagert. Die Trockenmischung im Wägebehälter wird in den darunter befindlichen Zwangsmischer entleert und Wasser wird rezepturgemäß zudosiert. Die Kernmischung wird homogen und erdfeucht gemischt und per Bandförderer zur Formstation befördert. Parallel wird der „slurry“ (Zementgemisch) für die Deckschicht homogen vorgemischt und per Schneckenpumpen und Schläuchen zur Formstation gefördert. In der Formstation wird das 3-Schicht-Element im Strangpressverfahren endlos gefertigt und im anschließenden Schneidapparat auf die entsprechende Länge geschnitten. Die zugeschnittenen Platten werden im Regallager erhärtet. Der Produktionsprozess ist nach /ISO 9001/ zertifiziert.
Deklarierte Einheit:
Die deklarierte Einheit der Studie ist 1 m² AQUAPANEL® Cement Board Outdoor mit einer Dicke von 12,5 mm.

## Technical purpose
Die Bauplatte „AQUAPANEL® Cement Board Outdoor“ wird als nichttragendes Wandelement im Außenbereich eingesetzt.

## Reference product
- AQUAPANEL® Cement Board Outdoor: 1

## Inputs
- Erneuerbare Primärenergie als Energieträger (PERE) [MJ]: A1-A3 5.86
- Erneuerbare Primärenergie zur stofflichen Nutzung (PERM) [MJ]: A1-A3 0.01
- Total erneuerbare Primärenergie (PERT) [MJ]: A1-A3 5.87
- Nicht-erneuerbare Primärenergie als Energieträger (PENRE) [MJ]: A1-A3 37.05
- Nicht-erneuerbare Primärenergie zur stofflichen Nutzung (PENRM) [MJ]: A1-A3 0.24
- Total nicht erneuerbare Primärenergie (PENRT) [MJ]: A1-A3 37.29
- Einsatz von Sekundärstoffen (SM) [kg]: A1-A3 0
- Erneuerbare Sekundärbrennstoffe (RSF) [MJ]: A1-A3 3.11e-20
- Nicht erneuerbare Sekundärbrennstoffe (NRSF) [MJ]: A1-A3 3.66e-19
- Einsatz von Süßwasserressourcen (FW) [m^3]: A1-A3 0.00877

## Outputs
- Gefährlicher Abfall zur Deponie (HWD) [kg]: A1-A3 1.48e-5
- Entsorgter nicht gefährlicher Abfall (NHWD) [kg]: A1-A3 0.0635
- Entsorgter radioaktiver Abfall (RWD) [kg]: A1-A3 0.00122
- Komponenten für die Wiederverwendung (CRU) [kg]: A1-A3 0
- Stoffe zum Recycling (MFR) [kg]: A1-A3 0
- Stoffe für die Energierückgewinnung (MER) [kg]: A1-A3 0
- Exportierte elektrische Energie (EEE) [MJ]: A1-A3 0
- Exportierte thermische Energie (EET) [MJ]: A1-A3 0

## Impact indicators
- Globales Erwärmungspotenzial (GWP) [kg CO_(2)-Äq.]: A1-A3 4.82
- Abbau Potential der stratosphärischen Ozonschicht (ODP) [kg CFC11-Äq.]: A1-A3 2.36e-12
- Versauerungspotenzial von Boden und Wasser (AP) [kg SO_(2)-Äq.]: A1-A3 0.00789
- Eutrophierungspotenzial (EP) [kg PO_(4)^(3)-Äq.]: A1-A3 0.000886
- Bildungspotential für troposphärisches Ozon (POCP) [kg Ethen-Äq.]: A1-A3 0.000714
- Potenzial für den abiotischen Abbau nicht fossiler Ressourcen (ADPE) [kg Sb-Äq.]: A1-A3 7.21e-7
- Potenzial für den abiotischen Abbau fossiler Brennstoffe (ADPF) [MJ]: A1-A3 33.75

## Use advice
Gültigkeitsbereich:
Diese Umweltproduktdeklaration bezieht sich auf AQUAPANEL® Cement Board Outdoor aus der Produktionsstätte Iserlohn, Deutschland.
Systemgrenze:
Typ der EPD: Wiege bis Werkstor. Bei der Ökobilanz sind die Herstellung bzw. Bereitstellung und der Transport der Vorprodukte sowie die Produktion des Endprodukts berücksichtigt. Das Verpackungsmaterial, der Transport und die thermische Verwertung des Verpackungsmaterials werden nicht betrachtet, da die eingesetzten Mengen gering sind. Produktionsbedingte Abfälle werden dem Produktionsprozess wieder zugeführt

## Data sources
- AQUAPANEL® Cement Board Outdoor.pdf
- GaBi Database (all versions)
- GaBi database SP34 2017
