# Ytong® - Granulat

Dataset: ILCD process, EPD, average dataset
Geography: DE
Reference year: 2017
Valid until: 2022
Classification: OEKOBAU.DAT: Mineralische Baustoffe / Steine und Elemente / Porenbeton
Classification: IBUCategories: 01 Grundstoffe und Vorprodukte / Produkte für Beton, Mörtel und Einpressmörtel / Leichtzuschlag / Schüttgranulat
Method details: Leichtzuschlag / Schüttgranulat.pdf
Generated by: Sphera Solutions GmbH
Registration number: EPD-XEL-20170148-IAD1-DE
Owner: Xella Deutschland GmbH
Compliance: DIN EN 15804; ISO 14025
Review: Accredited third party review by Institut Bauen und Umwelt e. V.
Amounts: rows without a unit in brackets have none in this file; such an amount is in the reference unit of its flow, which a separate flow dataset defines
copyright: true
licenseType: Free of charge for all users and uses
accessRestrictions: None

## General comment
Die genannten Produkte sind gebrochene Granulate verschiedener Korngrößen aus Porenbeton. Porenbeton gehört zur Gruppe der porosierten dampfgehärteten Leichtbetone.

## Technology and included processes
The ground quartz sand is mixed with lime, cement and crushed aerated concrete recycling material, with the addition of water and aluminum powder or paste, in a mixer to form an aqueous suspension and poured into casting moulds. The water slakes the lime while developing heat. The aluminum reacts in an alkaline environment. In the process, gaseous hydrogen is formed, which creates the pores in the mass and escapes without leaving any residue. The pores usually have a diameter of 0.5 - 1.5 mm and are only filled with air. After the initial setting, semi-solid raw blocks are created, from which the aerated concrete components are cut mechanically and with greater precision. The development of the final aerated concrete properties takes place during the subsequent steam curing over 5 - 12 hours at around 190 °C and a pressure of around 12 bar in steam pressure boilers, the so-called autoclaves. Here calcium silicate hydrates are formed from the substances used, which correspond to the naturally occurring mineral tobermorite. The reaction of the material is complete when it is removed from the autoclave. The steam WILL be used for further autoclave cycles after the curing process is complete. The resulting condensate is used as process water. In this way, energy is saved and pollution of the environment with hot waste steam and waste water is avoided. The resulting top and bottom layers as well as production waste are crushed and classified in electrically operated processing units. The moisture is removed from the resulting granulate at a low temperature in a continuously operating, gas-operated dryer. The final setting of the grain fractions takes place in a final classification process. The granules are then transferred to silos and later filled into individual containers.

## Technical purpose
Ausgleichsschüttung für alle Trocken-Unterboden-Systeme und herkömmliche Estriche.

## Reference product
- 1m³ Ytong® Porenbetongranulat: 1

## Inputs
- Renewable primary energy as energy carrier (PERE) [MJ]: A1-A3 330.2
- Renewable primary energy resources as material utilization (PERM) [MJ]: A1-A3 16.8
- Total use of renewable primary energy resources (PERT) [MJ]: A1-A3 347
- Non renewable primary energy as energy carrier (PENRE) [MJ]: A1-A3 1963.9
- Non renewable primary energy as material utilization (PENRM) [MJ]: A1-A3 46.1
- Total use of non renewable primary energy resources (PENRT) [MJ]: A1-A3 2010
- Use of secondary material (SM) [kg]: A1-A3 0
- Use of renewable secondary fuels (RSF) [MJ]: A1-A3 0
- Use of non renewable secondary fuels (NRSF) [MJ]: A1-A3 0
- Use of net fresh water (FW) [m^3]: A1-A3 0.301

## Outputs
- Hazardous waste disposed (HWD) [kg]: A1-A3 4.29e-6
- Non hazardous waste disposed (NHWD) [kg]: A1-A3 12.3
- Radioactive waste disposed (RWD) [kg]: A1-A3 0.0545
- Components for re-use (CRU) [kg]: A1-A3 0
- Materials for recycling (MFR) [kg]: A1-A3 0
- Materials for energy recovery (MER) [kg]: A1-A3 0
- Exported electrical energy (EEE) [MJ]: A1-A3 0
- Exported thermal energy (EET) [MJ]: A1-A3 0

## Impact indicators
- Global warming potential (GWP) [kg CO_(2)-Äq.]: A1-A3 216
- Depletion potential of the stratospheric ozone layer (ODP) [kg CFC11-Äq.]: A1-A3 2.77e-10
- Acidification potential of land and water (AP) [kg SO_(2)-Äq.]: A1-A3 0.219
- Eutrophication potential (EP) [kg PO_(4)^(3)-Äq.]: A1-A3 0.0303
- Formation potential of tropospheric ozone photochemical oxidants (POCP) [kg Ethen-Äq.]: A1-A3 0.023
- Abiotic depletion potential for non fossil resources (ADPE) [kg Sb-Äq.]: A1-A3 0.000383
- Abiotic depletion potential for fossil resources (ADPF) [MJ]: A1-A3 1870

## Use advice
Gültigkeitsbereich:
Die Ökobilanz beruht auf der Berücksichtigung aller 10 deutschen Porenbeton-Werke der Xella-Gruppe und der Datenbasis des Jahres 2016.
Systemgrenze:
Typ der EPD: Wiege bis Werkstor. Die Ökobilanz für Ytong®-Porenbetongranulat berücksichtigt die Lebenszyklusphasen der Produkt-Herstellung (A1-A3).

Der Produkteinbau (Modul A4-A5) sowie das Nutzungsstadium (Modul B) ist in dieser Studie nicht berücksichtigt. Die Entsorgung (Modul C) ist in dieser Studie ebenfalls nicht berücksichtigt. Aus der Bilanzierung der betrachteten Module ergeben sich keine Gutschriften und Lasten außerhalb der Systemgrenze.

Im Einzelnen wurden folgende Prozesse im Produktstadium A1-A3 des Porenbetongranulats einbezogen:

- Betrachtung der Vorkette des Porenbeton-Bruchs (Bereitstellungsprozesse von Hilfsstoffen und Energie für den Werksbetrieb, Herstellung aller Vorprodukte, Transporte der Vorprodukte, Ressourcen und Hilfsstoffe zum Werk)

- Veredlungsprozess des Porenbeton-Bruchs zu Porenbetongranulat, d.h. Brechen und Trocknen inklusive energetischen Aufwendungen

- Herstellung der Verpackungen (PE-Tüten, Papiertüten, Bigbags)

## Data sources
- GaBi Database (all versions)
- GaBi database SP29 2016
