# Glued laminated timber, glued solid timber, block glued glulam, special components

Dataset: ILCD process, EPD, average dataset
Geography: EU-27
Reference year: 2021
Valid until: 2026
Classification: OEKOBAU.DAT: Holz / Vollholz / Brettschichtholz (BSH)
Classification: IBUCategories: 02 Bauprodukte / Produkte aus Bauholz / Vollholzprodukte
Method details: Vollholzprodukte.pdf
Generated by: Daxner & Merl GmbH
Registration number: EPD-HAS-20210171-IBD1-DE
Owner: HASSLACHER Holding GmbH
Compliance: DIN EN 15804+A2; ISO 14025
Review: Accredited third party review by Institut Bauen und Umwelt e. V.
Amounts: rows without a unit in brackets have none in this file; such an amount is in the reference unit of its flow, which a separate flow dataset defines
copyright: true
licenseType: Free of charge for all users and uses
accessRestrictions: None

## General comment
Glued laminated timber (the term also includes glued solid timber, block glued glulam and special components throughout this document) from HASSLACHER Holding GmbH is a solid, rod-shaped timber element consisting of at least two dried softwood lamellas bonded parallel to the fibres. The glued laminated timber is manufactured according to EN 14080.

A high degree of dimensional stability and load-bearing capacity is achieved through visual or mechanical strength grading of the board lamellas and homogenisation of the visual and physical material properties.

Glued laminated timber is usually made from spruce, fir, pine or larch. The standard strength classes are GL24h, GL24c to GL32h and GL32c.

Glued laminated timber is available as standard or commissioned goods as well as in special dimensions and special constructions or in the form of special components.

Due to the existing joinery and surface finishing options integrated in the production plants, a high degree of prefabrication and thus a shortened construction time can be achieved.

Production is subject to in-house and external monitoring in accordance with EN 14080.

## Technology and included processes
For the production of glued laminated timber, conventional sawn timber is first dried to below 15 % wood moisture (target moisture content: approx. 12 ± 2 %), pre-planed and graded visually, but mainly by machine, according to strength. Board sections with strength-reducing or visually inappropriate areas are cut out depending on the required or desired strength classes or quality demands and the resulting boards are joined by finger joints to form endless lamellas. In the subsequent pre-planing process, the board lamellas are planed to the desired final thickness of > 6 to 45 to < 85 mm in the case of glued solid timber), in order to be able to be bonded after the adhesive has been applied to the broadside. After the adhesive has been applied to the broadside, they are pressed in a straight or curved press bed to form at least two-layer glulam blanks. After curing, the blank is planed, chamfered, tied and packed. If required, a treatment with surface finishes (end-grain protection, UV protection, glazes, assembly and hydrophobic protection, etc.) can be carried out before packaging.
Technical data:
Structural data for glued laminated timber according to EN 14080 are given. 2
Declared unit:
This EPD refers to a declared unit of 1 m3 of HASSLACHER glued laminated timber with an average density of 470 kg/m³ at 13 % moisture at delivery.

## Technical purpose
Glued laminated timber is used in all structural areas of modern timber construction, i.e. from engineering-based residential and industrial construction to bridge building. Glued laminated timber, with the exception of glued solid timber (only service classes 1 and 2), can be used in service classes 1 to 3 according to EN 1995-1-1.

The use of preventive chemical wood preservation according to DIN 68800-3 is unusual and only permissible if structural wood preservation according to DIN 68800-2 is not sufficient on its own. If, in exceptional cases, a preventive chemical wood preservative is used, this must be regulated by a general building authority approval or approval according to the Biocidal Products Regulation.

## Reference product
- Brettschichtholz (): 1

## Inputs
- Renewable primary energy as energy carrier (PERE) [MJ]: A1-A3 1703.57, C1 0, C2 1.07706, C3 7682.24, C4 0, D -1826.45
- Renewable primary energy resources as material utilization (PERM) [MJ]: A1-A3 7655.92, C1 0, C2 0, C3 -7651.6, C4 0, D 0
- Total use of renewable primary energy resources (PERT) [MJ]: A1-A3 9359.49, C1 0, C2 1.07706, C3 30.6381, C4 0, D -1826.45
- Non renewable primary energy as energy carrier (PENRE) [MJ]: A1-A3 2004.33, C1 0, C2 18.7859, C3 66.5405, C4 0, D -7167.85
- Non renewable primary energy as material utilization (PENRM) [MJ]: A1-A3 85.1021, C1 0, C2 0, C3 0, C4 0, D 0
- Total use of non renewable primary energy resources (PENRT) [MJ]: A1-A3 2089.43, C1 0, C2 18.7859, C3 66.5405, C4 0, D -7167.85
- Use of secondary material (SM) [kg]: A1-A3 0.00301875, C1 0, C2 0, C3 0, C4 0, D 0
- Use of renewable secondary fuels (RSF) [MJ]: A1-A3 0, C1 0, C2 0, C3 0, C4 0, D 7651.6
- Use of non renewable secondary fuels (NRSF) [MJ]: A1-A3 0, C1 0, C2 0, C3 0, C4 0, D 0
- Use of net fresh water (FW) [m^3]: A1-A3 0.804158, C1 0, C2 0.00123359, C3 0.0298324, C4 0, D -1.20244

## Outputs
- Hazardous waste disposed (HWD) [kg]: A1-A3 1.97746e-6, C1 0, C2 9.89869e-10, C3 1.75785e-8, C4 0, D -1.60827e-6
- Non hazardous waste disposed (NHWD) [kg]: A1-A3 1.99473, C1 0, C2 0.00294728, C3 0.0471551, C4 0, D 0.271643
- Radioactive waste disposed (RWD) [kg]: A1-A3 0.072997, C1 0, C2 3.40762e-5, C3 0.00990141, C4 0, D -0.588619
- Components for re-use (CRU) [kg]: A1-A3 0, C1 0, C2 0, C3 0, C4 0, D 0
- Materials for recycling (MFR) [kg]: A1-A3 0, C1 0, C2 0, C3 0, C4 0, D 0
- Materials for energy recovery (MER) [kg]: A1-A3 0, C1 0, C2 0, C3 470, C4 0, D 0
- Exported electrical energy (EEE) [MJ]: A1-A3 0, C1 0, C2 0, C3 0, C4 0, D 0
- Exported thermal energy (EET) [MJ]: A1-A3 0, C1 0, C2 0, C3 0, C4 0, D 0

## Impact indicators
- Global Warming Potential total (GWP-total) [kg CO_(2)-Äq.]: A1-A3 -608.415, C1 0, C2 1.42131, C3 753.425, C4 0, D -409.858
- Global Warming Potential fossil fuels (GWP-fossil) [kg CO_(2)-Äq.]: A1-A3 143.985, C1 0, C2 1.4115, C3 3.73757, C4 0, D -408.123
- Global Warming Potential biogenic (GWP-biogenic) [kg CO_(2)-Äq.]: A1-A3 -753.181, C1 0, C2 -0.00167377, C3 749.682, C4 0, D -1.41598
- Global Warming Potential luluc (GWP-luluc) [kg CO_(2)-Äq.]: A1-A3 0.780701, C1 0, C2 0.0114864, C3 0.00529095, C4 0, D -0.319425
- Depletion potential of the stratospheric ozone layer (ODP) [kg CFC11-Äq.]: A1-A3 6.84403e-8, C1 0, C2 2.7744e-16, C3 8.94654e-14, C4 0, D -5.31659e-12
- Acidification potential of land and water (AP) [mol H^(+)-Äq.]: A1-A3 0.667163, C1 0, C2 0.00466067, C3 0.00777939, C4 0, D 0.304727
- Eutrophication potential aquatic freshwater (EP-freshwater) [kg PO_(4)-Äq.]: A1-A3 0.00164158, C1 0, C2 4.1749e-6, C3 1.00274e-5, C4 0, D -0.000604653
- Eutrophication potential aquatic marine (EP-marine) [kg N-Äq.]: A1-A3 0.294923, C1 0, C2 0.00214084, C3 0.00184769, C4 0, D 0.0577358
- Eutrophication potential terrestrial (EP-terrestrial) [mol N-Äq.]: A1-A3 3.00587, C1 0, C2 0.0238971, C3 0.0193988, C4 0, D 0.697954
- Formation potential of tropospheric ozone photochemical oxidants (POCP) [kg NMVOC-Äq.]: A1-A3 0.84653, C1 0, C2 0.00420231, C3 0.00501477, C4 0, D 0.261618
- Abiotic depletion potential for non fossil resources (ADPE) [kg Sb-Äq.]: A1-A3 3.81439e-5, C1 0, C2 1.24556e-7, C3 1.0996e-6, C4 0, D -7.47094e-5
- Abiotic depletion potential for fossil resources (ADPF) [MJ]: A1-A3 2087.21, C1 0, C2 18.7177, C3 66.5249, C4 0, D -7166.89
- Water use (WDP) [m^(3) Welt-Äq. entzogen]: A1-A3 11.7159, C1 0, C2 0.0130405, C3 0.59968, C4 0, D -10.4912
- Incidence of disease due to PM emissions (PM) [Krankheitsfälle]
- Human exposure efficiency relative to U235 (IR) [kBq U235-Äq.]
- Comparative toxic unit for ecosystems (ETP-fw) [CTUe]
- Comparative toxic unit for humans (carcinogenic) (HTP-c) [CTUh]
- Comparative toxic unit for humans (noncarcinogenic) (HTP-nc) [CTUh]
- Soil quality index (SQP) [SQP]

## Use advice
Scope:
This document refers to average HASSLACHER glued laminated timber, glued solid timber, block glued glulam and special components manufactured at the following production sites:

- NORITEC Holzindustrie GmbH in Sachsenburg (Austria),

- HASSLACHER Holzbausysteme GmbH in Hermagor (Austria),

- HASSLACHER Holzbauteile GmbH & Co. KG in Kleinheubach (Germany) and

- NORDLAM GmbH in Magdeburg (Germany).
System boundary:
The life cycle assessment of HASSLACHER glued laminated timber refers to a cradle-to-gate analysis of the environmental impacts with modules C1-C4 and D (A1-A3, +C, +D). The following life cycle phases are taken into consideration in the analysis:

Module A1-A3 | Production stage

The production stage includes the upstream burdens

of raw material supply (sawn timber, production of the adhesive system, etc.) and their transports to the manufacturing plants in Sachsenburg, Hermagor, Kleinheubach and Magdeburg. Sorting, planing, finger-jointing, pressing, and joining, including the packaging of the product, are taken into account. The electricity demand of the Austrian production sites in Sachsenburg and Hermagor are covered entirely by green electricity (emission factor GWP-total: 13 g CO2 equivalent/kWh). Thermal energy is provided from the energetic use of wooden residues from the production process. In Magdeburg, thermal energy is delivered by the adjacent waste incineration plant. Emissions of the waste recovery process are attributed to the product system from which the waste originates. As a result, thermal energy is considered burdenfree in the calculation.

Module C1 | Deconstruction and demolition

After the removal of building components overlying the product, the joints can simply be loosened by screwing or sawing and lifted by cranes to the place of removal. Required energy demand can be neglected. The actual energy demand depends on the installation of the products and can therefore vary greatly in the building context.

Module C2 | Transport to disposal

Module C2 includes the transport to waste treatment. In this case, transport by truck over a transport distance of 50 km is assumed.

Module C3 | Waste processing

In Module C3, the chipping after removal of the products is considered. The wooden products and with them the material-inherent properties leave the product system as secondary fuel in module C3.

Module C4 | Disposal

The applied scenario declares the energetic recovery of the wooden products; therefore, no environmental impacts are to be expected from waste processing of the products in C4.

Module D | Benefits and loads beyond the system boundary

Applying an European average scenario, module D describes the energetic recovery of the product at the end-of-life including the corresponding energy substitution potentials.

## Data sources
- GaBi Database (all versions)
- GaBi Database Edition 2021, CUP 2021.01
