# Double skin steel faced sandwich panels with a core made of polyurethane

Dataset: ILCD process, EPD, average dataset
Geography: RER
Reference year: 2018
Valid until: 2023
Classification: OEKOBAU.DAT: Dämmstoffe / Polyurethan-Hartschaum (PU) / PU Blockschaum
Classification: IBUCategories: 02 Building products / Facades / Double skin metal faced sandwich panels
Method details: Double skin metal faced sandwich panels.pdf
Generated by: thinkstep AG
Registration number: EPD-PPA-20180076-CBG2-EN
Owner: PPA-Europe
Compliance: DIN EN 15804; ISO 14025
Review: Accredited third party review by Institut Bauen und Umwelt e. V.
Amounts: rows without a unit in brackets have none in this file; such an amount is in the reference unit of its flow, which a separate flow dataset defines
copyright: true
licenseType: Free of charge for all users and uses
accessRestrictions: None

## General comment
The EPD applies to prefabricated double skin steel faced sandwich panels with a core made of polyurethane, which are produced by member companies of PPA-Europe.

The profiled internal and external faces are made of a core of steel, which is protected against corrosion with zinc and organic coatings. The thermal insulating core material is made of polyurethane according to /EN 13165/ with sealing tapes. The core is bonded on both sides with resistance to shear forces to the profiled steel sheets. The LCA is based on vertical averaging of the specific producer datasets under consideration of the respective yearly production amounts.

## Technology and included processes
Double skin steel faced sandwich panels with a core made of polyurethane (PU) are prefabricated elements used for structural, self-supporting and non-supporting applications in roof, wall and ceiling structures. Sandwich panels in wall and roof applications take on tasks of the building physics, especially sound, heat and moisture safety. They simultaneously perform the function of air tightness of the building envelope. The PU cored sandwich panels are manufactured on a continuous production line. The line speed varies depending on the thickness of the panel. The faces of the panel consist of steel sheets with zinc and organic coatings for protection against corrosion. The production process begins by unwinding the steel coils and continues with the roll forming of the sheets. At the foaming station, PU liquid foam is spread on the bottom sheet on the line. Once it goes out through the nozzles, the foam starts slowly to expand and binds with the top sheet. The sheets together with the PU foam are pulled in the double belt press, where the PU foam becomes rigid and the bond gets stabilized at the wished panel thickness. Afterwards, the panels are cut at the wished length, stacked and packaged.
Technical data:
Technical specifications for sandwich panels with a core made of polyurethane are:

/EN 14509/
/EN 13165/
Declared unit:
The declared unit is 1m² of sandwich panel. The averaging is done based on the production volume per company.

## Technical purpose
The products are used for structural, self-supporting and non-supporting applications in roof, wall and ceiling structures. Sandwich panels in wall and roof applications take on tasks of the building physics, especially sound, heat and moisture safety. They simultaneously perform the function of air tightness of the building envelope.

## Reference product
- PU sandwich panel 100 mm (13.3 kg/m²): 1

## Inputs
- Renewable primary energy as energy carrier (PERE) [MJ]: A1-A3 31.7309, A4 0.0497068, C3 0.28558, D -3.31188
- Renewable primary energy resources as material utilization (PERM) [MJ]: A1-A3 6.96304, A4 0, C3 0, D 0
- Total use of renewable primary energy resources (PERT) [MJ]: A1-A3 38.6939, A4 0.0497068, C3 0.28558, D -3.31188
- Non renewable primary energy as energy carrier (PENRE) [MJ]: A1-A3 446.398, A4 0.99015, C3 122.94, D -188.8
- Non renewable primary energy as material utilization (PENRM) [MJ]: A1-A3 120.977, A4 0, C3 -120.42, D 0
- Total use of non renewable primary energy resources (PENRT) [MJ]: A1-A3 567.375, A4 0.99015, C3 2.5248, D -188.8
- Use of secondary material (SM) [kg]: A1-A3 0.712, A4 0, A5 1.12, C3 0, D 7.56
- Use of renewable secondary fuels (RSF) [MJ]: A1-A3 0, A4 0, C3 0, D 0
- Use of non renewable secondary fuels (NRSF) [MJ]: A1-A3 0, A4 0, C3 0, D 0
- Use of net fresh water (FW) [m^3]: A1-A3 0.178731, A4 9.1971e-5, C3 0.0221095, D -0.0233209

## Outputs
- Hazardous waste disposed (HWD) [kg]: A1-A3 1.09241e-5, A4 5.19662e-8, C3 1.02629e-9, D -1.06562e-7
- Non hazardous waste disposed (NHWD) [kg]: A1-A3 0.449719, A4 7.56235e-5, C3 0.00982094, D 0.201746
- Radioactive waste disposed (RWD) [kg]: A1-A3 0.0104264, A4 1.35564e-6, C3 0.000115074, D -0.00290469
- Components for re-use (CRU) [kg]: A1-A3 0, A4 0, C3 0, D 0
- Materials for recycling (MFR) [kg]: A1-A3 0, A4 0, C3 8.27, D 0
- Materials for energy recovery (MER) [kg]: A1-A3 0, A4 0, C3 0, D 0
- Exported electrical energy (EEE) [MJ]: A1-A3 0, A4 0, C3 14.36, D 0
- Exported thermal energy (EET) [MJ]: A1-A3 0, A4 0, C3 33.06, D 0

## Impact indicators
- Global warming potential (GWP) [kg CO_(2)-Äq.]: A1-A3 33.3939, A4 0.0713705, A5 1.04, C3 9.54242, D -17.4337
- Depletion potential of the stratospheric ozone layer (ODP) [kg CFC11-Äq.]: A1-A3 2.02118e-5, A4 2.39231e-14, C3 1.73574e-12, D -1.42337e-10
- Acidification potential of land and water (AP) [kg SO_(2)-Äq.]: A1-A3 0.106252, A4 0.000301697, C3 0.00382845, D -0.057913
- Eutrophication potential (EP) [kg PO_(4)^(3)-Äq.]: A1-A3 0.0109553, A4 7.50919e-5, C3 0.000973483, D -0.00470749
- Formation potential of tropospheric ozone photochemical oxidants (POCP) [kg Ethen-Äq.]: A1-A3 0.0144383, A4 -0.000110844, C3 0.000243909, D -0.00801397
- Abiotic depletion potential for non fossil resources (ADPE) [kg Sb-Äq.]: A1-A3 0.00169503, A4 5.74154e-9, C3 7.80077e-8, D 3.88003e-7
- Abiotic depletion potential for fossil resources (ADPF) [MJ]: A1-A3 541.594, A4 0.986163, C3 2.23521, D -181.521

## Use advice
Scope:
This document is an association EPD and it represents an average EPD. Its applicability is limited to continuously produced double skin steel faced sandwich panels with an insulating core made of polyurethane, which are manufactured by member companies of the European Association for Panels and Profiles.

The following sixteen member companies of the European Association for Panels and Profiles have provided data for the year 2016:

1. ArcelorMittal Construction Deutschland

2. Falk Bouwsystemen

3. Fischer Profil

4. Hoesch Bausysteme

5. Huurre Iberica

6. ISOCAB France

7. Isolpack

8. ISOPAN Deutschland

9. Italpannelli

10. Metecno Bausysteme

11. Montana Bausysteme

12. N.V. Joris Ide Belgium

13. Romakowski

14. SAB-profiel

15. Salzgitter Bauelemente

16. Trimo. These companies are representative for the European production of sandwich panels with polyurethane core.
System boundary:
Type of the EPD: cradle to gate - with options

Production stage (modules A1-A3) includes processes that provide materials and energy input for the system, manufacturing and transport processes up to the factory gate, as well as waste processing. For the end of life it is assumed that the steel proportion is recycled with credit for the recycling potential declared in module D and the PU proportion is incinerated (module C3) with credit given for energy substitution in module D.

## Data sources
- GaBi Database (all versions)
- GaBi database SP34 2017
