# Fire Damper BSK-RPR

Dataset: ILCD process, EPD, specific dataset
Geography: DE
Reference year: 2021
Valid until: 2026
Classification: OEKOBAU.DAT: Gebäudetechnik / Klimatisierung und Lüftung / Lüftungsanlagen
Classification: IBUCategories: 03 Gebäudetechnik / Brandschutzeinrichtungen / Brandschutzklappen und Brandschutzventile und Entrauchungsklappen
Method details: Brandschutzklappen und Brandschutzventile und Entrauchungsklappen.pdf
Generated by: SKZ - Das Kunststoff-Zentrum
Registration number: EPD-SCA-20200193-IBA1-DE
Owner: SCHAKO Ferdinand Schad KG
Compliance: DIN EN 15804+A2; ISO 14025
Review: Accredited third party review by Institut Bauen und Umwelt e. V.
Amounts: rows without a unit in brackets have none in this file; such an amount is in the reference unit of its flow, which a separate flow dataset defines
copyright: true
licenseType: Free of charge for all users and uses
accessRestrictions: None

## General comment
Bei dem deklarierten Produkt BSK-RPR handelt es sich um eine Brandschutzklappe. Dieses Bauprodukt wird als Brandschutzeinrichtung in Lüftungsleitungen eingebaut. Standardmäßig besteht die Brandschutzklappe aus einem verzinkten Stahlgehäuse mit einer eingebauten Absperrvorrichtung aus Kalziumsilikat. Optional sind eine elektrische Auslöseeinheit (Federrücklaufantrieb) sowie ein Anbaurahmen in passender Größe erhältlich.

Die Brandschutzklappe BSK-RPR kann in Lüftungsleitungen in Wänden und Decken eingebaut werden. Der Einbau erfolgt in massiven Wänden mit vollständiger Ausmörtelung. Alternativ kann sie mittels eines Anbaurahmens an oder entfernt von massiven Wänden (von der Decke abgehängt) eingebaut werden. Auf massiven Decken kann der Einbau stehend mittels Betonsockel erfolgen. Zudem ist der Einbau in leichten Trennwänden mit Metallständerwerk und beidseitiger Beplankung möglich.

Die Brandschutzklappe BSK-RPR ist grundsätzlich wartungsfrei. Gegebenenfalls sind Reinigungsarbeiten durchzuführen.

Für das Inverkehrbringen des Produkts in der EU/EFTA (mit Ausnahme der Schweiz) gilt die Verordnung (EU) Nr. 305/2011(CPR). Das Produkt benötigt eine Leistungserklärung unter Berücksichtigung der DIN EN 15650:2010-09 , Lüftung von Gebäuden - Brandschutzklappen und die CE-Kennzeichnung.

Für die Verwendung gelten die jeweiligen nationalen Bestimmungen.

## Technology and included processes
After the respective raw materials have been delivered, the individual components for the product are prefabricated. Sheet metal for the housing is cut to size using either a punching or laser cutting process and then edged or rolled. The calcium silicate valve leaf is shaped and milled by water jet cutting. The mounting frame is prepared by laser cutting and riveting and filled with plaster after assembly. For the thermoelectric release unit, a mounting plate is punched out, bent and then joined with the spring return actuator. In order to avoid unnecessary waste, the respective blanks are optimally laid out on the raw material board using a program. After the preliminary work described, the individual components are assembled in the responsible department and checked in the course of quality assurance in accordance with ISO 9001. Finally, the product is packaged and made available for shipping.

## Technical purpose
Dieses Bauprodukt wird als Brandschutzeinrichtung in Lüftungsleitungen eingebaut. Im Brandfall schließen Brandschutzklappen infolge thermischer Auslösung automatisch. Die Auslösung erfolgt mittels Schmelzloten („mechanisch“) oder thermoelektrisch (bei Verwendung von elektrischen Federrücklaufantrieben). Somit verhindern Brandschutzklappen die Ausbreitung des Brandes und die Übertragung von Rauch in angrenzende Brandabschnitte. Die Einbaulage ist dabei unabhängig von der Luftstromrichtung.

## Reference product
- BSK-RPR (): 1

## Inputs
- Renewable primary energy as energy carrier (PERE) [MJ]: A1-A3 35.451, A4 0.136, A5 -0.203, B6 22, C1 0.00876, C2 0.00882, C3 0.19, C4 0.0686, D -5.12
- Renewable primary energy resources as material utilization (PERM) [MJ]: A1-A3 1.749, A4 0, A5 0, B6 0, C1 0, C2 0, C3 0, C4 0, D 0
- Total use of renewable primary energy resources (PERT) [MJ]: A1-A3 37.2, A4 0.136, A5 -0.203, B6 22, C1 0.00876, C2 0.00882, C3 0.19, C4 0.0686, D -5.12
- Non renewable primary energy as energy carrier (PENRE) [MJ]: A1-A3 233.571, A4 2.36, A5 -0.886, B6 49.6, C1 0.0758, C2 0.153, C3 1.56, C4 0.524, D -18
- Non renewable primary energy as material utilization (PENRM) [MJ]: A1-A3 15.4285, A4 0, A5 0, B6 0, C1 0, C2 0, C3 0, C4 0, D 0
- Total use of non renewable primary energy resources (PENRT) [MJ]: A1-A3 249, A4 2.36, A5 -0.886, B6 49.6, C1 0.0758, C2 0.153, C3 1.56, C4 0.524, D -18
- Use of secondary material (SM) [kg]: A1-A3 1.25419, A4 0, A5 0, B6 0.0254, C1 0, C2 0, C3 0, C4 0, D 0
- Use of renewable secondary fuels (RSF) [MJ]: A1-A3 0, A4 0, A5 0, B6 0, C1 0, C2 0, C3 0, C4 0, D 0
- Use of non renewable secondary fuels (NRSF) [MJ]: A1-A3 0, A4 0, A5 0, B6 2.05e-8, C1 0, C2 0, C3 0, C4 0, D 0
- Use of net fresh water (FW) [m^3]: A1-A3 0.0573, A4 0.000158, A5 0.000376, B6 0.0254, C1 7.16e-6, C2 1.03e-5, C3 0.0029, C4 0.000132, D -0.00765

## Outputs
- Hazardous waste disposed (HWD) [kg]: A1-A3 3.26e-6, A4 1.09e-7, A5 3.02e-9, B6 2.05e-8, C1 3.12e-9, C2 7.08e-9, C3 4.31e-8, C4 7.99e-9, D -3.45e-8
- Non hazardous waste disposed (NHWD) [kg]: A1-A3 0.466, A4 0.000374, A5 0.00467, B6 0.0352, C1 1.72e-5, C2 2.43e-5, C3 0.106, C4 2.64, D 0.0923
- Radioactive waste disposed (RWD) [kg]: A1-A3 0.00716, A4 4.35e-6, A5 -7.3e-5, B6 0.00753, C1 8.34e-7, C2 2.82e-7, C3 3.64e-5, C4 5.95e-6, D -0.000649
- Components for re-use (CRU) [kg]: A1-A3 0, A4 0, A5 0, B6 0, C1 0, C2 0, C3 0, C4 0, D 0
- Materials for recycling (MFR) [kg]: A1-A3 1.13625, A4 0, A5 0, B6 0, C1 0, C2 0, C3 3.53075, C4 0, D 0
- Materials for energy recovery (MER) [kg]: A1-A3 0, A4 0, A5 0.1166, B6 0, C1 0, C2 0, C3 0.437439, C4 0, D 0
- Exported electrical energy (EEE) [MJ]: A1-A3 0, A4 0, A5 0.25, B6 0, C1 0, C2 0, C3 2.42512, C4 0, D 0
- Exported thermal energy (EET) [MJ]: A1-A3 0, A4 0, A5 0.454, B6 0, C1 0, C2 0, C3 4.36715, C4 0, D 0

## Impact indicators
- Global Warming Potential total (GWP-total) [kg CO_(2)-Äq.]: A1-A3 20.7, A4 0.177, A5 0.112, B6 2.84, C1 0.00574, C2 0.0115, C3 1.17, C4 0.0369, D -1.42
- Global Warming Potential fossil fuels (GWP-fossil) [kg CO_(2)-Äq.]: A1-A3 20.9, A4 0.176, A5 -0.0488, B6 2.82, C1 0.0057, C2 0.0114, C3 1.17, C4 0.0399, D -1.41
- Global Warming Potential biogenic (GWP-biogenic) [kg CO_(2)-Äq.]: A1-A3 -0.165, A4 -0.000296, A5 0.161, B6 0.00941, C1 -4.06e-6, C2 -1.92e-5, C3 -0.000135, C4 -0.00317, D -0.00281
- Global Warming Potential luluc (GWP-luluc) [kg CO_(2)-Äq.]: A1-A3 0.0215, A4 0.00143, A5 5.21889e-5, B6 0.00409, C1 4.24e-5, C2 9.26e-5, C3 0.000592, C4 0.000115, D -0.00236
- Depletion potential of the stratospheric ozone layer (ODP) [kg CFC11-Äq.]: A1-A3 2.26e-9, A4 3.23e-17, A5 -5.72e-16, B6 6.21e-14, C1 2.18e-17, C2 2.1e-18, C3 4.79e-16, C4 1.48e-16, D -1.98e-14
- Acidification potential of land and water (AP) [mol H^(+)-Äq.]: A1-A3 0.0548, A4 0.000203, A5 -1.98e-5, B6 0.00623, C1 6.84e-6, C2 1.32e-5, C3 0.00039, C4 0.000287, D -0.00682
- Eutrophication potential aquatic freshwater (EP-freshwater) [kg PO_(4)-Äq.]: A1-A3 6.18e-5, A4 5.36e-7, A5 -6.65e-8, B6 7.54e-6, C1 1.81e-8, C2 3.48e-8, C3 2.79e-7, C4 6.86e-8, D -2.87e-6
- Eutrophication potential aquatic marine (EP-marine) [kg N-Äq.]: A1-A3 0.0114, A4 6.25e-5, A5 3.99e-7, B6 0.00138, C1 2.1e-6, C2 4.06e-6, C3 0.000145, C4 7.37e-5, D -0.000802
- Eutrophication potential terrestrial (EP-terrestrial) [mol N-Äq.]: A1-A3 0.123, A4 0.000742, A5 3.65556e-5, B6 0.0145, C1 2.45e-5, C2 4.82e-5, C3 0.00182, C4 0.00081, D -0.00859
- Formation potential of tropospheric ozone photochemical oxidants (POCP) [kg NMVOC-Äq.]: A1-A3 0.0363, A4 0.000169, A5 -9.93e-6, B6 0.00379, C1 5.61e-6, C2 1.1e-5, C3 0.000415, C4 0.000223, D -0.00262
- Abiotic depletion potential for non fossil resources (ADPE) [kg Sb-Äq.]: A1-A3 0.000786, A4 1.42e-8, A5 -9.03e-9, B6 8.17e-7, C1 6.62e-10, C2 9.25e-10, C3 2.97e-8, C4 3.59e-9, D -0.00019
- Abiotic depletion potential for fossil resources (ADPF) [MJ]: A1-A3 247, A4 2.35, A5 -0.886, B6 49.6, C1 0.0755, C2 0.153, C3 1.56, C4 0.524, D -18
- Water use (WDP) [m^(3) Welt-Äq. entzogen]: A1-A3 0.301, A4 0.00172, A5 0.0164, B6 0.615, C1 6.4e-5, C2 0.000112, C3 0.119, C4 0.00419, D -0.225
- Incidence of disease due to PM emissions (PM) [Krankheitsfälle]
- Human exposure efficiency relative to U235 (IR) [kBq U235-Äq.]
- Comparative toxic unit for ecosystems (ETP-fw) [CTUe]
- Comparative toxic unit for humans (carcinogenic) (HTP-c) [CTUh]
- Comparative toxic unit for humans (noncarcinogenic) (HTP-nc) [CTUh]
- Soil quality index (SQP) [SQP]

## Use advice
Gültigkeitsbereich:
Gegenstand der vorliegenden EPD ist die Brandschutzklappe BSK-RPR der SCHAKO Ferdinand Schad KG. Die EPD berücksichtigt die Herstellung, den Transport, den Einbau, die Wasser- und Energieverbräuche in der Nutzungsphase und die Entsorgung der Brandschutzklappe. Produktionsstandort des Produkts ist ausschließlich das Werk in Meßkirch, Deutschland. Die Produktionsdaten beziehen sich auf das Geschäftsjahr 2019.
Systemgrenze:
Die Systemgrenzen dieser EPD „Wiege bis Werkstor, mit Optionen“ sind entsprechend EN 15804 modular gestaltet. Die EPD berücksichtigt folgende Module und Prozesse:

Produktstadium (A1–A3): Gewinnung von Rohstoffen, Herstellung von Vorprodukten, Herstellung der Verpackung, Transport von Rohstoffen und Vorprodukten, Bereitstellung von Energie, Fertigung der Komponenten (Rundrohreinheit, Klappenblatt, Auslöseeinheit, Anbaurahmen), Montage der Brandschutzklappe, Behandlung von Produktionsabfällen

Baustadium (A4–A5): Transport im verpackten Zustand zur Baustelle und Einbau in das Gebäude sowie Behandlung der Verpackungsabfälle.

Nutzungsstadium (B6): Energieeinsatz für das Betreiben der Brandschutzklappe im Gebäude

Entsorgungsstadium (C1–C4): Rückbau und Abriss, Transport zur Abfallbehandlung, Abfallbewirtschaftung (Metallrecycling) und Beseitigung von Restabfällen (gemischte Kunststoffe, Kalziumsilikat).

Vorteile und Belastungen außerhalb der Systemgrenze (Modul D): Wiederverwendungs-, Rückgewinnungs- und Recyclingpotentiale durch Metallrecycling sowie durch die Erzeugung von Strom und Wärme bei der Verbrennung der gemischten Kunststoffabfälle.

Das Nutzungsstadium (Module B1–B7) wurde, mit Ausnahme des Moduls B6, nicht betrachtet.

## Data sources
- GaBi Database (all versions)
- GaBi database SP40 2020
