# Admonter Massivholzmehrschichtprodukte

Dataset: ILCD process, EPD, specific dataset
Geography: AT
Reference year: 2016
Valid until: 2021
Classification: OEKOBAU.DAT: Holz / Vollholz / Brettschichtholzplatte
Classification: IBUCategories: 02 Bauprodukte / Produkte aus Bauholz / Vollholzprodukte
Method details: Vollholzprodukte.pdf
Owner: STIA Holzindustrie GmbH
Compliance: DIN EN 15804; ISO 14025
Review: Accredited third party review by IBU
Amounts: rows without a unit in brackets have none in this file; such an amount is in the reference unit of its flow, which a separate flow dataset defines
copyright: true

## General comment
Bei Admonter Massivholzmehrschichtprodukten handelt es sich um Mehrschichtparkettböden und Mehrschichtmassivholzplatten mit Edelholznutzschicht, welche auf einem Trägermaterial aus vorwiegend Fichte kreuzweise verleimt werden. Mit Ausnahme 2-schichtiger Produkte haben die übrigen Produkte einen mehrschichtigen, symmetrischen Aufbau mit Massivholzgegenzug.

Die Abmessungen der einzelnen Elemente sind je nach Produkt unterschiedlich. Die Breiten liegen zwischen 100 und 2030mm, die Längen liegen zwischen 590 und 5000mm. Die Produktdicken liegen zwischen 10mm und 42mm. Als Edelholznutzschicht kommen fast ausschließlich heimische Holzarten zur Anwendung, Tropenhölzer wurden aus ökologischen Gründen nie verarbeitet. Als ökologische Alternative werden heimische Hölzer mit firmeneigenen Anlagen thermisch modifiziert.

Das durchschnittliche Flächengewicht der Mehrschichtparkettböden in Laubholzausführung liegt bei 7,32 kg/m², in Nadelholzausführung bei 6,95 kg/m² und der Elemente bei 9,42 kg/m².

## Technology and included processes
Die vorliegende Umweltproduktdeklaration bezieht sich auf eine deklarierte Einheit von 1 m² Admonter Massivholzmehrschichtprodukte mit einem durchschnittlichen Flächengewicht von 8,125 kg/m² und einer Auslieferungsfeuchte von 7 %. Das deklarierte Produkt stellt einen flächengewichteten Durchschnitt der hergestellten Sortimente dar und bezieht sich auf das Produktionsjahr 2014. Bei Admonter Massivholzmehrschichtprodukten handelt es sich um Mehrschichtparkettböden und Mehrschichtmassivholzplatten mit Edelholznutzschicht, welche auf einem Trägermaterial aus vorwiegend Fichte kreuzweise verleimt werden. Mit Ausnahme 2- schichtiger Produkte haben die übrigen Produkte einen mehrschichtigen, symmetrischen Aufbau mit Massivholzgegenzug. Gliederung des Herstellprozesses: -Anlieferung des Schnittholzes, des Lamellenmaterials und des vorgefertigten Trägermaterials -Qualitätskontrolle -Trocknung des Schnittholzes, teilweise Trocknung der Lamellen -Teilweise Thermo-Behandlung des Rohmaterials -Auftrennen des Schnittholzes zu Lamellen oder Trägermaterial -Qualitätssortierung -Verleimung -Ausfertigung -Teilweises Besäumen zu Plattenformaten -Teilweise Auftrennen zu Kleinformaten -Teilweise Profilierung -Qualitätskontrolle -Teilweise Oberflächenstrukturierung -Teilweise Oberflächenbehandlung -Qualitätskontrolle -Verpackung je nach Produktart -Kommissionierung und Versand Für die Abbildung des Hintergrundsystems im Ökobilanzmodell werden Sekundärdaten herangezogen. Diese entstammen einerseits der GaBi Datenbank /GaBi 7/ und andererseits anerkannten Literaturquellen /Rüter und Diederichs, 2012/. Das UF-Leimsystem wurde anhand eines spezifischen Hintergrunddatensatzes des Zulieferers abgebildet. Kohlenstoffgehalt und Primärenergiegehalt der Produkte wurden basierend auf ihren materialinhärenten Eigenschaften entsprechend zugrundeliegenden physikalischen Zusammenhängen bilanziert. Bei der Produktion von Admonter Massivholzmehrschichtprodukten entsteht neben dem deklarierten Produkt ein Überschuss an thermischer Energie aus der werkseigenen KWK-Anlage, welcher an das Admonter Fernwärmenetz verkauft wird. Dieser Überschuss wird als Koppelprodukt behandelt und basierend auf den derzeit gültigen Marktpreisen alloziert. Die Allokation in der Forstkette beruht auf der Veröffentlichung von /Hasch 2002/ und dessen Aktualisierung von /Rüter und Albrecht 2007/. Für kammergetrocknete Bretter und Furniere wurde eine Preisallokation gemäß /Rüter und Diederichs, 2012/ angewandt.
Technische Daten:
Gemäß /EU-Verordnung Nr. 305/2011/ sind die in der Leistungserklärung aufgeführten Daten anzugeben; weitere Daten sind freiwilliger Natur.:
Deklarierte Einheit:
Die vorliegende Umweltproduktdeklaration bezieht sich auf eine deklarierte Einheit von 1 m² Admonter Massivholzmehrschichtprodukt mit einem durchschnittlichen Flächengewicht von 8,125 kg/m² und einer Auslieferungsfeuchte von 7 %.

## Technical purpose
Admonter Massivholzmehrschichtprodukte sind für die Verwendung im Innenbereich vorgesehen. Gekennzeichnete Produkte können bei Beachtung des konstruktiven Holzschutzes auch im witterungsgeschützten Außenbereich, wie in Nutzungsklasse 2 definiert, eingesetzt werden.

Admonter Mehrschichtparkettböden sind für die Verlegung als Bodenbelag im Innenbereich in Räumen der Klasse 1 (Beheizte Innenräume mit vorwiegend konstanten Temperaturen und wohnraumüblichen klimatischen Verhältnissen) vorgesehen. Die Parkettböden können je nach Produkt entweder verklebt oder schwimmend verlegt werden (Installationsanweisung).

## Reference product
- 1 m² Massivholzmehrschichtprodukt: 1

## Inputs
- Erneuerbare Primärenergie als Energieträger (PERE) [MJ]: A1-A3 1370.68, C3 -1370.68
- Erneuerbare Primärenergie zur stofflichen Nutzung (PERM) [MJ]: A1-A3 133.778, C3 -133.778
- Total erneuerbare Primärenergie (PERT) [MJ]: A1-A3 1504.45, C3 -1504.45, D -25.1208
- Nicht-erneuerbare Primärenergie als Energieträger (PENRE) [MJ]: A1-A3 95.8284, C3 -95.8284
- Nicht-erneuerbare Primärenergie zur stofflichen Nutzung (PENRM) [MJ]: A1-A3 5.45187, C3 -5.45187
- Total nicht erneuerbare Primärenergie (PENRT) [MJ]: A1-A3 101.28, C3 -101.28, D -140.142
- Einsatz von Sekundärstoffen (SM) [kg]: A1-A3 0, C3 0, D 0
- Erneuerbare Sekundärbrennstoffe (RSF) [MJ]: A1-A3 0, C3 0, D 133.778
- Nicht erneuerbare Sekundärbrennstoffe (NRSF) [MJ]: A1-A3 0, C3 0, D 5.45187
- Einsatz von Süßwasserressourcen (FW) [m^3]: A1-A3 1.33659, C3 0, D -0.0277854

## Outputs
- Gefährlicher Abfall zur Deponie (HWD) [kg]: A1-A3 9.85931e-5, C3 0, D 0
- Entsorgter nicht gefährlicher Abfall (NHWD) [kg]: A1-A3 0.00892199, C3 0, D 0
- Entsorgter radioaktiver Abfall (RWD) [kg]: A1-A3 0.0081849, C3 0, D -0.0135358
- Komponenten für die Wiederverwendung (CRU) [kg]: A1-A3 0, C3 0, D 0
- Stoffe zum Recycling (MFR) [kg]: A1-A3 0, C3 0, D 0
- Stoffe für die Energierückgewinnung (MER) [kg]: A1-A3 0, C3 8.125, D 0
- Exportierte elektrische Energie (EEE) [MJ]: A1-A3 0, C3 0, D 0
- Exportierte thermische Energie (EET) [MJ]: A1-A3 0, C3 0, D 0

## Impact indicators
- Globales Erwärmungspotenzial (GWP) [kg CO_(2)-Äq.]: A1-A3 -6.44629, C3 13.2573, D -8.1087
- Abbau Potential der stratosphärischen Ozonschicht (ODP) [kg CFC11-Äq.]: A1-A3 1.04526e-7, C3 0, D -3.6558e-9
- Versauerungspotenzial von Boden und Wasser (AP) [kg SO_(2)-Äq.]: A1-A3 0.0270913, C3 0, D 0.00729167
- Eutrophierungspotenzial (EP) [kg PO_(4)^(3)-Äq.]: A1-A3 0.00531008, C3 0, D 0.000212483
- Bildungspotential für troposphärisches Ozon (POCP) [kg Ethen-Äq.]: A1-A3 0.00375718, C3 0, D 0.00126097
- Potenzial für den abiotischen Abbau nicht fossiler Ressourcen (ADPE) [kg Sb-Äq.]: A1-A3 5.01615e-6, C3 0, D -1.77997e-6
- Potenzial für den abiotischen Abbau fossiler Brennstoffe (ADPF) [MJ]: A1-A3 79.4367, C3 0, D -106.184

## Use advice
Gültigkeitsbereich:
Die vorliegende Umweltproduktdeklaration bezieht sich auf eine deklarierte Einheit von 1 m² durchschnittliches Admonter Massivholzmehrschichtprodukt mit einem Flächengewicht von 8,125 kg/m² produziert am Standort Admont.
Systemgrenze:
Die Ökobilanz des durchschnittlichen Admonter Massivholzmehrschichtprodukts beinhaltet eine cradle-to-gate (Wiege bis zum Werkstor) Betrachtung der auftretenden Umweltwirkungen mit Optionen.
Die folgenden Lebenszyklusphasen werden in der Analyse berücksichtigt:

Modul A1-A3 Produktstadium
Das Produktstadium beinhaltet die Aufwendungen der Rohstoffversorgung (Holz, Leimsystem, etc.) sowie der damit verbundenen Transporte bezogen auf den Produktionsstandort Admont. Die Bereitstellung thermischer und elektrischer Energie ist im Produktstadium in Form der werkseigenen KWK-Anlage berücksichtigt. Ergänzend dazu wird elektrische Energie vom regionalen Stromnetz geliefert.

Modul C3 Abfallbehandlung
Das Modul C3 deklariert die biogenen Kohlendioxid-Emissionen in der energetischen Verwertung am Lebensende des Produktes.

Modul D Gutschriften und Lasten außerhalb der Systemgrenzen
In Modul D wird die energetische Verwertung des Produktes am Lebensende inklusive entsprechenden energetischen Substitutionspotentialen in Form eines europäischen Durchschnittsszenarios beschrieben.

## Data sources
- Admonter Massivholzmehrschichtprodukte.pdf
- GaBi Database (all versions)
- GaBi database SP29 2016
