# Getuftete Teppichfliesen LC5, Polmaterial PA 6, Schwerbeschichtung auf Bitumenbasis

Dataset: ILCD process, EPD, average dataset
Geography: EU-27
Reference year: 2016
Valid until: 2021
Classification: OEKOBAU.DAT: Kunststoffe / Bodenbeläge / Textile Bodenbeläge
Classification: IBUCategories: 02 Bauprodukte / Bodenbeläge / Bodenbeläge
Method details: Bodenbeläge.pdf
Owner: Gemeinschaft umweltfreundlicher Teppichboden (GUT) e.V.
Compliance: DIN EN 15804; ISO 14025
Review: Accredited third party review by IBU
Amounts: rows without a unit in brackets have none in this file; such an amount is in the reference unit of its flow, which a separate flow dataset defines
copyright: true

## General comment
Getuftete Teppichfliesen mit einem Polmaterial aus Polyamid 6 und einer Schwerbeschichtung auf Bitumenbasis mit einer textilen Abdeckung.

Färbung und Gestaltung der Nutzschicht kann durch wässrige Färbeverfahren oder durch Verwendung von spinngefärbtem Garn erfolgen.

Die Berechnungen beziehen sich auf durchschnittliche Konstruktionsdaten, die auf Daten von Mitgliedsfirmen der Gemeinschaft Umweltfreundlicher Teppichboden e.V. basieren.

Die Deklaration gilt für Produkte der Luxusklasse LC5 mit einem maximalen Nutzschichtgewicht von

1200 g/m2. Die LCA Ergebnisse in diesem Bericht beziehen sich auf das maximale Nutzschichtgewicht von 1200 g/m2 als ungünstigster Fall.

## Technology and included processes
Getuftete Teppichfliesen mit einem Polmaterial aus Polyamid PA 6 und einer Schwerbeschichtung auf Bitumenbasis mit einer textilen Abdeckung. Die Deklaration gilt für Produkte der Luxusklasse LC5 mit einem maximalen Nutzschichtgewicht von 1200g/m².

## Technical purpose
Die Gebrauchsklasse des spezifischen Produkts gemäß der Definition in /EN 1307/ kann dem Produkt Informations System (PRODIS) unter Verwendung der PRODIS Registrierungs-Nummer des Produkts entnommen werden.

## Scenarios
- S1: 100% Deponierung
- S2: 100% Müllverbrennung (MVA)
- S3: 100% Verwertung in der Zementindustrie

## Reference product
- 1 m² Bodenbelag: 1

## Inputs
- Erneuerbare Primärenergie als Energieträger (PERE) [MJ]: A1-A3 16.6, A4 0.17, A5 2.01, B1 0, B2 0.68, C2 0.01, C3 0.13, C4 (S1) 0.22, C4 (S2) 0.09, C4 (S3) 0, D (S0) -0.16, D (S1) -0.6, D (S2) -5.37, D (S3) -0.31
- Erneuerbare Primärenergie zur stofflichen Nutzung (PERM) [MJ]: A1-A3 0, A4 0, A5 0, B1 0, B2 0, C2 0, C3 0, C4 (S1) 0, C4 (S2) 0, C4 (S3) 0, D (S0) 0, D (S1) 0, D (S2) 0, D (S3) 0
- Total erneuerbare Primärenergie (PERT) [MJ]: A1-A3 16.6, A4 0.17, A5 2.01, B1 0, B2 0.68, C2 0.01, C3 0.13, C4 (S1) 0.22, C4 (S2) 0.09, C4 (S3) 0, D (S0) -0.16, D (S1) -0.6, D (S2) -5.37, D (S3) -0.31
- Nicht-erneuerbare Primärenergie als Energieträger (PENRE) [MJ]: A1-A3 323.26, A4 2.99, A5 16.18, B1 0, B2 6.29, C2 0.17, C3 0.61, C4 (S1) 3.56, C4 (S2) 4.07, C4 (S3) 0, D (S0) -1.64, D (S1) -2.83, D (S2) -54.52, D (S3) -93.55
- Nicht-erneuerbare Primärenergie zur stofflichen Nutzung (PENRM) [MJ]: A1-A3 91.15, A4 0, A5 0, B1 0, B2 0, C2 0, C3 0, C4 (S1) 0, C4 (S2) 0, C4 (S3) 0, D (S0) 0, D (S1) 0, D (S2) 0, D (S3) 0
- Total nicht erneuerbare Primärenergie (PENRT) [MJ]: A1-A3 414.41, A4 2.99, A5 16.18, B1 0, B2 6.29, C2 0.17, C3 0.61, C4 (S1) 3.56, C4 (S2) 4.07, C4 (S3) 0, D (S0) -1.64, D (S1) -2.83, D (S2) -54.52, D (S3) -93.55
- Einsatz von Sekundärstoffen (SM) [kg]: A1-A3 0.11, A4 0, A5 0, B1 0, B2 0, C2 0, C3 0, C4 (S1) 0, C4 (S2) 0, C4 (S3) 0, D (S0) 0, D (S1) 0, D (S2) 0, D (S3) 0
- Erneuerbare Sekundärbrennstoffe (RSF) [MJ]: A1-A3 0.00361, A4 1.99e-5, A5 0.000137, B1 0, B2 4.6e-5, C2 1.11e-6, C3 8.02e-6, C4 (S1) 0.003, C4 (S2) 2.88e-5, C4 (S3) 0, D (S0) -1.78e-5, D (S1) -3.74e-5, D (S2) -0.000595, D (S3) -8.91e-5
- Nicht erneuerbare Sekundärbrennstoffe (NRSF) [MJ]: A1-A3 0.0391, A4 0.000208, A5 0.00154, B1 0, B2 0.000507, C2 1.16e-5, C3 8.37e-5, C4 (S1) 0.00625, C4 (S2) 0.000283, C4 (S3) 0, D (S0) -0.000187, D (S1) -0.00039, D (S2) -0.00622, D (S3) -0.00093
- Einsatz von Süßwasserressourcen (FW) [m^3]: A1-A3 0.0482, A4 0.000293, A5 0.00258, B1 0, B2 0.00149, C2 1.64e-5, C3 0.000256, C4 (S1) 0.000474, C4 (S2) 0.0206, C4 (S3) 0, D (S0) -0.000326, D (S1) -0.00119, D (S2) -0.0109, D (S3) -0.00881

## Outputs
- Gefährlicher Abfall zur Deponie (HWD) [kg]: A1-A3 0, A4 0, A5 0, B1 0, B2 0, C2 0, C3 0, C4 (S1) 0, C4 (S2) 0, C4 (S3) 0, D (S0) 0, D (S1) 0, D (S2) 0, D (S3) 0
- Entsorgter nicht gefährlicher Abfall (NHWD) [kg]: A1-A3 0.00655, A4 0.0113, A5 0.732192, B1 0, B2 0.643, C2 0.000629, C3 0.141, C4 (S1) 4.51, C4 (S2) 1.64, C4 (S3) 0, D (S0) -0.178, D (S1) -0.657, D (S2) -5.94, D (S3) -79.7
- Entsorgter radioaktiver Abfall (RWD) [kg]: A1-A3 0.00864, A4 4.09e-6, A5 0.000329, B1 0, B2 0.000411, C2 2.28e-7, C3 9.09e-5, C4 (S1) 5.98e-5, C4 (S2) 0.000175, C4 (S3) 0, D (S0) -0.000115, D (S1) -0.000424, D (S2) -0.00382, D (S3) -0.00017
- Komponenten für die Wiederverwendung (CRU) [kg]: A1-A3 0, A4 0, A5 0, B1 0, B2 0, C2 0, C3 0, C4 (S1) 0, C4 (S2) 0, C4 (S3) 0, D (S0) 0, D (S1) 0, D (S2) 0, D (S3) 0
- Stoffe zum Recycling (MFR) [kg]: A1-A3 0.05, A4 0, A5 0.12, B1 0, B2 0, C2 0, C3 0, C4 (S1) 0, C4 (S2) 0, C4 (S3) 2.5, D (S0) 0, D (S1) 0, D (S2) 0, D (S3) 0
- Stoffe für die Energierückgewinnung (MER) [kg]: A1-A3 0, A4 0, A5 0, B1 0, B2 0, C2 0, C3 0, C4 (S1) 0, C4 (S2) 0, C4 (S3) 2.7, D (S0) 0, D (S1) 0, D (S2) 0, D (S3) 0
- Exportierte elektrische Energie (EEE) [MJ]: A1-A3 0, A4 0, A5 0.63, B1 0, B2 0, C2 0, C3 0, C4 (S1) 1.21, C4 (S2) 10.57, C4 (S3) 0, D (S0) 0, D (S1) 0, D (S2) 0, D (S3) 0
- Exportierte thermische Energie (EET) [MJ]: A1-A3 0, A4 0, A5 1.41, B1 0, B2 0, C2 0, C3 0, C4 (S1) 0, C4 (S2) 23.55, C4 (S3) 0, D (S0) 0, D (S1) 0, D (S2) 0, D (S3) 0

## Impact indicators
- Globales Erwärmungspotenzial (GWP) [kg CO_(2)-Äq.]: A1-A3 20, A4 0.216, A5 0.973, B1 0, B2 0.279, C2 0.0121, C3 0.0341, C4 (S1) 4.56, C4 (S2) 7.24, C4 (S3) 0, D (S0) -0.0958, D (S1) -0.159, D (S2) -3.19, D (S3) -0.557
- Abbau Potential der stratosphärischen Ozonschicht (ODP) [kg CFC11-Äq.]: A1-A3 1.18e-7, A4 8.9e-13, A5 1.76e-8, B1 0, B2 8.33e-9, C2 4.97e-14, C3 2.54e-11, C4 (S1) 9.8e-12, C4 (S2) 7e-9, C4 (S3) 0, D (S0) -3.2e-11, D (S1) -1.18e-10, D (S2) -1.07e-9, D (S3) -1.06e-11
- Versauerungspotenzial von Boden und Wasser (AP) [kg SO_(2)-Äq.]: A1-A3 0.0492, A4 0.000969, A5 0.00286, B1 0, B2 0.00142, C2 5.41e-5, C3 0.000172, C4 (S1) 0.00113, C4 (S2) 0.00611, C4 (S3) 0, D (S0) -0.00025, D (S1) -0.000799, D (S2) -0.00834, D (S3) -0.00307
- Eutrophierungspotenzial (EP) [kg PO_(4)^(3)-Äq.]: A1-A3 0.00681, A4 0.000246, A5 0.000655, B1 0, B2 0.000208, C2 1.37e-5, C3 9.32e-6, C4 (S1) 0.00487, C4 (S2) 0.00156, C4 (S3) 0, D (S0) -1.71e-5, D (S1) -4.34e-5, D (S2) -0.00057, D (S3) -0.000211
- Bildungspotential für troposphärisches Ozon (POCP) [kg Ethen-Äq.]: A1-A3 0.00663, A4 -0.000358, A5 0.000333, B1 0.000111, B2 0.000193, C2 -2e-5, C3 1e-5, C4 (S1) 0.00121, C4 (S2) 0.000387, C4 (S3) 0, D (S0) -2.08e-5, D (S1) -4.66e-5, D (S2) -0.000693, D (S3) -0.000379
- Potenzial für den abiotischen Abbau nicht fossiler Ressourcen (ADPE) [kg Sb-Äq.]: A1-A3 1.22e-5, A4 8.49e-9, A5 1.43e-6, B1 0, B2 7.41e-7, C2 4.74e-10, C3 5.97e-9, C4 (S1) 5.23e-8, C4 (S2) -6.64e-7, C4 (S3) 0, D (S0) -9.51e-9, D (S1) -2.78e-8, D (S2) -3.17e-7, D (S3) -4.88e-8
- Potenzial für den abiotischen Abbau fossiler Brennstoffe (ADPF) [MJ]: A1-A3 392, A4 2.98, A5 15.1, B1 0, B2 5.13, C2 0.167, C3 0.38, C4 (S1) 3.41, C4 (S2) 3.56, C4 (S3) 0, D (S0) -1.35, D (S1) -1.77, D (S2) -44.9, D (S3) -93.1

## Use advice
Gültigkeitsbereich:
Die Deklaration gilt für eine Gruppe ähnlicher Produkte in Luxusklasse LC5 (max. 1200 g/m² Nutzschichtgewicht).

Sie ist nur in Verbindung mit einer zulässigen GUT/PRODIS-Lizenz gültig.

Durchschnittliche Konstruktionselemente und Produktionsprozess-Daten basieren auf Daten von europäischen Mitgliedsfirmen der Gemeinschaft umweltfreundlicher Teppichboden e.V. Das deklarierte Produkt repräsentiert eine Produktgruppe mit den in der EPD beschriebenen Merkmalen.
Systemgrenze:
EPD-Typ: Von der Wiege bis zur Bahre

Systemgrenzen der Module A, B, C, D:

A1-A3 Produktion:

Energiebereitstellung und Produktion der Grundstoffe, Aufbereitung von Sekundärmaterial, Hilfsstoffe, Transport der Materialien zum Produktionswerk, Emissionen, Abwasserbehandlung, Verpackungsmaterial und Abfallbewirtschaftungs-Prozesse bis zur Deponierung von Restabfall (außer radioaktivem Abfall). Gutschriften für Strom und Dampf aus der Verbrennung von Produktionsabfall werden aggregiert.

A4 Transport:

Transport des verpackten textilen Bodenbelags vom Werkstor bis zum Verlegeort.

A5 Verlegung:

Verlegung des textilen Bodenbelags, Produktion und Transport von Hilfsstoffen, Abfallbewirtschaftungs-Prozesse bis zur Deponierung von Restabfall (außer radioaktivem Abfall), Produktion der Teppichbodenmenge, die als Verlegeabfall anfällt einschließlich deren Transport zum Verlegeort.

Gutschriften für Strom und Dampf aus der Verbrennung von Verpackungs- und Verlegeabfall verlassen das Produktsystem.

B1 Nutzung:

Innenraumemissionen während des Nutzungsstadiums.

Die VOC-Abklingkurven des Produktes zeigen, dass die produktbezogenen VOC-Emissionen nach dem ersten Jahr nicht mehr relevant sind.

B2 Instandhaltung:

Reinigung des textilen Bodenbelags während einer Periode von 1 Jahr:
Staubsaugen - Stromeinsatz
Nassreinigung - Stomeinsatz, Wasserverbrauch, Produktion des Reinigungsmittels, Abwasserbehandlung.

Die deklarierten Werte in diesem Modul müssen mit der angenommenen Lebenszeit des textilen Bodenbelags im betrachteten Gebäude multipliziert werden (siehe Anhang, Kapitel: 'Informationen zum Nutzungsstadium').

B3 - B7:

Die Module sind nicht relevant und werden deswegen nicht deklariert.

C1 Rückbau:

Der Rückbau des Bodenbelags geschieht durch Handarbeit und verursacht keine weiteren Umweltbelastungen.

C2 Transport:

Transport des Teppichbodenabfalls zur Deponie, zur Müllverbrennungsanlage (MVA), oder zur Abfallsammelstelle für Recyclingprodukte.

C3 Abfallbehandlung:

C3-1, C3-2: Eine Abfallbehandlung ist für die Deponierung und die Abfallverbrennung nicht erforderlich.

C3-3: Sammeln von Teppichbodenabfall, Abfallbehandlung (Schreddern).

C4 Disposal

C4-1, C4-2: Umweltbelastungen infolge von Deponierung oder von Müllverbrennung (Gutschriften verlassen die Systemgrenze)

C4-3: Der vorbehandelte Teppichbodenabfall verlässt das Produktsystem und erfordert keine Entsorgung.

D Recycling potential:

D-A5: Energiegutschriften infolge der Verbrennung von Verpackung-und Installationsabfällen (Anlage <60% Effektivität),

D-1, D-2: Energiegutschriften infolge der Deponierung und der Müllverbrennung (Anlage <60% Effektivität),

D-3: Transport von der Abfallbehandlungs-Anlage zum Zementwerk, Substitution von Material- und Brennstoff-Einsatz im Zementofen (energetische und stoffliche Gutschriften).

## Data sources
- Getuftete Teppichfliesen LC5, Polmaterial PA 6, Schwerbeschichtung auf Bitumenbasis.pdf
- GaBi Database (all versions)
- GaBi database SP20 2013
