# Sarnafil TG 76 Felt PS

Dataset: ILCD process, EPD, specific dataset
Geography: DE
Reference year: 2020
Valid until: 2025
Classification: OEKOBAU.DAT: Kunststoffe / Dachbahnen / TPO-Dachbahnen (FPO)
Classification: IBUCategories: 02 Bauprodukte / Abdichtungen / Dach- und Dichtungsbahnsysteme aus Kunststoffen und Elastomeren
Method details: Dach- und Dichtungsbahnsysteme aus Kunststoffen und Elastomeren.pdf
Generated by: Sika Services AG
Registration number: EPD-SIK-20190170-IBA1-DE
Owner: Sika Deutschland GmbH
Compliance: DIN EN 15804; ISO 14025
Review: Accredited third party review by Institut Bauen und Umwelt e. V.
Amounts: rows without a unit in brackets have none in this file; such an amount is in the reference unit of its flow, which a separate flow dataset defines
copyright: true
licenseType: Free of charge for all users and uses
accessRestrictions: None

## General comment
Sarnafil® TG 76 Felt PS polymeric waterproofing membrane is made of flexible polyolefin (FPO) and is treated with flame retardant and stabilizers against UV radiation and backed with a glass-polyester nonwoven mat (felt). A glass nonwoven inlay is encapsulated within the sheet. The glass-polyester felt backing serves as a bonding and leveling layer for adhered application over insulation layers consisting of expanded polystyrene (EPS) or polyurethane (PU).

Sarnafil® TG 76 Felt PS polymeric waterproofing membrane is available in the following thicknesses: 1.5 mm (TG 76-15 Felt PS), 1.8 mm (TG 76-18 Felt PS) and 2.0 mm (TG 76-20 Felt PS).

## Technology and included processes
Sarnafil® TG 76 Felt PS polymeric waterproofing sheets are manufactured on production lines developed in-house in the following stages: Melting of the polymeric components and additives in extruders Dispersing of the molten materials Coating of the carrier or the reinforcing in layers, producing homogenous encapsulation Application of felt backing Cooling of the polymeric waterproofing sheet Winding of the sheets onto cardboard spools made of recycled paper Individually wrapping each roll The quality management system of the Sarnen plant has been ISO 9001 certified since 1993.
Declared unit:
This declaration applies to 1 m² of installed Sarnafil® TG 76 Felt PS polymeric waterproofing membrane, thickness 2.0 mm.

A formula is given in Chapter 5 for independent calculation of the values for other thicknesses.

## Technical purpose
Sarnafil® TG 76 Felt PS polymeric waterproofing membrane is used chiefly to seal flat roofs. The roofing sheets can be fully adhered to unballasted roofs with a pitch up to < 20°. The manufacturer recommends the use of the Sika adhesive Sarnacol® 2142 S for adhered application of the membrane. Application on roofs with gravel ballast or in green roof systems is also possible.

## Reference product
- 1 m² Dachbahn (): 1

## Inputs
- Renewable primary energy as energy carrier (PERE) [MJ]: A1-A3 9.22, A4 0.0862, A5 1.13, C1 0, C2 0.00704, C3 0.17, C4 0, D -17.8
- Renewable primary energy resources as material utilization (PERM) [MJ]: A1-A3 1.99, A4 0, A5 -0.159, C1 0, C2 0, C3 0, C4 0, D 0
- Total use of renewable primary energy resources (PERT) [MJ]: A1-A3 11.2, A4 0.0862, A5 0.971, C1 0, C2 0.00704, C3 0.17, C4 0, D -17.8
- Non renewable primary energy as energy carrier (PENRE) [MJ]: A1-A3 52.1, A4 1.42, A5 4.46, C1 0, C2 0.121, C3 68.3, C4 0, D -57.2
- Non renewable primary energy as material utilization (PENRM) [MJ]: A1-A3 63.7, A4 0, A5 5.07, C1 0, C2 0, C3 -67.4, C4 0, D 0
- Total use of non renewable primary energy resources (PENRT) [MJ]: A1-A3 116, A4 1.42, A5 9.53, C1 0, C2 0.121, C3 0.957, C4 0, D -57.2
- Use of secondary material (SM) [kg]: A1-A3 0.0569, A4 0, A5 0.00455, C1 0, C2 0, C3 0, C4 0, D 0
- Use of renewable secondary fuels (RSF) [MJ]: A1-A3 1.94e-21, A4 0, A5 1.56e-22, C1 0, C2 0, C3 0, C4 0, D 0
- Use of non renewable secondary fuels (NRSF) [MJ]: A1-A3 2.29e-20, A4 0, A5 1.83e-21, C1 0, C2 0, C3 0, C4 0, D 0
- Use of net fresh water (FW) [m^3]: A1-A3 0.0191, A4 9.91e-5, A5 0.00205, C1 0, C2 1.19e-5, C3 0.0165, C4 0, D -0.0186

## Outputs
- Hazardous waste disposed (HWD) [kg]: A1-A3 2.43e-6, A4 8.06e-8, A5 2.01e-7, C1 0, C2 6.78e-9, C3 7.62e-10, C4 0, D -2.47e-8
- Non hazardous waste disposed (NHWD) [kg]: A1-A3 0.512, A4 9.54e-5, A5 0.043, C1 0, C2 9.86e-6, C3 0.0303, C4 0, D -0.0394
- Radioactive waste disposed (RWD) [kg]: A1-A3 0.00253, A4 1.69e-6, A5 0.000215, C1 0, C2 1.65e-7, C3 6.13e-5, C4 0, D -0.00666
- Components for re-use (CRU) [kg]: A1-A3 0, A4 0, A5 0, C1 0, C2 0, C3 0, C4 0, D 0
- Materials for recycling (MFR) [kg]: A1-A3 0, A4 0, A5 0, C1 0, C2 0, C3 0, C4 0, D 0
- Materials for energy recovery (MER) [kg]: A1-A3 0, A4 0, A5 0, C1 0, C2 0, C3 0, C4 0, D 0
- Exported electrical energy (EEE) [MJ]: A1-A3 0, A4 0, A5 0.411, C1 0, C2 0, C3 16.7, C4 0, D 0
- Exported thermal energy (EET) [MJ]: A1-A3 0, A4 0, A5 0.733, C1 0, C2 0, C3 29.7, C4 0, D 0

## Impact indicators
- Global warming potential (GWP) [kg CO_(2)-Äq.]: A1-A3 3.48, A4 0.106, A5 0.505, C1 0, C2 0.00893, C3 7.64, C4 0, D -2.76
- Depletion potential of the stratospheric ozone layer (ODP) [kg CFC11-Äq.]: A1-A3 6.18e-9, A4 3.61e-17, A5 4.94e-10, C1 0, C2 1.47e-18, C3 7.09e-16, C4 0, D -2.4e-9
- Acidification potential of land and water (AP) [kg SO_(2)-Äq.]: A1-A3 0.00972, A4 0.000234, A5 0.000832, C1 0, C2 2.08e-5, C3 0.000492, C4 0, D -0.0039
- Eutrophication potential (EP) [kg PO_(4)^(3)-Äq.]: A1-A3 0.00115, A4 5.85e-5, A5 0.000103, C1 0, C2 5.2e-6, C3 0.000104, C4 0, D -0.000418
- Formation potential of tropospheric ozone photochemical oxidants (POCP) [kg Ethen-Äq.]: A1-A3 0.001, A4 -8.32e-5, A5 7.53e-5, C1 0, C2 -6.94e-6, C3 5.04e-5, C4 0, D -0.000417
- Abiotic depletion potential for non fossil resources (ADPE) [kg Sb-Äq.]: A1-A3 1.88e-5, A4 1e-8, A5 1.51e-6, C1 0, C2 6.87e-10, C3 4.18e-8, C4 0, D -7.44e-7
- Abiotic depletion potential for fossil resources (ADPF) [MJ]: A1-A3 109, A4 1.41, A5 8.98, C1 0, C2 0.121, C3 0.802, C4 0, D -40

## Use advice
Scope:
This document applies to Sarnafil® TG 76 Felt PS polymeric waterproofing membrane in thicknesses of 1.5, 1.8 and 2.0 mm manufactured by Sika Services AG in CH-6060 Sarnen (Switzerland).

The EPD covers the production of the waterproofing membrane, transport of the product to the construction site, installation of the waterproofing membrane, disposal, as well as benefits and loads outside the system limits. The model was calculated on the basis of production data for the thickness 2.0 mm provided by Sika Services AG from the year 2018.
System boundary:
Type of EPD: Cradle to gate with options

The system boundaries of the EPD follow the modular construction system as described by EN 15804. The LCA takes into account the following modules:

A1-A3: Extraction, processing and transport of raw materials (e.g. polymers, pigments, processing aids, stabilizers, fillers, flame retardants and carrier materials) used for the production of intermediate products and the waterproofing membrane and the packaging materials used to package the waterproofing membranes, such as wooden pallets, cardboard and PE film, for transport to the plant. Waste processing of production waste (edge trim), which occurs during the production of the waterproofing membrane.
A4: Transport of the waterproofing membrane to the building site
A5: Installation of the waterproofing membrane into the building by means of hot-air welding (including welding energy and water consumption), disposal or recycling of packaging, and waterproofing membrane scraps
C1: Manual deconstruction and removal of the waterproofing membrane (recovery)
C2: Transport of the recovered waterproofing membrane to waste-processing facility
C3: Processing of the recovered waterproofing membrane by thermal energy recovery
C4: Disposal of the recovered waterproofing membrane in landfill
D: Benefits for reuse, recovery and/or recycling (through thermal energy recovery, recycling of the recovered waterproofing membrane and reuse of the wooden pallets)

## Data sources
- GaBi Database (all versions)
- GaBi database SP39 2019
