# Powder coating (outdoor use, white); 1 kg

Dataset: ILCD process, EPD, generic dataset
Geography: DE
Reference year: 2018
Valid until: 2022
Classification: oekobau.dat: Beschichtungen / Lacke und Lasuren / Lacksysteme Metall
Owner: thinkstep
Compliance: DIN EN 15804
Review: Dependent internal review by thinkstep, IABP-GaBi, IBP-GaBi; Independent external review by GaBi user forum, GaBi bug forum, GaBi user community
Amounts: rows without a unit in brackets have none in this file; such an amount is in the reference unit of its flow, which a separate flow dataset defines
copyright: true

## General comment
This data set has been modeled according to the European Standard EN 15804 for Sustainable Building. Results are depicted in modules that allow the structured expression of results over the entire life cycle.

## Geography
The data set represents the country specific situation in Germany, focusing on the main technologies, the region specific characteristics and / or import statistics.

## Time period
Annual average

## Technology and included processes
Powder coat is widely used for industrial metal coating, with one big market represented by the building and construction industry, for both exterior and interior use. Due to their outstanding weather resistance and robust surface coating powders can be well applied in colouring metal façades, panels, and profiles.
Typical constituents of a powder coat are binders, pigments, additives and in some cases extenders, consisting binders the most important components. In the case of exterior use, binders are mainly based on the polyester resins. Thermosetting powder coats are produced mainly by the extruder process due to its applicability and flexibility.
Production includes the following steps: After exact weighing, binder, hardener and additives will be fed via a container blender (mixer) and measured out for an temperature-controlled extruder respectively a masticator. Afterwards the mass will be rolled and at the same time cooled, followed by crushing-process and pulverization in a classifying mill under highly compressed air, to a defined powder spectrum. In a cyclone the grain size will be classified and at the end the gained powder leaded in a sink to a filling line.
Background system:
Electricity: Electricity is modelled according to the individual country-specific situations. The country-specific modelling is achieved on multiple levels. Firstly, individual energy carrier specific power plants and plants for renewable energy sources are modelled according to the current national electricity grid mix. Modelling the electricity consumption mix includes transmission / distribution losses and the own use by energy producers (own consumption of power plants and "other" own consumption e.g. due to pumped storage hydro power etc.), as well as imported electricity. Secondly, the national emission and efficiency standards of the power plants are modelled as well as the share of electricity plants and combined heat and power plants (CHP). Thirdly, the country-specific energy carrier supply (share of imports and / or domestic supply) including the country-specific energy carrier properties (e.g. element and energy content) are accounted for. Fourthly, the exploration, mining/production, processing and transport processes of the energy carrier supply chains are modelled according to the specific situation of each electricity producing country. The different production and processing techniques (emissions and efficiencies) in the different energy producing countries are considered, e.g. different crude oil production technologies or different flaring rates at the oil platforms.
Thermal energy, process steam: The thermal energy and process steam supply is modelled according to the individual country-specific situation with regard to emission standards and considered energy carriers. The thermal energy and process steam are produced at heat plants. Efficiencies for thermal energy production are by definition 100% in relation to the corresponding energy carrier input. For process steam the efficiency ranges from 85%, 90% to 95%. The energy carriers used for the generation of thermal energy and process steam are modelled according to the specific import situation (see electricity above).
Transports: All relevant and known transport processes are included. Ocean-going and inland ship transport as well as rail, truck and pipeline transport of bulk commodities are considered.
Energy carriers: The energy carriers are modelled according to the specific supply situation (see electricity above).
Refinery products: Diesel fuel, gasoline, technical gases, fuel oils, lubricants and residues such as bitumen are modelled with a parameterised country-specific refinery model. The refinery model represents the current national standard in refining techniques (e.g. emission level, internal energy consumption, etc.) as well as the individual country-specific product output spectrum, which can be quite different from country to country. The supply of crude oil is modelled, again, according to the country-specific situation with the respective properties of the resources.

## Technical purpose
This product can be used in construction.

## Safety margin
10 %. Product system almost completely covered. Good technological, temporal and geographic representativeness.

## Reference product
- Coating powder: 1

## Inputs
- Use of renewable primary energy (PERE) [MJ]: A1-A3 8.13205, C1 0, C2 0.0019976, C3 0.216339, D -1.25764
- Primary energy resources used as raw materials (PERM) [MJ]: A1-A3 0, C1 0, C2 0, C3 0, D 0
- Total use of renewable primary energy resources (PERT) [MJ]: A1-A3 8.13205, C1 0, C2 0.0019976, C3 0.216339, D -1.25764
- Use of non-renewable primary energy (PENRE) [MJ]: A1-A3 78.9003, C1 0, C2 0.0343136, C3 11.8217, D -4.74195
- Non-renewable primary energy resources used as raw materials (PENRM) [MJ]: A1-A3 11, C1 0, C2 0, C3 -11, D 0
- Total use of non-renewable primary energy resources (PENRT) [MJ]: A1-A3 89.9003, C1 0, C2 0.0343136, C3 0.821692, D -4.74195
- Input of secondary material (SM) [kg]: A1-A3 0, C1 0, C2 0, C3 0, D 0
- Use of renewable secondary fuels (RSF) [MJ]: A1-A3 0, C1 0, C2 0, C3 0, D 0
- Use of non renewable secondary fuels (NRSF) [MJ]: A1-A3 0, C1 0, C2 0, C3 0, D 0
- Use of net fresh water (FW) [m3]: A1-A3 0.0211782, C1 0, C2 1.78902e-6, C3 0.00471995, D -0.000587358

## Outputs
- Hazardous waste disposed (HWD) [kg]: A1-A3 5.01962e-8, C1 0, C2 1.28226e-9, C3 4.98542e-9, D -2.4668e-9
- Non-hazardous waste disposed (NHWD) [kg]: A1-A3 0.0648163, C1 0, C2 6.02263e-6, C3 0.129894, D -0.00215242
- Radioactive waste disposed (RWD) [kg]: A1-A3 0.00136672, C1 0, C2 3.61252e-8, C3 3.05472e-5, D -0.000151912
- Components for re-use (CRU) [kg]: A1-A3 0, C1 0, C2 0, C3 0, D 0
- Materials for Recycling (MFR) [kg]: A1-A3 0, C1 0, C2 0, C3 0, D 0
- Material for Energy Recovery (MER) [kg]: A1-A3 0, C1 1.1, C2 0, C3 0, D 0
- Exported electrical energy (EEE) [MJ]: A1-A3 0, C1 0, C2 0, C3 1.10488, D 0
- Exported thermal energy (EET) [MJ]: A1-A3 0, C1 0, C2 0, C3 2.89417, D 0

## Impact indicators
- Global warming potential (GWP) [kg CO2 eq.]: A1-A3 4.73516, C1 0, C2 0.00255297, C3 1.04568, D -0.321226
- Ozone Depletion Potential (ODP) [kg R11 eq.]: A1-A3 4.23497e-14, C1 0, C2 8.45044e-19, C3 1.19318e-15, D -6.95174e-15
- Acidification potential (AP) [kg SO2 eq.]: A1-A3 0.00690861, C1 0, C2 5.15673e-6, C3 0.000196665, D -0.000264345
- Eutrophication potential (EP) [kg Phosphate eq.]: A1-A3 0.00103287, C1 0, C2 1.2259e-6, C3 4.61625e-5, D -4.98741e-5
- Photochemical Ozone Creation Potential (POCP) [kg Ethene eq.]: A1-A3 0.00257931, C1 0, C2 -1.6854e-6, C3 1.69733e-5, D -2.73826e-5
- Abiotic depletion potential for non fossil resources (ADPE) [kg Sb eq.]: A1-A3 6.07739e-7, C1 0, C2 2.14835e-10, C3 1.28464e-8, D -7.58483e-8
- Abiotic depletion potential for fossil resources (ADPF) [MJ]: A1-A3 86.4535, C1 0, C2 0.0342213, C3 0.74458, D -4.35845

## Use advice
The data set represents a cradle to gate inventory. It can be used to characterise the supply chain situation of the respective commodity in a representative manner. Combination with individual unit processes using this commodity enables the generation of user-specific (product) LCAs.

## Data sources
- Roempp Lexikon - Lacke und Druckfarben, 1997
- Paints, Coatings and Solvents, 1998
- Lackformulierung und Lackrezeptur
- Lackrohstoffkunde
- Farben und Lacke
- BASF Handbuch Lackiertechnik
- GaBi Database Edition 2020, SP40
- GaBi database (all versions)
