# Clay panel

Dataset: ILCD process, EPD, generic dataset
Geography: DE
Reference year: 2021
Valid until: 2022
Classification: oekobau.dat: Mineralische Baustoffe / Steine und Elemente / Lehmsteine
Owner: Sphera Solutions GmbH
Compliance: EN 15804+A2
Review: Dependent internal review by Sphera Solutions GmbH; Independent external review by GaBi user forum
Amounts: rows without a unit in brackets have none in this file; such an amount is in the reference unit of its flow, which a separate flow dataset defines
copyright: true
licenseType: Free of charge for all users and uses
accessRestrictions: The license conditions as stated on https://www.oekobaudat.de/ apply.
accessRestrictions: Es gelten die Lizenzbedingungen wie sie auf https://www.oekobaudat.de/ genannt sind.

## General comment
This data set has been modeled according to the European Standard EN 15804+A2 for Sustainable Building. Results are depicted in modules that allow the structured expression of results over the entire life cycle.

## Geography
The data set represents the country specific situation in Germany, focusing on the main technologies, the region specific characteristics and / or import statistics.

## Time period
Annual average

## Technology and included processes
For the production of clay panels, the raw materials clay and sand are mixed with the addition of water. Reed mats are used for reinforcement and jute fabric (on the upper sides) is placed on both sides. After forming, a technical drying takes place (by using thermal energy from natural gas). This use of energy also dominates the LCA results. By taking into account the CO2 integration during the reed and jute growth, the CO2 balance is nevertheless comparatively small. It should be noted that at the end of the life cycle the incorporated CO2 is released again (for example after thermal treatment or rotting).

During the disposal phase, manual dismantling is taken into account in Module C1 for plasters, mortar and construction boards made of clay, and a mechanical dismantling for staple walls and clay masonry.
The transport in module C2 to the treatment plant takes place with a truck (50km).
In module C3 a treatment of the clay product is accounted for, whereby 3% material is lost.
In Module D, a credit for the net amount of material (amount recovered minus treatment losses, including possible fiber reinforcements) for the substitution of clay powder.

## Technical purpose
Clay panels are used in the interior as walls or ceiling plates. Depending on the substrate, the panels can be glued, clamped or screwed. Clay panels are characterized by a high moisture absorption and -dispensing capacity.

## Safety margin
20 %. Product system depicted except for a few missing processes / flows. Technological, temporal and geographic representativeness partly given.

## Reference product
- Clay panel: 1

## Inputs
- Use of renewable primary energy as energy carrier (PERE) [MJ]: A1-A3 24.0578, C2 0.0306063, C3 0.0747449, D -0.013738
- Use of renewable primary energy resources used as raw materials (PERM) [MJ]: A1-A3 0, C2 0, C3 0, D 0
- Total use of renewable primary energy (PERT) [MJ]: A1-A3 24.0578, C2 0.0306063, C3 0.0747449, D -0.013738
- Use of non renewable primary energy as energy carrier (PENRE) [MJ]: A1-A3 34.5366, C2 0.527348, C3 0.845888, D -0.236706
- Use of non renewable primary energy resources used as raw materials (PENRM) [MJ]: A1-A3 0, C2 0, C3 0, D 0
- Total use of non renewable primary energy resource (PENRT) [MJ]: A1-A3 34.5366, C2 0.527348, C3 0.845888, D -0.236706
- Use of secondary material (SM) [kg]: A1-A3 0, C2 0, C3 0, D 0
- Use of renewable secondary fuels (SF) [MJ]: A1-A3 0, C2 0, C3 0, D 0
- Use of non renewable secondary fuels (NRSF) [MJ]: A1-A3 0, C2 0, C3 0, D 0
- Net use of fresh water (FW) [m3]: A1-A3 0.0237186, C2 2.72014e-5, C3 0.000219349, D -1.22096e-5

## Outputs
- Hazardous waste disposed (HWD) [kg]: A1-A3 8.1887e-9, C2 2.20414e-11, C3 4.91336e-11, D -9.89354e-12
- Non harzardous waste disposed (NHWD) [kg]: A1-A3 0.0131476, C2 8.51259e-5, C3 0.000243594, D -3.82097e-5
- Radioactive waste disposed (RWD) [kg]: A1-A3 0.000163331, C2 5.06059e-7, C3 6.22762e-6, D -2.2715e-7
- Components for re-use (CRU) [kg]: A1-A3 0, C2 0, C3 0, D 0
- Materials for recycling (MFR) [kg]: A1-A3 0, C2 0, C3 13.579, D 0
- Materials for energy recovery (MER) [kg]: A1-A3 0, C2 0, C3 0, D 0
- Exported electrical energy (EEE) [MJ]: A1-A3 0, C2 0, C3 0, D 0
- Exported thermal energy (EET) [MJ]: A1-A3 0, C2 0, C3 0, D 0

## Impact indicators
- Global Warming Potential - total (GWP-total) [kg CO2 eq.]: A1-A3 0.545377, C2 0.0400562, C3 1.81518, D -0.0177037
- Global Warming Potential - fossil fuels (GWP-fossil) [kg CO2 eq.]: A1-A3 2.23684, C2 0.0397843, C3 0.0448392, D -0.0175835
- Global Warming Potential - biogenic (GWP-biogenic) [kg CO2 eq.]: A1-A3 -1.76907, C2 1.64802e-5, C3 1.7701, D -5.55901e-6
- Global Warming Potential - land use and land use change (GWP-luluc) [kg CO2 eq.]: A1-A3 0.0776113, C2 0.000255505, C3 0.000245592, D -0.000114686
- Depletion potenzial of the stratospheric ozone layer (ODP) [kg CFC-11 eq.]: A1-A3 5.88853e-15, C2 1.01798e-17, C3 1.99946e-16, D -4.5693e-18
- Acidifcation potential, Accumulated Exceedance (AP) [Mole of H+ eq.]: A1-A3 0.00706563, C2 0.000112797, C3 0.000417873, D -0.000197487
- Eutrophication potential - freshwater (EP-freshwater) [kg P eq.]: A1-A3 9.95659e-5, C2 8.18209e-8, C3 1.0211e-7, D -3.67262e-8
- Eutrophication potential - marine (EP-marine) [kg N eq.]: A1-A3 0.00229986, C2 5.19634e-5, C3 0.000206714, D -0.000100613
- Eutrophication potential - terrestrial (EP-terrestrial) [Mole of N eq.]: A1-A3 0.0213757, C2 0.000581376, C3 0.00227173, D -0.00110657
- Photochemical Ozone Creation Potential (POCP) [kg NMVOC eq.]: A1-A3 0.00494151, C2 0.00010133, C3 0.000600852, D -0.000291198
- Abiotic depletion potential - non-fossil resources (ADPE) [kg Sb eq.]: A1-A3 2.07354e-7, C2 3.46068e-9, C3 4.94133e-8, D -1.55336e-9
- Abiotic depletion potential - fossil resources (ADPF) [MJ]: A1-A3 34.5329, C2 0.527326, C3 0.845837, D -0.236696
- Water (user) deprivation potential (WDP) [m³ world equiv.]: A1-A3 0.159531, C2 0.000154655, C3 0.00753045, D -6.94187e-5

## Use advice
This data set refers to the production of 1 m² of clay panel with a thickness of 2 cm. The bulk density is 700 kg/m³. The thermal conductivity is 0.12 - 0.14 W/mK.

The data set represents a cradle to gate inventory. It can be used to characterise the supply chain situation of the respective commodity in a representative manner. Combination with individual unit processes using this commodity enables the generation of user-specific (product) LCAs.

## Data sources
- GaBi databases
- Documentation of data quality management
- GaBi Database Edition 2021, CUP2021.01
- GaBi database (all versions)
