# Sigma Coatings Matt Interior Wall Paints

Dataset: ILCD process, EPD, average dataset
Geography: NL
Reference year: 2019
Valid until: 2024
Classification: OEKOBAU.DAT: Beschichtungen / Innenbeschichtungen / Innenfarben
Classification: IBUCategories: 02 Building products / Construction adhesives and coatings / Coatings with organic binders
Method details: Coatings with organic binders.pdf
Generated by: PPG AC-EMEA Product Stewardship Department
Registration number: EPD-PPG-20190061-CAC1-EN
Owner: Sigma Coatings Deutschland GmbH
Compliance: DIN EN 15804; ISO 14025
Review: Accredited third party review by Institut Bauen und Umwelt e. V.
Amounts: rows without a unit in brackets have none in this file; such an amount is in the reference unit of its flow, which a separate flow dataset defines
copyright: true
licenseType: Free of charge for all users and uses
accessRestrictions: None

## General comment
Sigma Coatings matt interior wall paints are water-based emulsion paints for interior wall coatings.

According to the European standard /EN 13300/, the products have a matt finish, have class 2 or 3 hiding power and class 2 or 3 wet abrasion resistance.

In the wet state, the products have a free-flowing, viscous consistency with a homogeneous appearance. After extended periods of standing, a small amount of liquid may collect on the surface of the product. This can be remedied by stirring the paint until it becomes homogeneous again. This will in no way affect the properties of the product.

Sigma Coatings matt interior wall paints are available in many different shades. The color of the wet product gives an approximate impression of the color of the dried coating. Slight differences in color between the wet product and the dried coating may occur.

This declaration refers to a mass-weighted average of the quantities of BrandiRapid, BrandiColor Extrem, BrandiMatt and Mattlatex produced. For this EPD the impact of the white color was calculated which gives a conservative estimate of the impact of the products.

## Technology and included processes
Matt coating for interior mineral surfaces. Wet scrub class1 (EN 13300) Opacity class 1 at a spreading rate of 8 m²/l (EN 13300) Technical Data Density [g/cm³] 1,32 Solids content 54 % pH-value 7,5-8 Sigma Coatings Polymatt has a consumption rate of 130 ml/m².
Declared unit:
The declared unit for the calculation is 1 kg of Sigma Coatings interior matt wall paints.

## Technical purpose
Sigma Coatings matt interior wall paints can be applied using a roller, brush, or by spray application techniques.

They are suitable for application on all surfaces in interior living and working areas. These include (but are not limited to):

- Plaster board

- Gypsum plaster

- Ingrain wall paper (Rauhfaser)

- Wall Paper

- Structured wall paper (Strukturtapeten)

- Glass fibre wall coatings (Glasfasergewebe)

The product is suitable for both new uncoated substrates and renovation projects where coating of previously painted surfaces is required.

Sigma Coatings matt interior wall paints are not recommended for exterior application, nor are they recommended for application in wet areas.

The substrate should be dry, solid and free of contaminants. Porous, crumbly, and absorbent surfaces should be pre-treated with a primer. Water soluble contaminants should be removed as much as possible. For best results surfaces contaminated with water soluble substances will benefit from the application of a stain isolating primer.

For best results the temperature of the surrounding environment and/or substrate should be above 5oC and less than 25oC.

## Reference product
- Sigma Coatings interior matt wall paints (): 1

## Inputs
- Renewable primary energy as energy carrier (PERE) [MJ]: A1-A3 1.78718, A4 0.0117884, A5 0.974082, C1 1.48728e-5, C2 0.000621555, C4 0.00390971
- Renewable primary energy resources as material utilization (PERM) [MJ]: A1-A3 0, A4 0, A5 -0.801891, C1 0, C2 0, C4 0
- Total use of renewable primary energy resources (PERT) [MJ]: A1-A3 2.67967, A4 0.0117884, A5 0.172191, C1 1.48728e-5, C2 0.000621555, C4 0.00390971
- Non renewable primary energy as energy carrier (PENRE) [MJ]: A1-A3 18.0991, A4 0.810631, A5 5.46061, C1 0.00181348, C2 0.0427413, C4 0.134637
- Non renewable primary energy as material utilization (PENRM) [MJ]: A1-A3 0, A4 0, A5 -1.41301, C1 0, C2 0, C4 0
- Total use of non renewable primary energy resources (PENRT) [MJ]: A1-A3 21.2739, A4 0.810553, A5 4.04701, C1 0.00181331, C2 0.0427372, C4 0.134627
- Use of secondary material (SM) [kg]: A1-A3 0, A4 0, A5 0, C1 0, C2 0, C4 0
- Use of renewable secondary fuels (RSF) [MJ]: A1-A3 0, A4 0, A5 0, C1 0, C2 0, C4 0
- Use of non renewable secondary fuels (NRSF) [MJ]: A1-A3 0, A4 0, A5 0, C1 0, C2 0, C4 0
- Use of net fresh water (FW) [m^3]: A1-A3 0.0254498, A4 0.00015232, A5 0.00227362, C1 2.82828e-7, C2 8.03124e-6, C4 0.0001593

## Outputs
- Hazardous waste disposed (HWD) [kg]: A1-A3 0.202441, A4 0.000478269, A5 0.00800979, C1 1.69319e-6, C2 2.52172e-5, C4 0.000117067
- Non hazardous waste disposed (NHWD) [kg]: A1-A3 0.776603, A4 0.0422119, A5 0.0502139, C1 1.09977e-5, C2 0.00222566, C4 0.569145
- Radioactive waste disposed (RWD) [kg]: A1-A3 7.46663e-5, A4 5.56692e-6, A5 4.82494e-6, C1 1.22913e-8, C2 2.93521e-7, C4 8.91455e-7
- Components for re-use (CRU) [kg]: A1-A3 0, A4 0, A5 0, C1 0, C2 0, C4 0
- Materials for recycling (MFR) [kg]: A1-A3 0, A4 0, A5 0.0105743, C1 0, C2 0, C4 0
- Materials for energy recovery (MER) [kg]: A1-A3 0, A4 0, A5 0, C1 0, C2 0, C4 0
- Exported electrical energy (EEE) [MJ]: A1-A3 0, A4 0, A5 0.525318, C1 0, C2 0, C4 0
- Exported thermal energy (EET) [MJ]: A1-A3 0, A4 0, A5 1.07, C1 0, C2 0, C4 0

## Impact indicators
- Global warming potential (GWP) [kg CO_(2)-Äq.]: A1-A3 1.3164, A4 0.0521142, A5 0.340568, C1 0.00012559, C2 0.00274777, C4 0.0497474
- Depletion potential of the stratospheric ozone layer (ODP) [kg CFC11-Äq.]: A1-A3 1.68639e-7, A4 9.76451e-9, A5 7.16629e-9, C1 2.20224e-11, C2 5.14843e-10, C4 1.47043e-9
- Acidification potential of land and water (AP) [kg SO_(2)-Äq.]: A1-A3 0.0115022, A4 0.000202713, A5 0.000652682, C1 9.30094e-7, C2 1.06882e-5, C4 3.15782e-5
- Eutrophication potential (EP) [kg PO_(4)^(3)-Äq.]: A1-A3 0.00082124, A4 3.65303e-5, A5 7.77504e-5, C1 1.99465e-7, C2 1.9261e-6, C4 7.54402e-6
- Formation potential of tropospheric ozone photochemical oxidants (POCP) [kg Ethen-Äq.]: A1-A3 0.00115202, A4 2.92031e-5, A5 0.00012061, C1 1.45716e-7, C2 1.53976e-6, C4 1.36671e-5
- Abiotic depletion potential for non fossil resources (ADPE) [kg Sb-Äq.]: A1-A3 8.89105e-6, A4 1.63555e-7, A5 1.62244e-7, C1 7.0013e-11, C2 8.62361e-9, C4 7.21112e-9
- Abiotic depletion potential for fossil resources (ADPF) [MJ]: A1-A3 19.0246, A4 0.791933, A5 3.5865, C1 0.00179001, C2 0.0417554, C4 0.126167

## Use advice
Scope:
This EPD is applicable to the following products:

- BrandiRapid
- BrandiColor Extrem
- BrandiMatt
- Mattlatex

The products produced at the PPG production site in Uithoorn, The Netherlands. The results are average values of the analyzed products.
System boundary:
The system boundaries of the product LCA follow the modular design defined by /EN15804/. This cradle-to-gate with options study includes the Product stage (A1-A3).

A1 - Raw materials. This module includes all operations immediately up to the point before the products leave the gate of the supplier. Included in this module are:

Extraction of the raw materials.

Transport of the materials from the point of extraction to the site of processing, and any on-site or intermediate transport.

Processing of the raw materials including the impact of the energy requirements and waste processing.

A2 -Transport of raw materials from the suppliers site to the product manufacturing site. This includes:

The production of fuel and emissions for fuel consumption for the operation of the vehicle .

An allocation for the construction, maintenance and disposal of the vehicle at the end of its life.

An allocation for the construction and maintenance of road infrastructure.

A3 - This module includes all the activities involved in the production of Sigma Coatings interior matt wall paints. This includes:

Energy requirements for processing.

Disposal of any waste generated in the production process.

Emissions, both direct and indirect, during the production process.

The extraction of raw materials and processing into the final product for any packaging used.

A4 - Transport of packaged product to site of application. This includes:

The production and emissions for fuel consumption for the operation of the vehicle including.

An allocation for the construction, maintenance and disposal of the vehicle at the end of its life.

An allocation for the construction and maintenance of road infrastructure.

A5 – Application Process. This includes:

The manufacture of application tools and other ancillary materials including their raw materials and processing.

Transport of the application tools and other ancillary materials from the site of manufacture to the site of installation.

Life-cycle impacts of losses due to spills and residual product in packaging.

Disposal of packaging.

Disposal of waste from spills and residual product in packaging.

Any direct volatile organic compound (VOC) emissions to the environment during drying of the coating.

C1 – Demolition Stage. This includes:

An allocation for the construction, maintenance and disposal of the demolition machinery at the end of life.

The production and emissions for fuel consumption for the operation of the vehicle during demolition.

An allocation for the construction, maintenance and disposal of the demolition machinery at the end of life.

C2 - Transport at End of Life. This includes:

The production and emissions for fuel consumption for the operation of the vehicle including.

An allocation for the construction, maintenance and disposal of the vehicle at the end of its life.

An allocation for the construction and maintenance of road infrastructure.

C4 - Disposal. This includes:

Construction and maintenance of landfill site.

Direct environmental emissions from landfill site.

Impact indicators were calculated using /SimaPro V.8.4/.

To calculate the impact categories the characterisation factors published in /EN 15804:2012+A1: 2013/ (Annex C) were used. These characterisation factors were published as the "baseline" by /CML/ (Institute of Environmental Sciences, Faculty of Science, University of Leiden, Netherlands) in the 2012 version.

Upstream data was modelled using the /Ecoinvent/ LCI database version 3.3 using the Allocation, cut-off by classification dataset.

## Data sources
- ecoinvent database (all versions)
- ecoinvent 3.3 database
