# ECB roofing membrane according to DIN 16729 (with PES fleece)

Dataset: ILCD process, EPD, generic dataset
Geography: DE
Reference year: 2021
Valid until: 2022
Classification: oekobau.dat: Kunststoffe / Dachbahnen / ECB-Dachbahnen (Ethylen-Copolymer-Bitumen)
Owner: Sphera Solutions GmbH
Compliance: EN 15804+A2
Review: Dependent internal review by Sphera Solutions GmbH; Independent external review by GaBi user forum
Amounts: rows without a unit in brackets have none in this file; such an amount is in the reference unit of its flow, which a separate flow dataset defines
copyright: true
licenseType: Free of charge for all users and uses
accessRestrictions: The license conditions as stated on https://www.oekobaudat.de/ apply.
accessRestrictions: Es gelten die Lizenzbedingungen wie sie auf https://www.oekobaudat.de/ genannt sind.

## General comment
This data set has been modeled according to the European Standard EN 15804+A2 for Sustainable Building. Results are depicted in modules that allow the structured expression of results over the entire life cycle.

## Geography
The data set represents the country specific situation in Germany, focusing on the main technologies, the region specific characteristics and / or import statistics.

## Time period
Annual average

## Technology and included processes
In the background system of the ECB roofing membrane, a glass fiber reinforcement, a PES fleece as well as a transport packaging were considered. The membranes are produced by an extrusion process. The upstream chain of ECB production dominates the LCA.

In module C1, a manual dismantling (no loads) is assumed, collecting losses are neglected.
The transport in module C2 to the recycling plant takes place with a truck (50km).
Module C3 takes into account the grinding and thermal treatment (combustion) of the material. When calculating combustion emissions and credits, the specific calorific value of each material and the material composition are taken into account.
In module D credits for the substitution of electricity (German electricity mix) and thermal energy (from natural gas) are given.

## Technical purpose
ECB roofing membranes are used as roofing and waterproofing membranes. Laying may be loose, weighted or mechanically fastened. The polyester fleece lamination ensures that the membrane can be glued on other materials or laid on rough surfaces. The glss-fibre reinforcement provides for a higher mechanical stability.

## Safety margin
20 %. Product system depicted except for a few missing processes / flows. Technological, temporal and geographic representativeness partly given.

## Reference product
- ECB roofing membrane according to DIN 16729 (with PES fleece): 1

## Inputs
- Use of renewable primary energy as energy carrier (PERE) [MJ]: A1-A3 21.0276, C2 0.0050719, C3 0.958652, D -13.6327
- Use of renewable primary energy resources used as raw materials (PERM) [MJ]: A1-A3 0, C2 0, C3 0, D 0
- Total use of renewable primary energy (PERT) [MJ]: A1-A3 21.0276, C2 0.0050719, C3 0.958652, D -13.6327
- Use of non renewable primary energy as energy carrier (PENRE) [MJ]: A1-A3 119.83, C2 0.087389, C3 103.533, D -40.3205
- Use of non renewable primary energy resources used as raw materials (PENRM) [MJ]: A1-A3 83.5, C2 0, C3 -83.5, D 0
- Total use of non renewable primary energy resource (PENRT) [MJ]: A1-A3 203.33, C2 0.087389, C3 20.0333, D -40.3205
- Use of secondary material (SM) [kg]: A1-A3 0, C2 0, C3 0, D 0
- Use of renewable secondary fuels (SF) [MJ]: A1-A3 0, C2 0, C3 0, D 0
- Use of non renewable secondary fuels (NRSF) [MJ]: A1-A3 0, C2 0, C3 0, D 0
- Net use of fresh water (FW) [m3]: A1-A3 0.0285333, C2 4.50765e-6, C3 0.0173018, D -0.00507136

## Outputs
- Hazardous waste disposed (HWD) [kg]: A1-A3 5.53002e-8, C2 3.65258e-12, C3 7.22692e-10, D -1.3998e-8
- Non harzardous waste disposed (NHWD) [kg]: A1-A3 0.0923515, C2 1.41066e-5, C3 0.734995, D -0.0212662
- Radioactive waste disposed (RWD) [kg]: A1-A3 0.00319446, C2 8.38612e-8, C3 0.000116, D -0.00146621
- Components for re-use (CRU) [kg]: A1-A3 0, C2 0, C3 0, D 0
- Materials for recycling (MFR) [kg]: A1-A3 0, C2 0, C3 0, D 0
- Materials for energy recovery (MER) [kg]: A1-A3 0, C2 0, C3 2.32, D 0
- Exported electrical energy (EEE) [MJ]: A1-A3 0, C2 0, C3 10.921, D 0
- Exported thermal energy (EET) [MJ]: A1-A3 0, C2 0, C3 25.0738, D 0

## Impact indicators
- Global Warming Potential - total (GWP-total) [kg CO2 eq.]: A1-A3 7.71403, C2 0.00663789, C3 7.07631, D -2.59471
- Global Warming Potential - fossil fuels (GWP-fossil) [kg CO2 eq.]: A1-A3 7.81622, C2 0.00659282, C3 7.07515, D -2.56333
- Global Warming Potential - biogenic (GWP-biogenic) [kg CO2 eq.]: A1-A3 -0.109108, C2 2.73101e-6, C3 0.00072582, D -0.0276181
- Global Warming Potential - land use and land use change (GWP-luluc) [kg CO2 eq.]: A1-A3 0.00691879, C2 4.23409e-5, C3 0.000441276, D -0.00376596
- Depletion potenzial of the stratospheric ozone layer (ODP) [kg CFC-11 eq.]: A1-A3 5.49798e-12, C2 1.68693e-18, C3 3.88535e-15, D -5.95146e-14
- Acidifcation potential, Accumulated Exceedance (AP) [Mole of H+ eq.]: A1-A3 0.0139004, C2 1.86922e-5, C3 0.00122702, D -0.00263023
- Eutrophication potential - freshwater (EP-freshwater) [kg P eq.]: A1-A3 1.79978e-5, C2 1.35589e-8, C3 5.62839e-7, D -6.26557e-6
- Eutrophication potential - marine (EP-marine) [kg N eq.]: A1-A3 0.00333685, C2 8.61108e-6, C3 0.00027681, D -0.000967402
- Eutrophication potential - terrestrial (EP-terrestrial) [Mole of N eq.]: A1-A3 0.0361753, C2 9.63423e-5, C3 0.00565701, D -0.0103063
- Photochemical Ozone Creation Potential (POCP) [kg NMVOC eq.]: A1-A3 0.0123715, C2 1.67918e-5, C3 0.00077079, D -0.00253366
- Abiotic depletion potential - non-fossil resources (ADPE) [kg Sb eq.]: A1-A3 1.94564e-6, C2 5.73484e-10, C3 5.27647e-8, D -8.04034e-7
- Abiotic depletion potential - fossil resources (ADPF) [MJ]: A1-A3 219.98, C2 0.0873854, C3 3.33249, D -40.3148
- Water (user) deprivation potential (WDP) [m³ world equiv.]: A1-A3 0.704655, C2 2.56286e-5, C3 0.72357, D -0.0307876

## Use advice
This dataset refers to 1 m² synthetic roofing sheet of ethylene copolymer bitumen (ECB) with a thickness of 2 mm. A lamination with a PES fleece, and a glass fiber reinforcement has been considered. The basis weight is 2.32 kg / m². The data set can be used approximately for the estimation of surface weights of 1.5 - 3 kg/m², as well as for the estimation of ECB roof sheets without PES-fleece.

The data set represents a cradle to gate inventory. It can be used to characterise the supply chain situation of the respective commodity in a representative manner. Combination with individual unit processes using this commodity enables the generation of user-specific (product) LCAs.

## Data sources
- GaBi databases
- Documentation of data quality management
- GaBi Database Edition 2021, CUP2021.01
- GaBi database (all versions)
