# Woodchip boiler 20-120 kW; 1 piece

Dataset: ILCD process, EPD, generic dataset
Geography: DE
Reference year: 2021
Valid until: 2022
Classification: oekobau.dat: Gebäudetechnik / Heizung / Wärmeerzeuger
Owner: Sphera Solutions GmbH
Compliance: EN 15804+A2
Review: Dependent internal review by Sphera Solutions GmbH; Independent external review by GaBi user forum
Amounts: rows without a unit in brackets have none in this file; such an amount is in the reference unit of its flow, which a separate flow dataset defines
copyright: true
licenseType: Free of charge for all users and uses
accessRestrictions: The license conditions as stated on https://www.oekobaudat.de/ apply.
accessRestrictions: Es gelten die Lizenzbedingungen wie sie auf https://www.oekobaudat.de/ genannt sind.

## General comment
This data set has been modeled according to the European Standard EN 15804+A2 for Sustainable Building. Results are depicted in modules that allow the structured expression of results over the entire life cycle.

## Geography
The data set represents the country specific situation in Germany, focusing on the main technologies, the region specific characteristics and / or import statistics.

## Time period
Annual average

## Technology and included processes
This boiler is fueled with wood chips. It is a boiler with 20-120 kW range capacity and an average weight of 921 kg. The weight was calculated based on the output of 260 kW. The boiler's expected lifetime is 20-year on average, according to VDI 2067 directive. The water content of woodchips is 20% mass.
Background system:
Electricity: Electricity is modelled according to the individual country-specific situations. The country-specific modelling is achieved on multiple levels. Firstly, individual energy carrier specific power plants and plants for renewable energy sources are modelled according to the current national electricity grid mix. Modelling the electricity consumption mix includes transmission / distribution losses and the own use by energy producers (own consumption of power plants and "other" own consumption e.g. due to pumped storage hydro power etc.), as well as imported electricity. Secondly, the national emission and efficiency standards of the power plants are modelled as well as the share of electricity plants and combined heat and power plants (CHP). Thirdly, the country-specific energy carrier supply (share of imports and / or domestic supply) including the country-specific energy carrier properties (e.g. element and energy content) are accounted for. Fourthly, the exploration, mining/production, processing and transport processes of the energy carrier supply chains are modelled according to the specific situation of each electricity producing country. The different production and processing techniques (emissions and efficiencies) in the different energy producing countries are considered, e.g. different crude oil production technologies or different flaring rates at the oil platforms.
Thermal energy, process steam: The thermal energy and process steam supply is modelled according to the individual country-specific situation with regard to emission standards and considered energy carriers. The thermal energy and process steam are produced at heat plants. Efficiencies for thermal energy production are by definition 100% in relation to the corresponding energy carrier input. For process steam the efficiency ranges from 85%, 90% to 95%. The energy carriers used for the generation of thermal energy and process steam are modelled according to the specific import situation (see electricity above).
Transports: All relevant and known transport processes are included. Ocean-going and inland ship transport as well as rail, truck and pipeline transport of bulk commodities are considered.
Energy carriers: The energy carriers are modelled according to the specific supply situation (see electricity above).
Refinery products: Diesel fuel, gasoline, technical gases, fuel oils, lubricants and residues such as bitumen are modelled with a parameterised country-specific refinery model. The refinery model represents the current national standard in refining techniques (e.g. emission level, internal energy consumption, etc.) as well as the individual country-specific product output spectrum, which can be quite different from country to country. The supply of crude oil is modelled, again, according to the country-specific situation with the respective properties of the resources.

## Technical purpose
This product can be used in construction.

## Safety margin
20 %. Product system depicted except for a few missing processes / flows. Technological, temporal and geographic representativeness partly given.

## Reference product
- Woodchip boiler 20-120 kW: 1

## Inputs
- Use of renewable primary energy as energy carrier (PERE) [MJ]: A1-A3 1818.84, C2 27.4079, C3 0, C4 9.37739, D 1084.18
- Use of renewable primary energy resources used as raw materials (PERM) [MJ]: A1-A3 0, C2 0, C3 0, C4 0, D 0
- Total use of renewable primary energy (PERT) [MJ]: A1-A3 1818.84, C2 27.4079, C3 0, C4 9.37739, D 1084.18
- Use of non renewable primary energy as energy carrier (PENRE) [MJ]: A1-A3 22245, C2 108.515, C3 44.208, C4 75.322, D -5973.55
- Use of non renewable primary energy resources used as raw materials (PENRM) [MJ]: A1-A3 36.84, C2 0, C3 -36.84, C4 0, D 0
- Total use of non renewable primary energy resource (PENRT) [MJ]: A1-A3 22281.8, C2 108.515, C3 7.368, C4 75.322, D -5973.55
- Use of secondary material (SM) [kg]: A1-A3 90.8568, C2 0, C3 0, C4 0, D 0
- Use of renewable secondary fuels (SF) [MJ]: A1-A3 0, C2 0, C3 0, C4 0, D 0
- Use of non renewable secondary fuels (NRSF) [MJ]: A1-A3 0, C2 0, C3 0, C4 0, D 0
- Net use of fresh water (FW) [m3]: A1-A3 3.16681, C2 0.0125843, C3 0, C4 0.0182694, D -0.544988

## Outputs
- Hazardous waste disposed (HWD) [kg]: A1-A3 7.59522e-5, C2 1.4952e-8, C3 0, C4 7.80571e-9, D 1.04299e-6
- Non harzardous waste disposed (NHWD) [kg]: A1-A3 43.7326, C2 0.035694, C3 0, C4 374.914, D -11.714
- Radioactive waste disposed (RWD) [kg]: A1-A3 0.336954, C2 0.00250993, C3 0, C4 0.000688286, D 0.139932
- Components for re-use (CRU) [kg]: A1-A3 0, C2 0, C3 0, C4 0, D 0
- Materials for recycling (MFR) [kg]: A1-A3 0, C2 0, C3 0, C4 0, D 0
- Materials for energy recovery (MER) [kg]: A1-A3 0, C2 0, C3 0, C4 0, D 0
- Exported electrical energy (EEE) [MJ]: A1-A3 0, C2 0, C3 0, C4 0, D 0
- Exported thermal energy (EET) [MJ]: A1-A3 0, C2 0, C3 0, C4 0, D 0

## Impact indicators
- Global Warming Potential - total (GWP-total) [kg CO2 eq.]: A1-A3 2250.1, C2 8.1496, C3 0, C4 7.60997, D -808.1
- Global Warming Potential - fossil fuels (GWP-fossil) [kg CO2 eq.]: A1-A3 2247.07, C2 8.07561, C3 0, C4 5.80796, D -809.775
- Global Warming Potential - biogenic (GWP-biogenic) [kg CO2 eq.]: A1-A3 1.97598, C2 0.0276331, C3 0, C4 1.78557, D 1.69416
- Global Warming Potential - land use and land use change (GWP-luluc) [kg CO2 eq.]: A1-A3 1.06039, C2 0.0463632, C3 0, C4 0.0164359, D -0.0190314
- Depletion potenzial of the stratospheric ozone layer (ODP) [kg CFC-11 eq.]: A1-A3 9.54605e-9, C2 1.00459e-13, C3 0, C4 1.88705e-14, D 5.45564e-12
- Acidifcation potential, Accumulated Exceedance (AP) [Mole of H+ eq.]: A1-A3 7.95695, C2 0.0537465, C3 0, C4 0.0406479, D -2.23705
- Eutrophication potential - freshwater (EP-freshwater) [kg P eq.]: A1-A3 0.00260161, C2 2.30647e-5, C3 0, C4 5.93059e-5, D -0.000139949
- Eutrophication potential - marine (EP-marine) [kg N eq.]: A1-A3 1.48428, C2 0.026482, C3 0, C4 0.0109412, D -0.464571
- Eutrophication potential - terrestrial (EP-terrestrial) [Mole of N eq.]: A1-A3 16.1899, C2 0.291673, C3 0, C4 0.116367, D -5.03324
- Photochemical Ozone Creation Potential (POCP) [kg NMVOC eq.]: A1-A3 4.76974, C2 0.0500291, C3 0, C4 0.0328067, D -1.55296
- Abiotic depletion potential - non-fossil resources (ADPE) [kg Sb eq.]: A1-A3 0.0581522, C2 1.69626e-6, C3 0, C4 5.00557e-7, D 2.49425e-5
- Abiotic depletion potential - fossil resources (ADPF) [MJ]: A1-A3 22126.6, C2 108.503, C3 0, C4 75.2826, D -5906.16
- Water (user) deprivation potential (WDP) [m³ world equiv.]: A1-A3 38.8272, C2 0.0741979, C3 0, C4 0.609629, D 23.9673

## Use advice
The data set represents a cradle to gate inventory. It can be used to characterise the supply chain situation of the respective commodity in a representative manner. Combination with individual unit processes using this commodity enables the generation of user-specific (product) LCAs.

## Data sources
- VDI 2067
- PECH 2007
- FNR 2005
- FNR 2007
- Documentation of data quality management
- GaBi Database Edition 2021, CUP2021.01
- GaBi database (all versions)
