# ROCKWOOL stone wool insulation materials in the medium bulk density range

Dataset: ILCD process, EPD, average dataset
Geography: DE
Reference year: 2018
Valid until: 2023
Classification: OEKOBAU.DAT: Dämmstoffe / Mineralwolle / Steinwolle
Classification: IBUCategories: 02 Bauprodukte / Wärmedämmungsprodukte / Mineralische Dämmstoffe
Method details: Mineralische Dämmstoffe.pdf
Registration number: EPD-DRW-20180118-IBC1-DE
Owner: Deutsche Rockwool Mineralwoll GmbH & Co. OHG
Compliance: DIN EN 15804; ISO 14025
Review: Accredited third party review by Institut Bauen und Umwelt e. V.
Amounts: rows without a unit in brackets have none in this file; such an amount is in the reference unit of its flow, which a separate flow dataset defines
copyright: true

## General comment
The definition of mineral wool (stone or glass wool) in accordance with German hazardous substances law (Chemicals Prohibition Order, Hazardous Substances Ordinance) is as follows: "Artificial vitreous (silicate) fibres with random orientation and a mass content of more than 18 % of sodium, potassium, calcium, magnesium and barium oxides".
Stone wool insulation is a fibre insulation material. A major component is stone wool insulation fibres. These are monofilament artificial mineral fibres of a non-crystalline structure which are obtained from a silica-based molten mass. The mean fibre diameter is 3-6 µm. The fibres can be several centimetres in length.
The artificial resin-bonded stone wool insulation described in this declaration is manufactured in the form of medium-density sheets, mats or rolls (61-120 kg/m3). The products are supplied in thicknesses of between 20 mm and 350 mm, for example as compression-proof sheets, treadable two-layer sheets or felting and rolls.
For certain application areas, the insulation is provided with a functional facing on one or both sides.

## Technology and included processes
General information: Stone wool insulation is a fibre insulation material. A major component is stone wool insulation fibres. These are monofilament artificial mineral fibres of a non-crystalline structure which are obtained from a silica-based molten mass. The mean fibre diameter is 3-6 µm. The fibres can be several centimetres in length. The artificial resin-bonded stone wool insulation described in this declaration is manufactured in the form of medium-density sheets, mats or rolls (61 to 120 kg/m3). The products are supplied in thicknesses of between 20 mm and 350 mm, for example as compression-proof sheets, treadable two-layer sheets or felting and rolls. The environmental impacts of the facings are listed in the Appendix and are to be added to the LCA results in this declaration as described in the EPD. Production: Diabase or basalt as well as cement-bonded bricks are melted using coke as the energy carrier in a cupola furnace at approximately 1,400-1,500°C and frayed out by means of roller spinning. Immediately afterwards, mineral oil and binding agent are sprayed on as a watery solution. The binding agent serves to guarantee binding and dimensional stability and the mineral oil to reduce dust and to increase hydrophobisation. The bonding agent also contained in the watery solution supports the adhesion of the binding agent to the fibres. In the collecting chamber, the raw wool is placed on transport conveyors under negative pressure. Optionally, facings can then be applied. (The corresponding environmental impacts for this are specified in the Appendix.). The possibly faced raw fleece is fed into hardening furnaces in which hot air at 200-300°C is sucked through the wool mass whilst the binding agents link to thermosets. Finally, the product is shaped using saws. Environment and health during manufacturing: Exhaust air produced during manufacture is mechanically filtered and most of it thermally combusted. The heat released is used to pre-heat the blast air via heat exchangers. The separated dust is reused as a raw material. Waste water produced during manufacturing is mainly processed internally and returned to production. Declared lifecycle stages: The LCA results cover all lifecycle stages including the provisioning processes of raw materials and intermediates as well as the processing of secondary materials used as inputs (e.g. recycling processes), their transport to the factory and the production including all ancillary materials, energy inputs as well as the waste treatment and disposal of residual wastes accruing during production. The modules A1, A2 and A3 are aggregated to Module A1-A3. Further, the modules A4 (transport to the building site), A5 (assembly), C1 (deconstruction), C2 (transport), C3 (waste processing), C4 (disposal) and D (benefit) are declared. Technical data: Thermal conductivity [W/(mK)]: 0.032 to 0.050 [W/(mK)] according to /DIN EN 13162/ respectively /DIN EN 14303/]; Design value for thermal conductivity: [W/(mK)]: 0.033 to 0.049 [W/(mK)] according to /DIN 4108-4/; Water vapour diffusion resistance factor μ according to /DIN EN 12086/: µ = 1; Water vapor diffusion equivalent air layer thickness = μ x component thickness [m] (this would be 1 for a thickness of 1 m) Bulk density according to. /DIN EN 1602/: 61-120 kg/m³; Compressive stress (at 10 % deformation) according to /DIN EN 826/: 0,5 to 40 kPa; Sound absorption coefficient αS depending on the frequency is to be found in the data sheets for the relevant products. Declared unit: The declaration relates to the lifecycle of 1 m3 stone wool insulation material produced by DEUTSCHE ROCKWOOL GmbH & Co. KG . The products are manufactured in three factories which exhibit no technology differences for stone wool manufacture. The average was formed on the basis of production quantities. The bulk density of the declared products can be up to 61-120 kg/m3. An average bulk density of 96 kg/m3 is determined for the medium-density stone wool insulation for which the LCA results are shown below. The transfer of the results to other bulk densities is possible via a linear scale.
Declared unit:
The declaration relates to the lifecycle of 1 m3 stone wool insulation material produced by DEUTSCHE ROCKWOOL GmbH & Co. KG . The products are manufactured in three factories which exhibit no technology differences for stone wool manufacture. The average was formed on the basis of production quantities. The bulk density of the declared products can be 61-120 kg/m3. An average bulk density of 96 kg/m3 is determined for the medium-density stone wool insulation for which the LCA results are shown below. The transfer of the results to other bulk densities is possible via a linear scale.

## Technical purpose
All applications according to /DIN 4108-10/ for application areas of walls, ceilings and roofs with the requirements set out therein with regard to heat and noise insulation and mechanical properties
Domestic technology (insulation of heating and hot water pipes)
Technical insulation (insulation of pipes, district heating piping, boilers and equipment)
Industrial further processing (air conditioning ducts, fire protection doors, prefabricated house elements and chimney systems)
Fire protection elements (cable insulation and elements for steel constructions)

## Reference product
- ROCKWOOL-Steinwolle: 1

## Inputs
- Renewable primary energy as energy carrier (PERE) [MJ]: A1-A3 99.3, A4 1.39, A5 58.86, C1 0, C2 0.22, C3 0, C4 2.53, D -10.58
- Renewable primary energy resources as material utilization (PERM) [MJ]: A1-A3 73.25, A4 0, A5 -55.01, C1 0, C2 0, C3 0, C4 0, D 0
- Total use of renewable primary energy resources (PERT) [MJ]: A1-A3 175.66, A4 1.39, A5 3.91, C1 0, C2 0.22, C3 0, C4 2.53, D -10.58
- Non renewable primary energy as energy carrier (PENRE) [MJ]: A1-A3 897.3, A4 26.72, A5 51.35, C1 0, C2 4.3, C3 0, C4 20.44, D -48.85
- Non renewable primary energy as material utilization (PENRM) [MJ]: A1-A3 143.55, A4 0, A5 -27.39, C1 0, C2 0, C3 0, C4 0, D 0
- Total use of non renewable primary energy resources (PENRT) [MJ]: A1-A3 1137.14, A4 26.72, A5 25.84, C1 0, C2 4.3, C3 0, C4 20.44, D -48.85
- Use of secondary material (SM) [kg]: A1-A3 22.99, A4 0, A5 0.46, C1 0, C2 0, C3 0, C4 0, D 0
- Use of renewable secondary fuels (RSF) [MJ]: A1-A3 0, A4 0, A5 0, C1 0, C2 0, C3 0, C4 0, D 0
- Use of non renewable secondary fuels (NRSF) [MJ]: A1-A3 0, A4 0, A5 0, C1 0, C2 0, C3 0, C4 0, D 0
- Use of net fresh water (FW) [m^3]: A1-A3 0.284, A4 0.00257, A5 0.024, C1 0, C2 0.000414, C3 0, C4 0.0039, D -0.00675

## Outputs
- Hazardous waste disposed (HWD) [kg]: A1-A3 2.15e-6, A4 1.41e-6, A5 1.06e-7, C1 0, C2 2.27e-7, C3 0, C4 3.52e-7, D -2.77e-8
- Non hazardous waste disposed (NHWD) [kg]: A1-A3 7.47, A4 0.00215, A5 2.09, C1 0, C2 0.000346, C3 0, C4 95.9, D -0.0268
- Radioactive waste disposed (RWD) [kg]: A1-A3 0.0256, A4 5.58e-5, A5 0.000584, C1 0, C2 8.99e-6, C3 0, C4 0.000296, D -0.00223
- Components for re-use (CRU) [kg]: A1-A3 0, A4 0, A5 0, C1 0, C2 0, C3 0, C4 0, D 0
- Materials for recycling (MFR) [kg]: A1-A3 0, A4 0, A5 0, C1 0, C2 0, C3 0, C4 0, D 0
- Materials for energy recovery (MER) [kg]: A1-A3 0, A4 0, A5 0, C1 0, C2 0, C3 0, C4 0, D 0
- Exported electrical energy (EEE) [MJ]: A1-A3 0, A4 0, A5 10.63, C1 0, C2 0, C3 0, C4 0, D 0
- Exported thermal energy (EET) [MJ]: A1-A3 0, A4 0, A5 24.51, C1 0, C2 0, C3 0, C4 0, D 0

## Impact indicators
- Global warming potential (GWP) [kg CO_(2)-Äq.]: A1-A3 121.79, A4 1.96, A5 10.21, C1 0, C2 0.32, C3 0, C4 1.52, D -3.36
- Depletion potential of the stratospheric ozone layer (ODP) [kg CFC11-Äq.]: A1-A3 1.56e-10, A4 8.13e-14, A5 3.21e-12, C1 0, C2 1.31e-14, C3 0, C4 3.45e-13, D -2.56e-12
- Acidification potential of land and water (AP) [kg SO_(2)-Äq.]: A1-A3 0.585, A4 0.0017, A5 0.0128, C1 0, C2 0.000274, C3 0, C4 0.00902, D -0.0036
- Eutrophication potential (EP) [kg PO_(4)^(3)-Äq.]: A1-A3 0.0652, A4 0.000395, A5 0.00154, C1 0, C2 6.36e-5, C3 0, C4 0.00125, D -0.000603
- Formation potential of tropospheric ozone photochemical oxidants (POCP) [kg Ethen-Äq.]: A1-A3 0.0289, A4 -1.37e-5, A5 0.00065, C1 0, C2 -2.2e-6, C3 0, C4 0.000701, D -0.000307
- Abiotic depletion potential for non fossil resources (ADPE) [kg Sb-Äq.]: A1-A3 2.52e-5, A4 1.73e-7, A5 6.17e-7, C1 0, C2 2.79e-8, C3 0, C4 5.85e-7, D -1.27e-6
- Abiotic depletion potential for fossil resources (ADPF) [MJ]: A1-A3 1068.33, A4 26.58, A5 24.28, C1 0, C2 4.28, C3 0, C4 19.69, D -43.21

## Use advice
Scope:
The lifecycle assessment shown in the EPD relates to the lifecycle of unfaced or uncoated synthetic resin-bonded stone wool insulating material in the medium bulk density range from ROCKWOOL. The stone wool is produced in the Gladbeck, Neuburg and Flechtingen works in which the production data for 2016 was recorded. The key LCA results for the facings are to be found in the Appendix. This was produced and verified in 2015. The LCA thus represents 100% of the stone wool produced by ROCKWOOL.

This document is a translation from the German Environmental Product Declaration into English. It is based on the German original version EPD-DRW-20180118-IBC1-DE.
System boundary:
EPD type: Cradle to grave with options

The LCA includes the lifecycle phases of stone wool manufacture (A1-A3), transport to the building site (A4), the recycling and disposal of packaging and offcuts which accrue during installation (Module A5) and the end of life phase of the stone wool (Modules C1 to C4). Benefits as a result of thermal recycling of packaging were assigned to Module D.

Specifically, the following processes were included in the production stage (A1-A3):

Provisioning processes of pre-production and energy
Transport of raw materials and pre-products to the works
Manufacturing process in the factory including energy-related uses, disposal of accruing residual materials and emissions
Manufacture of packaging

Secondary materials which enter the system which have already reached the end of the waste characteristic before they are delivered were included free of loads but including the transports necessary for delivery. Waste used as alternative fuel also enters the system without loads. In accordance with the polluter-pays principle, the transport of this waste to the factory has to be added to the preceding product lifecycle and was not included in the LCA.

The quantities of packaging material included are annual usage or purchase quantities in which pallet rotations are already included. When selecting recycling processes for the calculation it was ensured that CO2 stored in den packaging materials is released as an emission during the recovery process.

Emissions and loads as a result of the recycling of packaging are allocated to Module A5 and resultant benefits were added to Module D.

The recycling and disposal of the stone wool at end of life include truck transport back to the factory of manufacture or a dumping ground (C2) and also the final disposal of the corresponding share (C4). The quantity of stone wool waste delivered from building sites which was deployed in the relevant year was included as the recycling quantity at end of life which is why no net quantities for recycling result and thus no benefits can be included in Module D. The scope of investigation of the facings covers Modules A1-A3, A4, A5, C1 to C4 and D. Since no additional packaging is included for the facing, no environmental loads or benefits ensue for facings in Modules A5 and D.

## Data sources
- ROCKWOOL Steinwolle-Dämmstoff im mittleren Rohdichtebereich.pdf
- GaBi Database (all versions)
- GaBi database SP35 2018
