# Usage - oil condensing boiler (20-120 kW, acc. EnEV); 20-120 kW

Dataset: ILCD process, EPD, generic dataset
Geography: DE
Reference year: 2018
Valid until: 2022
Classification: oekobau.dat: Gebäudetechnik / Nutzung / Nutzung Wärmeerzeuger (EnEV)
Owner: thinkstep
Compliance: DIN EN 15804
Review: Dependent internal review by thinkstep, IABP-GaBi, IBP-GaBi; Independent external review by GaBi user forum, GaBi bug forum, GaBi user community
Amounts: rows without a unit in brackets have none in this file; such an amount is in the reference unit of its flow, which a separate flow dataset defines
copyright: true

## General comment
This data set has been modeled according to the European Standard EN 15804 for Sustainable Building. Results are depicted in modules that allow the structured expression of results over the entire life cycle.

## Geography
The data set represents the country specific situation in Germany, focusing on the main technologies, the region specific characteristics and / or import statistics.

## Time period
Annual average

## Technology and included processes
Generation of thermal energy through burning of light fuel oil and emission of heat to a heat transfer medium (e.g. water) for the distribution of the heat in the building. For condensing boilers the exhaust gas temperature is cooled down to 60°C, that the condensing heat of the water can also be used and therefore a higher efficiency as for conventional boilers can be achieved. The boiler efficiency at 30% partial load is 99.9% and the average boiler efficiency 101%, calculated according to DIN 4701-10. Due to the small percentage of hydrogen in fuel oil compared to natural gas, the efficiency concerning the heating value of oil-condensing boilers is below the value for natural gas-condensing boilers. Concerning the calorific value, this is not the case. DIN 4701-10 corrects this, so that the boiler efficiency is over the efficiency of 30% partial load.

The data set was created according to the German EnEV (Energieeinsparverordnung or Energy Saving Ordinance). The auxiliary energy as well as the current requirement of a circulating pump is not included in this data set. Usage data corresponding to EnEV shall be used if the final energy according to EnEV is used as the initial value.

Background system:
Electricity: Electricity is modelled according to the individual country-specific situations. The country-specific modelling is achieved on multiple levels. Firstly, individual energy carrier specific power plants and plants for renewable energy sources are modelled according to the current national electricity grid mix. Modelling the electricity consumption mix includes transmission / distribution losses and the own use by energy producers (own consumption of power plants and "other" own consumption e.g. due to pumped storage hydro power etc.), as well as imported electricity. Secondly, the national emission and efficiency standards of the power plants are modelled as well as the share of electricity plants and combined heat and power plants (CHP). Thirdly, the country-specific energy carrier supply (share of imports and / or domestic supply) including the country-specific energy carrier properties (e.g. element and energy content) are accounted for. Fourthly, the exploration, mining/production, processing and transport processes of the energy carrier supply chains are modelled according to the specific situation of each electricity producing country. The different production and processing techniques (emissions and efficiencies) in the different energy producing countries are considered, e.g. different crude oil production technologies or different flaring rates at the oil platforms.
Thermal energy, process steam: The thermal energy and process steam supply is modelled according to the individual country-specific situation with regard to emission standards and considered energy carriers. The thermal energy and process steam are produced at heat plants. Efficiencies for thermal energy production are by definition 100% in relation to the corresponding energy carrier input. For process steam the efficiency ranges from 85%, 90% to 95%. The energy carriers used for the generation of thermal energy and process steam are modelled according to the specific import situation (see electricity above).
Transports: All relevant and known transport processes are included. Ocean-going and inland ship transport as well as rail, truck and pipeline transport of bulk commodities are considered.
Energy carriers: The energy carriers are modelled according to the specific supply situation (see electricity above).
Refinery products: Diesel fuel, gasoline, technical gases, fuel oils, lubricants and residues such as bitumen are modelled with a parameterised country-specific refinery model. The refinery model represents the current national standard in refining techniques (e.g. emission level, internal energy consumption, etc.) as well as the individual country-specific product output spectrum, which can be quite different from country to country. The supply of crude oil is modelled, again, according to the country-specific situation with the respective properties of the resources.

## Technical purpose
This product can be used in construction.

## Safety margin
0 %.

## Reference product
- Thermal energy (MJ): 3.6

## Inputs
- Use of renewable primary energy (PERE) [MJ]: B6 0.0193119
- Primary energy resources used as raw materials (PERM) [MJ]: B6 0
- Total use of renewable primary energy resources (PERT) [MJ]: B6 0.0193119
- Use of non-renewable primary energy (PENRE) [MJ]: B6 4.15044
- Non-renewable primary energy resources used as raw materials (PENRM) [MJ]: B6 0
- Total use of non-renewable primary energy resources (PENRT) [MJ]: B6 4.15044
- Input of secondary material (SM) [kg]: B6 0
- Use of renewable secondary fuels (RSF) [MJ]: B6 0
- Use of non renewable secondary fuels (NRSF) [MJ]: B6 0
- Use of net fresh water (FW) [m3]: B6 2.12432e-5

## Outputs
- Hazardous waste disposed (HWD) [kg]: B6 4.82707e-10
- Non-hazardous waste disposed (NHWD) [kg]: B6 0.000570983
- Radioactive waste disposed (RWD) [kg]: B6 3.76103e-6
- Components for re-use (CRU) [kg]: B6 0
- Materials for Recycling (MFR) [kg]: B6 0
- Material for Energy Recovery (MER) [kg]: B6 0
- Exported electrical energy (EEE) [MJ]: B6 0
- Exported thermal energy (EET) [MJ]: B6 0

## Impact indicators
- Global warming potential (GWP) [kg CO2 eq.]: B6 0.296927
- Ozone Depletion Potential (ODP) [kg R11 eq.]: B6 9.57454e-17
- Acidification potential (AP) [kg SO2 eq.]: B6 0.000512927
- Eutrophication potential (EP) [kg Phosphate eq.]: B6 2.93154e-5
- Photochemical Ozone Creation Potential (POCP) [kg Ethene eq.]: B6 4.13988e-5
- Abiotic depletion potential for non fossil resources (ADPE) [kg Sb eq.]: B6 1.109e-8
- Abiotic depletion potential for fossil resources (ADPF) [MJ]: B6 4.14091

## Use advice
The data set represents a cradle to gate inventory. It can be used to characterise the supply chain situation of the respective commodity in a representative manner. Combination with individual unit processes using this commodity enables the generation of user-specific (product) LCAs.

## Data sources
- DIN 2003
- DIN 2007
- PFEIFFER 2000
- GaBi Database Edition 2020, SP40
- GaBi database (all versions)
