# Glaskeramik - MAGNA Glaskeramik GmbH - MAGNA Glaskeramik; 1 m² Fläche; 21 mm Dicke

Dataset: ILCD process, EPD, specific dataset
Geography: DE
Reference year: 2016
Valid until: 2021
Classification: OEKOBAU.DAT: Komponenten von Fenstern und Vorhangfassaden / Füllungen / Opake Füllungen
Method details: EPD MAGNA Glaskeramik; Produktkategorieregeln Teil A; Produktkategorieregeln Teil B – für Flachglas im Bauwesen
Owner: MAGNA Glakeramik GmbH
Compliance: EN 15804
Review: Independent external review by Dr.-Ing. Carolin Roth
Amounts: rows without a unit in brackets have none in this file; such an amount is in the reference unit of its flow, which a separate flow dataset defines
copyright: true

## General comment
A1-A3 sowie Module A5, C1, C2, C3, C4, D. Das Umweltprofil beinhaltet die Aufwendungen für die Lebenszyklus-Stadien cradle to gate mit Optionen (Modul A1-A3). Die Herstellung der Verpackung wurde innerhalb der Module A1-A3 berücksichtigt.

## Geography
Dieser Datensatz repräsentiert die Situation des Unternehmens MAGNA Glaskeramik GmbH in Teutschenthal, Deutschland im Hinblick auf die wichtigsten Technologien und die gesetzlichen Rahmenbedingungen.

## Time period
jährlicher Durchschnitt

## Technology and included processes
Die Ökobilanzergebnisse umfassen die Lebenszyklusstadien für die Herstellung der Vorprodukte bis hin zur Rohstoffgewinnung und Verarbeitungsprozesse von als Input dienenden Sekundärstoffen (z.B. Recyclingprozesse), deren Transporte zum Werk sowie die Produktion selbst, einschließlich der Bereitstellung von allen Hilfs- und Betriebsstoffen, Energie, sowie die vollständige Abfallbehandlung oder die Deponierung der Restabfälle während des Stadiums der Produktion. Die Module A1, A2 und A3 sind hier als ein aggregiertes Modul A1-A3 ausgewiesen. Falls für diesen Datensatz weitere Module berechnet wurden, sind diese separat zu finden und können für eine Betrachtung des gesamten Lebenszyklus zusammengeführt werden.

## Technical purpose
Glaskeramik findet Anwendung im Außenbereich als Fassaden, Grabsteine und Skulpturen sowie im Innenbereich als Innenwände, Möbel, Theken, Tresen, Küchenarbeitsflächen, Aufzüge, Stufen, Böden, Waschtische, Duschen und Design Objekte.

## Reference product
- Glaskeramik - MAGNA Glaskeramik GmbH - MAGNA Glaskeramik: 1

## Inputs
- Use of net fresh water (FW) [m3]: A1-A3 173.5, A5 0.14, C1 0, C2 3.9e-5, C3 0, C4 0.22, D -0.27
- Use of non renewable primary energy (PENRE) [MJ]: A1-A3 965.75, A5 1.06, C1 0, C2 0.00891, C3 0, C4 2.44, D -3.33
- Use of non renewable primary energy resources used as raw materials (PENRM) [MJ]: A1-A3 0.25, A5 -0.23, C1 0, C2 0, C3 0, C4 -0.01, D 0
- Use of non renewable secondary fuels (NRSF) [MJ]: A1-A3 0, A5 0, C1 0, C2 0, C3 0, C4 0, D 0
- Use of renewable primary energy (PERE) [MJ]: A1-A3 1459.39, A5 0.33, C1 0, C2 0.000605, C3 0, C4 34.91, D -23.56
- Use of renewable primary energy resources used as raw materials (PERM) [MJ]: A1-A3 12.61, A5 0, C1 0, C2 0, C3 0, C4 -12.61, D 0
- Use of renewable secondary fuels (RSF) [MJ]: A1-A3 0, A5 0, C1 0, C2 0, C3 0, C4 0, D 0
- Use of secondary material (SM) [kg]: A1-A3 70, A5 0, C1 0, C2 0, C3 0, C4 0, D 0
- Total use of non renewable primary energy resource (PENRT) [MJ]: A1-A3 966, A5 0.83, C1 0, C2 0.00891, C3 0, C4 2.43, D -3.33
- Total use of renewable primary energy resources (PERT) [MJ]: A1-A3 1472, A5 0.33, C1 0, C2 0.000605, C3 0, C4 22.3, D -23.56

## Outputs
- Components for re-use (CRU) [kg]: A1-A3 0, A5 0, C1 0, C2 0, C3 0, C4 0, D 0
- Exported electrical energy (EEE) [MJ]: A1-A3 0, A5 0, C1 0, C2 0, C3 0, C4 0.9, D 0
- Exported thermal energy (EET) [MJ]: A1-A3 0, A5 0, C1 0, C2 0, C3 0, C4 2.21, D 0
- Hazardous waste disposed (HWD) [kg]: A1-A3 1.164e-5, A5 0, C1 0, C2 0, C3 0, C4 0, D 0
- Materials for energy recovery (MER) [kg]: A1-A3 0, A5 0, C1 0, C2 0, C3 0, C4 0, D 0
- Materials for recycling (MFR) [kg]: A1-A3 0, A5 0.011, C1 0, C2 0, C3 0, C4 0, D 0
- Non hazardous waste dispose (NHWD) [kg]: A1-A3 442.8, A5 0.39, C1 0, C2 5.93e-5, C3 0, C4 0.86, D -0.71
- Radioactive waste disposed (RWD) [kg]: A1-A3 0.0798, A5 7.07e-5, C1 0, C2 1.12e-8, C3 0, C4 2.85e-7, D -0.000121

## Impact indicators
- Abiotic depletion potential for non fossil resources (ADPE) [kg Sb-Äqv.]: A1-A3 0.000197, A5 2.92e-8, C1 0, C2 4.93e-11, C3 0, C4 5e-9, D -1.04e-7
- Abiotic depletion potential for fossil resources (ADPF) [MJ]: A1-A3 764.2, A5 0.65, C1 0, C2 0.00888, C3 0, C4 2.19, D -3.02
- Acidification potential of soil and water (AP) [kg SO2-Äqv.]: A1-A3 0.12, A5 9.34e-5, C1 0, C2 3.88e-6, C3 0, C4 0.000719, D -0.00099
- Eutrophication potential (EP) [kg Phosphat-Äqv.]: A1-A3 0.0188, A5 1.5e-5, C1 0, C2 1e-6, C3 0, C4 0.00099, D -0.000224
- Global warming potential (GWP) [kg CO2-Äqv.]: A1-A3 76.29, A5 0.0661, C1 0, C2 0.000654, C3 0, C4 0.21, D -0.053
- Depletion potential of the stratospheric ozone layer (ODP) [kg CFC 11 eq.]: A1-A3 7.064e-10, A5 1.94e-13, C1 0, C2 1.35e-15, C3 0, C4 7.24e-14, D -1.13e-11
- Formation potential of tropospheric ozone (POCP) [kg Ethen-Äqv.]: A1-A3 0.000634, A5 6.87e-6, C1 0, C2 -1.68e-6, C3 0, C4 0.000292, D -0.0005

## Use advice
Dieser Datensatz beinhaltet die Ergebnisse für die Module A1-A3 sowie die Module, A5, C1, C2, C3, C4, D gemäß EN 15804. Ein Vergleich mit anderen Produkten ist nur mit einer vergleichbaren Anwendung im Gebäude zulässig. Grundsätzlich ist eine Gegenüberstellung oder die Bewertung von EPD Daten nur möglich, wenn alle zu vergleichenden Datensätze nach EN 15804 erstellt wurden und der Gebäudekontext, bzw. die produktspezifischen Leistungsmerkmale berücksichtigt werden.

## Review details
Die angewendete LCI Methode ist in Übereinstimmung mit ISO 14040 und 14044. Die Dokumentation enthält alle relevanten Informationen im Hinblick auf die Datenqualität und den Umfang der Anwendung der jeweiligen LCI Ergebnisse bzw. der Datensätze. Der Datensatz repräsentiert den Stand der Technik bezogen auf die funktionelle Einheit.

## Data sources
- GaBi database (all versions)
