# Anodization of aluminium; aluminium anodizing

Dataset: ILCD process, EPD, generic dataset
Geography: DE
Reference year: 2018
Valid until: 2022
Classification: oekobau.dat: Metalle / Oberflächenbehandlung und Beschichtung von Metallen / Anodisieren von Aluminium
Owner: thinkstep
Compliance: DIN EN 15804
Review: Dependent internal review by thinkstep, IABP-GaBi, IBP-GaBi; Independent external review by GaBi user forum, GaBi bug forum, GaBi user community
Amounts: rows without a unit in brackets have none in this file; such an amount is in the reference unit of its flow, which a separate flow dataset defines
copyright: true

## General comment
This data set has been modeled according to the European Standard EN 15804 for Sustainable Building. Results are depicted in modules that allow the structured expression of results over the entire life cycle.

## Geography
The data set represents the country specific situation in Germany, focusing on the main technologies, the region specific characteristics and / or import statistics.

## Time period
Annual average

## Technology and included processes
The dataset includes the process of anodizing of a 2 square meters aluminium profile. Not included is the production of the aluminium extrusion profile, which should be calculated separately. Anodizing is an electrolytic passivation process which increases the thickness of a natural oxide layer on surface of a metal part. The metal is cleaned with a cleaning agent and etched with sodium hydroxides or acids. To grow the aluminium, an electrolysis takes place. Direct current is passed through an electrolytic solution, the aluminium serves as an anode. The cathode consists of carbon, lead, nickel, stainless or other material which is unreactive during the electrolysis. The cathode produces hydrogen, the aluminium anode oxygen forming aluminium oxide. The electrolytic solution chosen depends on which kind of oxide layer has to be produced. Barrier oxide is grown in almost neutral solutions where aluminium oxide is hardly soluble, porous oxide in acidic solutions in which the oxide can also be dissolved. The most widely used solution is dilute sulphuric acid.
Background system:
Electricity: Electricity is modelled according to the individual country-specific situations. The country-specific modelling is achieved on multiple levels. Firstly, individual energy carrier specific power plants and plants for renewable energy sources are modelled according to the current national electricity grid mix. Modelling the electricity consumption mix includes transmission / distribution losses and the own use by energy producers (own consumption of power plants and "other" own consumption e.g. due to pumped storage hydro power etc.), as well as imported electricity. Secondly, the national emission and efficiency standards of the power plants are modelled as well as the share of electricity plants and combined heat and power plants (CHP). Thirdly, the country-specific energy carrier supply (share of imports and / or domestic supply) including the country-specific energy carrier properties (e.g. element and energy content) are accounted for. Fourthly, the exploration, mining/production, processing and transport processes of the energy carrier supply chains are modelled according to the specific situation of each electricity producing country. The different production and processing techniques (emissions and efficiencies) in the different energy producing countries are considered, e.g. different crude oil production technologies or different flaring rates at the oil platforms.
Thermal energy, process steam: The thermal energy and process steam supply is modelled according to the individual country-specific situation with regard to emission standards and considered energy carriers. The thermal energy and process steam are produced at heat plants. Efficiencies for thermal energy production are by definition 100% in relation to the corresponding energy carrier input. For process steam the efficiency ranges from 85%, 90% to 95%. The energy carriers used for the generation of thermal energy and process steam are modelled according to the specific import situation (see electricity above).
Transports: All relevant and known transport processes are included. Ocean-going and inland ship transport as well as rail, truck and pipeline transport of bulk commodities are considered.
Energy carriers: The energy carriers are modelled according to the specific supply situation (see electricity above).
Refinery products: Diesel fuel, gasoline, technical gases, fuel oils, lubricants and residues such as bitumen are modelled with a parameterised country-specific refinery model. The refinery model represents the current national standard in refining techniques (e.g. emission level, internal energy consumption, etc.) as well as the individual country-specific product output spectrum, which can be quite different from country to country. The supply of crude oil is modelled, again, according to the country-specific situation with the respective properties of the resources.

## Technical purpose
This product can be used in construction.

## Safety margin
10 %. Product system almost completely covered. Good technological, temporal and geographic representativeness.

## Reference product
- Aluminium (anodized, m2): 1

## Inputs
- Use of renewable primary energy (PERE) [MJ]: A1-A3 31.4522
- Primary energy resources used as raw materials (PERM) [MJ]: A1-A3 0
- Total use of renewable primary energy resources (PERT) [MJ]: A1-A3 31.4522
- Use of non-renewable primary energy (PENRE) [MJ]: A1-A3 90.0293
- Non-renewable primary energy resources used as raw materials (PENRM) [MJ]: A1-A3 0
- Total use of non-renewable primary energy resources (PENRT) [MJ]: A1-A3 90.0293
- Input of secondary material (SM) [kg]: A1-A3 0
- Use of renewable secondary fuels (RSF) [MJ]: A1-A3 0
- Use of non renewable secondary fuels (NRSF) [MJ]: A1-A3 0
- Use of net fresh water (FW) [m3]: A1-A3 0.0186785

## Outputs
- Hazardous waste disposed (HWD) [kg]: A1-A3 6.32818e-8
- Non-hazardous waste disposed (NHWD) [kg]: A1-A3 0.29073
- Radioactive waste disposed (RWD) [kg]: A1-A3 0.00385026
- Components for re-use (CRU) [kg]: A1-A3 0
- Materials for Recycling (MFR) [kg]: A1-A3 0
- Material for Energy Recovery (MER) [kg]: A1-A3 0
- Exported electrical energy (EEE) [MJ]: A1-A3 0
- Exported thermal energy (EET) [MJ]: A1-A3 0

## Impact indicators
- Global warming potential (GWP) [kg CO2 eq.]: A1-A3 6.11931
- Ozone Depletion Potential (ODP) [kg R11 eq.]: A1-A3 1.74227e-13
- Acidification potential (AP) [kg SO2 eq.]: A1-A3 0.00855695
- Eutrophication potential (EP) [kg Phosphate eq.]: A1-A3 0.00191761
- Photochemical Ozone Creation Potential (POCP) [kg Ethene eq.]: A1-A3 0.000682469
- Abiotic depletion potential for non fossil resources (ADPE) [kg Sb eq.]: A1-A3 1.80673e-6
- Abiotic depletion potential for fossil resources (ADPF) [MJ]: A1-A3 80.3096

## Use advice
The data set represents a cradle to gate inventory. It can be used to characterise the supply chain situation of the respective commodity in a representative manner. Combination with individual unit processes using this commodity enables the generation of user-specific (product) LCAs.

## Data sources
- IBU-Declaration DBC/IVK/VdL; Dispersion based façade paint (EPD-DIV-20140152-IBG1-DE), 2014
- IBU-Declaration DBC/IVK/VdL; Reactive resin EP, aqueous/unfilled (EPD-DIV-2012121-E), 2012
- GaBi Database Edition 2020, SP40
- GaBi database (all versions)
