# Drinking water

Dataset: ILCD process, EPD, generic dataset
Geography: DE
Reference year: 2021
Valid until: 2022
Classification: oekobau.dat: Sonstige / Energieträger - Bereitstellung frei Verbraucher / Trinkwasser
Owner: Sphera Solutions GmbH
Compliance: EN 15804+A2
Review: Dependent internal review by Sphera Solutions GmbH; Independent external review by GaBi user forum
Amounts: rows without a unit in brackets have none in this file; such an amount is in the reference unit of its flow, which a separate flow dataset defines
copyright: true
licenseType: Free of charge for all users and uses
accessRestrictions: The license conditions as stated on https://www.oekobaudat.de/ apply.
accessRestrictions: Es gelten die Lizenzbedingungen wie sie auf https://www.oekobaudat.de/ genannt sind.

## General comment
This data set has been modeled according to the European Standard EN 15804+A2 for Sustainable Building. Results are depicted in modules that allow the structured expression of results over the entire life cycle.

## Geography
The data set represents the country specific situation in Germany, focusing on the main technologies, the region specific characteristics and / or import statistics.

## Time period
Annual average

## Technology and included processes
This dataset represents the German tap water mix. 70% of the German tap water mix stems from groundwater, 30% from surface water.

Groundwater has a higher quality than surface water. But it can still contain chemicals from agricultury, landfills, etc. which have to be removed. The purification of groundwater is less complicated than that one of surface water, some of the steps are similar. Water extracted from lakes or rivers still contains a lot of microbes and hazardous chemicals which have to be removed to make it drinkable.

The Following steps are common to achieve the high quality of drinking water:

Clarification: Silt, algae, colour, manganese and other matter from raw water. A coagulant like aluminium or iron salt is used to coagulate the undesired matter from the water which can then easily be removed by sedimentation or flotation.

Filtration: Particles are removed by using filters during this stage. There is a variety of different filter types, two examples are a bed of sand and a membrane filter.

Disinfection: All hazardous microbes have to be removed. The most common method for disinfection is using chlorine. After the disinfection, a small amount of chlorine often remains in the water to keep the water safe during the transport. Other disinfection methods are using ozone or UV radiation.

Ion exchange: This process can be used to remove undesired ions from the water.

Activated carbon: Can be used to remove organics.

Background system:
Electricity: Electricity is modelled according to the individual country-specific situations. The country-specific modelling is achieved on multiple levels. Firstly, individual energy carrier specific power plants and plants for renewable energy sources are modelled according to the current national electricity grid mix. Modelling the electricity consumption mix includes transmission / distribution losses and the own use by energy producers (own consumption of power plants and "other" own consumption e.g. due to pumped storage hydro power etc.), as well as imported electricity. Secondly, the national emission and efficiency standards of the power plants are modelled as well as the share of electricity plants and combined heat and power plants (CHP). Thirdly, the country-specific energy carrier supply (share of imports and / or domestic supply) including the country-specific energy carrier properties (e.g. element and energy content) are accounted for. Fourthly, the exploration, mining/production, processing and transport processes of the energy carrier supply chains are modelled according to the specific situation of each electricity producing country. The different production and processing techniques (emissions and efficiencies) in the different energy producing countries are considered, e.g. different crude oil production technologies or different flaring rates at the oil platforms.
Thermal energy, process steam: The thermal energy and process steam supply is modelled according to the individual country-specific situation with regard to emission standards and considered energy carriers. The thermal energy and process steam are produced at heat plants. Efficiencies for thermal energy production are by definition 100% in relation to the corresponding energy carrier input. For process steam the efficiency ranges from 85%, 90% to 95%. The energy carriers used for the generation of thermal energy and process steam are modelled according to the specific import situation (see electricity above).
Transports: All relevant and known transport processes are included. Ocean-going and inland ship transport as well as rail, truck and pipeline transport of bulk commodities are considered.
Energy carriers: The energy carriers are modelled according to the specific supply situation (see electricity above).
Refinery products: Diesel fuel, gasoline, technical gases, fuel oils, lubricants and residues such as bitumen are modelled with a parameterised country-specific refinery model. The refinery model represents the current national standard in refining techniques (e.g. emission level, internal energy consumption, etc.) as well as the individual country-specific product output spectrum, which can be quite different from country to country. The supply of crude oil is modelled, again, according to the country-specific situation with the respective properties of the resources.

## Technical purpose
This product can be used in construction.

## Safety margin
10 %. Product system almost completely covered. Good technological, temporal and geographic representativeness.

## Reference product
- Drinking water: 1

## Inputs
- Use of renewable primary energy as energy carrier (PERE) [MJ]: A1-A3 0.000312336
- Use of renewable primary energy resources used as raw materials (PERM) [MJ]: A1-A3 0
- Total use of renewable primary energy (PERT) [MJ]: A1-A3 0.000312336
- Use of non renewable primary energy as energy carrier (PENRE) [MJ]: A1-A3 0.00173631
- Use of non renewable primary energy resources used as raw materials (PENRM) [MJ]: A1-A3 0
- Total use of non renewable primary energy resource (PENRT) [MJ]: A1-A3 0.00173631
- Use of secondary material (SM) [kg]: A1-A3 0
- Use of renewable secondary fuels (SF) [MJ]: A1-A3 0
- Use of non renewable secondary fuels (NRSF) [MJ]: A1-A3 0
- Net use of fresh water (FW) [m3]: A1-A3 0.00110127

## Outputs
- Hazardous waste disposed (HWD) [kg]: A1-A3 3.24085e-13
- Non harzardous waste disposed (NHWD) [kg]: A1-A3 0.000319299
- Radioactive waste disposed (RWD) [kg]: A1-A3 3.83542e-8
- Components for re-use (CRU) [kg]: A1-A3 0
- Materials for recycling (MFR) [kg]: A1-A3 0
- Materials for energy recovery (MER) [kg]: A1-A3 0
- Exported electrical energy (EEE) [MJ]: A1-A3 0
- Exported thermal energy (EET) [MJ]: A1-A3 0

## Impact indicators
- Global Warming Potential - total (GWP-total) [kg CO2 eq.]: A1-A3 0.000128473
- Global Warming Potential - fossil fuels (GWP-fossil) [kg CO2 eq.]: A1-A3 0.000117241
- Global Warming Potential - biogenic (GWP-biogenic) [kg CO2 eq.]: A1-A3 1.11018e-5
- Global Warming Potential - land use and land use change (GWP-luluc) [kg CO2 eq.]: A1-A3 1.30598e-7
- Depletion potenzial of the stratospheric ozone layer (ODP) [kg CFC-11 eq.]: A1-A3 1.25591e-18
- Acidifcation potential, Accumulated Exceedance (AP) [Mole of H+ eq.]: A1-A3 2.41893e-7
- Eutrophication potential - freshwater (EP-freshwater) [kg P eq.]: A1-A3 1.27579e-8
- Eutrophication potential - marine (EP-marine) [kg N eq.]: A1-A3 1.16163e-7
- Eutrophication potential - terrestrial (EP-terrestrial) [Mole of N eq.]: A1-A3 7.2271e-7
- Photochemical Ozone Creation Potential (POCP) [kg NMVOC eq.]: A1-A3 1.91504e-7
- Abiotic depletion potential - non-fossil resources (ADPE) [kg Sb eq.]: A1-A3 1.89336e-11
- Abiotic depletion potential - fossil resources (ADPF) [MJ]: A1-A3 0.00173562
- Water (user) deprivation potential (WDP) [m³ world equiv.]: A1-A3 0.00150857

## Use advice
The data set represents a cradle to gate inventory. It can be used to characterise the supply chain situation of the respective commodity in a representative manner. Combination with individual unit processes using this commodity enables the generation of user-specific (product) LCAs.

## Data sources
- Documentation of data quality management
- GaBi Database Edition 2021, CUP2021.01
- GaBi database (all versions)
