# noraplan® 913

Dataset: ILCD process, EPD, specific dataset
Geography: GLO
Reference year: 2018
Valid until: 2023
Classification: OEKOBAU.DAT: Kunststoffe / Bodenbeläge / Gummi-/Kautschuk-Bodenbeläge
Classification: IBUCategories: 02 Bauprodukte / Bodenbeläge / Bodenbeläge
Method details: Bodenbeläge.pdf
Registration number: EPD-NOR-20180125-IBA1-DE
Owner: nora systems GmbH
Compliance: DIN EN 15804; ISO 14025
Review: Accredited third party review by Institut Bauen und Umwelt e. V.
Amounts: rows without a unit in brackets have none in this file; such an amount is in the reference unit of its flow, which a separate flow dataset defines
copyright: true

## General comment
In this Environmental Product Declaration (EPD),
resilient rubber floor coverings of the nora systems
GmbH product line noraplan® 913 are modelled.

Specific characteristics of the noraplan® 913 coverings
are:

manufacturing method: continuously vulcanised rubber floor coverings in sheets
covering structure: single-layer
composition: natural and synthetic rubber, minerals from natural sources, colour pigments, and processing
aids

## Technology and included processes
Technical data:
Excerpt of technical data sheets: (available at www.nora.com)
Declared unit:
The reference unit is 1 m² of floor covering. The values of module A1-A3 refer to 1 m² produced. This EPD represents a product declaration, i.e. the production and disposal of off-cuts during installation stage are assigned to module A5. The combined modules A1-A3, A4 and A5 refer to a reference unit of 1 m² installed.

The material for subfloor preparation and adhesive bonding, needed during installation, is not considered. Information on the complete floor structure can be found in Environmental Product Declarations based to the PCR „Dispersion adhesives and primers for floor coverings“ and „Mineral factory-made mortar”.

## Technical purpose
For use and application the respective national provisions apply.

Floor coverings are classified according to /DIN EN ISO 10874/.

Floor coverings for high performance in domestic and professional use:

## Reference product
- noraplan® 913/ 1 m2: 1

## Inputs
- Renewable primary energy as energy carrier (PERE) [MJ]: A1-A3 29.004, A4 0.113, A5 2.13, B2 0.422, C1 0.285, C2 0.00561, C3 12.1615, D -3.25
- Renewable primary energy resources as material utilization (PERM) [MJ]: A1-A3 12.096, A4 0, A5 0, B2 0, C1 0, C2 0, C3 -12.096, D 0
- Total use of renewable primary energy resources (PERT) [MJ]: A1-A3 41.1, A4 0.113, A5 2.13, B2 0.422, C1 0.285, C2 0.00561, C3 0.0655, D -3.25
- Non renewable primary energy as energy carrier (PENRE) [MJ]: A1-A3 99.104, A4 2.44, A5 6.76, B2 8.09, C1 0.758, C2 0.108, C3 29.291, D -16.8
- Non renewable primary energy as material utilization (PENRM) [MJ]: A1-A3 28.896, A4 0, A5 0, B2 0, C1 0, C2 0, C3 -28.896, D 0
- Total use of non renewable primary energy resources (PENRT) [MJ]: A1-A3 128, A4 2.44, A5 6.76, B2 8.09, C1 0.758, C2 0.108, C3 0.395, D -16.8
- Use of secondary material (SM) [kg]: A1-A3 0.0846, A4 0, A5 0, B2 0, C1 0, C2 0, C3 0, D 0
- Use of renewable secondary fuels (RSF) [MJ]: A1-A3 0, A4 0, A5 0, B2 0, C1 0, C2 0, C3 0, D 0
- Use of non renewable secondary fuels (NRSF) [MJ]: A1-A3 0, A4 0, A5 0, B2 0, C1 0, C2 0, C3 0, D 0
- Use of net fresh water (FW) [m^3]: A1-A3 1.11, A4 0.000209, A5 0.0577, B2 0.00209, C1 0.000388, C2 1.03e-5, C3 0.005, D -0.00443

## Outputs
- Hazardous waste disposed (HWD) [kg]: A1-A3 4.6e-5, A4 1.13e-7, A5 2.38e-6, B2 0.000414, C1 3.56e-10, C2 5.67e-9, C3 1.15e-9, D -6.84e-9
- Non hazardous waste disposed (NHWD) [kg]: A1-A3 2.49, A4 0.000175, A5 0.132, B2 0.0278, C1 0.000534, C2 8.64e-6, C3 0.0663, D -0.00721
- Radioactive waste disposed (RWD) [kg]: A1-A3 0.00147, A4 4.84e-6, A5 7.74e-5, B2 0.000222, C1 0.000126, C2 2.25e-7, C3 2.54e-5, D -0.00143
- Components for re-use (CRU) [kg]: A1-A3 0, A4 0, A5 0, B2 0, C1 0, C2 0, C3 0, D 0
- Materials for recycling (MFR) [kg]: A1-A3 0, A4 0, A5 0.215, B2 0, C1 0, C2 0, C3 0, D 0
- Materials for energy recovery (MER) [kg]: A1-A3 0, A4 0, A5 0, B2 0, C1 0, C2 0, C3 0, D 0
- Exported electrical energy (EEE) [MJ]: A1-A3 0, A4 0, A5 0.24, B2 0, C1 0, C2 0, C3 3.85, D 0
- Exported thermal energy (EET) [MJ]: A1-A3 0, A4 0, A5 0.43, B2 0, C1 0, C2 0, C3 6.9, D 0

## Impact indicators
- Global warming potential (GWP) [kg CO_(2)-Äq.]: A1-A3 5.87, A4 0.182, A5 0.464, B2 0.399, C1 0.0415, C2 0.00788, C3 2.48, D -0.957
- Depletion potential of the stratospheric ozone layer (ODP) [kg CFC11-Äq.]: A1-A3 1.9e-8, A4 7.06e-15, A5 9.8e-10, B2 5.07e-11, C1 1.84e-13, C2 3.27e-16, C3 3.64e-14, D -2.1e-12
- Acidification potential of land and water (AP) [kg SO_(2)-Äq.]: A1-A3 0.0328, A4 0.00107, A5 0.00176, B2 0.000941, C1 0.000108, C2 1.73e-5, C3 0.000163, D -0.0015
- Eutrophication potential (EP) [kg PO_(4)^(3)-Äq.]: A1-A3 0.00593, A4 0.000156, A5 0.000316, B2 0.000189, C1 1.07e-5, C2 4.15e-6, C3 3.46e-5, D -0.000169
- Formation potential of tropospheric ozone photochemical oxidants (POCP) [kg Ethen-Äq.]: A1-A3 0.00218, A4 -7.28e-5, A5 0.00011, B2 0.000297, C1 7.38e-6, C2 -5.58e-6, C3 1.56e-5, D -0.000126
- Abiotic depletion potential for non fossil resources (ADPE) [kg Sb-Äq.]: A1-A3 0.000141, A4 1.34e-8, A5 7.3e-6, B2 7.14e-8, C1 2.11e-8, C2 6.42e-10, C3 5.72e-9, D -2.61e-7
- Abiotic depletion potential for fossil resources (ADPF) [MJ]: A1-A3 125, A4 2.43, A5 6.59, B2 7.54, C1 0.442, C2 0.107, C3 0.331, D -13.2

## Use advice
Scope:
Product line noraplan® 913

Rubber floor coverings continuously vulcanised in
sheets in various colours and designs.
This declaration is an Environmental Product
Declaration according to ISO 14025 describing the
specific environmental performance of the mentioned
construction products produced in Germany
(Weinheim/Bergstraße).
System boundary:
Type of EPD: from cradle to gate with options

The analysis of the product life cycle includes the following stages:

Production stage A1-A3: Consideration of production of the basic materials and the manufacturing of the floor covering incl. packaging material (input of waste paper for paper/cardboard production).

Transport A4: Assumption for the transport of the products to the construction site.
Installation A5: Production, transport and incineration of the off-cut material, incineration of off-cut material (gained energy is declared in D as avoided environmental burden), disposal of the packaging (incineration of PE film). The pretreatment of the underground surface (prime coat, levelling compound, adhesive) is not considered. This treatment depends on the building and the application and need to be specified for the particular case.

Use stage B2: Scenario for maintenance/ cleaning according to the manufacturer's recommendation (see 4.)
End-of-Life stage C1, C2, C3: Scenario for the incineration of the floor covering incl. removal from the building and transport to the waste incineration plant (gained energy is declared in D as avoided environmental burden).

Benefits for the next product system D:
Extraction for electrical and thermal energy from the waste incineration process of the product, the off-cuts and the packaging material.
Contributions of waste flows are considered in the modules where they occur.

## Data sources
- noraplan® 913.pdf
- GaBi Database (all versions)
- GaBi database SP36 2018
