# Steel pipe; Steel pipe

Dataset: ILCD process, EPD, generic dataset
Geography: DE
Reference year: 2021
Valid until: 2022
Classification: oekobau.dat: Gebäudetechnik / Heizung / Wärmeverteilung und Abgabe
Owner: Sphera Solutions GmbH
Compliance: EN 15804+A2
Review: Dependent internal review by Sphera Solutions GmbH; Independent external review by GaBi user forum
Amounts: rows without a unit in brackets have none in this file; such an amount is in the reference unit of its flow, which a separate flow dataset defines
copyright: true
licenseType: Free of charge for all users and uses
accessRestrictions: The license conditions as stated on https://www.oekobaudat.de/ apply.
accessRestrictions: Es gelten die Lizenzbedingungen wie sie auf https://www.oekobaudat.de/ genannt sind.

## General comment
This data set has been modeled according to the European Standard EN 15804+A2 for Sustainable Building. Results are depicted in modules that allow the structured expression of results over the entire life cycle.

## Geography
The data set represents the country specific situation in Germany, focusing on the main technologies, the region specific characteristics and / or import statistics.

## Time period
Annual average

## Technology and included processes
Steel pipe for the installation of heatings and gas supply. According to VDI guideline 2067 for steel pipes an average life span of 40 years can be assumed for heating, gas supply and cold water and 25 years for warm water. Steel production: The preparation of the iron ore includes mainly the crushing. The average iron content in the iron ore is 60%. Pellets are small crystallized balls of iron ore. The pelletisation process consists of grinding and drying, balling and induration followed by screening and handling. The provision of hard coal is described in the respective documentation file (please see link below). For every fraction the transport to Germany is considered in the data set. The transportation includes all necessary transportation means like ship and where required railway. The coke oven produces as main product coke out of hard coal. The main by-product resulting from this operation is coke oven gas (COG gas) which is used as energy carrier within the steel production. Further by-products as tar, benzene and sulphur are sold and therefore excluded from the system by allocation to (net) calorific value. In the sinter plant sinter feed is produced based on the major inputs coke, iron ore and additives. Sintering is an agglomeration process which takes place under high temperatures. The raw materials (fine iron ore, coke breeze, additives) are blended, then the coke breeze is ignited. The result of the sinter process is the so-called sinter cake which has to be broken up, screened and cooled down. The blast furnace is a closed system into which iron bearing materials (iron ore lump, sinter and / or pellets), additives (slag formers such as limestone) and reducing agents (coke) are continuously fed from the top of the furnace shaft through a charging system. A hot air blast, enriched with oxygen and auxiliary reducing agents (e.g. pulverized coal) is injected providing a counter-current of reducing gases. The air blast reacts with the reducing agents to produce mainly carbon monoxide which in turn reduces iron oxides to metal iron. The main products of the blast furnace operation are hot metal, blast furnace gas (BF gas) and blast furnace slag (BF slag). The BF gas is used as fuel for heating comparable to the COG gas or for electricity production. The objective in oxygen steelmaking is to burn (i.e., oxidise) the undesirable impurities contained in the metallic feedstock. The main elements thus converted into oxides are carbon, silicon, manganese, phosphorus and sulphur. The purpose of this oxidation process, therefore, are to reduce the carbon content to a specified level to adjust the contents of desirable foreign elements and to remove undesirable impurities to the greatest possible extent. The production of steel by the basic oxygen furnace (BOF) process is a discontinuous process which involves the following steps: transfer and storage of hot metal, pre-treatment of hot metal (desulphurisation), oxidation in the BOF (decarburisation and oxidation of impurities) and secondary metallurgical treatment (e.g. vacuum treatment and adding alloying elements). Within the main step of the oxygen steelmaking, the hot metal feeds together with steel scrap the converter. The main products of the converter are the liquid steel, the converter gas or basic oxygen furnace gas (BOF gas) and the BOF slag. The gas is as well used as energy carrier within the steel production. Afterwards the continuous casting takes place whereby the liquid steel is cast in continuous strand. The output of the continuous casting process is the slab. The following operations are two rolling processes: the hot strip mill and the cold rolling mill. In the hot rolling mill the slab is reshaped above the recrystallization temperature. The qualities obtained in this process are e.g. strength and surface quality. During the rolling process the material passes through the furnace and the rolling line. In the furnace the metal is preheated by natural gas. There is no need for an additional warming, if the hot slabs are directly charged into the rolling mill. The forming is done in various rolling frames until the final shape is obtained. The steel scrap in this process are directly recycled. In the cold rolling mill the material is reshaped below the recrystallization temperature. Thereby a enhanced surface quality, an improved dimensional accuracy as well as a higher strength are achieved. The different process steps are: pickling, the rolling line and the heat treatment. The cold rolled sheet is transferred to the hot-dip galvanising. The zinc coating is applied by dipping the sheet steel into a hot zinc bath. During the hot-dip galvanising the cold rolled sheet passes the following process steps: preheating furnace (organic impurities are burned off), reduction zone (the sheet is heated to cause recrystallization), cooling and homogenization as well as metal bath (coating of the sheet) and finishing stand.
Background system:
Electricity: Electricity is modelled according to the individual country-specific situations. The country-specific modelling is achieved on multiple levels. Firstly, individual energy carrier specific power plants and plants for renewable energy sources are modelled according to the current national electricity grid mix. Modelling the electricity consumption mix includes transmission / distribution losses and the own use by energy producers (own consumption of power plants and "other" own consumption e.g. due to pumped storage hydro power etc.), as well as imported electricity. Secondly, the national emission and efficiency standards of the power plants are modelled as well as the share of electricity plants and combined heat and power plants (CHP). Thirdly, the country-specific energy carrier supply (share of imports and / or domestic supply) including the country-specific energy carrier properties (e.g. element and energy content) are accounted for. Fourthly, the exploration, mining/production, processing and transport processes of the energy carrier supply chains are modelled according to the specific situation of each electricity producing country. The different production and processing techniques (emissions and efficiencies) in the different energy producing countries are considered, e.g. different crude oil production technologies or different flaring rates at the oil platforms.
Thermal energy, process steam: The thermal energy and process steam supply is modelled according to the individual country-specific situation with regard to emission standards and considered energy carriers. The thermal energy and process steam are produced at heat plants. Efficiencies for thermal energy production are by definition 100% in relation to the corresponding energy carrier input. For process steam the efficiency ranges from 85%, 90% to 95%. The energy carriers used for the generation of thermal energy and process steam are modelled according to the specific import situation (see electricity above).
Transports: All relevant and known transport processes are included. Ocean-going and inland ship transport as well as rail, truck and pipeline transport of bulk commodities are considered.
Energy carriers: The energy carriers are modelled according to the specific supply situation (see electricity above).
Refinery products: Diesel fuel, gasoline, technical gases, fuel oils, lubricants and residues such as bitumen are modelled with a parameterised country-specific refinery model. The refinery model represents the current national standard in refining techniques (e.g. emission level, internal energy consumption, etc.) as well as the individual country-specific product output spectrum, which can be quite different from country to country. The supply of crude oil is modelled, again, according to the country-specific situation with the respective properties of the resources.

## Technical purpose
This product can be used in construction.

## Safety margin
10 %. Product system almost completely covered. Good technological, temporal and geographic representativeness.

## Reference product
- Steel pipe: 1

## Inputs
- Use of renewable primary energy as energy carrier (PERE) [MJ]: A1-A3 1.9287, C2 0.0354246, C4 0.00298181, D 1.46998
- Use of renewable primary energy resources used as raw materials (PERM) [MJ]: A1-A3 0, C2 0, C4 0, D 0
- Total use of renewable primary energy (PERT) [MJ]: A1-A3 1.9287, C2 0.0354246, C4 0.00298181, D 1.46998
- Use of non renewable primary energy as energy carrier (PENRE) [MJ]: A1-A3 23.0123, C2 0.117212, C4 0.0220791, D -9.63875
- Use of non renewable primary energy resources used as raw materials (PENRM) [MJ]: A1-A3 0, C2 0, C4 0, D 0
- Total use of non renewable primary energy resource (PENRT) [MJ]: A1-A3 23.0123, C2 0.117212, C4 0.0220791, D -9.63875
- Use of secondary material (SM) [kg]: A1-A3 0.181928, C2 0, C4 0, D 0
- Use of renewable secondary fuels (SF) [MJ]: A1-A3 0, C2 0, C4 0, D 0
- Use of non renewable secondary fuels (NRSF) [MJ]: A1-A3 0, C2 0, C4 0, D 0
- Net use of fresh water (FW) [m3]: A1-A3 0.00166681, C2 1.55192e-5, C4 5.43855e-6, D -0.000879378

## Outputs
- Hazardous waste disposed (HWD) [kg]: A1-A3 1.18097e-9, C2 1.90222e-11, C4 2.34898e-12, D 1.41414e-9
- Non harzardous waste disposed (NHWD) [kg]: A1-A3 0.0293068, C2 4.35662e-5, C4 0.110108, D -0.0189014
- Radioactive waste disposed (RWD) [kg]: A1-A3 0.00021431, C2 3.37437e-6, C4 2.27928e-7, D 0.000189727
- Components for re-use (CRU) [kg]: A1-A3 0, C2 0, C4 0, D 0
- Materials for recycling (MFR) [kg]: A1-A3 0, C2 0, C4 0, D 0
- Materials for energy recovery (MER) [kg]: A1-A3 0, C2 0, C4 0, D 0
- Exported electrical energy (EEE) [MJ]: A1-A3 0, C2 0, C4 0, D 0
- Exported thermal energy (EET) [MJ]: A1-A3 0, C2 0, C4 0, D 0

## Impact indicators
- Global Warming Potential - total (GWP-total) [kg CO2 eq.]: A1-A3 2.54122, C2 0.00881088, C4 0.00162553, D -1.30415
- Global Warming Potential - fossil fuels (GWP-fossil) [kg CO2 eq.]: A1-A3 2.53765, C2 0.00872266, C4 0.00166455, D -1.30663
- Global Warming Potential - biogenic (GWP-biogenic) [kg CO2 eq.]: A1-A3 0.00236185, C2 3.98524e-5, C4 -4.39177e-5, D 0.00250585
- Global Warming Potential - land use and land use change (GWP-luluc) [kg CO2 eq.]: A1-A3 0.00120367, C2 4.8366e-5, C4 4.89387e-6, D -3.07085e-5
- Depletion potenzial of the stratospheric ozone layer (ODP) [kg CFC-11 eq.]: A1-A3 6.48184e-15, C2 1.35629e-16, C4 6.53135e-18, D 7.39702e-15
- Acidifcation potential, Accumulated Exceedance (AP) [Mole of H+ eq.]: A1-A3 0.00642729, C2 5.4537e-5, C4 1.18483e-5, D -0.00360964
- Eutrophication potential - freshwater (EP-freshwater) [kg P eq.]: A1-A3 2.22488e-6, C2 2.66303e-8, C4 2.80155e-9, D -2.25818e-7
- Eutrophication potential - marine (EP-marine) [kg N eq.]: A1-A3 0.00148036, C2 2.66934e-5, C4 3.07591e-6, D -0.000749618
- Eutrophication potential - terrestrial (EP-terrestrial) [Mole of N eq.]: A1-A3 0.0159783, C2 0.000293784, C4 3.3794e-5, D -0.0081215
- Photochemical Ozone Creation Potential (POCP) [kg NMVOC eq.]: A1-A3 0.00483376, C2 5.06157e-5, C4 9.32028e-6, D -0.00250581
- Abiotic depletion potential - non-fossil resources (ADPE) [kg Sb eq.]: A1-A3 1.78081e-7, C2 2.10354e-9, C4 1.57775e-10, D 3.38183e-8
- Abiotic depletion potential - fossil resources (ADPF) [MJ]: A1-A3 22.8536, C2 0.117197, C4 0.0220674, D -9.53001
- Water (user) deprivation potential (WDP) [m³ world equiv.]: A1-A3 -0.0299466, C2 9.1827e-5, C4 0.000178142, D 0.0324961

## Use advice
The data set represents a cradle to gate inventory. It can be used to characterise the supply chain situation of the respective commodity in a representative manner. Combination with individual unit processes using this commodity enables the generation of user-specific (product) LCAs.

## Data sources
- VDI 2067
- EC 2001
- BRENSING 1995
- DICKINSON 2008
- Documentation of data quality management
- GaBi Database Edition 2021, CUP2021.01
- GaBi database (all versions)
