# Concrete turnout sleeper, voestalpine

Dataset: ILCD process, EPD, average dataset
Geography: EU-27
Reference year: 2021
Valid until: 2026
Classification: OEKOBAU.DAT: Mineralische Baustoffe / Mörtel und Beton / Beton
Classification: IBUCategories: 02 Bauprodukte / Normal- Leicht- und Porenbeton / Betonfertigteile
Method details: Betonfertigteile.pdf
Generated by: Daxner & Merl GmbH
Registration number: EPD-VRS-20210079-ICD1-DE
Owner: voestalpine AG
Compliance: DIN EN 15804+A2; ISO 14025
Review: Accredited third party review by Institut Bauen und Umwelt e. V.
Amounts: rows without a unit in brackets have none in this file; such an amount is in the reference unit of its flow, which a separate flow dataset defines
copyright: true
licenseType: Free of charge for all users and uses
accessRestrictions: None

## General comment
voestalpine Railway Systems GmbH is a leading global provider of system solutions for rail infrastructure. Thanks to the company's decades of experience and expertise in rail infrastructure, the concrete turnout sleepers are designed, optimized and further developed taking into account the entire railway superstructure.

The concrete turnout sleepers are produced at the following three production facilities:

TSF-A GmbH, Sollenau (Austria),
voestalpine Turnout Technology Germany GmbH, Butzbach (Germany) and
Travertec S.R.L., Buzau (Romania).

The product group of prestressed concrete turnout sleepers comprises different types of high-quality turnout sleepers, which are optionally delivered with under sleeper pads and pre-assembled fastening systems.

The declared products are prestressed concrete parts of different size and design for use as concrete turnout sleepers. The concrete turnout sleepers support and keep the rails and turnout components in the correct position and transfer the loads to the track superstructure.

The concrete consists of

• prestressed steel,

• cement (hydraulic binder),

• sand and gravel of different grain sizes (aggregates)

• water and

• admixtures and additives.

Cast-in plastic parts of a dowel fastener form the anchor for attachingscrewing the rail fastening systems. Depending on the design of the fastening system, additional reinforcement elements such as end brackets or dowel reinforcements made of steel are required.

Depending on requirements, the concrete turnout sleepers may be alternatively supplied pre-assembled with under sleeper pads, ribbed base plates or fastening material for rails.

A possible pre-assembly takes place in a separate work step within the plants and is not taken into account in this EPD.

The basic geometry of the turnout sleeper can vary in height, width and design.

The declared products are manufactured and delivered in accordance with the applicable European and international standards, guidelines and various customer specifications.

## Technology and included processes
The concrete is made of gravel and sand (aggregates), water, cement (hydraulic binder), admixtures and additives. Plastic dowels are fixed in the formwork liner and the prestressed steel is clamped. The concrete is then transported from the central mixing plant to the respective formwork line by means of a bucket conveyor. A concreting machine fills the formwork line with the concrete. If necessary, the under sleeper pads are then directly applied and vibrated into the bottom of the sleeper. After the required hardening time of the concrete, with the requirement that the minimum compressive strength has been reached, the concrete turnout sleepers are demoulded and cut to the required lengths defined in advance in the liner plan. Subsequently, the sleepers are placed in an intermediate storage area on the production site. The concrete turnout sleepers are manufactured in closed buildings at room temperature.
Technical data:
This EPD refers to the declared prestressed concrete turnout sleepers of voestalpine Railway Systems.
Declared unit:
This environmental product declaration refers to a declared unit of 1 linear metre (lm) concrete turnout sleeper with an average weight of 166 kg/lm and a volume of 0,065 m³.

## Technical purpose
The declared prestressed concrete turnout sleepers of voestalpine Railway Systems GmbH are mainly used in the following types of railway traffic:

▪ High-Speed Traffic

▪ Mixed Traffic (passenger and freight traffic)▪ Urban Traffic (Metro and Tram).

## Reference product
- Spannbeton-Weichenschwelle: 1

## Inputs
- Renewable primary energy as energy carrier (PERE) [MJ]: A1-A3 46.0921, C1 0, C2 0.381237, C3 1.04137, C4 0.224024, D -4.04295
- Renewable primary energy resources as material utilization (PERM) [MJ]: A1-A3 0, C1 0, C2 0, C3 0, C4 0, D 0
- Total use of renewable primary energy resources (PERT) [MJ]: A1-A3 46.0921, C1 0, C2 0.381237, C3 1.04137, C4 0.224024, D -4.04295
- Non renewable primary energy as energy carrier (PENRE) [MJ]: A1-A3 361.494, C1 0, C2 6.61987, C3 2.34993, C4 1.82078, D -89.3101
- Non renewable primary energy as material utilization (PENRM) [MJ]: A1-A3 4.59221, C1 0, C2 0, C3 0, C4 0, D 0
- Total use of non renewable primary energy resources (PENRT) [MJ]: A1-A3 366.086, C1 0, C2 6.61987, C3 2.34993, C4 1.82078, D -89.3101
- Use of secondary material (SM) [kg]: A1-A3 2.09989, C1 0, C2 0, C3 0, C4 0, D 153.5
- Use of renewable secondary fuels (RSF) [MJ]: A1-A3 0, C1 0, C2 0, C3 0, C4 0, D 0
- Use of non renewable secondary fuels (NRSF) [MJ]: A1-A3 0, C1 0, C2 0, C3 0, C4 0, D 0
- Use of net fresh water (FW) [m^3]: A1-A3 0.0611204, C1 0, C2 0.000444269, C3 0.00120409, C4 0.000402972, D -0.0503769

## Outputs
- Hazardous waste disposed (HWD) [kg]: A1-A3 1.82931e-6, C1 0, C2 3.06114e-7, C3 9.72664e-10, C4 2.52425e-8, D -2.40045e-7
- Non hazardous waste disposed (NHWD) [kg]: A1-A3 0.328121, C1 0, C2 0.0010492, C3 0.00166709, C4 8.30832, D 0.73035
- Radioactive waste disposed (RWD) [kg]: A1-A3 0.0110606, C1 0, C2 1.22011e-5, C3 0.000356572, C4 2.07947e-5, D -0.00324019
- Components for re-use (CRU) [kg]: A1-A3 0, C1 0, C2 0, C3 0, C4 0, D 0
- Materials for recycling (MFR) [kg]: A1-A3 0, C1 0, C2 0, C3 155.6, C4 0, D 0
- Materials for energy recovery (MER) [kg]: A1-A3 0, C1 0, C2 0, C3 0, C4 0, D 0
- Exported electrical energy (EEE) [MJ]: A1-A3 0, C1 0, C2 0, C3 0, C4 0, D 0
- Exported thermal energy (EET) [MJ]: A1-A3 0, C1 0, C2 0, C3 0, C4 0, D 0

## Impact indicators
- Global Warming Potential total (GWP-total) [kg CO_(2)-Äq.]: A1-A3 43.6132, C1 0, C2 0.500192, C3 0.134288, C4 0.12752, D -8.79044
- Global Warming Potential fossil fuels (GWP-fossil) [kg CO_(2)-Äq.]: A1-A3 43.4467, C1 0, C2 0.497022, C3 0.133649, C4 0.137224, D -8.77878
- Global Warming Potential biogenic (GWP-biogenic) [kg CO_(2)-Äq.]: A1-A3 0.134943, C1 0, C2 -0.000829601, C3 0.000445512, C4 -0.0100673, D -0.00769277
- Global Warming Potential luluc (GWP-luluc) [kg CO_(2)-Äq.]: A1-A3 0.0315591, C1 0, C2 0.00400007, C3 0.000193682, C4 0.000363776, D -0.00396959
- Depletion potential of the stratospheric ozone layer (ODP) [kg CFC11-Äq.]: A1-A3 3.72828e-9, C1 0, C2 9.06981e-17, C3 2.93988e-15, C4 4.84195e-16, D -3.86393e-14
- Acidification potential of land and water (AP) [mol H^(+)-Äq.]: A1-A3 0.103396, C1 0, C2 0.00167955, C3 0.000295034, C4 0.000919672, D -0.0169622
- Eutrophication potential aquatic freshwater (EP-freshwater) [kg PO_(4)-Äq.]: A1-A3 0.000132671, C1 0, C2 1.50521e-6, C3 3.56974e-7, C4 2.20097e-7, D -5.94065e-6
- Eutrophication potential aquatic marine (EP-marine) [kg N-Äq.]: A1-A3 0.0320592, C1 0, C2 0.000757703, C3 6.55357e-5, C4 0.000235956, D -0.0031094
- Eutrophication potential terrestrial (EP-terrestrial) [mol N-Äq.]: A1-A3 0.347156, C1 0, C2 0.00846401, C3 0.000688522, C4 0.00259256, D -0.0321453
- Formation potential of tropospheric ozone photochemical oxidants (POCP) [kg NMVOC-Äq.]: A1-A3 0.0964811, C1 0, C2 0.00148865, C3 0.000179561, C4 0.000716311, D -0.0128936
- Abiotic depletion potential for non fossil resources (ADPE) [kg Sb-Äq.]: A1-A3 2.32551e-5, C1 0, C2 3.996e-8, C3 3.86832e-8, C4 1.1959e-8, D -1.59054e-5
- Abiotic depletion potential for fossil resources (ADPF) [MJ]: A1-A3 365.515, C1 0, C2 6.59344, C3 2.34946, C4 1.81999, D -89.2815
- Water use (WDP) [m^(3) Welt-Äq. entzogen]: A1-A3 1.96861, C1 0, C2 0.00481874, C3 0.0291307, C4 0.0124905, D -1.99663
- Incidence of disease due to PM emissions (PM) [Krankheitsfälle]: A1-A3 3.7702e-7, C1 0, C2 4.27554e-9, C3 6.37327e-10, C4 1.49345e-8, D 3.36777e-9
- Human exposure efficiency relative to U235 (IR) [kBq U235-Äq.]: A1-A3 2.46132e-9, C1 0, C2 3.44456e-11, C3 1.12262e-11, C4 1.54382e-11, D -9.66672e-10
- Comparative toxic unit for ecosystems (ETP-fw) [CTUe]: A1-A3 1.43814e-6, C1 0, C2 9.48992e-9, C3 2.47476e-9, C4 1.1301e-8, D -3.21294e-7
- Comparative toxic unit for humans (carcinogenic) (HTP-c) [CTUh]: A1-A3 1.62646, C1 0, C2 0.00179996, C3 0.0585015, C4 0.00224576, D -0.344593
- Comparative toxic unit for humans (noncarcinogenic) (HTP-nc) [CTUh]: A1-A3 161.226, C1 0, C2 4.93317, C3 1.00505, C4 0.9756, D -12.9426
- Soil quality index (SQP) [SQP]: A1-A3 5.996e-9, C1 0, C2 1.01962e-10, C3 2.77627e-11, C4 1.42278e-10, D 2.04505e-9

## Use advice
Scope:
This EPD is based on a weighted group average with a declared unit of 1 linear metre (lm) of average concrete turnout sleeper, produced at the three sites

- TSF-A GmbH, Sollenau (Austria),

- voestalpine Turnout Technology Germany GmbH, Butzbach (Germany) and

- Travertec S.R.L., Buzau (Romania).
System boundary:
The life cycle assessment of concrete turnout sleepers refers to a cradle-to-gate analysis with modules. Subsequent life cycle phases are part of the analysis:

Module A1-A3 | Production stage

The production stage includes the upstream burdens of raw material supply (concrete, aggregates, sand, water, prestressing steel, etc.), their transports and the manufacturing at three production sites: TSF-A GmbH located at Sollenau, Austria, voestalpine Turnout Technology Germany GmbH located at Butzbach, Germany and Travertec S.R.L. located at Butzau, Romania. The production sites are supplied with electricity from the regional power grid and thermal energy from natural gas. The prestressing steel is delivered from upstream organisations which are part of voestalpine group. Thus, the upstream environmental impact of the steel supplied is represented by primary data of the respective production sites.

Module C1 | Deconstruction and demolition

Energy demand for the deconstruction of the sleepers from the track (e.g. loosening of screws) is strongly dependent on the conditions at site and considered to be negligible. This results in a declaration of “0” in module C1.

Module C2 | Transport to disposal

The transport to the disposal of the material is estimated declaring a 50 km radius to the watse processing. This scenario may vary depending on the actual location of deconstruction and referring waste treatment.

Module C3 | Waste processing

The declared scenario assumes the processing of the sleepers in a concrete breaker. Therefore, a loss rate from waste processing of 5 % is assumed. Referring environmental impacts are accounted for in module C4. The separated material fractions of steel and concrete are further recycled.

Module C4 | Disposal

Module C4 refers to the emissions from the disposal of the losses from waste processing. The chosen scenario, therefore, includes the environmental burdens of landfilling of 5 % of the material.

Module D | Benefits and loads beyond the system boundary

Module D declares the recycling of the recovered steel and concrete (95 % of the product). It includes the

potential for substituting primary steel and gravel.

## Data sources
- GaBi Database (all versions)
- GaBi database SP40 2020
