# Mauersteine aus Leichtbeton aus natürlichen Zuschlägen - Vollstein schwer -

Dataset: ILCD process, EPD, average dataset
Geography: DE
Reference year: 2019
Valid until: 2024
Classification: OEKOBAU.DAT: Mineralische Baustoffe / Steine und Elemente / Leichtbeton
Classification: IBUCategories: 02 Bauprodukte / Normal- Leicht- und Porenbeton / Leichtbeton
Method details: Leichtbeton.pdf
Registration number: EPD-BVL-20180108-IAG1-DE
Owner: Bundesverband Leichtbeton e. V.
Compliance: DIN EN 15804; ISO 14025
Review: Accredited third party review by Institut Bauen und Umwelt e. V.
Amounts: rows without a unit in brackets have none in this file; such an amount is in the reference unit of its flow, which a separate flow dataset defines
copyright: true

## General comment
Die genannten Produkte sind unbewehrte Bauteile oder Elemente unterschiedlicher Formate und Größen aus handwerksporigem Leichtbeton. Der Leichtbeton wird hergestellt aus natürlichen Gesteinskörnungen (Zuschlägen), Wasser und hydraulischen Bindemitteln (Zement).

Bei dieser EPD handelt es sich um eine Herstellergruppen- Deklaration eines typischen oder repräsentativen Produktes, das ein spezifisches Produkt beschreibt.

## Technology and included processes
Den natürlichen Leichtzuschlägen (Bims, Basalt) wird Zement als Bindemittel zugesetzt. Zusätzlich kommen Zusatzstoffe wie Pigment, die keine Auswirkungen auf die bautechnischen Betoneigenschaften haben hinzu. Im Werk werden die Zuschläge je nach Art, Schüttdichte und Korngröße in Silos gelagert oder auf dem Freigelände getrennt zwischengelagert. Das Bindemittel sowie Zusatzstoffe werden in Silos gelagert. Die dosierten Zuschläge werden zunächst aus den Silos abgezogen und trocken mit dem Bindemittel vorgemischt. Danach wird die Mischung, unter Zufügung von Wasser, zu einem plastisch verformbaren Leichtbeton gemischt.Die Leichtbetonmasse wird mittels Füllwagen in die Steinformen aus Stahl gefüllt. Die Steinformen erhalten, je nach Anforderung, Kerne für Schlitze oder Kammern. Anschließend werden die Steine mittels Auflast und Vibration verdichtet und von der Form gelöst. Die entschalten Steine werden auf Paletten geladen und zum Erhärten in ein Trocken-Hochregallager transportiert, wo sie nach 24 – 36 Std. eine Festigkeit erreichen, die es zulässt, die Steine für die Kommissionierung zu verpacken. Zur vollständigen Aushärtung lagern die Steine, witterungsbeständig verpackt, mindestens 28 Tage auf einem Lagerplatz bis sie zur Baustelle ausgeliefert werden.
Technische Daten:
Es gelten die Leistungswerte des Produkts entsprechend der Leistungserklärung in Bezug auf dessen wesentliche Merkmale gemäß / DIN EN 771-3:2015-11/.

Freiwillige Angaben für das Produkt: /DIN V 20000-403:2005-06/ und /DIN EN 771-3/ (Nicht Bestandteil der CE-Kennzeichnung).
Deklarierte Einheit:
Die Deklaration bezieht sich auf die Herstellung von einem Kubikmeter (1 m³) Mauerstein aus Leichtbeton (Vollstein schwer) hergestellt aus Zuschlägen der genannten Zusammensetzung.

## Technical purpose
Leichtbetonmauersteine werden als unbewehrte Bausteine für gemauerte, monolithische, tragende und nichttragende Wände verwendet.

## Reference product
- Leichtbetonmauerstein (Vollstein schwer): 1

## Inputs
- Erneuerbare Primärenergie als Energieträger (PERE) [MJ]: A1-A3 46
- Erneuerbare Primärenergie zur stofflichen Nutzung (PERM) [MJ]: A1-A3 0
- Total erneuerbare Primärenergie (PERT) [MJ]: A1-A3 46
- Nicht-erneuerbare Primärenergie als Energieträger (PENRE) [MJ]: A1-A3 568
- Nicht-erneuerbare Primärenergie zur stofflichen Nutzung (PENRM) [MJ]: A1-A3 0
- Total nicht erneuerbare Primärenergie (PENRT) [MJ]: A1-A3 568
- Einsatz von Sekundärstoffen (SM) [kg]: A1-A3 0
- Erneuerbare Sekundärbrennstoffe (RSF) [MJ]: A1-A3 0
- Nicht erneuerbare Sekundärbrennstoffe (NRSF) [MJ]: A1-A3 0
- Einsatz von Süßwasserressourcen (FW) [m^3]: A1-A3 32.3

## Outputs
- Gefährlicher Abfall zur Deponie (HWD) [kg]: A1-A3 0
- Entsorgter nicht gefährlicher Abfall (NHWD) [kg]: A1-A3 197
- Entsorgter radioaktiver Abfall (RWD) [kg]: A1-A3 0.0141
- Komponenten für die Wiederverwendung (CRU) [kg]: A1-A3 0
- Stoffe zum Recycling (MFR) [kg]: A1-A3 0
- Stoffe für die Energierückgewinnung (MER) [kg]: A1-A3 0
- Exportierte elektrische Energie (EEE) [MJ]: A1-A3 0
- Exportierte thermische Energie (EET) [MJ]: A1-A3 0

## Impact indicators
- Globales Erwärmungspotenzial (GWP) [kg CO_(2)-Äq.]: A1-A3 118
- Abbau Potential der stratosphärischen Ozonschicht (ODP) [kg CFC11-Äq.]: A1-A3 5.5e-8
- Versauerungspotenzial von Boden und Wasser (AP) [kg SO_(2)-Äq.]: A1-A3 0.195
- Eutrophierungspotenzial (EP) [kg PO_(4)^(3)-Äq.]: A1-A3 0.0295
- Bildungspotential für troposphärisches Ozon (POCP) [kg Ethen-Äq.]: A1-A3 0.0201
- Potenzial für den abiotischen Abbau nicht fossiler Ressourcen (ADPE) [kg Sb-Äq.]: A1-A3 0.00017
- Potenzial für den abiotischen Abbau fossiler Brennstoffe (ADPF) [MJ]: A1-A3 512

## Use advice
Gültigkeitsbereich:
Die vorliegende Umweltproduktdeklaration repräsentiert Leichtbetonmauersteine der Herstellerfirmen des Bundesverbandes Leichtbeton e.V. Die Ergebnisse der Ökobilanz beziehen sich auf Leichtbetonmauersteine aus natürlichen Zuschlägen der genannten Zusammensetzung. Eine 2017 durchgeführte Datenerhebung erfolgte in zwei Unternehmen des Verbandes. Die Produktionsstandorte befinden sich in Deutschland.
Systemgrenze:
Typ der EPD: Wiege-bis-Werkstor

Die gewählten Systemgrenzen umfassen die Herstellung der Leichtbetonmauersteine einschließlich der Rohstoffgewinnung bzw. der Verarbeitung zu Zuschlagsstoffen bis zum versandfertigen Produkt beim Verlassen des Werkstors (cradle to gate). Ebenfalls eingeschlossen ist die Herstellung der weiteren Roh- und Hilfsstoffe.

Alle Herstellungsprozesse der Vorprodukte wurden einbezogen. Die Vorprodukte wurden entsprechend den genannten Rezepturen für die Leichtbetonsteine identifiziert.

Im Einzelnen wurden folgende Prozesse einbezogen:
Bereitstellung aller Einsatzstoffe (Vorprodukte)
Herstellaufwendungen (Energie, Abfall, Emissionen)
Energiebereitstellung

Das Nutzungs- und Entsorgungsstadium der genannten Produkte sind in dieser Studie nicht berücksichtigt und müssen für eine Bewertung im Kontext des Gebäudes ergänzt werden.

Transporte vom Werkstor zur Baustelle sind nicht in die Bilanz einbezogen.

Der Produktionsstandort befindet sich in Deutschland. Demnach wird der Strom-Mix für Deutschland mit dem Bezugsjahr 2014 verwendet.

## Data sources
- Mauersteine aus Leichtbeton aus natürlichen Zuschlägen - Vollstein schwer -.pdf
- GaBi Database (all versions)
- GaBi database SP35 2018
