# binderholz Massivholzplatte

Dataset: ILCD process, EPD, specific dataset
Geography: DE
Reference year: 2019
Valid until: 2024
Classification: OEKOBAU.DAT: Holz / Holzwerkstoffe / 3- und 5-Schichtplatten
Classification: IBUCategories: 02 Bauprodukte / Produkte aus Bauholz / Vollholzprodukte
Method details: Vollholzprodukte.pdf
Registration number: EPD-BBS-20190170-IBA1-DE
Owner: Binderholz GmbH Massivholzplattenwerk
Compliance: DIN EN 15804; ISO 14025
Review: Accredited third party review by Institut Bauen und Umwelt e. V.
Amounts: rows without a unit in brackets have none in this file; such an amount is in the reference unit of its flow, which a separate flow dataset defines
copyright: true

## General comment
binderholz Massivholzplatten sind ein- oder mehrschichtige, plattenförmige Massivholzprodukte, wobei die einzelnen Nadelholzlagen bei den mehrschichtigen Massivholzplatten zueinander rechtwinklig verklebt werden.

Die Herstellung der binderholz Massivholzplatten erfolgt nach /EN 13986/.

Durch eine maschinelle Qualitätssortierung der Lamellen wird ein ausgeglichenes und rissarmes Erscheinungsbild garantiert, wobei die kreuzweise Orientierung und der symmetrische Aufbau der binderholz Mehrschicht-Massivholzplatten zu einer hohen Formstabilität beitragen.

Neben der binderholz 1-Schicht-Massivholzplatte, werden 3- und 5-Schicht-Massivholzplatten hergestellt.

binderholz Massivholzplatten finden neben der optischen oder tragenden Verwendung im Trocken- und Feuchtbereich zusätzlichen Einsatz im Außenbereich.

## Technology and included processes
binderholz Massivholzplatten sind 1- oder mehrschichtige, plattenförmige Massivholzprodukte, wobei die einzelnen Nadelholzlagen bei den mehrschichtigen Massivholzplatten zueinander rechtwinklig verklebt werden. Die Herstellung der binderholz Massivholzplatten erfolgt nach /EN 13986/. Durch eine maschinelle Qualitätssortierung der Lamellen wird ein ausgeglichenes und rissarmes Erscheinungsbild garantiert, wobei die kreuzweise Orientierung und der symmetrische Aufbau der binderholz Mehrschicht-Massivholzplatten zu einer hohen Formstabilität beitragen. Neben der binderholz 1-Schicht-Massivholzplatte, werden 3- und 5-Schicht-Massivholzplatten hergestellt. binderholz Massivholzplatten finden neben der optischen oder tragenden Verwendung im Trocken- und Feuchtbereich zusätzlichen Einsatz im Außenbereich. Für das Inverkehrbringen in der EU/EFTA (mit Ausnahme der Schweiz) gilt die Verordnung (EU) Nr. 305/2011 vom 09.03.2011. Die Produkte benötigen eine Leistungserklärung (DOP) unter Berücksichtigung der /EN 13986/ und die CE-Kennzeichnung. Für die Nutzung gelten die jeweiligen nationalen Bestimmungen. binderholz Massivholzplatten werden aus Fichten-, Tannen-, Kiefer-, Lärchen-, Douglasien- und Zirbenholz gefertigt. Wobei die Holzarten Tanne, Douglasie, Lärche und Zirbe vornehmlich für optisch anspruchsvolle Sichtdecklagen eingesetzt werden. In der Produktion werden technisch getrocknete Nadelholzlamellen mit einer Holzfeuchte von 8% +/-2% eingesetzt, die vierseitig gehobelt und maschinell nach der Oberflächenqualität sortiert sind. Das Dickenspektrum der gehobelten Einzellamellen liegt im Bereich von 4 bis 20mm, bei einer Breite von 120 bis 130mm. Die vorliegende Umweltproduktdeklaration ist für 1m³ binderholz Massivholzplatte gültig.
Technische Daten:
binderholz Massivholzplatten werden mit einer Holzfeuchte von 8 % (Ein-Schichtplatte) bis 10 % (Mehrschichtplatten) hergestellt.

Anhand der /EN 13017-1/ wird eine Qualitätssortierung jeder Einzellamelle vorgenommen und eine gezielte Einstufung in die Qualitäten 0, A, B oder C gewährleistet.

In Abhängigkeit von der Einbausituation werden die Leistungsdaten der binderholz Mehrschichtplatten in Platten- oder in Scheibenbeanspruchung statisch angesetzt. Die Festigkeits- und Steifigkeitswerte variieren je nach Nenndickenbereich.
Deklarierte Einheit:
Die deklarierte Einheit der ökologischen Betrachtung ist 1 m³ binderholz Massivholzplatte (MHPL) unter Berücksichtigung des verwendeten Klebstoffes nach Kapitel 2.5 und einer Masse von 460 kg/m³ bei einer Holzfeuchte von 7,69 %, was einem Wasseranteil von 7 % entspricht. Der Anteil der Klebstoffe liegt bei 2 %. Alle Angaben zu eingesetzten Klebstoffen wurden auf Grundlage spezifischer Daten berechnet.

## Technical purpose
binderholz Massivholzplatten finden Anwendung im optisch anspruchsvollen Innenausbau und in der Möbelherstellung.

Im konstruktiven Bereich werden mehrschichtige Massivholzplatten sowohl als nicht tragende Elemente, als auch als aussteifende Komponenten eingesetzt.

## Reference product
- binderholz Massivholzplatte: 1

## Inputs
- Erneuerbare Primärenergie als Energieträger (PERE) [MJ]: A1 1537.84, A2 24.5937, A3 1925.29, A5 5.59983, C2 0.430159, C3 29.6285, D -1567.27
- Erneuerbare Primärenergie zur stofflichen Nutzung (PERM) [MJ]: A1 8066.84, A2 0, A3 5.52, A5 -5.52, C2 0, C3 -8066.84, D 0
- Total erneuerbare Primärenergie (PERT) [MJ]: A1 9604.69, A2 24.5937, A3 1930.81, A5 0.0798252, C2 0.430159, C3 -8037.21, D -1567.27
- Nicht-erneuerbare Primärenergie als Energieträger (PENRE) [MJ]: A1 1279.58, A2 423.986, A3 221.899, A5 11.098, C2 7.41578, C3 54.8761, D -5979.41
- Nicht-erneuerbare Primärenergie zur stofflichen Nutzung (PENRM) [MJ]: A1 121.929, A2 0, A3 10.7143, A5 -10.7143, C2 0, C3 -121.929, D 0
- Total nicht erneuerbare Primärenergie (PENRT) [MJ]: A1 1401.51, A2 423.986, A3 232.613, A5 0.383687, C2 7.41578, C3 -67.0527, D -5979.41
- Einsatz von Sekundärstoffen (SM) [kg]: A1 0, A2 0, A3 0, A5 0, C2 0, C3 0, D 0
- Erneuerbare Sekundärbrennstoffe (RSF) [MJ]: A1 0, A2 0, A3 0, A5 0, C2 0, C3 0, D 8066.84
- Nicht erneuerbare Sekundärbrennstoffe (NRSF) [MJ]: A1 0, A2 0, A3 0, A5 0, C2 0, C3 0, D 121.929
- Einsatz von Süßwasserressourcen (FW) [m^3]: A1 0.894383, A2 0.0415791, A3 0.874475, A5 0.00346346, C2 0.000727244, C3 0.0159703, D 1.1339

## Outputs
- Gefährlicher Abfall zur Deponie (HWD) [kg]: A1 3.16631e-5, A2 2.36839e-5, A3 8.03477e-6, A5 1.55372e-9, C2 4.14247e-7, C3 4.26415e-8, D -3.34375e-6
- Entsorgter nicht gefährlicher Abfall (NHWD) [kg]: A1 1.14118, A2 0.034466, A3 1.08189, A5 0.0332513, C2 0.000602832, C3 0.0567517, D 4.44095
- Entsorgter radioaktiver Abfall (RWD) [kg]: A1 0.0647875, A2 0.000575264, A3 0.00806336, A5 1.36985e-5, C2 1.00617e-5, C3 0.00516656, D -0.273385
- Komponenten für die Wiederverwendung (CRU) [kg]: A1 0, A2 0, A3 0, A5 0, C2 0, C3 0, D 0
- Stoffe zum Recycling (MFR) [kg]: A1 0, A2 0, A3 0, A5 0, C2 0, C3 0, D 0
- Stoffe für die Energierückgewinnung (MER) [kg]: A1 0, A2 0, A3 0, A5 0, C2 0, C3 460, D 0
- Exportierte elektrische Energie (EEE) [MJ]: A1 0, A2 0, A3 0, A5 2.29509, C2 0, C3 0, D 0
- Exportierte thermische Energie (EET) [MJ]: A1 0, A2 0, A3 0, A5 4.48902, C2 0, C3 0, D 0

## Impact indicators
- Globales Erwärmungspotenzial (GWP) [kg CO_(2)-Äq.]: A1 -679.23, A2 30.7265, A3 16.2166, A5 1.50186, C2 0.537425, C3 771.173, D -393.58
- Abbau Potential der stratosphärischen Ozonschicht (ODP) [kg CFC11-Äq.]: A1 1.24065e-12, A2 5.14923e-15, A3 6.6156e-12, A5 4.73943e-16, C2 9.00631e-17, C3 1.79649e-13, D -9.50265e-12
- Versauerungspotenzial von Boden und Wasser (AP) [kg SO_(2)-Äq.]: A1 0.31723, A2 0.129771, A3 0.0966259, A5 0.000233916, C2 0.00226977, C3 0.00664178, D -0.370121
- Eutrophierungspotenzial (EP) [kg PO_(4)^(3)-Äq.]: A1 0.0770516, A2 0.0330291, A3 0.0211349, A5 4.35703e-5, C2 0.000577699, C3 0.00107963, D -0.0577325
- Bildungspotential für troposphärisches Ozon (POCP) [kg Ethen-Äq.]: A1 0.0393663, A2 -0.0535854, A3 0.024556, A5 1.24864e-5, C2 -0.000937241, C3 0.000438767, D -0.0327779
- Potenzial für den abiotischen Abbau nicht fossiler Ressourcen (ADPE) [kg Sb-Äq.]: A1 1.99771e-5, A2 2.40221e-6, A3 2.61782e-5, A5 4.9497e-8, C2 4.20162e-8, C3 1.79504e-6, D -9.48874e-5
- Potenzial für den abiotischen Abbau fossiler Brennstoffe (ADPF) [MJ]: A1 1238.07, A2 422.51, A3 212.198, A5 0.349087, C2 7.38995, C3 41.8279, D -5299.11

## Use advice
Gültigkeitsbereich:
Die Datengrundlage für die Erstellung der Ökobilanz bilden die Massivholzplatten-Produktionsdaten des Binderholz GmbH Massivholzplattenwerks in St. Georgen bei Salzburg.

Die vorliegende Umweltproduktdeklaration ist für binderholz Massivholzplatten gültig.
Systemgrenze:
Der Deklarationstyp entspricht einer EPD „Wiege bis Werkstor - mit Optionen“. Inhalte sind das Stadium der Produktion, also von der Bereitstellung der Rohstoffe bis zum Werkstor der Produktion (cradle-to-gate, Module A1 bis A3), sowie das Modul A5 und Teile des Endes des Lebensweges (Modul C2 und C3). Darüber hinaus erfolgt eine Betrachtung der potenziellen Nutzen und Lasten über den Lebensweg des Produktes hinaus (Modul D).

Im Einzelnen werden in Modul A1 die Bereitstellung der Holzhalbwaren sowie die Bereitstellung der Klebstoffe bilanziert. Die Transporte dieser Stoffe werden in Modul A2 berücksichtigt. Modul A3 umfasst die Bereitstellung der Brennstoffe, der Betriebs- und Verpackungsmittel, des Stroms sowie die Herstellungsprozesse vor Ort. Diese sind im Wesentlichen die Schnittholzspaltung, -trocknung, der Einschnitt, die Plattenverleimung und -verpressung, das Schleifen sowie die Verpackung der Produkte. In Modul A5 wird ausschließlich die Entsorgung der Produktverpackung abgedeckt, welche den Ausgang der enthaltenen Primärenergie (PERM und PENRM) sowie des enthaltenen biogenen Kohlenstoffes (GWP) der Produktverpackung einschließt.

Modul C2 berücksichtigt den Transport zum Entsorger und Modul C3 die Aufbereitung und Sortierung des Altholzes. Zudem werden in Modul C3 gemäß /EN 16485/ die CO2-Äquivalente des im Produkt befindlichen holzinhärenten Kohlenstoffs sowie die im Produkt enthaltene erneuerbare und nicht erneuerbare Primärenergie (PERM und PENRM) als Abgänge verbucht.

Modul D bilanziert die thermische Verwertung des Produktes am Ende seines Lebenswegs sowie die daraus resultierenden potenziellen Nutzen und Lasten in Form einer Systemerweiterung.

## Data sources
- binderholz Massivholzplatte.pdf
- GaBi Database (all versions)
- GaBi database SP39 2019
