# Butyl waterproofing membrane NovoProof® FAI

Dataset: ILCD process, EPD, average dataset
Geography: DE
Reference year: 2017
Valid until: 2022
Classification: OEKOBAU.DAT: Kunststoffe / Dachbahnen / Elastomer-Dachbahnen
Classification: IBUCategories: 02 Bauprodukte / Abdichtungen / Dach- und Dichtungsbahnsysteme aus Kunststoffen und Elastomeren
Method details: Dach- und Dichtungsbahnsysteme aus Kunststoffen und Elastomeren.pdf
Generated by: brands and values GmbH
Registration number: EPD-DUR-20170092-IBD1-DE
Owner: CQLT SaarGummi Deutschland GmbH
Compliance: DIN EN 15804; ISO 14025
Review: Accredited third party review by Institut Bauen und Umwelt e. V.
Amounts: rows without a unit in brackets have none in this file; such an amount is in the reference unit of its flow, which a separate flow dataset defines
copyright: true
licenseType: Free of charge for all users and uses
accessRestrictions: None

## General comment
NovoProof® waterproofing systems comprise fully cross-linked elastomer sheets based on butyl (IIR).

The NovoProof® family comprises numerous variants. The following variants are considered here:

NovoProof® FAI

Homogeneous butyl waterproofing sheet

Averaging is based on the corresponding production volumes for the 2014 calendar year.

Directive (EU) No. 305/2011 (CPR) applies for placing the product on the market in the EU/EFTA. The product requires a Declaration of Performance taking consideration of

- DIN EN 13859-2:2014 Flexible sheets for waterproofing – Definitions and characteristics of underlays – Part 2: Underlays for walls;

- and CE marking.

Use is governed by the respective national regulations.

## Technology and included processes
The production of rubber compound as a material for manufacturing butyl waterproofing membranes is based on a formula which specifies the quality and quantity of raw materials used. The manufacturing process in Wadern-Büschfeld is a classic batch process. The requisite raw materials are portioned in accordance with the formula calculator into automatic weighing machines and conveyed to an internal mixer using suitable conveying equipment. The mixing process results in a homogenous rubber compound. During production, quality characteristics such as strength, elasticity, hardness, density and rheometer curve are tested on all finished compounds. The rubber compound is then processed on a roller-head plant. The continuous production process commences with extrusion, whereby the material achieves the desired thickness (0.6 - 2.5 mm) and width (max. 1400 mm) using a wide extrusion die and calender. The uncured sheet is run through embossing rolls where the letters “IIR” are embossed on the butyl waterproofing membranes. Another stage of the process involves curing the sheets in a continuous hot air channel (cross-linking). Curing is followed by the sheets achieving room temperature over a cooling conveyor zone and winding onto rolls. If necessary, the sheets can be pre-assembled. Development and manufacturing are in line with the requirements of the quality management system according to /DIN EN ISO 9001:2008/. The quality of the finished products is regularly assured in the form of factory production control and external quality Monitoring.
Technical data:
The product’s performance values correspond with the Declaration of Performance in terms of its essential properties in accordance with DIN EN 13859-2:2014 Flexible sheets for waterproofing - Definitions and characteristics of underlays - Part 2: Underlays for walls.

NovoProof® FAI
Declared unit:
The declared unit is 1 m² adhered NovoProof® waterproofing membrane FAI, including packaging and fastening materials (adhesive).

## Technical purpose
NovoProof® FAI is used for establishing permanently resilient, airtight and vapour-tight waterproofing of window connections and facade joints. The sheet is adhered to the internal wall and/or window.

## Scenarios
- S1: recycling
- S2: thermal utilisation

## Reference product
- 1 m² Durchschnittsdichtungsbahn (FAI) inkl. Verpackungsmaterialien und Befestigungsmitteln: 1

## Inputs
- Renewable primary energy as energy carrier (PERE) [MJ]: A1-A3 7.17932, A4 0.0209726, A5 0.523367, C2 0.0126979, C3 (S1) 0.0420622, C3 (S2) 0.0628688, D (S1) -1.86103, D (S2) -0.0572284
- Renewable primary energy resources as material utilization (PERM) [MJ]: A1-A3 0.0845, A4 0, A5 -0.097, C2 0, C3 (S1) 0, C3 (S2) 0, D (S1) 0, D (S2) 0
- Total use of renewable primary energy resources (PERT) [MJ]: A1-A3 7.26382, A4 0.0209726, A5 0.426367, C2 0.0126979, C3 (S1) 0.0420622, C3 (S2) 0.0628688, D (S1) -1.86103, D (S2) -0.0572284
- Non renewable primary energy as energy carrier (PENRE) [MJ]: A1-A3 49.8623, A4 0.370327, A5 15.8517, C2 0.224216, C3 (S1) 27.1702, C3 (S2) 0.720722, D (S1) -34.2612, D (S2) -24.3871
- Non renewable primary energy as material utilization (PENRM) [MJ]: A1-A3 40.121, A4 0, A5 -1.77, C2 0, C3 (S1) -27.02, C3 (S2) -27.02, D (S1) -27.02, D (S2) 0
- Total use of non renewable primary energy resources (PENRT) [MJ]: A1-A3 89.9833, A4 0.370327, A5 14.0817, C2 0.224216, C3 (S1) 0.150222, C3 (S2) 0.720743, D (S1) -61.2812, D (S2) -24.3871
- Use of secondary material (SM) [kg]: A1-A3 0, A4 0, A5 0, C2 0, C3 (S1) 0, C3 (S2) 0, D (S1) 0.599, D (S2) 0
- Use of renewable secondary fuels (RSF) [MJ]: A1-A3 0, A4 0, A5 0, C2 0, C3 (S1) 0, C3 (S2) 0, D (S1) 0, D (S2) 0
- Use of non renewable secondary fuels (NRSF) [MJ]: A1-A3 0, A4 0, A5 0, C2 0, C3 (S1) 0, C3 (S2) 0, D (S1) 0, D (S2) 0
- Use of net fresh water (FW) [m^3]: A1-A3 0.472994, A4 5.25318e-5, A5 0.0205873, C2 3.18056e-5, C3 (S1) 6.48931e-5, C3 (S2) 0.00654256, D (S1) -0.00719157, D (S2) -0.00079997

## Outputs
- Hazardous waste disposed (HWD) [kg]: A1-A3 1.86987e-7, A4 2.80057e-8, A5 7.67312e-9, C2 1.69561e-8, C3 (S1) 9.53736e-11, C3 (S2) 5.08683e-9, D (S1) -2.97164e-7, D (S2) -4.35766e-9
- Non hazardous waste disposed (NHWD) [kg]: A1-A3 0.0262244, A4 3.11181e-5, A5 0.00393291, C2 1.88406e-5, C3 (S1) 9.06663e-5, C3 (S2) 5.65217e-6, D (S1) -0.0247106, D (S2) -0.00262891
- Radioactive waste disposed (RWD) [kg]: A1-A3 0.0016922, A4 5.29466e-7, A5 0.00015954, C2 3.20567e-7, C3 (S1) 2.26654e-5, C3 (S2) 9.617e-8, D (S1) -0.000442876, D (S2) -1.30679e-5
- Components for re-use (CRU) [kg]: A1-A3 0, A4 0, A5 0, C2 0, C3 (S1) 0, C3 (S2) 0, D (S1) 0, D (S2) 0
- Materials for recycling (MFR) [kg]: A1-A3 0, A4 0, A5 0, C2 0, C3 (S1) 1.1875, C3 (S2) 0, D (S1) 0, D (S2) 0
- Materials for energy recovery (MER) [kg]: A1-A3 0, A4 0, A5 0, C2 0, C3 (S1) 0, C3 (S2) 0, D (S1) 0, D (S2) 0
- Exported electrical energy (EEE) [MJ]: A1-A3 0, A4 0, A5 0.294, C2 0, C3 (S1) 0, C3 (S2) 4.59, D (S1) 0, D (S2) 0
- Exported thermal energy (EET) [MJ]: A1-A3 0, A4 0, A5 0.676, C2 0, C3 (S1) 0, C3 (S2) 11.076, D (S1) 0, D (S2) 0

## Impact indicators
- Global warming potential (GWP) [kg CO_(2)-Äq.]: A1-A3 3.71219, A4 0.0267871, A5 0.694583, C2 0.016226, C3 (S1) 0.00861801, C3 (S2) 2.58857, D (S1) -2.21734, D (S2) -1.49982
- Depletion potential of the stratospheric ozone layer (ODP) [kg CFC11-Äq.]: A1-A3 2.49198e-7, A4 1.23126e-13, A5 1.09708e-8, C2 7.45468e-14, C3 (S1) 6.11946e-12, C3 (S2) 5.55734e-10, D (S1) -2.59062e-11, D (S2) -6.71559e-13
- Acidification potential of land and water (AP) [kg SO_(2)-Äq.]: A1-A3 0.00836794, A4 0.000116657, A5 0.000952976, C2 0.000101378, C3 (S1) 2.39954e-5, C3 (S2) 0.000198207, D (S1) -0.00278884, D (S2) -0.00101631
- Eutrophication potential (EP) [kg PO_(4)^(3)-Äq.]: A1-A3 0.000942306, A4 2.85897e-5, A5 0.000104595, C2 2.54186e-5, C3 (S1) 2.14693e-6, C3 (S2) 4.33667e-5, D (S1) -0.000334858, D (S2) -0.000152232
- Formation potential of tropospheric ozone photochemical oxidants (POCP) [kg Ethen-Äq.]: A1-A3 0.00091133, A4 -3.99434e-5, A5 0.000169796, C2 -4.24951e-5, C3 (S1) 1.65385e-6, C3 (S2) 2.25994e-5, D (S1) -0.000484782, D (S2) -0.000190775
- Abiotic depletion potential for non fossil resources (ADPE) [kg Sb-Äq.]: A1-A3 1.25134e-5, A4 1.78385e-9, A5 5.8029e-7, C2 1.08004e-9, C3 (S1) 2.81434e-9, C3 (S2) -1.83977e-8, D (S1) -1.61286e-6, D (S2) -6.99001e-8
- Abiotic depletion potential for fossil resources (ADPF) [MJ]: A1-A3 85.2044, A4 0.36897, A5 13.6656, C2 0.223394, C3 (S1) 0.0933598, C3 (S2) 0.642542, D (S1) -60.1653, D (S2) -24.354

## Use advice
Scope:
This EPD refers to the entire life cycle of an average FAI SaarGummi Construction Deutschland waterproofing membrane. The various technical characteristics are depicted in section 2.3. The products are manufactured at the SaarGummi Construction Deutschland production facility in Wadern-Büschfeld, Germany.
This document is translated from the German Environmental Product Declaration into English. It is based on the German original version EPD-DUR-20170092-IBD1-DE. The verifier has no influence on the quality of the translation.
System boundary:
Type of EPD: Cradle to gate – with options

Modules A1-A3

The manufacturing stage involves production of the requisite raw materials including all of the upstream chains as well as the requisite procurement transport. Production of the declared unit also considered the requisite electrical and thermal energy as well as auxiliaries and consumables, including their upstream chains. Waste and waste water incurred are considered until full disposal thereof.

Module A4

This module considers the ecological impact of transporting the declared unit from the plant gate to the construction site.

Module A5

The environmental impacts incurred during the disposal of product packaging materials were taken into consideration here. Efforts associated with installation are also considered.

Modules C2-3

These modules include the environmental impacts of waste treatment at the end of life and the associated transports. In scenario 1, the efforts associated with processing are modelled while scenario 2 involves the efforts associated with incineration of the waterproofing membranes.

Module D The value streams arising from waste treatment (from A5 and C3) which can in turn serve as energetic (incineration with energy recovery, scenario 2) or material input (recycling, scenario 1) for a downstream product system are indicated as credits here.

## Data sources
- GaBi Database (all versions)
- GaBi database SP27 2015
