# Excavator 100kW

Dataset: ILCD process, EPD, generic dataset
Geography: DE
Reference year: 2018
Valid until: 2022
Classification: oekobau.dat: Sonstige / Baustellenprozesse / Bagger/Aushub
Owner: thinkstep
Compliance: DIN EN 15804
Review: Dependent internal review by thinkstep, IABP-GaBi, IBP-GaBi; Independent external review by GaBi user forum, GaBi bug forum, GaBi user community
Amounts: rows without a unit in brackets have none in this file; such an amount is in the reference unit of its flow, which a separate flow dataset defines
copyright: true

## General comment
This data set has been modeled according to the European Standard EN 15804 for Sustainable Building. Results are depicted in modules that allow the structured expression of results over the entire life cycle.

## Geography
The data set represents the country specific situation in Germany, focusing on the main technologies, the region specific characteristics and / or import statistics.

## Time period
Annual average

## Technology and included processes
The dataset includes the production and consumption of diesel necessary for the excavation of 1m3 of dirt (0.3091 kg diesel per m3 of sand soil) and the associated emissions: carbon dioxide, carbon monoxide, nitrogen oxides, NMVOC, dust particles, sulfur dioxide. This dataset does not include neither the production nor the disposal of the digger.
Background system:
Electricity: Electricity is modelled according to the individual country-specific situations. The country-specific modelling is achieved on multiple levels. Firstly, individual energy carrier specific power plants and plants for renewable energy sources are modelled according to the current national electricity grid mix. Modelling the electricity consumption mix includes transmission / distribution losses and the own use by energy producers (own consumption of power plants and "other" own consumption e.g. due to pumped storage hydro power etc.), as well as imported electricity. Secondly, the national emission and efficiency standards of the power plants are modelled as well as the share of electricity plants and combined heat and power plants (CHP). Thirdly, the country-specific energy carrier supply (share of imports and / or domestic supply) including the country-specific energy carrier properties (e.g. element and energy content) are accounted for. Fourthly, the exploration, mining/production, processing and transport processes of the energy carrier supply chains are modelled according to the specific situation of each electricity producing country. The different production and processing techniques (emissions and efficiencies) in the different energy producing countries are considered, e.g. different crude oil production technologies or different flaring rates at the oil platforms.
Thermal energy, process steam: The thermal energy and process steam supply is modelled according to the individual country-specific situation with regard to emission standards and considered energy carriers. The thermal energy and process steam are produced at heat plants. Efficiencies for thermal energy production are by definition 100% in relation to the corresponding energy carrier input. For process steam the efficiency ranges from 85%, 90% to 95%. The energy carriers used for the generation of thermal energy and process steam are modelled according to the specific import situation (see electricity above).
Transports: All relevant and known transport processes are included. Ocean-going and inland ship transport as well as rail, truck and pipeline transport of bulk commodities are considered.
Energy carriers: The energy carriers are modelled according to the specific supply situation (see electricity above).
Refinery products: Diesel fuel, gasoline, technical gases, fuel oils, lubricants and residues such as bitumen are modelled with a parameterised country-specific refinery model. The refinery model represents the current national standard in refining techniques (e.g. emission level, internal energy consumption, etc.) as well as the individual country-specific product output spectrum, which can be quite different from country to country. The supply of crude oil is modelled, again, according to the country-specific situation with the respective properties of the resources.

## Technical purpose
This product can be used in construction.

## Safety margin
20 %. Product system depicted except for a few missing processes / flows. Technological, temporal and geographic representativeness partly given.

## Reference product
- Spoil: 1

## Inputs
- Use of renewable primary energy (PERE) [MJ]: A5 1.01962
- Primary energy resources used as raw materials (PERM) [MJ]: A5 0
- Total use of renewable primary energy resources (PERT) [MJ]: A5 1.01962
- Use of non-renewable primary energy (PENRE) [MJ]: A5 17.5144
- Non-renewable primary energy resources used as raw materials (PENRM) [MJ]: A5 0
- Total use of non-renewable primary energy resources (PENRT) [MJ]: A5 17.5144
- Input of secondary material (SM) [kg]: A5 0
- Use of renewable secondary fuels (RSF) [MJ]: A5 0
- Use of non renewable secondary fuels (NRSF) [MJ]: A5 0
- Use of net fresh water (FW) [m3]: A5 0.000913152

## Outputs
- Hazardous waste disposed (HWD) [kg]: A5 6.54493e-7
- Non-hazardous waste disposed (NHWD) [kg]: A5 0.00307408
- Radioactive waste disposed (RWD) [kg]: A5 1.8439e-5
- Components for re-use (CRU) [kg]: A5 0
- Materials for Recycling (MFR) [kg]: A5 0
- Material for Energy Recovery (MER) [kg]: A5 0
- Exported electrical energy (EEE) [MJ]: A5 0
- Exported thermal energy (EET) [MJ]: A5 0

## Impact indicators
- Global warming potential (GWP) [kg CO2 eq.]: A5 1.29397
- Ozone Depletion Potential (ODP) [kg R11 eq.]: A5 4.31328e-16
- Acidification potential (AP) [kg SO2 eq.]: A5 0.00451329
- Eutrophication potential (EP) [kg Phosphate eq.]: A5 0.00106489
- Photochemical Ozone Creation Potential (POCP) [kg Ethene eq.]: A5 0.000445959
- Abiotic depletion potential for non fossil resources (ADPE) [kg Sb eq.]: A5 1.09656e-7
- Abiotic depletion potential for fossil resources (ADPF) [MJ]: A5 17.4672

## Use advice
The data set represents a cradle to gate inventory. It can be used to characterise the supply chain situation of the respective commodity in a representative manner. Combination with individual unit processes using this commodity enables the generation of user-specific (product) LCAs.

## Data sources
- GaBi Database Edition 2020, SP40
- GaBi database (all versions)
