# voestalpine rails

Dataset: ILCD process, EPD, average dataset
Geography: AT
Reference year: 2019
Valid until: 2024
Classification: OEKOBAU.DAT: Metalle / Stahl und Eisen / Stahlprofile
Classification: IBUCategories: 02 Bauprodukte / Tiefbauprodukte / Schienen, die eine Spur für Fahrzeuge bilden
Method details: Schienen, die eine Spur für Fahrzeuge bilden.pdf
Registration number: EPD-VOE-20190094-IAC1-DE
Owner: voestalpine AG
Compliance: DIN EN 15804; ISO 14025
Review: Accredited third party review by Institut Bauen und Umwelt e. V.
Amounts: rows without a unit in brackets have none in this file; such an amount is in the reference unit of its flow, which a separate flow dataset defines
copyright: true

## General comment
The products of voestalpine Rail Technology GmbH are manufactured and delivered as roughly 120 different profiles and grades pursuant to applicable European and international standards, guidelines and specifications.

## Technology and included processes
The starting material for the production of rails at voestalpine is crude steel made in the primary route (blast furnace, LD steelmaking plant) at the Donawitz site. The molten crude steel is cast into blooms using a continuous casting method. The blooms are temporarily stored in the bloom storage unit or in a holding pit and heated to rolling temperature in a controlled manner in the walking beam furnace. The rails are then pre-rolled in the reversing break-down mill (BDM). Final shaping of the rails takes place in the ultra-flexible rail mill (UFR). Depending on customer specifications, the rails are cooled naturally or heat-treated to achieve desired properties. Further production stages: ▪ Vertical and horizontal straightening ▪ Non-destructive testing (visual testing, flatness testing, eddy current testing and ultrasonic testing) ▪ Final straightening ▪ Cutting ▪ Drilling ▪ Final acceptance ▪ Storage and shipping
Technical data:
This EPD refers to all products of voestalpine Rail Technology GmbH in a variety of different steel grades, dimensions, shapes and as-delivered conditions.
Declared unit:
This environmental product declaration refers to a declared unit of 1 metric ton of average voestalpine rail.

## Technical purpose
The products of voestalpine Rail Technology GmbH are used in railway systems, particularly in the following areas:

▪ High-speed railways

▪ Mixed railways (passenger and freight traffic)

▪ Heavy loads (including railways for ore transports)

▪ Urban public transportation (subways and trams)

▪ Railway switches (individual parts used in switch production)

## Reference product
- voestalpine Schiene: 1000

## Inputs
- Renewable primary energy as energy carrier (PERE) [MJ]: A1-A3 1046.69, C3 0, C4 2.66125, D 821.182
- Renewable primary energy resources as material utilization (PERM) [MJ]: A1-A3 0, C3 0, C4 0, D 0
- Total use of renewable primary energy resources (PERT) [MJ]: A1-A3 1046.69, C3 0, C4 2.66125, D 821.182
- Non renewable primary energy as energy carrier (PENRE) [MJ]: A1-A3 21796.5, C3 0, C4 35.9682, D -11941.2
- Non renewable primary energy as material utilization (PENRM) [MJ]: A1-A3 0, C3 0, C4 0, D 0
- Total use of non renewable primary energy resources (PENRT) [MJ]: A1-A3 21796.5, C3 0, C4 35.9682, D -11941.2
- Use of secondary material (SM) [kg]: A1-A3 156.08, C3 0, C4 0, D 794
- Use of renewable secondary fuels (RSF) [MJ]: A1-A3 0, C3 0, C4 0, D 0
- Use of non renewable secondary fuels (NRSF) [MJ]: A1-A3 0, C3 0, C4 0, D 0
- Use of net fresh water (FW) [m^3]: A1-A3 5.83237, C3 0, C4 -1.69202e-5, D 1.71248

## Outputs
- Hazardous waste disposed (HWD) [kg]: A1-A3 0.000399103, C3 0, C4 1.92332e-7, D -0.000834485
- Non hazardous waste disposed (NHWD) [kg]: A1-A3 19.925, C3 0, C4 50.1116, D 137.119
- Radioactive waste disposed (RWD) [kg]: A1-A3 0.176228, C3 0, C4 0.000501383, D 0.000410665
- Components for re-use (CRU) [kg]: A1-A3 0, C3 0, C4 0, D 0
- Materials for recycling (MFR) [kg]: A1-A3 0, C3 950, C4 0, D 0
- Materials for energy recovery (MER) [kg]: A1-A3 0, C3 0, C4 0, D 0
- Exported electrical energy (EEE) [MJ]: A1-A3 0, C3 0, C4 0, D 0
- Exported thermal energy (EET) [MJ]: A1-A3 0, C3 0, C4 0, D 0

## Impact indicators
- Global warming potential (GWP) [kg CO_(2)-Äq.]: A1-A3 2626.12, C3 0, C4 2.42346, D -1284.21
- Depletion potential of the stratospheric ozone layer (ODP) [kg CFC11-Äq.]: A1-A3 7.18279e-9, C3 0, C4 6.33761e-13, D 7.11936e-6
- Acidification potential of land and water (AP) [kg SO_(2)-Äq.]: A1-A3 6.73365, C3 0, C4 0.00673847, D -2.50644
- Eutrophication potential (EP) [kg PO_(4)^(3)-Äq.]: A1-A3 0.795688, C3 0, C4 0.000853818, D -0.187182
- Formation potential of tropospheric ozone photochemical oxidants (POCP) [kg Ethen-Äq.]: A1-A3 1.16818, C3 0, C4 0.000598699, D -0.58942
- Abiotic depletion potential for non fossil resources (ADPE) [kg Sb-Äq.]: A1-A3 0.0288942, C3 0, C4 5.11093e-7, D -0.00368889
- Abiotic depletion potential for fossil resources (ADPF) [MJ]: A1-A3 21351.4, C3 0, C4 34.6914, D -12391.1

## Use advice
Scope:
This EPD is based on a declared unit of 1 metric ton of average voestalpine rails produced at the production site in Donawitz (Austria).
System boundary:
The life cycle assessment of voestalpine rails refers to a cradle-to-gate analysis with options. The following lifecycle phases are taken into consideration in the analysis:

Module A1-A3 | Production stage

The product stage includes upstream burdens of processed intermediates (mainly steel blooms) and raw materials including the corresponding transports to the production site in Donawitz. Material and energy flows needed for the integrated steel mill as well as the subsequent rolling, heat treatment and finishing of voestalpine rails were recorded on site. Electricity is provided at Donawitz in a power station where furnace gases are used as fuel. Since more energy is used than is supplied by the site's power station, natural gas and electricity is additionally supplied from the Austrian grid.

No packaging is needed for the delivery of the product.

Module C3 | Waste treatment

Product flows that reach Module D for recycling leave the product system in C3. Environmental impacts resulting from the grinding and sorting of steel scrap are not included.

Module C4 | Landfilling

Module C4 declares the environmental impacts incurred by landfilling (5% of the product).

Module D | Credits and loads beyond the system boundary

The potential for substituting primary steel with a recycling scenario (95% of the product) is set forth in Module D.

## Data sources
- voestalpine Schienen.pdf
- GaBi Database (all versions)
- GaBi database SP29 2016
