# Brandschutzklappe FR90

Dataset: ILCD process, EPD, specific dataset
Geography: DE
Reference year: 2018
Valid until: 2023
Classification: OEKOBAU.DAT: Gebäudetechnik / Klimatisierung und Lüftung / Lüftungsanlagen
Classification: IBUCategories: 03 Gebäudetechnik / Brandschutzeinrichtungen / Brandschutzklappen und Brandschutzventile und Entrauchungsklappen
Method details: Brandschutzklappen und Brandschutzventile und Entrauchungsklappen.pdf
Registration number: EPD-WWB-20180132-ICC1-DE
Owner: Wildeboer Bauteile GmbH
Compliance: DIN EN 15804; ISO 14025
Review: Accredited third party review by Institut Bauen und Umwelt e. V.
Amounts: rows without a unit in brackets have none in this file; such an amount is in the reference unit of its flow, which a separate flow dataset defines
copyright: true

## General comment
Die Brandschutzklappe FR90 besteht aus einem stabilen einteiligen Gehäuse aus verzinktem Stahl- blech mit einem innen liegenden bruchsicheren Klappenblatt aus abriebfestem Kalziumsilikat. Die Betätigung der Antriebseinheiten erfolgt manuell oder motorisch. Ein vollständig gekapseltes, dauer- geschmiertes, wartungsfreies Getriebe im Gehäuse- wandbereich mit einer gekapselten Antriebseinheit sorgt als selbstverriegelnde Antriebsmechanik für bruchsichere Drehmomentübertragungen.

Die Brandschutzklappe FR90 kann mit wartungsfreier thermisch-mechanischer Auslöseeinrichtung oder mit elektrischem Federrücklaufantrieb ausgerüstet werden. Ein großer freier Querschnitt fördert den energetisch günstigen Betrieb der raumlufttechnischen Anlage.

Auch geeignet für den Einsatz in Überströmöffnungen (Ü-FR).

Die Brandschutzklappe FR90 ist unabhängig von den verbauten Komponenten und Abmessungen wartungs- frei. Hygienische Reinigungen sind, wo erforderlich, durchzuführen. Näheres siehe auch Kap. 7 und die /Herstellerunterlagen/.

In dieser EPD wurden die Ergebnisse für eine repräsentative Brandschutzklappe FR90 (siehe Angaben unter 3.1) berechnet.

## Technology and included processes
Die Produktion erfolgt an einem Standort. Notwendige Roh- und Halbteile, Hilfs- und Betriebsstoffe werden von Lieferanten angeliefert und fließen in die Pro- duktion mit ein. Die Fertigung der Halbteile erfolgt in einer Vorfertigung mit materialüblichen Fertigungs- verfahren. Metallteile werden gestanzt und in Form gekantet, Teile aus Kalziumsilikat gesägt und gefräst. Zur Vermeidung von Abfällen werden Zuschnitte entsprechend optimiert. Abfälle, die dann noch entstehen, werden gesammelt und möglichst von entsprechenden Firmen recycelt, oder als Hausmüll entsorgt und verbrannt. Schmierstoffe werden weitestgehend gesammelt, aufbereitet und in der Produktion wiederverwendet. Stäube und Dünste werden vor Ort abgesaugt und gesammelt. Die Teile der Vorfertigung werden zusammen mit eingekauften Teilen zu Brandschutzklappen end- montiert, im Rahmen der Qualitätssicherung nach /DIN EN ISO 9001/ geprüft, verpackt und ausgeliefert.
Technische Daten:
Die Anforderungen nach harmonisierter Produktnorm /DIN EN 15650/ sind erfüllt. Brandprüfungen erfolgten nach /DIN EN 1366-2/.
Deklarierte Einheit:
Die Deklaration bezieht sich auf ein Stück Referenz-Brandschutzklappe der Wildeboer Bauteile GmbH mit der Größe DN 100 einschließlich des elektrischen Federrücklaufantriebs mit Motorkonsole und des optionalen Einbaurahmens (Gesamtgewicht 6,41 kg). Für die Auslöseeinheit wurde als worst case Betrachtung die elektrische Variante (es gibt auch eine mechanische Auslöseeinheit) berücksichtigt. Die optional lieferbaren Einbaurahmen für o.g. Baugröße der Brandschutzklappe wurden zu einem Durch- schnittsrahmen zusammengefasst und ebenfalls berücksichtigt. Ökobilanzergebnisse weiterer Brandschutzklappen FR90 mit abweichenden Abmessungen als die hier betrachtete, sowie Ergebnisse der Brandschutzklappe für Überström- öffnungen (Ü-FR) wurden ebenfalls berechnet und können bei Wildeboer Bauteile GmbH angefragt werden.

## Technical purpose
Brandschutzklappe FR90 verhindert die Übertragung von Rauch und Feuer durch Lüftungsleitungen einer raumlufttechnischen Anlage in andere Brandabschnitte oder Geschosse. Einsatz der Brandschutzklappe FR90 ist möglich bei Feuerwiderstandsdauer 30/60/90/120 Minuten. Sie ist geeignet für den Einbau in, an und entfernt von massiven Wänden und Decken, in und entfernt von Metallständerwänden, in Brandwänden, an Schachtwänden, in Holzwänden und Holzdecken sowie in Decken mit Stahlrahmen. Der Einbau ist mit liegender oder stehender Absperrklappenblattachse und in Zwischenstellungen möglich und erfolgt nass, trocken oder mit teilweiser Ausmörtelung mit den

kleinstmöglichen Abständen zwischen Brand- schutzklappen zueinander oder zu Wänden und Decken. Durch die Verwendung von Einbaurahmen unterschiedlicher Art, die lose oder vormontiert geliefert werden, ist eine universelle und flexible Handhabung gegeben, z.B. auch bei Änderungen der Einbausituation vor Ort. FR90 ist geeignet für Erst- einbau und Sanierung. Steckverbindungen er- möglichen einen schnellen Um- oder Austausch der Auslöseeinrichtung. Brandschutzklappe FR90 mit Schutzgitter, elektrischem Antrieb und Rauchauslöse- einrichtung kann für Überströmöffnungen genutzt werden. Die Brandschutzklappe FR90 ist wartungsfrei.

## Reference product
- 1 Stück Brandschutzklappe FR90 mit 6,74 kg/Stück: 1

## Inputs
- Erneuerbare Primärenergie als Energieträger (PERE) [MJ]: A1-A3 28.4944, A4 0.114255, A5 0.353766, B1 0, B2 0, B6 28.2, B7 0, C1 0, C2 0.07917, C3 0.07175, C4 0.107949, D 1.45261
- Erneuerbare Primärenergie zur stofflichen Nutzung (PERM) [MJ]: A1-A3 0.923564, A4 0, A5 -0.923564, B1 0, B2 0, B6 0, B7 0, C1 0, C2 0, C3 0, C4 0, D 0
- Total erneuerbare Primärenergie (PERT) [MJ]: A1-A3 29.418, A4 0.114255, A5 0.0015396, B1 0, B2 0, B6 28.2, B7 0, C1 0, C2 0.07917, C3 0.07175, C4 0.107949, D 1.45261
- Nicht-erneuerbare Primärenergie als Energieträger (PENRE) [MJ]: A1-A3 278.944, A4 1.70109, A5 0.510188, B1 0, B2 0, B6 60.3, B7 0, C1 0, C2 1.1762, C3 3.58166, C4 0.77207, D -53.58
- Nicht-erneuerbare Primärenergie zur stofflichen Nutzung (PENRM) [MJ]: A1-A3 4.50574, A4 0, A5 -1.31938, B1 0, B2 0, B6 0, B7 0, C1 0, C2 0, C3 -3.18636, C4 0, D 0
- Total nicht erneuerbare Primärenergie (PENRT) [MJ]: A1-A3 283.45, A4 1.70109, A5 0.007799, B1 0, B2 0, B6 60.3, B7 0, C1 0, C2 1.1762, C3 0.3953, C4 0.77207, D -53.58
- Einsatz von Sekundärstoffen (SM) [kg]: A1-A3 0.7978, A4 0, A5 0, B1 0, B2 0, B6 0, B7 0, C1 0, C2 0, C3 0, C4 0, D 2.2372
- Erneuerbare Sekundärbrennstoffe (RSF) [MJ]: A1-A3 0, A4 0, A5 0, B1 0, B2 0, B6 0, B7 0, C1 0, C2 0, C3 0, C4 0, D 0
- Nicht erneuerbare Sekundärbrennstoffe (NRSF) [MJ]: A1-A3 0, A4 0, A5 0, B1 0, B2 0, B6 0, B7 0, C1 0, C2 0, C3 0, C4 0, D 0
- Einsatz von Süßwasserressourcen (FW) [m^3]: A1-A3 0.077016, A4 0.000132465, A5 4.778e-5, B1 0, B2 0, B6 0.0179, B7 0, C1 0, C2 9.188e-5, C3 0.0024937, C4 0.00113659, D -2.9e-5

## Outputs
- Gefährlicher Abfall zur Deponie (HWD) [kg]: A1-A3 1.63951e-6, A4 1.089e-7, A5 3.736e-11, B1 0, B2 0, B6 4.6e-8, B7 0, C1 0, C2 7.547e-8, C3 1.9027e-9, C4 1.12291e-8, D -3.768e-8
- Entsorgter nicht gefährlicher Abfall (NHWD) [kg]: A1-A3 0.6576, A4 0.000126649, A5 0.0008547, B1 0, B2 0, B6 0.0619, B7 0, C1 0, C2 8.778e-5, C3 0.0935, C4 2.8574, D -0.1143
- Entsorgter radioaktiver Abfall (RWD) [kg]: A1-A3 0.0073443, A4 2.04945e-6, A5 3.205e-7, B1 0, B2 0, B6 0.00596, B7 0, C1 0, C2 1.4193e-6, C3 1.9417e-5, C4 1.54661e-5, D 0.0004136
- Komponenten für die Wiederverwendung (CRU) [kg]: A1-A3 0, A4 0, A5 0, B1 0, B2 0, B6 0, B7 0, C1 0, C2 0, C3 0, C4 0, D 0
- Stoffe zum Recycling (MFR) [kg]: A1-A3 0, A4 0, A5 0, B1 0, B2 0, B6 0, B7 0, C1 0, C2 0, C3 0, C4 0, D 3.035
- Stoffe für die Energierückgewinnung (MER) [kg]: A1-A3 0, A4 0, A5 0, B1 0, B2 0, B6 0, B7 0, C1 0, C2 0, C3 0, C4 0, D 0
- Exportierte elektrische Energie (EEE) [MJ]: A1-A3 0, A4 0, A5 0.014957, B1 0, B2 0, B6 0, B7 0, C1 0, C2 0, C3 2.1186, C4 0.31829, D 0
- Exportierte thermische Energie (EET) [MJ]: A1-A3 0, A4 0, A5 0.0348, B1 0, B2 0, B6 0, B7 0, C1 0, C2 0, C3 3.86, C4 0.73999, D 0

## Impact indicators
- Globales Erwärmungspotenzial (GWP) [kg CO_(2)-Äq.]: A1-A3 21.9, A4 0.151988, A5 0.01632, B1 0, B2 0, B6 4.66, B7 0, C1 0, C2 0.08686, C3 0.972, C4 0.39229, D -6.45
- Abbau Potential der stratosphärischen Ozonschicht (ODP) [kg CFC11-Äq.]: A1-A3 2.27481e-10, A4 2.65492e-15, A5 3.647e-16, B1 0, B2 0, B6 6.86e-12, B7 0, C1 0, C2 1.8437e-15, C3 2.5177e-14, C4 1.78182e-14, D 4.026e-13
- Versauerungspotenzial von Boden und Wasser (AP) [kg SO_(2)-Äq.]: A1-A3 0.09337, A4 0.000505535, A5 6.826e-6, B1 0, B2 0, B6 0.0071, B7 0, C1 0, C2 0.00034969, C3 0.00024131, C4 0.00041244, D -0.014806
- Eutrophierungspotenzial (EP) [kg PO_(4)^(3)-Äq.]: A1-A3 0.0070805, A4 0.000128334, A5 1.3248e-6, B1 0, B2 0, B6 0.00116, B7 0, C1 0, C2 8.891e-5, C3 2.25e-5, C4 6.5103e-5, D -0.001326
- Bildungspotential für troposphärisches Ozon (POCP) [kg Ethen-Äq.]: A1-A3 0.0067652, A4 -0.000192551, A5 3.973e-7, B1 0, B2 0, B6 0.000471, B7 0, C1 0, C2 -0.00013321, C3 9.837e-6, C4 2.9276e-5, D -0.0018434
- Potenzial für den abiotischen Abbau nicht fossiler Ressourcen (ADPE) [kg Sb-Äq.]: A1-A3 0.0016529, A4 1.31242e-8, A5 1.4572e-9, B1 0, B2 0, B6 3.18e-6, B7 0, C1 0, C2 9.086e-9, C3 7.644e-8, C4 4.8403e-8, D -3.0133e-5
- Potenzial für den abiotischen Abbau fossiler Brennstoffe (ADPF) [MJ]: A1-A3 264.97, A4 1.69548, A5 0.006989, B1 0, B2 0, B6 45.2, B7 0, C1 0, C2 1.1721, C3 0.3468, C4 0.73267, D -54.62

## Use advice
Gültigkeitsbereich:
Dieses Dokument bezieht sich auf die Herstellung, den Transport, den Einbau, den Betrieb und die Entsorgung von Brandschutzklappen mit optionalem Zubehör für raumlufttechnische Anlagen. Die Produkte werden ausschließlich im Werk Weener produziert, in dem die Produktionsdaten des Jahres 2017 erhoben wurden.
Systemgrenze:
Die Systemgrenze der EPD vom Typ "Wiege bis Bahre" folgt dem modularen Aufbau nach /EN 15804/. Die Ökobilanz der betrachteten Produkte berück- sichtigt den kompletten Lebensweg des Produktes und somit alle Module:

A1-A3 (Produktionsstadium): Rohstoffbereitstellung, Transport zum Hersteller, Herstellung (inkl. Energie- und Wasserbereitstellung, Bereitstellung von Hilfs- stoffen, Entsorgung von Abfällen).

A4-A5 (Einrichten des Bauwerks): Transport zur Baustelle, Einbau in das Gebäude mithilfe des Ein- baurahmens, Verwertung von Verpackungsabfällen auf der Baustelle.

B1-B5 (Nutzungsstadium): Während der Nutzung der Brandschutzklappe (B1) auf Produktebene werden keine Emissionen freigesetzt. Die für den Betrieb der Brandschutzklappe mit elektrischem Antriebsmotor erforderliche elektrische Energie sowie die elektrische Energie für die halbjährlichen bzw. jährlichen Funktionsprüfungen sind dem Modul (B6) zugeordnet, da diese im Zusammenhang mit dem Betrieb des Gebäudes zu sehen sind. Eine Reparatur (B3) bzw. ein Austausch einzelner Komponenten (B4) ist während der betrachteten Nutzungsdauer nicht relevant. Während der RLS (Referenz-Nutzungsdauer) ist laut Herstellerangaben keine Erneuerung der Brandschutzklappe notwendig (B5). Die Module B3 bis B5 werden als Modul nicht Relevant „MNR“ deklariert.

B6-B7 (Nutzungsstadium – Betrieb des Gebäudes): Einsatz von elektrischer Energie für den Betrieb des Produktes.

C1-C4 (Entsorgungsstadium): Rückbau des Produkts,Transport zur Abfallbehandlung, Abfall- behandlung, Entsorgung.

D (Gutschriften): Recyclingpotential.

## Data sources
- Brandschutzklappe FR90.pdf
- GaBi Database (all versions)
- GaBi database SP36 2018
