# Kalksandstein

Dataset: ILCD process, EPD, average dataset
Geography: DE
Reference year: 2016
Valid until: 2021
Classification: OEKOBAU.DAT: Mineralische Baustoffe / Steine und Elemente / Kalksandstein
Classification: IBUCategories: 02 Bauprodukte / Mauerwerk und Mörtel / Kalksandstein
Method details: Kalksandstein.pdf
Registration number: 8067
Owner: Bundesverband Kalksandsteinindustrie e.V.
Compliance: DIN EN 15804; ISO 14025
Review: Accredited third party review by Institut Bauen und Umwelt e. V.
Amounts: rows without a unit in brackets have none in this file; such an amount is in the reference unit of its flow, which a separate flow dataset defines
copyright: true

## General comment
Die in der Ökobilanz berechneten Produkte sind durchschnittliche unbewehrte Mauersteine unterschiedlicher Formate aus Kalksandstein. Kalksandstein gehört zur Gruppe der dampfgehärteten Baustoffe. Die Daten sind repräsentativ für die Produktion der Mitglieder des Bundesverbandes.

Es erfolgt eine Durchschnittsbildung auf Basis der jährlichen Produktionsvolumen 2014 der Werke des Bundesverbandes.

## Technology and included processes
Grundstoffe: Sand: 65 - 85 M-%, Kies: 0 - 45 M-%, Brechsand: 0 - 10 M-%, Branntkalk: 5 - 12 M-%, Gesteinsmehl: 0 - 2 M-%, Zusätzlich werden 3 - 6 M-% Wasser (bezogen auf die Feststoffe) eingesetzt. Herstellung: Die verwendeten Rezepturen werden den jeweiligen Rohstoffeigenschaften angepasst und variieren innerhalb der unter 2.6. Grundstoffe/Hilfsstoffe angegebenen Schwankungsbreiten. Weitere Stoffe sind nicht enthalten. Die Rohstoffe (Sand, Branntkalk und Wasser) werden entsprechend der jeweiligen Rezeptur gravimetrisch dosiert und intensiv miteinander vermischt. Anschließend wird die Rohstoffmischung in einem Reaktor genannten Reaktionsbehälter zwischengelagert, wobei es zu einer exothermen Reaktion kommt. Damit wird sichergestellt, dass der Branntkalk vor der Weiterverarbeitung vollständig zu Kalkhydrat ablöscht. Vom Reaktor gelangt das Mischgut in einen Nachmischer, in dem es durch Wasserzugabe auf Pressfeuchte gebracht wird. Die Verdichtung und Formgebung der Rohmasse erfolgt im Anschluss hieran in Formkästen durch die Kalksandsteinpressen. Die Rohlinge werden dann mittels einer Stapelautomatik auf Härtewagen gestapelt und über ein Schiebebühnensystem per Gleisanlage in den Härtekessel transportiert. Die Ausbildung der endgültigen Eigenschaften der Bauteile erfolgt während der anschließenden Dampfhärtung über 6 – 12 Stunden bei etwa 200°C und einem Druck von ca. 16 bar in Dampfdruckkesseln, den sog. Autoklaven. Hier bilden sich aus den eingesetzten Stoffen Calcium-Silikat-Hydrate. Die Reaktion des Materials ist mit der Entnahme aus dem Autoklav abgeschlossen. Der Dampf wird nach Abschluss des Härtungsprozesses für weitere Autoklavzyklen verwandt. Das anfallende Kondensat wird soweit technologisch möglich als Prozesswasser genutzt.
Deklarierte Einheit:
Die Deklaration bezieht sich auf die Herstellung von 1 t Kalksandstein.Durch Multiplikation der Ergebnisse mit der Rohdichteklasse, z.B. RDK 2,0, erhält man die Ökobilanzergebnisse pro m³.

## Technical purpose
Mauersteine für tragende und nicht tragende Wände.

## Reference product
- 1000 kg Kalksandstein (1 t Kalksandstein): 1

## Inputs
- Erneuerbare Primärenergie als Energieträger (PERE) [MJ]: A1-A3 175
- Erneuerbare Primärenergie zur stofflichen Nutzung (PERM) [MJ]: A1-A3 0
- Total erneuerbare Primärenergie (PERT) [MJ]: A1-A3 175
- Nicht-erneuerbare Primärenergie als Energieträger (PENRE) [MJ]: A1-A3 997
- Nicht-erneuerbare Primärenergie zur stofflichen Nutzung (PENRM) [MJ]: A1-A3 0
- Total nicht erneuerbare Primärenergie (PENRT) [MJ]: A1-A3 997
- Einsatz von Sekundärstoffen (SM) [kg]: A1-A3 4.76
- Erneuerbare Sekundärbrennstoffe (RSF) [MJ]: A1-A3 0
- Nicht erneuerbare Sekundärbrennstoffe (NRSF) [MJ]: A1-A3 0
- Einsatz von Süßwasserressourcen (FW) [m^3]: A1-A3 0.309

## Outputs
- Gefährlicher Abfall zur Deponie (HWD) [kg]: A1-A3 0.000339
- Entsorgter nicht gefährlicher Abfall (NHWD) [kg]: A1-A3 11.7
- Entsorgter radioaktiver Abfall (RWD) [kg]: A1-A3 0.0218
- Komponenten für die Wiederverwendung (CRU) [kg]
- Stoffe zum Recycling (MFR) [kg]
- Stoffe für die Energierückgewinnung (MER) [kg]
- Exportierte elektrische Energie (EEE) [MJ]
- Exportierte thermische Energie (EET) [MJ]

## Impact indicators
- Globales Erwärmungspotenzial (GWP) [kg CO_(2)-Äq.]: A1-A3 136
- Abbau Potential der stratosphärischen Ozonschicht (ODP) [kg CFC11-Äq.]: A1-A3 1.54e-9
- Versauerungspotenzial von Boden und Wasser (AP) [kg SO_(2)-Äq.]: A1-A3 0.0893
- Eutrophierungspotenzial (EP) [kg PO_(4)^(3)-Äq.]: A1-A3 0.0171
- Bildungspotential für troposphärisches Ozon (POCP) [kg Ethen-Äq.]: A1-A3 0.00239
- Potenzial für den abiotischen Abbau nicht fossiler Ressourcen (ADPE) [kg Sb-Äq.]: A1-A3 2.89e-5
- Potenzial für den abiotischen Abbau fossiler Brennstoffe (ADPF) [MJ]: A1-A3 943

## Use advice
Gültigkeitsbereich:
Als Datenbasis wurden spezifische Daten aus den im Bundesverband Kalksandsteinindustrie e.V. organisierten Werken gemittelt. Die Ökobilanz umfasst die Rohstoff- und Energiegewinnung, Rohstofftransporte und die eigentliche Herstellungsphase von Kalksandsteinen der Rohdichteklasse 1,8.

Die Daten sind repräsentativ für die Produktion des Bundesverbandes. Es erfolgte eine Durchschnittsbildung auf Basis der jährlichen Produktionsvolumen 2014 der Werke des Bundesverbandes.
Systemgrenze:
Typ der EPD: Wiege-bis-Werkstor

Im Einzelnen wurden folgende Prozesse in das Produktstadium A1-A3 der Kalksandstein-Herstellung einbezogen:

Bereitstellungsprozesse von Hilfsstoffen & Energie
Transporte der Ressourcen und Vorprodukte (Kalk, Sand etc.) zum jeweiligen Produktionsstandort
Herstellprozess im Werk inklusive energetischer Aufwendungen, Herstellung von Hilfsstoffen, Entsorgung anfallender Reststoffe
Herstellung der anteiligen Verpackung

## Data sources
- Kalksandstein.pdf
- GaBi Database (all versions)
- GaBi database SP20 2013
