# Facing brick; clay- based

Dataset: ILCD process, EPD, generic dataset
Geography: DE
Reference year: 2018
Valid until: 2022
Classification: oekobau.dat: Mineralische Baustoffe / Steine und Elemente / Ziegel
Owner: thinkstep
Compliance: DIN EN 15804
Review: Dependent internal review by thinkstep, IABP-GaBi, IBP-GaBi; Independent external review by GaBi user forum, GaBi bug forum, GaBi user community
Amounts: rows without a unit in brackets have none in this file; such an amount is in the reference unit of its flow, which a separate flow dataset defines
copyright: true

## General comment
This data set has been modeled according to the European Standard EN 15804 for Sustainable Building. Results are depicted in modules that allow the structured expression of results over the entire life cycle.

## Geography
The data set represents the country specific situation in Germany, focusing on the main technologies, the region specific characteristics and / or import statistics.

## Time period
Annual average

## Technology and included processes
Bricks are made of clay in. The production steps are as follows: Clay is extracted by open cut mining. The wet material is extracted by excavators and unwanted strata (gravel, chalk, etc.) are removed. The clay is mechanically processed to get the desired properties for molding. The mechanical processing occurs by using different mills and rollers, water is added to the already moist clay to improve the molding properties. The wet processed clay can be stored in silos to achieve deflocculation and homogenization. When the clay has the desired consistence, it is formed into the desired shape with an extruder machine or mold boxes. Before the firing process, as much moisture has to me removed from the clay as possible, otherwise, the clay would explode in the furnace. Drying occurs by heating the clay to about 80- 120°C, drying time is about 18- 40h.When the clay is dry enough, it is put in a furnace for burning it. The furnace temperature is about 900- 1200°C. At those high temperatures, sintering processes take place making the clay shrink and the rest of the moisture disappears. The bricks are then ready for being packaged and sold.
Background system:
Electricity: Electricity is modelled according to the individual country-specific situations. The country-specific modelling is achieved on multiple levels. Firstly, individual energy carrier specific power plants and plants for renewable energy sources are modelled according to the current national electricity grid mix. Modelling the electricity consumption mix includes transmission / distribution losses and the own use by energy producers (own consumption of power plants and "other" own consumption e.g. due to pumped storage hydro power etc.), as well as imported electricity. Secondly, the national emission and efficiency standards of the power plants are modelled as well as the share of electricity plants and combined heat and power plants (CHP). Thirdly, the country-specific energy carrier supply (share of imports and / or domestic supply) including the country-specific energy carrier properties (e.g. element and energy content) are accounted for. Fourthly, the exploration, mining/production, processing and transport processes of the energy carrier supply chains are modelled according to the specific situation of each electricity producing country. The different production and processing techniques (emissions and efficiencies) in the different energy producing countries are considered, e.g. different crude oil production technologies or different flaring rates at the oil platforms.
Thermal energy, process steam: The thermal energy and process steam supply is modelled according to the individual country-specific situation with regard to emission standards and considered energy carriers. The thermal energy and process steam are produced at heat plants. Efficiencies for thermal energy production are by definition 100% in relation to the corresponding energy carrier input. For process steam the efficiency ranges from 85%, 90% to 95%. The energy carriers used for the generation of thermal energy and process steam are modelled according to the specific import situation (see electricity above).
Transports: All relevant and known transport processes are included. Ocean-going and inland ship transport as well as rail, truck and pipeline transport of bulk commodities are considered.
Energy carriers: The energy carriers are modelled according to the specific supply situation (see electricity above).
Refinery products: Diesel fuel, gasoline, technical gases, fuel oils, lubricants and residues such as bitumen are modelled with a parameterised country-specific refinery model. The refinery model represents the current national standard in refining techniques (e.g. emission level, internal energy consumption, etc.) as well as the individual country-specific product output spectrum, which can be quite different from country to country. The supply of crude oil is modelled, again, according to the country-specific situation with the respective properties of the resources.

## Technical purpose
This product can be used in construction.

## Safety margin
20 %. Product system depicted except for a few missing processes / flows. Technological, temporal and geographic representativeness partly given.

## Reference product
- Face brick m3: 1

## Inputs
- Use of renewable primary energy (PERE) [MJ]: A1-A3 574.788, C1 1.01962, C2 3.92256, C3 23.6714, D -14.0717
- Primary energy resources used as raw materials (PERM) [MJ]: A1-A3 0, C1 0, C2 0, C3 0, D 0
- Total use of renewable primary energy resources (PERT) [MJ]: A1-A3 574.788, C1 1.01962, C2 3.92256, C3 23.6714, D -14.0717
- Use of non-renewable primary energy (PENRE) [MJ]: A1-A3 8150.76, C1 17.5144, C2 67.3794, C3 219.3, D -49.3369
- Non-renewable primary energy resources used as raw materials (PENRM) [MJ]: A1-A3 0, C1 0, C2 0, C3 0, D 0
- Total use of non-renewable primary energy resources (PENRT) [MJ]: A1-A3 8150.76, C1 17.5144, C2 67.3794, C3 219.3, D -49.3369
- Input of secondary material (SM) [kg]: A1-A3 0, C1 0, C2 0, C3 0, D 0
- Use of renewable secondary fuels (RSF) [MJ]: A1-A3 0, C1 0, C2 0, C3 0, D 0
- Use of non renewable secondary fuels (NRSF) [MJ]: A1-A3 0, C1 0, C2 0, C3 0, D 0
- Use of net fresh water (FW) [m3]: A1-A3 0.509721, C1 0.000913152, C2 0.00351298, C3 0.0562663, D -0.00912554

## Outputs
- Hazardous waste disposed (HWD) [kg]: A1-A3 1.65476e-5, C1 6.54493e-7, C2 2.5179e-6, C3 3.97235e-6, D -9.2992e-7
- Non-hazardous waste disposed (NHWD) [kg]: A1-A3 3.74538, C1 0.00307408, C2 0.0118263, C3 557.284, D -29
- Radioactive waste disposed (RWD) [kg]: A1-A3 0.0672778, C1 1.8439e-5, C2 7.09367e-5, C3 0.0021135, D -0.001837
- Components for re-use (CRU) [kg]: A1-A3 0, C1 0, C2 0, C3 0, D 0
- Materials for Recycling (MFR) [kg]: A1-A3 0, C1 0, C2 0, C3 1670.1, D 0
- Material for Energy Recovery (MER) [kg]: A1-A3 0, C1 0, C2 0, C3 0, D 0
- Exported electrical energy (EEE) [MJ]: A1-A3 0, C1 0, C2 0, C3 0, D 0
- Exported thermal energy (EET) [MJ]: A1-A3 0, C1 0, C2 0, C3 0, D 0

## Impact indicators
- Global warming potential (GWP) [kg CO2 eq.]: A1-A3 528.541, C1 1.29397, C2 5.01311, C3 13.207, D -3.69717
- Ozone Depletion Potential (ODP) [kg R11 eq.]: A1-A3 3.03841e-12, C1 4.31328e-16, C2 1.65936e-15, C3 7.48137e-14, D -7.13553e-14
- Acidification potential (AP) [kg SO2 eq.]: A1-A3 0.451819, C1 0.00451329, C2 0.0101259, C3 0.0854102, D -0.00873075
- Eutrophication potential (EP) [kg Phosphate eq.]: A1-A3 0.083933, C1 0.00106489, C2 0.00240722, C3 0.0145329, D -0.00169886
- Photochemical Ozone Creation Potential (POCP) [kg Ethene eq.]: A1-A3 0.0798845, C1 0.000445959, C2 -0.00303373, C3 0.00775107, D 0.00080257
- Abiotic depletion potential for non fossil resources (ADPE) [kg Sb eq.]: A1-A3 5.4421e-5, C1 1.09656e-7, C2 4.21858e-7, C3 7.09668e-6, D -8.21695e-7
- Abiotic depletion potential for fossil resources (ADPF) [MJ]: A1-A3 7980.87, C1 17.4672, C2 67.1981, C3 213.962, D -44.6993

## Use advice
The data set represents a cradle to gate inventory. It can be used to characterise the supply chain situation of the respective commodity in a representative manner. Combination with individual unit processes using this commodity enables the generation of user-specific (product) LCAs.

## Data sources
- Ökologische Bilanzierung von Baustoffen und Gebäuden, 2000
- ULLMANN'S Encyclopedia of Industrial Chemistry
- HOW CLAY BRICKS ARE MADE
- GaBi Database Edition 2020, SP40
- GaBi database (all versions)
