# Gypsum fibreboards

Dataset: ILCD process, EPD, average dataset
Geography: BG
Reference year: 2019
Valid until: 2024
Classification: OEKOBAU.DAT: Mineralische Baustoffe / Steine und Elemente / Gipsplatten
Classification: IBUCategories: 02 Building products / Gypsum products / Plasterboard
Method details: Plasterboard.pdf
Generated by: denkstatt Bulgaria OOD
Registration number: EPD-KNB-20190065-IAC1-EN
Owner: Knauf Bulgaria EOOD
Compliance: DIN EN 15804; ISO 14025
Review: Accredited third party review by Institut Bauen und Umwelt e. V.
Amounts: rows without a unit in brackets have none in this file; such an amount is in the reference unit of its flow, which a separate flow dataset defines
copyright: true
licenseType: Free of charge for all users and uses
accessRestrictions: None

## General comment
Knauf gypsum fibre boards are manufactured from high-quality calcined gypsum reinforced with dispersed cellulose fibers originated from selected types of recycled paper. Knauf produces four types of gypsum fibre boards: Vidiwall (gypsum fibre boards for lining walls, ceilings, metal and wooden structures, including an impregnated fibre boards (Vidiwall HI) - suitable for wet areas and facade walls), VidiFire A1 (fibre boards with class of reaction to fire A1), Vidifloor (floor boards) and Vidiphonic (gypsum fibre boards with improved sound isolation properties).

The declared unit refers to an average product reflecting the specifications of the four product types which are manufactured with identical substances though with different quantities. Data used in calculations represent site-specific production volumes for 2017 and cover all four product types forming the average product. There are no by-products resulting from the production line subject to this study.

Thus, the EPD is applicable to all four products.

## Technology and included processes
Production is separated into two phases - the calcination of gypsum and the manufacture of gypsum fibre boards. The raw material for the gypsum production are natural gypsum (mineral calcium sulphate dihydrate) extracted in mines and gypsum generated as by-product during the desulphurization of coal-fired power stations flue gas desulfurization gypsum (FGD gypsum). Both materials are dried and calcined. In the second stage the calcined gypsum is mixed with the paper fibres produced from shredded post-consumer waste paper and small quantities of glass wool. These constituents are laid onto a moving conveyor belt and water is added. The wet pulp is compressed to form a continuous slab and dried. Next it is polished, impregnated and cut into desired length and formatted to the required board sizes.Figure 1: Main process of the manufacturing stage
Technical data:
The gypsum fibre boards are manufactured in according to the following specifications:
Declared unit:
The declared unit is 1 m² of gypsum fibre board. The declared thickness of the board is 12.5 mm (best-selling product type) with a declared average density of 1175 kg/m³. The conversion to 1 m³ is depicted below:

## Technical purpose
The gypsum fibre boards are used for cladding of structural and non-structural building elements, fire protecting linings, dry floor screeds, sound isolation.

## Reference product
- Gypsum fibreboards /1 square meter of gypsum fibre board with a declared thickness of 12.5 mm and density of 1175kg/m³/: 1

## Inputs
- Renewable primary energy as energy carrier (PERE) [MJ]: A1 0, A2 0, A3 2.32
- Renewable primary energy resources as material utilization (PERM) [MJ]: A1 0, A2 0, A3 0
- Total use of renewable primary energy resources (PERT) [MJ]: A1 0, A2 0, A3 2.32
- Non renewable primary energy as energy carrier (PENRE) [MJ]: A1 1.714, A2 10.853, A3 70.279
- Non renewable primary energy as material utilization (PENRM) [MJ]: A1 0, A2 0, A3 0
- Total use of non renewable primary energy resources (PENRT) [MJ]: A1 1.714, A2 10.853, A3 70.279
- Use of secondary material (SM) [kg]: A1 0, A2 0, A3 9.006
- Use of renewable secondary fuels (RSF) [MJ]: A1 0, A2 0, A3 0
- Use of non renewable secondary fuels (NRSF) [MJ]: A1 0, A2 0, A3 0
- Use of net fresh water (FW) [m^3]: A1 0, A2 0, A3 0.017

## Outputs
- Hazardous waste disposed (HWD) [kg]: A1 0, A2 0, A3 0
- Non hazardous waste disposed (NHWD) [kg]: A1 0, A2 0, A3 4.5238
- Radioactive waste disposed (RWD) [kg]: A1 0, A2 0, A3 0
- Components for re-use (CRU) [kg]: A1 0, A2 0, A3 0
- Materials for recycling (MFR) [kg]: A1 0, A2 0, A3 0
- Materials for energy recovery (MER) [kg]: A1 0, A2 0, A3 0
- Exported electrical energy (EEE) [MJ]: A1 0, A2 0, A3 0
- Exported thermal energy (EET) [MJ]: A1 0, A2 0, A3 0

## Impact indicators
- Global warming potential (GWP) [kg CO_(2)-Äq.]: A1 0.13991, A2 0.67571, A3 4.49283
- Depletion potential of the stratospheric ozone layer (ODP) [kg CFC11-Äq.]: A1 1.2e-8, A2 1.2e-7, A3 5.3e-7
- Acidification potential of land and water (AP) [kg SO_(2)-Äq.]: A1 0.00088, A2 0.0022, A3 0.016
- Eutrophication potential (EP) [kg PO_(4)^(3)-Äq.]: A1 0.00064, A2 0.0025, A3 0.00644
- Formation potential of tropospheric ozone photochemical oxidants (POCP) [kg Ethen-Äq.]: A1 3e-5, A2 0.00011, A3 0.00073
- Abiotic depletion potential for non fossil resources (ADPE) [kg Sb-Äq.]: A1 0.00099, A2 0.00495, A3 0.03757
- Abiotic depletion potential for fossil resources (ADPF) [MJ]: A1 1.71434, A2 10.8528, A3 70.2789

## Use advice
Scope:
The declaration is valid for four specific fibre board products manufactured by Knauf Bulgaria. Calculations are based on average data applicable for all four products, as production is located at one site in Bulgaria. The declaration covers details of:

- the product definition and relevant technical information

- the raw materials and origin of the raw materials

- the descriptions of the production process and transport

- the results of the life cycle assessment
System boundary:
The EPD uses the cradle to gate approach. The assessment includes the upstream lifecycle product stages raw material extraction, transport and manufacturing. These stages are referred to as A1 – A3 according /EN 15804/.

## Data sources
- ecoinvent database (all versions)
- ecoinvent 3.5 database
