# Steel mullion-transom system with triple glazing

Dataset: ILCD process, EPD, generic dataset
Geography: DE
Reference year: 2018
Valid until: 2022
Classification: oekobau.dat: Komponenten von Fenstern und Vorhangfassaden / Rahmen / Profile / Stahl
Owner: thinkstep
Compliance: DIN EN 15804
Review: Dependent internal review by thinkstep, IABP-GaBi, IBP-GaBi; Independent external review by GaBi user forum, GaBi bug forum, GaBi user community
Amounts: rows without a unit in brackets have none in this file; such an amount is in the reference unit of its flow, which a separate flow dataset defines
copyright: true

## General comment
This data set has been modeled according to the European Standard EN 15804 for Sustainable Building. Results are depicted in modules that allow the structured expression of results over the entire life cycle.

## Geography
The data set represents the country specific situation in Germany, focusing on the main technologies, the region specific characteristics and / or import statistics.

## Time period
Annual average

## Technology and included processes
Foreground system
The system boundaries comprise the cradle to gate life cycle of this mullion transom system from steelas well as insulation system made from 3 panes glass panel. This dataset is and based on a façade of 3,5 m high and 4m width
Mullion/transom have rectangular section with following dimensions 125mm*50mm. The LCI dataset consider the production and assembly of the of the steel parts, the side materials (screw, sealing materials), as well as the 3 pane glass. Transportation processes for the raw materials are accounted for as far as data on average transport distances were available. All relevant energy and energy flow are included in the system. Life cycle impacts of production equipment and infrastructure were not included in the system as no evidence could be justified that these are to any extent relevant and thus fell under the cut-off criteria. In mass production the impact of production equipment and infrastructure normally is in orders of magnitude lower than the impacts of material and energy supply.

Background system:
Electricity: Electricity is modelled according to the individual country-specific situations. The country-specific modelling is achieved on multiple levels. Firstly, individual energy carrier specific power plants and plants for renewable energy sources are modelled according to the current national electricity grid mix. Modelling the electricity consumption mix includes transmission / distribution losses and the own use by energy producers (own consumption of power plants and "other" own consumption e.g. due to pumped storage hydro power etc.), as well as imported electricity. Secondly, the national emission and efficiency standards of the power plants are modelled as well as the share of electricity plants and combined heat and power plants (CHP). Thirdly, the country-specific energy carrier supply (share of imports and / or domestic supply) including the country-specific energy carrier properties (e.g. element and energy content) are accounted for. Fourthly, the exploration, mining/production, processing and transport processes of the energy carrier supply chains are modelled according to the specific situation of each electricity producing country. The different production and processing techniques (emissions and efficiencies) in the different energy producing countries are considered, e.g. different crude oil production technologies or different flaring rates at the oil platforms.
Thermal energy, process steam: The thermal energy and process steam supply is modelled according to the individual country-specific situation with regard to emission standards and considered energy carriers. The thermal energy and process steam are produced at heat plants. Efficiencies for thermal energy production are by definition 100% in relation to the corresponding energy carrier input. For process steam the efficiency ranges from 85%, 90% to 95%. The energy carriers used for the generation of thermal energy and process steam are modelled according to the specific import situation (see electricity above).
Transports: All relevant and known transport processes are included. Ocean-going and inland ship transport as well as rail, truck and pipeline transport of bulk commodities are considered.
Energy carriers: The energy carriers are modelled according to the specific supply situation (see electricity above).
Refinery products: Diesel fuel, gasoline, technical gases, fuel oils, lubricants and residues such as bitumen are modelled with a parameterised country-specific refinery model. The refinery model represents the current national standard in refining techniques (e.g. emission level, internal energy consumption, etc.) as well as the individual country-specific product output spectrum, which can be quite different from country to country. The supply of crude oil is modelled, again, according to the country-specific situation with the respective properties of the resources.

## Technical purpose
This product can be used in construction.

## Safety margin
10 %. Product system almost completely covered. Good technological, temporal and geographic representativeness.

## Reference product
- Mullion-transom facade (steel): 1

## Inputs
- Use of renewable primary energy (PERE) [MJ]: A1-A3 124.919, C1 0.00426303, C2 0.0907303, C3 0.778616, C4 0.804928, D -2.49609
- Primary energy resources used as raw materials (PERM) [MJ]: A1-A3 0, C1 0, C2 0, C3 0, C4 0, D 0
- Total use of renewable primary energy resources (PERT) [MJ]: A1-A3 124.919, C1 0.00426303, C2 0.0907303, C3 0.778616, C4 0.804928, D -2.49609
- Use of non-renewable primary energy (PENRE) [MJ]: A1-A3 1166.16, C1 0.0732278, C2 1.55851, C3 90.9379, C4 6.13275, D -139.105
- Non-renewable primary energy resources used as raw materials (PENRM) [MJ]: A1-A3 88, C1 0, C2 0, C3 -88, C4 0, D 0
- Total use of non-renewable primary energy resources (PENRT) [MJ]: A1-A3 1254.16, C1 0.0732278, C2 1.55851, C3 2.93785, C4 6.13275, D -139.105
- Input of secondary material (SM) [kg]: A1-A3 1.91825, C1 0, C2 0, C3 0, C4 0, D 0
- Use of renewable secondary fuels (RSF) [MJ]: A1-A3 0, C1 0, C2 0, C3 0, C4 0, D 0
- Use of non renewable secondary fuels (NRSF) [MJ]: A1-A3 0, C1 0, C2 0, C3 0, C4 0, D 0
- Use of net fresh water (FW) [m3]: A1-A3 0.194924, C1 3.8179e-6, C2 8.12566e-5, C3 0.0152673, C4 0.00154302, D -0.0145282

## Outputs
- Hazardous waste disposed (HWD) [kg]: A1-A3 2.61687e-6, C1 2.73645e-9, C2 5.82399e-8, C3 1.10476e-8, C4 9.34718e-8, D -1.03233e-7
- Non-hazardous waste disposed (NHWD) [kg]: A1-A3 4.69092, C1 1.28528e-5, C2 0.000273546, C3 0.647565, C4 30.8304, D -0.199193
- Radioactive waste disposed (RWD) [kg]: A1-A3 0.0166875, C1 7.70939e-8, C2 1.64079e-6, C3 0.000111185, C4 6.87641e-5, D 0.000104963
- Components for re-use (CRU) [kg]: A1-A3 0, C1 0, C2 0, C3 0, C4 0, D 0
- Materials for Recycling (MFR) [kg]: A1-A3 0, C1 9.031, C2 0, C3 0, C4 0, D 0
- Material for Energy Recovery (MER) [kg]: A1-A3 0, C1 2.453, C2 0, C3 0, C4 0, D 0
- Exported electrical energy (EEE) [MJ]: A1-A3 0, C1 0, C2 0, C3 11.5471, C4 0, D 0
- Exported thermal energy (EET) [MJ]: A1-A3 0, C1 0, C2 0, C3 26.5112, C4 0, D 0

## Impact indicators
- Global warming potential (GWP) [kg CO2 eq.]: A1-A3 97.0738, C1 0.0054101, C2 0.11612, C3 6.20355, C4 0.420155, D -15.4654
- Ozone Depletion Potential (ODP) [kg R11 eq.]: A1-A3 6.32267e-13, C1 1.80339e-18, C2 3.83816e-17, C3 4.34633e-15, C4 2.3341e-15, D 3.10817e-15
- Acidification potential (AP) [kg SO2 eq.]: A1-A3 0.282745, C1 1.88701e-5, C2 0.000252921, C3 0.000692707, C4 0.00266911, D -0.0310917
- Eutrophication potential (EP) [kg Phosphate eq.]: A1-A3 0.0513091, C1 4.45232e-6, C2 6.05971e-5, C3 0.000154235, C4 0.000300304, D -0.00286456
- Photochemical Ozone Creation Potential (POCP) [kg Ethene eq.]: A1-A3 0.0232182, C1 1.86456e-6, C2 -8.53574e-5, C3 6.41803e-5, C4 0.000202386, D -0.00398442
- Abiotic depletion potential for non fossil resources (ADPE) [kg Sb eq.]: A1-A3 0.00109715, C1 4.58474e-10, C2 9.75773e-9, C3 4.521e-8, C4 4.25877e-8, D -4.86067e-7
- Abiotic depletion potential for fossil resources (ADPF) [MJ]: A1-A3 1212.09, C1 0.0730308, C2 1.55432, C3 2.65718, C4 5.95911, D -139.384

## Use advice
The data set represents a cradle to gate inventory. It can be used to characterise the supply chain situation of the respective commodity in a representative manner. Combination with individual unit processes using this commodity enables the generation of user-specific (product) LCAs.

## Data sources
- GaBi Database Edition 2020, SP40
- GaBi database (all versions)
