# Mauerziegel

Dataset: ILCD process, EPD, average dataset
Geography: DE
Reference year: 2015
Valid until: 2021
Classification: OEKOBAU.DAT: Mineralische Baustoffe / Steine und Elemente / Ziegel
Classification: IBUCategories: 02 Bauprodukte / Mauerwerk und Mörtel / Ziegel
Method details: Ziegel.pdf
Generated by: Sphera Solutions GmbH
Registration number: EPD-AMZ-20140244-ICG1-DE
Owner: Bundesverband der Deutschen Ziegelindustrie e.V.
Compliance: DIN EN 15804; ISO 14025
Review: Accredited third party review by Institut Bauen und Umwelt e. V.
Amounts: rows without a unit in brackets have none in this file; such an amount is in the reference unit of its flow, which a separate flow dataset defines
copyright: true
licenseType: Free of charge for all users and uses
accessRestrictions: None

## General comment
Mauerziegel sind Bauprodukte aus gebranntem Ton. Es wird unterschieden in Hochlochziegel und Formteile für tragendes und nichttragendes Mauerwerk und Mauertafeln (Ziegelelemente als Montageteile) jeweils für Außen- und Innenwände von Gebäuden. Es werden LD- (low densitiy) und HD- (high density) Ziegel in dieser EPD behandelt, siehe auch die Rohdichtespanne von 550-2000 kg/m³. Bei den LD-Ziegeln handelt es sich um hochwärmedämmende Ziegel, dies wird durch die Zugabe von Porosierungsmitteln in der Produktion erreicht wird. Mauerziegel können zusätzlich mit verschiedenen Dämmstoffen verfüllt werden. Diese Ziegel werden in einer eigenen EPD behandelt. Grundlage der Ökobilanzergebnisse in dieser EPD ist eine Durchschnittsbildung aller deutschen Werke, die als gewichteter Mittelwert bezogen auf den Anteil der einzelnen Produktionsstätten an der Gesamtjahresproduktion erfolgte. Als repräsentatives Produkt wurde ein Ziegel mit einer Rohdichte von 575 kg/m³ ausgewählt.

## Technology and included processes
Mauerziegel bestehen aus den Grundstoffen Ton/Lehm (rund 96 %) und mineralischen Zuschlagstoffen (rund 4 %). HERSTELLUNG: Nach dem Tonabbau im Tagebau erfolgt der Transport zur Zwischenlagerung auf dem Werksgelände. Die mechanische Aufbereitung der Tone, wie das Zerkleinern und Mischen, geschieht im Kollergang und den Walzwerken. Die o.g. Grundstoffe werden in bestimmten optimierten Verhältnissen zerkleinert (aufbereitet) gemischt und befeuchtet. Es folgt eine Lagerung im Sumpfhaus. Die Zugabe der Porosierungsmittel erfolgt vor oder nach der Lagerung im Sumpfhaus. Nach Durchlaufen des Feinwalzwerkes und erneuter Wasserzugabe erfolgt die Formgebung der Rohlinge durch Strangpressen mit entsprechenden Mundstücken und nachgeschaltetem Abschneider. Das so geformte Material kommt in den Trockner, der im wesentlichen mit der Abwärme des Tunnelofens betrieben wird. Die Trocknungszeit variiert je nach Format und Rohdichte und beträgt in der Regel 24 Stunden. Danach werden die getrockneten Rohlinge bei ca. 1000 °C innerhalb von bis zu maximal 24 Stunden im Tunnelofen gebrannt. Die Verbrennung der Porosierungsstoffe bewirkt eine Feinporosierung. Zur Herstellung von Planziegeln werden die Ziegel plangeschliffen. Die Ziegel werden gestapelt, in recyclebare PE-Folie eingeschweißt oder mit Polyester- oder Stahlbändern umreift. Der Energiebedarf für die Ziegelherstellung betrifft hauptsächlich den Brennvorgang und das Trocknen. Die elektrische Energie wird hauptsächlich in der Aufbereitung verbraucht. Typ der EPD: Wiege bis Bahre (Module A1-D).
Deklarierte Einheit:
Die Deklaration bezieht sich auf einen Kubikmeter Mauerziegel mit einer Rohdichte von 575 kg/m3 (Mittelwert der Rohdichtklasse 600 kg/m3). Grundlage der Ökobilanzergebnisse in dieser EPD ist eine Durchschnittsbildung, aller deutschen Werke, die als gewichteter Mittelwert bezogen auf den Anteil der einzelnen Produktionsstätten an der Gesamtjahresproduktion erfolgte.

## Technical purpose
Je nach Konstruktion der Wände finden Mauerziegel verschiedener Formen Anwendung für massive Bauteile wie Kellerwände, Außenwände, tragende und nicht tragende Innenwände.

## Reference product
- 1 m³ Mauerziegel: 1

## Inputs
- Erneuerbare Primärenergie als Energieträger (PERE) [MJ]: A1-A3 261.372, A4 2.81647, A5 0.207276, B1 0, B2 0, B3 0, B4 0, B5 0, C1 0.188845, C2 1.73958, C3 1.56023, C4 0.362385, D -9.52254
- Erneuerbare Primärenergie zur stofflichen Nutzung (PERM) [MJ]: A1-A3 0, A4 0, A5 0, B1 0, B2 0, B3 0, B4 0, B5 0, C1 0, C2 0, C3 0, C4 0, D 0
- Total erneuerbare Primärenergie (PERT) [MJ]: A1-A3 261.372, A4 2.81647, A5 0.207276, B1 0, B2 0, B3 0, B4 0, B5 0, C1 0.188845, C2 1.73958, C3 1.56023, C4 0.362385, D -9.52254
- Nicht-erneuerbare Primärenergie als Energieträger (PENRE) [MJ]: A1-A3 1295.03, A4 47.4706, A5 2.45901, B1 0, B2 0, B3 0, B4 0, B5 0, C1 4.8079, C2 44.2888, C3 28.3192, C4 4.39321, D -102.597
- Nicht-erneuerbare Primärenergie zur stofflichen Nutzung (PENRM) [MJ]: A1-A3 0, A4 0, A5 0, B1 0, B2 0, B3 0, B4 0, B5 0, C1 0, C2 0, C3 0, C4 0, D 0
- Total nicht erneuerbare Primärenergie (PENRT) [MJ]: A1-A3 1295.03, A4 47.4706, A5 2.45901, B1 0, B2 0, B3 0, B4 0, B5 0, C1 4.8079, C2 44.2888, C3 28.3192, C4 4.39321, D -102.597
- Einsatz von Sekundärstoffen (SM) [kg]: A1-A3 116.725, A4 0, A5 0, B1 0, B2 0, B3 0, B4 0, B5 0, C1 0, C2 0, C3 0, C4 0, D 0
- Erneuerbare Sekundärbrennstoffe (RSF) [MJ]: A1-A3 0, A4 0, A5 0, B1 0, B2 0, B3 0, B4 0, B5 0, C1 0, C2 0, C3 0, C4 0, D 0
- Nicht erneuerbare Sekundärbrennstoffe (NRSF) [MJ]: A1-A3 0, A4 0, A5 0, B1 0, B2 0, B3 0, B4 0, B5 0, C1 0, C2 0, C3 0, C4 0, D 0
- Einsatz von Süßwasserressourcen (FW) [m^3]: A1-A3 0.17598, A4 0.00182195, A5 0.0191796, B1 0, B2 0, B3 0, B4 0, B5 0, C1 0.000133262, C2 0.00122757, C3 0.00698873, C4 -0.0132631, D -0.00474082

## Outputs
- Gefährlicher Abfall zur Deponie (HWD) [kg]: A1-A3 0.0775813, A4 0.000210655, A5 0.000202097, B1 0, B2 0, B3 0, B4 0, B5 0, C1 1.09525e-5, C2 0.00010089, C3 0.000965772, C4 0.000199085, D -0.0104709
- Entsorgter nicht gefährlicher Abfall (NHWD) [kg]: A1-A3 0.73785, A4 0.00905733, A5 0.22204, B1 0, B2 0, B3 0, B4 0, B5 0, C1 0.000604627, C2 0.00556963, C3 0.0134837, C4 23.608, D -11.1651
- Entsorgter radioaktiver Abfall (RWD) [kg]: A1-A3 0.0298984, A4 6.61699e-5, A5 0.000134079, B1 0, B2 0, B3 0, B4 0, B5 0, C1 6.29503e-6, C2 5.79878e-5, C3 0.000370106, C4 7.65331e-5, D -0.00400514
- Komponenten für die Wiederverwendung (CRU) [kg]: A1-A3 0, A4 0, A5 0, B1 0, B2 0, B3 0, B4 0, B5 0, C1 0, C2 0, C3 0, C4 0
- Stoffe zum Recycling (MFR) [kg]: A1-A3 0, A4 0, A5 0, B1 0, B2 0, B3 0, B4 0, B5 0, C1 0, C2 0, C3 534.75, C4 0
- Stoffe für die Energierückgewinnung (MER) [kg]: A1-A3 0, A4 0, A5 0, B1 0, B2 0, B3 0, B4 0, B5 0, C1 0, C2 0, C3 0, C4 0
- Exportierte elektrische Energie (EEE) [MJ]: A1-A3 0, A4 0, A5 9.775, B1 0, B2 0, B3 0, B4 0, B5 0, C1 0, C2 0, C3 0, C4 0
- Exportierte thermische Energie (EET) [MJ]: A1-A3 0, A4 0, A5 26.335, B1 0, B2 0, B3 0, B4 0, B5 0, C1 0, C2 0, C3 0, C4 0

## Impact indicators
- Globales Erwärmungspotenzial (GWP) [kg CO_(2)-Äq.]: A1-A3 138.294, A4 3.47273, A5 7.50023, B1 0, B2 0, B3 0, B4 0, B5 0, C1 0.349834, C2 3.20918, C3 -10.0576, C4 0.319525, D -7.02669
- Abbau Potential der stratosphärischen Ozonschicht (ODP) [kg CFC11-Äq.]: A1-A3 1.45979e-9, A4 8.31045e-12, A5 2.60226e-11, B1 0, B2 0, B3 0, B4 0, B5 0, C1 1.66293e-12, C2 1.53184e-11, C3 1.94949e-11, C4 4.00697e-12, D -1.91725e-10
- Versauerungspotenzial von Boden und Wasser (AP) [kg SO_(2)-Äq.]: A1-A3 0.196732, A4 0.0219525, A5 0.00125415, B1 0, B2 0, B3 0, B4 0, B5 0, C1 0.00142256, C2 0.0188553, C3 0.0105996, C4 0.00203001, D -0.0195677
- Eutrophierungspotenzial (EP) [kg PO_(4)^(3)-Äq.]: A1-A3 0.0212094, A4 0.00540401, A5 0.000175157, B1 0, B2 0, B3 0, B4 0, B5 0, C1 0.000307373, C2 0.00446293, C3 0.00243115, C4 0.000278562, D -0.00383675
- Bildungspotential für troposphärisches Ozon (POCP) [kg Ethen-Äq.]: A1-A3 0.0131877, A4 -0.00899803, A5 5.98065e-5, B1 0, B2 0, B3 0, B4 0, B5 0, C1 0.000161711, C2 -0.00741135, C3 0.00147091, C4 0.000190615, D 0.0031508
- Potenzial für den abiotischen Abbau nicht fossiler Ressourcen (ADPE) [kg Sb-Äq.]: A1-A3 7.12917e-6, A4 1.62923e-7, A5 2.73833e-7, B1 0, B2 0, B3 0, B4 0, B5 0, C1 1.30902e-8, C2 1.20583e-7, C3 2.23795e-6, C4 1.20248e-7, D -7.13594e-7
- Potenzial für den abiotischen Abbau fossiler Brennstoffe (ADPF) [MJ]: A1-A3 1219.76, A4 47.3046, A5 2.12205, B1 0, B2 0, B3 0, B4 0, B5 0, C1 4.79211, C2 44.1434, C3 27.3873, C4 4.20053, D -92.5144

## Use advice
Gültigkeitsbereich:
Die Anwendung dieses Dokumentes ist auf Mauerziegel beschränkt, die von Mitgliedsunternehmen der Arbeitsgemeinschaft Mauerziegel (AMZ) in Deutschland hergestellt werden. Für diese Deklaration wurden von 23 Mitgliedsunternehmen Daten aus dem Jahr 2013 zur Verfügung gestellt. Diese Mitglieder repräsentieren nach Anzahl 90 % der in der AMZ zusammengeschlossenen Hersteller von Mauerziegeln. Produktionsvolumen dieser Firmen liegt - nach Produktionsmenge - bei etwa 97 % des deutschen Marktes.
Systemgrenze:
Typ der EPD: Wiege bis Bahre.

Die Ökobilanz berücksichtigt die Rohstoffgewinnung, die Rohstofftransporte und die eigentliche

Produktherstellung inklusive der Verpackungsmaterialien (Module A1-A3).
Der Transport zur Baustelle (Modul A4) sowie die Behandlung der Verpackungsmaterialien in Müllverbrennungsanlagen nach dem Einbau des Produktes (Modul A5) sind ebenfalls Teil der Systemgrenzen.
Nach Ablauf der Nutzungsdauer wird das Produkt rückgebaut (Modul C1). Nach dem Transport des rückgebauten Produktes (Modul C2) ist für 4 % der Ziegel eine Deponierung auf einer Inertstoffdeponie vorgesehen (Modul C4), 96 % können weiterverwertet werden. Gutschriften infolge des Recyclings von Ziegelbruch sind in Modul D deklariert. Gutschriften für Strom und thermische Energie infolge der thermischen Verwertung der Verpackung innerhalb des Moduls A5 werden ebenfalls in Modul D berücksichtigt.
Das Nutzungsstadium (Modul B1-B5) wird in dieser Studie berücksichtigt. Es entstehen keine Umweltauswirkungen in diesen Modulen.

Da sich die Module B6 und B7 auf den Betrieb des Gebäudes beziehen und die Nutzung des Produkts in keinem Zusammenhang mit dem betrieblichen Energieeinsatz und Wassereinsatz im Gebäude steht, sind diese Module nicht relevant für Mauerziegel und haben damit keine Umweltauswirkungen.

## Data sources
- GaBi Database (all versions)
- GaBi database SP20 2013
