# WDVS mit Schienenbefestigung

Dataset: ILCD process, EPD, average dataset
Geography: DE
Reference year: 2017
Valid until: 2022
Classification: OEKOBAU.DAT: Dämmstoffe / Wärmedämmverbundsystem / Wärmedämmverbundsystem
Classification: IBUCategories: 02 Bauprodukte / Wärmedämmungsprodukte / Wärmedämmverbundsysteme
Method details: Wärmedämmverbundsysteme.pdf
Owner: Fachverband WDVS
Compliance: DIN EN 15804; ISO 14025
Review: Accredited third party review by IBU
Amounts: rows without a unit in brackets have none in this file; such an amount is in the reference unit of its flow, which a separate flow dataset defines
copyright: true

## Technology and included processes
Die Herstellung des WDVS findet auf der Baustelle statt.
Technische Daten:
Je nach Produkt und Hersteller können die bautechnischen Daten abweichen, wobei der Leistungsbereich einzuhalten ist.
Deklarierte Einheit:
Die Deklaration bezieht sich auf die Herstellung und Entsorgung von 1 m² WDVS. Umrechnungsfaktoren sind der Tabelle zu entnehmen.

## Technical purpose
Wärmedämm-Verbundsysteme dienen dem Schutz und der Wärmedämmung von Außenwänden an neuen und bestehenden Gebäuden.
Außenseitige Wärmedämm-Verbundsysteme werden auf Mauerwerk und Beton mit oder ohne Putz sowie auf genormten oder allgemein bauaufsichtlich zugelassenen Untergründen im Holzbau zum Zwecke des Gebäudeschutzes, der Wärmedämmung und Energieeinsparung angewendet. Darüber hinaus können Wärmedämm- Verbundsysteme unter Beachtung bauaufsichtlicher Voraussetzungen zur Aufdopplung verwendet werden.

## Reference product
- 1 m² WDVS EPS mit Schiene, geklebt und gedübelt, mit 160 mm Dämmstoffdicke; 10,9 kg/m²: 1

## Inputs
- Erneuerbare Primärenergie als Energieträger (PERE) [MJ]: A1-A3 31.8119, C2 0.05073, C3 0.2088, C4 0.2015, D -11.57
- Erneuerbare Primärenergie zur stofflichen Nutzung (PERM) [MJ]: A1-A3 0.352, C2 0, C3 0, C4 0, D 0
- Total erneuerbare Primärenergie (PERT) [MJ]: A1-A3 31.8119, C2 0.05073, C3 0.2088, C4 0.2015, D -11.57
- Nicht-erneuerbare Primärenergie als Energieträger (PENRE) [MJ]: A1-A3 304.594, C2 0.7471, C3 134.37, C4 1.772, D -64.88
- Nicht-erneuerbare Primärenergie zur stofflichen Nutzung (PENRM) [MJ]: A1-A3 139.845, C2 0, C3 -132.853, C4 0, D 0
- Total nicht erneuerbare Primärenergie (PENRT) [MJ]: A1-A3 444.416, C2 0.7471, C3 1.517, C4 1.772, D -64.88
- Einsatz von Sekundärstoffen (SM) [kg]: A1-A3 0.00714061, C2 0, C3 0, C4 0, D 0
- Erneuerbare Sekundärbrennstoffe (RSF) [MJ]: A1-A3 0, C2 0, C3 0, C4 0, D 0
- Nicht erneuerbare Sekundärbrennstoffe (NRSF) [MJ]: A1-A3 0, C2 0, C3 0, C4 0, D 0
- Einsatz von Süßwasserressourcen (FW) [m^3]: C2 7.662e-5, C3 0.01661, C4 0.0003608, D -0.008696

## Outputs
- Gefährlicher Abfall zur Deponie (HWD) [kg]: C2 9.613e-8, C3 4.073e-8, C4 4.052e-8, D -4.101e-8
- Entsorgter nicht gefährlicher Abfall (NHWD) [kg]: C2 9.236e-5, C3 0.009451, C4 8.204, D -0.03061
- Entsorgter radioaktiver Abfall (RWD) [kg]: C2 1.011e-6, C3 4.556e-5, C4 2.447e-5, D -0.002781
- Komponenten für die Wiederverwendung (CRU) [kg]: A1-A3 0, C2 0, C3 0, C4 0, D 0
- Stoffe zum Recycling (MFR) [kg]: A1-A3 0, C2 0, C3 0, C4 0, D 0
- Stoffe für die Energierückgewinnung (MER) [kg]: A1-A3 0, C2 0, C3 0, C4 0, D 0
- Exportierte elektrische Energie (EEE) [MJ]: A1-A3 0, C2 0, C3 13.53, C4 0, D 0
- Exportierte thermische Energie (EET) [MJ]: A1-A3 0, C2 0, C3 32.81, C4 0, D 0

## Impact indicators
- Globales Erwärmungspotenzial (GWP) [kg CO_(2)-Äq.]: A1-A3 19.4631, C2 0.0545, C3 8.734, C4 0.1316, D -4.456
- Abbau Potential der stratosphärischen Ozonschicht (ODP) [kg CFC11-Äq.]: A1-A3 4.43489e-8, C2 1.133e-13, C3 2.292e-12, C4 1.293e-12, D -1.373e-10
- Versauerungspotenzial von Boden und Wasser (AP) [kg SO_(2)-Äq.]: A1-A3 0.0743985, C2 0.0001415, C3 0.0006599, C4 0.0007882, D -0.004751
- Eutrophierungspotenzial (EP) [kg PO_(4)^(3)-Äq.]: A1-A3 0.00510104, C2 3.55e-5, C3 0.0001513, C4 0.0001072, D -0.0007417
- Bildungspotential für troposphärisches Ozon (POCP) [kg Ethen-Äq.]: A1-A3 0.0663046, C2 -4.752e-5, C3 8.855e-5, C4 7.575e-5, D -0.0005208
- Potenzial für den abiotischen Abbau nicht fossiler Ressourcen (ADPE) [kg Sb-Äq.]: A1-A3 6.10402e-5, C2 4.141e-9, C3 1.056e-7, C4 4.545e-8, D -1.119e-6
- Potenzial für den abiotischen Abbau fossiler Brennstoffe (ADPF) [MJ]: A1-A3 418.935, C2 0.7444, C3 1.402, C4 1.71, D -57.88

## Use advice
Gültigkeitsbereich:
Wärmedämm-Verbundsysteme (WDVS) bestehen aus verschiedenen Komponenten/ Vorprodukten, die ihrerseits über eine verifizierte EPD verfügen. Bei dieser WDVS-Produktdeklaration handelt es sich um eine Verbands-Muster-EPD, bei der die Ökobilanz auf Basis der einzelnen zusammengeführten Komponenten-EPDs mit den höchsten Umweltlasten (worst case) für Kleber, Unter- und Oberputz berechnet wurde. Hinsichtlich Dämmstoff werden Durchschnittsdaten des Verbandes IVH verwendet.
Systemgrenze:
Typ der EPD: Wiege bis Werkstor - mit Optionen.

In der EPD werden die folgenden Lebenswegzyklusstadien berücksichtigt:

- Produktstadium (A1-A3)

- Entsorgungsstadium (C1-C4) - Nutzenpotentiale und Lasten außerhalb der Systemgrenzen (D)

Module A1-A3

Ein WDVS besteht aus verschiedenen Komponenten, die jeweils separat hergestellt und erst auf der Baustelle zu einem WDVS zusammengesetzt werden.

Die Systemgrenzen für die Herstellung des WDVS werden bis zur Herstellung und Bereitstellung der Systemkomponenten gezogen. Die EPD-Umweltergebnisse (Modul A1-A3) der Einzelkomponenten werden für die Berechnung der WDVS-EPDs herangezogen. Diese enthalten neben der Berücksichtigung des Energie- und Rohstoffeinsatzes bereits den Rohstofftransport, die Aufwendungen für Verpackungsmaterialien sowie ggf. die postindustrielle Abfallbehandlung. Mit Ausnahme der Kunststoffschiene mit einem Masseanteil von 10% sind für alle Materialien gültige EPDs vorhanden. Die Schiene geht mit einem /GaBi-Datensatz/ in die Berechnung ein. Das Stadium der Errichtung des Bauwerks ist nicht Teil der Studie.

Module C und D

Über die Entsorgung der WDVS gibt es bisher nur wenige Erfahrungswerte. Zumeist werden WDVS nicht abgebaut, sondern „aufgedoppelt“, da auch ältere Systeme noch Dämmwirkung besitzen.

Um aber Tendenzen für die Lasten bzw. Gutschriften, die bei der Entsorgung der WDVS entstehen werden, abschätzen zu können, wird für diese Studie die Entsorgung bzw. Verwertung der WDVS berechnet.

Berücksichtigt wird die Verbrennung unter Nutzung der Energie zur Strom- und Wärmeerzeugung. Der Aufwand für die vorherige Baustoffaufbereitung in Form von Schreddern und Sortieren wird in dieses Szenario mit einbezogen. Die mineralischen, heizwertarmen Bestandteile werden deponiert.

Energetische Gutschriften infolge der thermischen Verwertung erfolgen auf Basis des deutschen Strommixes und thermischer Energie aus Erdgas DE, deklariert außerhalb der Systemgrenze in Modul D.

## Data sources
- WDVS mit Schienenbefestigung.pdf
- GaBi Database (all versions)
- GaBi database SP29 2016
