# Mineral wool (partition walls insulation); 26 kg/m3

Dataset: ILCD process, EPD, generic dataset
Geography: DE
Reference year: 2018
Valid until: 2022
Classification: oekobau.dat: Dämmstoffe / Mineralwolle / Mineralwolle
Owner: thinkstep
Compliance: DIN EN 15804
Review: Dependent internal review by thinkstep, IABP-GaBi, IBP-GaBi; Independent external review by GaBi user forum, GaBi bug forum, GaBi user community
Amounts: rows without a unit in brackets have none in this file; such an amount is in the reference unit of its flow, which a separate flow dataset defines
copyright: true

## General comment
This data set has been modeled according to the European Standard EN 15804 for Sustainable Building. Results are depicted in modules that allow the structured expression of results over the entire life cycle.

## Geography
The data set represents the country specific situation in Germany, focusing on the main technologies, the region specific characteristics and / or import statistics.

## Time period
Annual average

## Technology and included processes
Dataset describes Mineral wool and Glass fiber. Mineral wool is made of sedimentary or igneous rocks (mainly basalt) and various recycled materials. The material is melted in the melting furnaces at 1400-1500 ° C and passed through rapidly rotating rollers. Binding agent is added. The binder then hardens in continuously operated tunnel kilns.
For the glass wool a pure primary glass is melted in a furnace at about 1400 ° C. This process consumes power. The molten gluss is centrifuged in a perforated rotating drum. The warm airflow evaporates the water and the fibers solidify. The raw fibers are guided through a treadmills and a tunnel kiln. The binder cures at about 200 ° C. The fibres are then cut to required size and packed. System boundary is the finished product at the factory gate. Transportation from the factory to the site is not includede in the dataset and must be taken into account separately when analyzing the complete life cycle. For different applications, typical compositions and densities were modeled. A following distincuished applications were defined: flat roof, facade, floor, roof and interior.
Background system:
Electricity: Electricity is modelled according to the individual country-specific situations. The country-specific modelling is achieved on multiple levels. Firstly, individual energy carrier specific power plants and plants for renewable energy sources are modelled according to the current national electricity grid mix. Modelling the electricity consumption mix includes transmission / distribution losses and the own use by energy producers (own consumption of power plants and "other" own consumption e.g. due to pumped storage hydro power etc.), as well as imported electricity. Secondly, the national emission and efficiency standards of the power plants are modelled as well as the share of electricity plants and combined heat and power plants (CHP). Thirdly, the country-specific energy carrier supply (share of imports and / or domestic supply) including the country-specific energy carrier properties (e.g. element and energy content) are accounted for. Fourthly, the exploration, mining/production, processing and transport processes of the energy carrier supply chains are modelled according to the specific situation of each electricity producing country. The different production and processing techniques (emissions and efficiencies) in the different energy producing countries are considered, e.g. different crude oil production technologies or different flaring rates at the oil platforms.
Thermal energy, process steam: The thermal energy and process steam supply is modelled according to the individual country-specific situation with regard to emission standards and considered energy carriers. The thermal energy and process steam are produced at heat plants. Efficiencies for thermal energy production are by definition 100% in relation to the corresponding energy carrier input. For process steam the efficiency ranges from 85%, 90% to 95%. The energy carriers used for the generation of thermal energy and process steam are modelled according to the specific import situation (see electricity above).
Transports: All relevant and known transport processes are included. Ocean-going and inland ship transport as well as rail, truck and pipeline transport of bulk commodities are considered.
Energy carriers: The energy carriers are modelled according to the specific supply situation (see electricity above).
Refinery products: Diesel fuel, gasoline, technical gases, fuel oils, lubricants and residues such as bitumen are modelled with a parameterised country-specific refinery model. The refinery model represents the current national standard in refining techniques (e.g. emission level, internal energy consumption, etc.) as well as the individual country-specific product output spectrum, which can be quite different from country to country. The supply of crude oil is modelled, again, according to the country-specific situation with the respective properties of the resources.

## Technical purpose
This product can be used in construction.

## Safety margin
10 %. Product system almost completely covered. Good technological, temporal and geographic representativeness.

## Reference product
- Mineral wool (partition walls insulation, m3): 1

## Inputs
- Erneuerbare Primärenergie als Energieträger (PERE) [MJ]: A1-A3 78.0446, C2 0.0656329, C3 1.16436, C4 0.765508
- Erneuerbare Primärenergie zur stofflichen Nutzung (PERM) [MJ]: A1-A3 0, C2 0, C3 0, C4 0
- Total use of renewable primary energy resources (PERT) [MJ]: A1-A3 78.0446, C2 0.0656329, C3 1.16436, C4 0.765508
- Nicht-erneuerbare Primärenergie als Energieträger (PENRE) [MJ]: A1-A3 481.157, C2 1.1274, C3 26.302, C4 5.83241
- Nicht-erneuerbare Primärenergie zur stofflichen Nutzung (PENRM) [MJ]: A1-A3 0, C2 0, C3 0, C4 0
- Total use of non-renewable primary energy resources (PENRT) [MJ]: A1-A3 481.157, C2 1.1274, C3 26.302, C4 5.83241
- Input of secondary material (SM) [kg]: A1-A3 5.64769, C2 0, C3 0, C4 0
- Use of renewable secondary fuels (RSF) [MJ]: A1-A3 0.00680612, C2 0, C3 0, C4 0
- Use of non renewable secondary fuels (NRSF) [MJ]: A1-A3 0, C2 0, C3 0, C4 0
- Use of net fresh water (FW) [m3]: A1-A3 0.103197, C2 5.87798e-5, C3 0.00304094, C4 0.00146746

## Outputs
- Hazardous waste disposed (HWD) [kg]: A1-A3 6.61294e-7, C2 4.21299e-8, C3 1.2079e-8, C4 8.88941e-8
- Non-hazardous waste disposed (NHWD) [kg]: A1-A3 7.43229, C2 0.000197879, C3 0.0070195, C4 29.3206
- Radioactive waste disposed (RWD) [kg]: A1-A3 0.00853664, C2 1.18692e-6, C3 0.000219852, C4 6.53965e-5
- Components for re-use (CRU) [kg]: A1-A3 0, C2 0, C3 0, C4 0
- Materials for Recycling (MFR) [kg]: A1-A3 0, C2 0, C3 0, C4 0
- Material for Energy Recovery (MER) [kg]: A1-A3 0, C2 0, C3 0, C4 0
- Exported electrical energy (EEE) [MJ]: A1-A3 2.49031, C2 0, C3 0, C4 0
- Exported thermal energy (EET) [MJ]: A1-A3 5.79025, C2 0, C3 0, C4 0

## Impact indicators
- Global warming potential (GWP) [kg CO2 eq.]: A1-A3 40.3055, C2 0.0840353, C3 0.72123, C4 0.399579
- Ozone Depletion Potential (ODP) [kg R11 eq.]: A1-A3 6.18115e-13, C2 2.77647e-17, C3 6.156e-15, C4 2.2198e-15
- Acidification potential (AP) [kg SO2 eq.]: A1-A3 0.180454, C2 0.000186997, C3 0.00107825, C4 0.0025384
- Eutrophication potential (EP) [kg Phosphate eq.]: A1-A3 0.0261136, C2 4.48966e-5, C3 0.000134021, C4 0.000285597
- Photochemical Ozone Creation Potential (POCP) [kg Ethene eq.]: A1-A3 0.00972905, C2 -6.36476e-5, C3 0.000207753, C4 0.000192475
- Abiotic depletion potential for non fossil resources (ADPE) [kg Sb eq.]: A1-A3 8.53378e-6, C2 7.05859e-9, C3 1.21182e-7, C4 4.05021e-8
- Abiotic depletion potential for fossil resources (ADPF) [MJ]: A1-A3 459.604, C2 1.12437, C3 25.7459, C4 5.66728

## Use advice
The data set represents a cradle to gate inventory. It can be used to characterise the supply chain situation of the respective commodity in a representative manner. Combination with individual unit processes using this commodity enables the generation of user-specific (product) LCAs.

## Data sources
- AUB-Deklaration Rockwool: Unkaschierte bzw. unbeschichtete kunstharzgebundene Steinwolle-Dämmstoffe
- IBU-Deklaration Saint-Gobain ISOVER G+H: Unkaschierte Glaswolle-Platten und -Filze, 2008
- GaBi Database Edition 2020, SP40
- GaBi database (all versions)
