# Use - 1 kWh of final energy from wood pellets (according to EnEV)

Dataset: ILCD process, EPD, generic dataset
Geography: DE
Reference year: 2018
Valid until: 2022
Classification: oekobau.dat: Gebäudetechnik / Nutzung / Nutzung Wärmeerzeuger (EnEV)
Owner: thinkstep
Compliance: DIN EN 15804
Review: Dependent internal review by thinkstep, IABP-GaBi, IBP-GaBi; Independent external review by GaBi user forum, GaBi bug forum, GaBi user community
Amounts: rows without a unit in brackets have none in this file; such an amount is in the reference unit of its flow, which a separate flow dataset defines
copyright: true

## General comment
This data set has been modeled according to the European Standard EN 15804 for Sustainable Building. Results are depicted in modules that allow the structured expression of results over the entire life cycle.

## Geography
The data set represents the country specific situation in Germany, focusing on the main technologies, the region specific characteristics and / or import statistics.

## Time period
Annual average

## Technology and included processes
This dataset includes wood extraction, wood pellet production, transportation and incineration of wood pellets, as well as landfilling of incineration residues (ash). An economic allocation has been used at sawmill level to allocate the loads of different sawmill products. A technical drying (thermal energy from biomass) has been modeled to get 10 M.% water content of the wood pellets. Since final energy according to EnEV is the reference value for this dataset, a boiler efficiency of 100% has been calculated. Usually occurring system losses as well as auxiliary energy and power consumption in relation to boiler operation are not included in this dataset. The life cycle assessment is dominated by the combustion process, the drying process (of the pellets) as well as the sawmill processes and transports. The CO2 balance of the fuel is neutral - the amount of CO2 bound during the growth phase of the tree is released during the combustion process.

## Technical purpose
Thermal energy from wood pellets is used for heating a building or technical processes (e.g. drying).

## Safety margin
0 %.

## Reference product
- Thermal energy (MJ): 3.6

## Inputs
- Use of renewable primary energy (PERE) [MJ]: B6 4.55095
- Primary energy resources used as raw materials (PERM) [MJ]: B6 0
- Total use of renewable primary energy resources (PERT) [MJ]: B6 4.55095
- Use of non-renewable primary energy (PENRE) [MJ]: B6 0.272247
- Non-renewable primary energy resources used as raw materials (PENRM) [MJ]: B6 0
- Total use of non-renewable primary energy resources (PENRT) [MJ]: B6 0.272247
- Input of secondary material (SM) [kg]: B6 0
- Use of renewable secondary fuels (RSF) [MJ]: B6 0
- Use of non renewable secondary fuels (NRSF) [MJ]: B6 0
- Use of net fresh water (FW) [m3]: B6 3.609e-5

## Outputs
- Hazardous waste disposed (HWD) [kg]: B6 1.56745e-9
- Non-hazardous waste disposed (NHWD) [kg]: B6 0.00491467
- Radioactive waste disposed (RWD) [kg]: B6 7.40417e-6
- Components for re-use (CRU) [kg]: B6 0
- Materials for Recycling (MFR) [kg]: B6 0
- Material for Energy Recovery (MER) [kg]: B6 0
- Exported electrical energy (EEE) [MJ]: B6 0
- Exported thermal energy (EET) [MJ]: B6 0

## Impact indicators
- Global warming potential (GWP) [kg CO2 eq.]: B6 0.0210824
- Ozone Depletion Potential (ODP) [kg R11 eq.]: B6 3.35473e-16
- Acidification potential (AP) [kg SO2 eq.]: B6 0.000307213
- Eutrophication potential (EP) [kg Phosphate eq.]: B6 7.22066e-5
- Photochemical Ozone Creation Potential (POCP) [kg Ethene eq.]: B6 3.34966e-5
- Abiotic depletion potential for non fossil resources (ADPE) [kg Sb eq.]: B6 3.77212e-9
- Abiotic depletion potential for fossil resources (ADPF) [MJ]: B6 0.253553

## Use advice
This dataset refers to the production of 1 kWh of thermal energy from wood pellets. The data set is intended for the use of final energy acc. EnEV as reference. The final energy acc. EnEV already takes into account system losses and system efficiency as well as power supply and power consumption, which is why this is not included in this data set. Therefore, the combustion process is calculated with 100% efficiency. To calculate the life cycle assessment results at building level, the indicator results have to be multiplied with the final energy demand acc. EnEV.

## Data sources
- PECH 2007
- GaBi Database Edition 2020, SP40
- GaBi database (all versions)
