# Multi-layer parquet (German average)

Dataset: ILCD process, EPD, representative dataset
Geography: DE
Reference year: 2021
Valid until: 2026
Classification: OEKOBAU.DAT: Holz / Holzböden / Parkett
Method details: EN 15804; ILCD format
Generated by: Thünen-Institut für Holzforschung
Owner: Thünen-Institut für Holzforschung
Compliance: EN 15804+A2; EN 16485
Review: Independent external review by Dr. Frank Werner - Umwelt & Entwicklung
Amounts: rows without a unit in brackets have none in this file; such an amount is in the reference unit of its flow, which a separate flow dataset defines
copyright: true

## General comment
Further information on the declared unit and the inventory analysis based on manufacturer information (input and output of material and energy flows) are available for download as an Excel file within the section “background info”.
The data set was created in 2021 as an update with identical foreground system. All background data sets are taken from the GaBi Professional Database with content version 2021.1. The modeling and calculation of the life cycle assessment is based on the European standards EN 15804:2012+A2:2019 and EN 16485:2014. For questions, please contact holzundklima@thuenen.de.

## Geography
Im Bereich der Parkettproduktion werden durch das Statistische Bundesamt nur 2 Meldenummern gelistet, die insgesamt eine Produktion von 9,6 Mio. m² angeben, wobei hier zwischen Mosaikparkett (1622 10 300) und Anderen (1622 10 600) unterschieden wird. Die Erhebung im Parkettbereich lieferte aussagekräftige Zahlen für 315.000 m² Massivholzbodenbeläge, die im Wesentlichen Stabparkett und Massivholzdielen, aber auch Hochkantlamellen und Mosaikparkett repräsentieren. Daneben wurde die Produktion von insgesamt 7,9 Mio. m² Mehrschichtparkett analysiert. Die Bilanzierung der Parkettproduktion konnten etwa 88 % der unter Meldenummer 1622 10 600 gelisteten Produktion und 12 % der unter Meldenummer 1622 10 300 gelisteten Produktionsmengen abdecken.

## Time period
The data set is based on production data from the years 2009 to 2011 (foreground system).
The background system was updated in 2021.

## Technology and included processes
Mehrschichtige Holzböden sind in Lagen aufgebaute Holzböden, die eine Deckschicht von mindestens 2 mm Dicke haben. Sie können 2-lagig mit Trägerplatte aus Vollholz oder Holzwerkstoffen und einer dekorativen Deckschicht, oder 3-lagig mit einer zusätzlichen Gegenzuglage ausgestattet sein. Die 2-lagigen Böden müssen auf der Baustelle mit dem Untergrund verklebt werden, die 3-lagigen können schwimmend verlegt werden. Die hier betrachteten Produkte sind mehrschichtige Holzböden am Werkstor der Herstellung. Zur Herstellung von mehrschichtigen Holzbodenbelägen werden Rundhölzer, frische Schnitthölzer, kammergetrocknete Schnitthölzer oder Hobelware eingesetzt. Daneben kommen teilweise Sperrhölzer und HDF Platten zum Einsatz. Die Schichten werden zunächst getrennt hergestellt.
Die Deckschicht wird analog zu den einschichtigen Holzbodenbelägen hergestellt, jedoch ist sie hier wesentlich dünner. In der Regel ist sie etwa 4 mm dick. Die Mittellage kann aus Holzwerkstoffen oder massiven Einzelteilen bestehen, die grundsätzlich ähnlich wie die Deckschicht hergestellt werden, jedoch meist dicker und von geringerer Qualität (oft Nadelholz) sind. Im Falle des 3-lagigen Aufbaus wird ein Gegenzug aus Furnier genutzt. Die Furnierherstellung erfolgt hier analog zur Furnierherstellung bei der Herstellung von Furniersperrholz. Die einzelnen Lagen werden nach Aufbringung von Klebstoffen zusammengepresst und aufgetrennt. Die Oberflächen werden geschliffen und lackiert. Lack und Lackierung werden im Rahmen dieser Untersuchung jedoch nicht betrachtet.
Die Holzfeuchte des Produktes liegt bei 10%.

## Technical purpose
Multi-layer parquet is used as floor covering in living areas.

## Scenarios
- energetisch (Modul D): therm. Verwertung
- stofflich (Modul D): stoffl. Verwertung
- Entsorgung Verpackung (Modul A5): Das Modul A5 enthält ausschließlich die Entsorgung der Verpackungsmaterialien

## Reference product
- Mehrschichtparkett: 1

## Inputs
- Use of renewable primary energy (PERE) [MJ]: A1 50.2824, A2 0.385663, A3 309.152, A1-A3 359.82, A5 (Entsorgung Verpackung) 0.0181865, C2 0.00721391, C3 1.33927, D (energetisch) 101.284, D (stofflich) -1.51464
- Use of renewable primary energy resources used as raw materials (PERM) [MJ]: A1 152.954, A2 0, A3 0.665662, A1-A3 153.62, A5 (Entsorgung Verpackung) -0.665662, C2 0, C3 -152.954, D (energetisch) 0, D (stofflich) 0
- Total use of renewable primary energy resources (PERT) [MJ]: A1 203.236, A2 0.385663, A3 309.818, A1-A3 513.44, A5 (Entsorgung Verpackung) -0.647476, C2 0.00721391, C3 -151.615, D (energetisch) 101.284, D (stofflich) -1.51464
- Use of non renewable primary energy (PENRE) [MJ]: A1 27.8079, A2 6.85691, A3 84.4861, A1-A3 119.151, A5 (Entsorgung Verpackung) 0.0838642, C2 0.129437, C3 2.05328, D (energetisch) -77.4184, D (stofflich) -4.4543
- Use of non renewable primary energy resources used as raw materials (PENRM) [MJ]: A1 3.54586, A2 0, A3 2.9088, A1-A3 6.45466, A5 (Entsorgung Verpackung) -2.9088, C2 0, C3 -3.54586, D (energetisch) 0, D (stofflich) 0
- Total use of non renewable primary energy resource (PENRT) [MJ]: A1 31.3538, A2 6.85691, A3 87.3949, A1-A3 125.606, A5 (Entsorgung Verpackung) -2.82494, C2 0.129437, C3 -1.49258, D (energetisch) -77.4184, D (stofflich) -4.4543
- Use of secondary material (SM) [kg]: A1 0, A2 0, A3 0, A1-A3 0, A5 (Entsorgung Verpackung) 0, C2 0, C3 0, D (energetisch) 0, D (stofflich) 8.9542
- Use of renewable secondary fuels (RSF) [MJ]: A1 6.11233, A2 0, A3 5.43193, A1-A3 11.5443, A5 (Entsorgung Verpackung) 0, C2 0, C3 0, D (energetisch) 0, D (stofflich) 0
- Use of non renewable secondary fuels (NRSF) [MJ]: A1 0, A2 0, A3 0, A1-A3 0, A5 (Entsorgung Verpackung) 0, C2 0, C3 0, D (energetisch) 0, D (stofflich) 0
- Use of net fresh water (FW) [m3]: A1 0.00729009, A2 0.000418852, A3 0.021694, A1-A3 0.0294029, A5 (Entsorgung Verpackung) 0.000786632, C2 8.25745e-6, C3 0.000630248, D (energetisch) 0.0135106, D (stofflich) -0.000529688

## Outputs
- Hazardous waste disposed (HWD) [kg]: A1 6.01066e-8, A2 3.32441e-10, A3 1.27569e-6, A1-A3 1.33613e-6, A5 (Entsorgung Verpackung) 1.74903e-11, C2 6.52227e-12, C3 7.46571e-10, D (energetisch) -2.75242e-8, D (stofflich) -4.20875e-9
- Non hazardous waste dispose (NHWD) [kg]: A1 0.0468262, A2 0.00103819, A3 0.223935, A1-A3 0.271799, A5 (Entsorgung Verpackung) 0.00420944, C2 1.92281e-5, C3 0.0015997, D (energetisch) 0.060579, D (stofflich) -0.000709861
- Radioactive waste disposed (RWD) [kg]: A1 0.000819653, A2 7.9139e-6, A3 0.00472248, A1-A3 0.00555005, A5 (Entsorgung Verpackung) 2.814e-6, C2 1.56571e-7, C3 0.000164486, D (energetisch) -0.00492715, D (stofflich) -0.000114218
- Components for re-use (CRU) [kg]: A1 0, A2 0, A3 0, A1-A3 0, A5 (Entsorgung Verpackung) 0, C2 0, C3 0, D (energetisch) 0, D (stofflich) 0
- Materials for recycling (MFR) [kg]: A1 0, A2 0, A3 0, A1-A3 0, A5 (Entsorgung Verpackung) 0, C2 0, C3 8.9542, D (energetisch) 0, D (stofflich) 0
- Materials for energy recovery (MER) [kg]: A1 0, A2 0, A3 0, A1-A3 0, A5 (Entsorgung Verpackung) 0.0345422, C2 0, C3 8.9542, D (energetisch) 0, D (stofflich) 0
- Exported electrical energy (EEE) [MJ]: A1 0, A2 0, A3 0.0226074, A1-A3 0.0226074, A5 (Entsorgung Verpackung) 0.441076, C2 0, C3 0, D (energetisch) 0, D (stofflich) 0
- Exported thermal energy (EET) [MJ]: A1 0, A2 0, A3 0.0525196, A1-A3 0.0525196, A5 (Entsorgung Verpackung) 0.956957, C2 0, C3 0, D (energetisch) 0, D (stofflich) 0

## Impact indicators
- Global Warming Potential - total (GWP-total) [kg CO2-Äqv.]: A1 -12.7588, A2 0.507717, A3 6.42064, A1-A3 -5.83044, A5 (Entsorgung Verpackung) 0.141139, C2 0.00933915, C3 14.713, D (energetisch) -5.73249, D (stofflich) -0.324458
- Global Warming Potential - fossil fuels (GWP-fossil) [kg CO2-Äqv.]: A1 1.79237, A2 0.507717, A3 6.48397, A1-A3 8.78405, A5 (Entsorgung Verpackung) 0.0778121, C2 0.00933915, C3 0.16185, D (energetisch) -5.73249, D (stofflich) -0.324458
- Global Warming Potential - biogenic (GWP-biogenic) [kg CO2-Äqv.]: A1 -14.5512, A2 0, A3 -0.0633273, A1-A3 -14.6145, A5 (Entsorgung Verpackung) 0.0633273, C2 0, C3 14.5512, D (energetisch) 0, D (stofflich) 0
- Depletion potential of the stratospheric ozone layer (ODP) [kg CFC 11-Äquiv.]: A1 2.77792e-14, A2 8.05112e-17, A3 1.28306e-12, A1-A3 1.31092e-12, A5 (Entsorgung Verpackung) 7.02764e-17, C2 1.24065e-18, C3 5.54013e-15, D (energetisch) -1.65901e-13, D (stofflich) -3.81824e-15
- Acidification potential, Accumulated Exceedance (AP) [mol H+ eqv.]: A1 0.00999201, A2 0.00315779, A3 0.0440873, A1-A3 0.0572371, A5 (Entsorgung Verpackung) 7.11332e-5, C2 5.63823e-5, C3 0.00023292, D (energetisch) -0.0054026, D (stofflich) -0.00130111
- Eutrophication potential - freshwater (EP-freshwater) [kg P eqv.]: A1 5.26562e-6, A2 1.42429e-6, A3 2.85574e-5, A1-A3 3.52473e-5, A5 (Entsorgung Verpackung) 1.14447e-8, C2 2.88265e-8, C3 6.78512e-7, D (energetisch) -2.03814e-5, D (stofflich) -7.57142e-7
- Eutrophication potential - marine (EP-marine) [kg N eqv.]: A1 0.00499332, A2 0.00155521, A3 0.0190607, A1-A3 0.0256092, A5 (Entsorgung Verpackung) 2.21494e-5, C2 2.76264e-5, C3 7.44918e-5, D (energetisch) -0.00193475, D (stofflich) -0.000606007
- Eutrophication potential - terrestrial (EP-terrestrial) [mol N eqv.]: A1 0.0482783, A2 0.0171994, A3 0.211058, A1-A3 0.276536, A5 (Entsorgung Verpackung) 0.000332045, C2 0.000305777, C3 0.00077773, D (energetisch) -0.015775, D (stofflich) -0.0066576
- Versauerungspotenzial, kumulierte Überschreitung (AP) [kg NMVOC eqv.]: A1 0.0120593, A2 0.00317258, A3 0.048615, A1-A3 0.0638469, A5 (Entsorgung Verpackung) 5.79412e-5, C2 5.21019e-5, C3 0.000185071, D (energetisch) -0.00483985, D (stofflich) -0.00156942
- Abiotic depletion potential - non-fossil resources (ADPE) [kg Sb-Äqv.]: A1 6.75495e-7, A2 4.04579e-8, A3 2.50827e-6, A1-A3 3.22422e-6, A5 (Entsorgung Verpackung) 1.0294e-9, C2 7.39279e-10, C3 6.64316e-8, D (energetisch) -2.07801e-6, D (stofflich) -6.2741e-8
- Abiotic depletion potential - fossil resources (ADPF) [MJ]: A1 31.3486, A2 6.84974, A3 84.455, A1-A3 122.653, A5 (Entsorgung Verpackung) 0.0838389, C2 0.129265, C3 2.05264, D (energetisch) -80.9454, D (stofflich) -4.45375
- Water (user) deprivation potential (WDP) [m3 world eqv.]: A1 0.00729009, A2 0.000418852, A3 0.021694, A1-A3 0.0294029, A5 (Entsorgung Verpackung) 0.000786632, C2 8.25745e-6, C3 0.000630248, D (energetisch) 0.0135106, D (stofflich) -0.000529688
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
## Use advice
Aufgrund der hohen Abdeckung bildet der Datensatz die durchschnittlichen Produktionsverhältnisse und die damit verbundenen Umweltwirkungen repräsentativ für Deutschland ab. Liegen keine herstellerspezifischen Ökobilanzergebnisse des verwendeten Produkts vor, empfiehlt sich die Verwendung dieses Durchschnittsdatensatzes.

## Data sources
- Rüter S, Diederichs S (2012) Ökobilanz Basisdaten für Bauprodukte aus Holz, Hamburg, Johann Heinrich von Thünen Institut, Institut für Holztechnologie und Holzbiologie, Abschlussbericht
- GaBi database (general)
