# Chiller (500kW); 1 piece

Dataset: ILCD process, EPD, generic dataset
Geography: DE
Reference year: 2021
Valid until: 2022
Classification: oekobau.dat: Gebäudetechnik / Klimatisierung und Lüftung / Klimatisierung/Kältemaschinen
Owner: Sphera Solutions GmbH
Compliance: EN 15804+A2
Review: Dependent internal review by Sphera Solutions GmbH; Independent external review by GaBi user forum
Amounts: rows without a unit in brackets have none in this file; such an amount is in the reference unit of its flow, which a separate flow dataset defines
copyright: true
licenseType: Free of charge for all users and uses
accessRestrictions: The license conditions as stated on https://www.oekobaudat.de/ apply.
accessRestrictions: Es gelten die Lizenzbedingungen wie sie auf https://www.oekobaudat.de/ genannt sind.

## General comment
This data set has been modeled according to the European Standard EN 15804+A2 for Sustainable Building. Results are depicted in modules that allow the structured expression of results over the entire life cycle.

## Geography
The data set represents the country specific situation in Germany, focusing on the main technologies, the region specific characteristics and / or import statistics.

## Time period
Annual average

## Technology and included processes
The data set only includes the manufacturing and disposal of the chiller, not its operation and not the required refrigerant. The main raw materials of the unit are steel (approx. 45 m.%) copper (approx. 29 m.%) and cast iron (approx. 22 m.%).
For these metals (steel, copper and cast iron), the primary upstream chains were used in the sense of a coservative approach (e.g. the blast furnace route in the case of steel). The life cycle assessment is dominated by the production of the above mentioned metals.

In module C1, a dismantling with machinery is assumed, collecting losses are neglected.
The transport in module C2 to the recycling plant takes place with a truck (50km).

Tratment of metal components:
Collecting losses are neglected. It is assumed that all metals reach the end of the waste status immediately after dismantling. This means that the loads for processing and the credits for the substitution of primary material are shown in Module D.
Module D includes loads for sorting, remelting, slag treatment, landfill, filtration of dusts and dross treatment. Credits are given for the net scrap amount (amount returned minus secondary material content, minus processing losses) for the average material mix (from different alloys).

Treatment of plastic components:
Module C3 takes into account the grinding and thermal treatment (combustion) of the material. When calculating combustion emissions and credits, the specific calorific value of each material and the material composition are taken into account.
In module D credits for the substitution of electricity (German electricity mix) and thermal energy (from natural gas) are given.

## Technical purpose
Chillers are used to cool buildings or technical systems.

## Safety margin
20 %. Product system depicted except for a few missing processes / flows. Technological, temporal and geographic representativeness partly given.

## Reference product
- Chiller (500kW): 1

## Inputs
- Use of renewable primary energy as energy carrier (PERE) [MJ]: A1-A3 322928, C1 6.03087, C2 77.1279, D -74644.9
- Use of renewable primary energy resources used as raw materials (PERM) [MJ]: A1-A3 0, C1 0, C2 0, D 0
- Total use of renewable primary energy (PERT) [MJ]: A1-A3 322928, C1 6.03087, C2 77.1279, D -74644.9
- Use of non renewable primary energy as energy carrier (PENRE) [MJ]: A1-A3 1.43882e6, C1 103.912, C2 1328.92, D -515608
- Use of non renewable primary energy resources used as raw materials (PENRM) [MJ]: A1-A3 0, C1 0, C2 0, D 0
- Total use of non renewable primary energy resource (PENRT) [MJ]: A1-A3 1.43882e6, C1 103.912, C2 1328.92, D -515608
- Use of secondary material (SM) [kg]: A1-A3 11263.2, C1 0, C2 0, D 0
- Use of renewable secondary fuels (SF) [MJ]: A1-A3 0, C1 0, C2 0, D 0
- Use of non renewable secondary fuels (NRSF) [MJ]: A1-A3 0, C1 0, C2 0, D 0
- Net use of fresh water (FW) [m3]: A1-A3 755.376, C1 0.00535994, C2 0.0685474, D -397.749

## Outputs
- Hazardous waste disposed (HWD) [kg]: A1-A3 0.000274532, C1 4.34319e-9, C2 5.55444e-8, D -4.52932e-5
- Non harzardous waste disposed (NHWD) [kg]: A1-A3 24562.2, C1 0.0167738, C2 0.214517, D -14201.9
- Radioactive waste disposed (RWD) [kg]: A1-A3 27.9896, C1 9.97172e-5, C2 0.00127527, D 0.988762
- Components for re-use (CRU) [kg]: A1-A3 0, C1 0, C2 0, D 0
- Materials for recycling (MFR) [kg]: A1-A3 0, C1 35280, C2 0, D 0
- Materials for energy recovery (MER) [kg]: A1-A3 0, C1 0, C2 0, D 0
- Exported electrical energy (EEE) [MJ]: A1-A3 0, C1 0, C2 0, D 0
- Exported thermal energy (EET) [MJ]: A1-A3 0, C1 0, C2 0, D 0

## Impact indicators
- Global Warming Potential - total (GWP-total) [kg CO2 eq.]: A1-A3 134912, C1 7.77401, C2 100.942, D -57040.4
- Global Warming Potential - fossil fuels (GWP-fossil) [kg CO2 eq.]: A1-A3 134340, C1 7.72199, C2 100.256, D -57062
- Global Warming Potential - biogenic (GWP-biogenic) [kg CO2 eq.]: A1-A3 225.507, C1 0.00167326, C2 0.0415301, D 203.065
- Global Warming Potential - land use and land use change (GWP-luluc) [kg CO2 eq.]: A1-A3 347.1, C1 0.0503465, C2 0.643873, D -181.491
- Depletion potenzial of the stratospheric ozone layer (ODP) [kg CFC-11 eq.]: A1-A3 9.64009e-10, C1 2.00589e-15, C2 2.5653e-14, D 1.4854e-9
- Acidifcation potential, Accumulated Exceedance (AP) [Mole of H+ eq.]: A1-A3 1110.01, C1 0.103967, C2 0.28425, D -664.608
- Eutrophication potential - freshwater (EP-freshwater) [kg P eq.]: A1-A3 0.214734, C1 1.61225e-5, C2 0.000206189, D -0.0703925
- Eutrophication potential - marine (EP-marine) [kg N eq.]: A1-A3 94.3272, C1 0.0472986, C2 0.130948, D -46.6217
- Eutrophication potential - terrestrial (EP-terrestrial) [Mole of N eq.]: A1-A3 990.427, C1 0.520054, C2 1.46507, D -487.059
- Photochemical Ozone Creation Potential (POCP) [kg NMVOC eq.]: A1-A3 311.659, C1 0.141654, C2 0.255351, D -160.038
- Abiotic depletion potential - non-fossil resources (ADPE) [kg Sb eq.]: A1-A3 41.3485, C1 6.81915e-7, C2 8.72091e-6, D -26.3544
- Abiotic depletion potential - fossil resources (ADPF) [MJ]: A1-A3 1.43553e6, C1 103.908, C2 1328.86, D -513689
- Water (user) deprivation potential (WDP) [m³ world equiv.]: A1-A3 34774.1, C1 0.0304743, C2 0.389731, D -20531.2

## Use advice
This data set refers to the manufacture of a compression chiller with a cooling capacity of 500 kW. The total weight of the system is 36000 kg. The data set can be used approximately to estimate other system weights between 30000 and 40000 kg.

## Data sources
- VDI 2067
- ADNOT 2006
- EECCAC 2003
- MEEUP 2005
- RIVIERE 2007
- Documentation of data quality management
- GaBi Database Edition 2021, CUP2021.01
- GaBi database (all versions)
