# Car (Diesel) EURO 4

Dataset: ILCD process, EPD, generic dataset
Geography: DE
Reference year: 2018
Valid until: 2022
Classification: oekobau.dat: Sonstige / Personen - Transporte[Personen km] / PKW
Owner: thinkstep
Compliance: DIN EN 15804
Review: Dependent internal review by thinkstep, IABP-GaBi, IBP-GaBi; Independent external review by GaBi user forum, GaBi bug forum, GaBi user community
Amounts: rows without a unit in brackets have none in this file; such an amount is in the reference unit of its flow, which a separate flow dataset defines
copyright: true

## General comment
This data set has been modeled according to the European Standard EN 15804 for Sustainable Building. Results are depicted in modules that allow the structured expression of results over the entire life cycle.

## Geography
The data set represents the country specific situation in Germany, focusing on the main technologies, the region specific characteristics and / or import statistics.

## Time period
Annual average

## Technology and included processes
The dataset refers to 1 km transport by passenger car. The transport weight is variable. A typic distribution of highways within town, outside of town and motorways is assumed. The engine displacement is 1.4 - 2.0 l. Production of fuel (petrol) is included. The balancing does not contain the production of the car. The average fuel consumption of the car is 7,4 l/100km.

## Technical purpose
This product can be used in construction.

## Safety margin
10 %. Product system almost completely covered. Good technological, temporal and geographic representativeness.

## Reference product
- Vehicle kilometers: 1000

## Inputs
- Use of renewable primary energy (PERE) [MJ]: A4 0.13649
- Primary energy resources used as raw materials (PERM) [MJ]: A4 0
- Total use of renewable primary energy resources (PERT) [MJ]: A4 0.13649
- Use of non-renewable primary energy (PENRE) [MJ]: A4 2.34454
- Non-renewable primary energy resources used as raw materials (PENRM) [MJ]: A4 0
- Total use of non-renewable primary energy resources (PENRT) [MJ]: A4 2.34454
- Input of secondary material (SM) [kg]: A4 0
- Use of renewable secondary fuels (RSF) [MJ]: A4 0
- Use of non renewable secondary fuels (NRSF) [MJ]: A4 0
- Use of net fresh water (FW) [m3]: A4 0.000122238

## Outputs
- Hazardous waste disposed (HWD) [kg]: A4 8.76131e-8
- Non-hazardous waste disposed (NHWD) [kg]: A4 0.000411508
- Radioactive waste disposed (RWD) [kg]: A4 2.46832e-6
- Components for re-use (CRU) [kg]: A4 0
- Materials for Recycling (MFR) [kg]: A4 0
- Material for Energy Recovery (MER) [kg]: A4 0
- Exported electrical energy (EEE) [MJ]: A4 0
- Exported thermal energy (EET) [MJ]: A4 0

## Impact indicators
- Global warming potential (GWP) [kg CO2 eq.]: A4 0.173176
- Ozone Depletion Potential (ODP) [kg R11 eq.]: A4 5.77393e-17
- Acidification potential (AP) [kg SO2 eq.]: A4 0.000538069
- Eutrophication potential (EP) [kg Phosphate eq.]: A4 0.000130809
- Photochemical Ozone Creation Potential (POCP) [kg Ethene eq.]: A4 -0.000116719
- Abiotic depletion potential for non fossil resources (ADPE) [kg Sb eq.]: A4 1.4679e-8
- Abiotic depletion potential for fossil resources (ADPF) [MJ]: A4 2.33823

## Use advice
The data set represents a cradle to gate inventory. It can be used to characterise the supply chain situation of the respective commodity in a representative manner. Combination with individual unit processes using this commodity enables the generation of user-specific (product) LCAs.

## Data sources
- GaBi Database Edition 2020, SP40
- GaBi database (all versions)
