# Brandschutzklappe FK90

Dataset: ILCD process, EPD, specific dataset
Geography: DE
Reference year: 2018
Valid until: 2023
Classification: OEKOBAU.DAT: Gebäudetechnik / Klimatisierung und Lüftung / Lüftungsanlagen
Classification: IBUCategories: 03 Gebäudetechnik / Brandschutzeinrichtungen / Brandschutzklappen und Brandschutzventile und Entrauchungsklappen
Method details: Brandschutzklappen und Brandschutzventile und Entrauchungsklappen.pdf
Registration number: EPD-WWB-20180133-ICC1-DE
Owner: Wildeboer Bauteile GmbH
Compliance: DIN EN 15804; ISO 14025
Review: Accredited third party review by Institut Bauen und Umwelt e. V.
Amounts: rows without a unit in brackets have none in this file; such an amount is in the reference unit of its flow, which a separate flow dataset defines
copyright: true

## General comment
Die Brandschutzklappe FK90 besteht aus einem umlaufend einteiligen, druckgefügten, stabilen Gehäuse aus verzinktem Stahlblech mit einem innenliegenden bruchsicheren Klappenblatt aus abriebfestem Kalziumsilikat. Ein vollständig ge- kapseltes, dauergeschmiertes, wartungsfreies Kurbelschleifengetriebe im Gehäusewandbereich

mit einer gekapselten Antriebseinheit sorgt als selbst- verriegelnde Antriebsmechanik für bruchsichere Drehmomente.

Die Brandschutzklappe FK90 kann mit wartungsfreier thermisch-mechanischer Auslöseeinrichtung oder mit elektrischem Federrücklaufantrieb ausgerüstet werden. Ein großer freier Querschnitt fördert den energetisch günstigen Betrieb der raumlufttechnischen Anlage.

Auch geeignet für den Einsatz in Überströmöffnungen (Ü-FK) und in gewerblichen Küchen (FK90-Küche).

Die Brandschutzklappe FK90 ist unabhängig von den verbauten Komponenten und Abmessungen wartungs- frei. Hygienische Reinigungen sind, wo erforderlich, durchzuführen. Näheres siehe auch Kap. 7 und die /Herstellerunterlagen/.

In dieser EPD wurden die Ergebnisse für eine repräsentative Brandschutzklappe FK90 (siehe Angaben unter 3.1) berechnet.

## Technology and included processes
Die Produktion erfolgt an einem Standort. Notwendige Roh- und Halbteile, Hilfs- und Betriebsstoffe werden von Lieferanten angeliefert und fließen in die Produktion mit ein. Die Fertigung der Halbteile erfolgt in einer Vorfertigung mit materialüblichen Fertigungs- verfahren. Metallteile werden gestanzt und in Form gekantet, Teile aus Kalziumsilikat gesägt und gefräst. Zur Vermeidung von Abfällen werden Zuschnitte entsprechend optimiert. Abfälle, die dann noch ent- stehen, werden gesammelt und möglichst von ent- sprechenden Firmen recycelt, oder als Hausmüll entsorgt und verbrannt. Schmierstoffe werden weitest- gehend gesammelt, aufbereitet und in der Produktion wiederverwendet. Stäube und Dünste werden vor Ort abgesaugt und gesammelt. Die Teile der Vorfertigung werden zusammen mit eingekauften Teilen zu Brandschutzklappen end- montiert, im Rahmen der Qualitätssicherung nach /DIN EN ISO 9001/ geprüft, verpackt und ausgeliefert.
Technische Daten:
Die Anforderungen nach harmonisierter Produktnorm /DIN EN 15650/ sind erfüllt. Brandprüfungen erfolgten nach /DIN EN 1366-2/.
Deklarierte Einheit:
Die Deklaration bezieht sich auf ein Stück Referenz-Brandschutzklappe der Wildeboer Bauteile GmbH mit den Abmessungen 200 mm x 200 mm x 500 mm (B x H x L) einschließlich des elektrischen Federrücklauf- antriebs mit Motorkonsole und des optionalen Einbau- rahmens (Gesamtgewicht 16,92 kg). Für die Auslöse- einheit wurde als worst case Betrachtung die elektrische Variante (es gibt auch eine mechanische Auslöseeinheit) berücksichtigt. Die optional lieferbaren Einbaurahmen für o.g. Baugröße der Brandschutz- klappe wurden zu einem Durchschnittsrahmen zusammengefasst und ebenfalls berücksichtigt. Ökobilanzergebnisse weiterer Brandschutzklappen FK90 mit abweichenden Abmessungen als die hier betrachtete, sowie Ergebnisse der Brandschutz- klappe für gewerbliche Küchen (FK90-Küche) als auch der für Überströmöffnungen (Ü-FK) wurden ebenfalls berechnet und können bei Wildeboer Bauteile GmbH angefragt werden.

## Technical purpose
Brandschutzklappe FK90 verhindert die Übertragung von Rauch und Feuer durch Lüftungsleitungen einer raumlufttechnischen Anlage in andere Brandabschnitte oder Geschosse. Einsatz der Brandschutzklappe FK90 ist möglich bei Feuerwiderstandsdauer 30/60/90/120 Minuten. Sie ist geeignet für den Einbau in, an und entfernt von massiven Wänden und Decken, in und entfernt von Metallständerwänden, in Brandwänden, in Schachtwänden, in Holzwänden und Holzdecken sowie in Decken mit Stahlrahmen. Der Einbau ist mit liegender und stehender Absperrklappenblattachse möglich und erfolgt nass, trocken oder mit teilweiser Ausmörtelung mit den kleinstmöglichen Abständen zwischen Brandschutzklappen zueinander oder zu Wänden und Decken. Durch die Verwendung von Einbaurahmen unterschiedlicher Art, die lose oder vormontiert geliefert werden, ist eine universelle und flexible Handhabung gegeben, z.B. auch bei Ände- rungen der Einbausituation vor Ort. FK90 ist geeignet für Ersteinbau und Sanierung. Steckverbindungen ermöglichen einen schnellen Um- oder Austausch der Auslöseeinrichtung. Brandschutzklappe FK90 mit Schutzgitter, elektrischem Antrieb und Rauchauslöse- einrichtung kann für Überströmöffnungen genutzt werden. Eine Ausführung für gewerbliche Küchen ist ebenfalls möglich. Die Brandschutzklappe FK90 ist wartungsfrei.

## Reference product
- 1 Stück Brandschutzklappe FK90 mit 17,18 kg/Stück: 1

## Inputs
- Erneuerbare Primärenergie als Energieträger (PERE) [MJ]: A1-A3 44.909, A4 0.365212, A5 2.43753, B1 0, B2 0, B6 40.1, B7 0, C1 0, C2 0.20165, C3 0.08596, C4 0.162905, D 11.3338
- Erneuerbare Primärenergie zur stofflichen Nutzung (PERM) [MJ]: A1-A3 2.43096, A4 0, A5 -2.43096, B1 0, B2 0, B6 0, B7 0, C1 0, C2 0, C3 0, C4 0, D 0
- Total erneuerbare Primärenergie (PERT) [MJ]: A1-A3 47.34, A4 0.365212, A5 0.006574, B1 0, B2 0, B6 40.1, B7 0, C1 0, C2 0.20165, C3 0.08596, C4 0.162905, D 11.3338
- Nicht-erneuerbare Primärenergie als Energieträger (PENRE) [MJ]: A1-A3 500.897, A4 5.44053, A5 3.50605, B1 0, B2 0, B6 85.7, B7 0, C1 0, C2 2.9981, C3 4.10264, C4 1.31387, D -159.64
- Nicht-erneuerbare Primärenergie zur stofflichen Nutzung (PENRM) [MJ]: A1-A3 7.10263, A4 0, A5 -3.4728, B1 0, B2 0, B6 0, B7 0, C1 0, C2 0, C3 -3.62984, C4 0, D 0
- Total nicht erneuerbare Primärenergie (PENRT) [MJ]: A1-A3 508, A4 5.44053, A5 0.03325, B1 0, B2 0, B6 85.7, B7 0, C1 0, C2 2.9981, C3 0.4728, C4 1.31387, D -159.64
- Einsatz von Sekundärstoffen (SM) [kg]: A1-A3 2.7427, A4 0, A5 0, B1 0, B2 0, B6 0, B7 0, C1 0, C2 0, C3 0, C4 0, D 7.7033
- Erneuerbare Sekundärbrennstoffe (RSF) [MJ]: A1-A3 0, A4 0, A5 0, B1 0, B2 0, B6 0, B7 0, C1 0, C2 0, C3 0, C4 0, D 0
- Nicht erneuerbare Sekundärbrennstoffe (NRSF) [MJ]: A1-A3 0, A4 0, A5 0, B1 0, B2 0, B6 0, B7 0, C1 0, C2 0, C3 0, C4 0, D 0
- Einsatz von Süßwasserressourcen (FW) [m^3]: A1-A3 0.07888, A4 0.000423571, A5 0.00020374, B1 0, B2 0, B6 0.0255, B7 0, C1 0, C2 0.00023403, C3 0.002985, C4 0.00026142, D 0.004355

## Outputs
- Gefährlicher Abfall zur Deponie (HWD) [kg]: A1-A3 1.9205e-6, A4 3.48269e-7, A5 1.5996e-10, B1 0, B2 0, B6 6.54e-8, B7 0, C1 0, C2 1.9195e-7, C3 2.267e-9, C4 2.2593e-8, D -1.1331e-7
- Entsorgter nicht gefährlicher Abfall (NHWD) [kg]: A1-A3 1.2727, A4 0.000404745, A5 0.003648, B1 0, B2 0, B6 0.0881, B7 0, C1 0, C2 0.00022311, C3 0.10768, C4 6.1475, D -0.3564
- Entsorgter radioaktiver Abfall (RWD) [kg]: A1-A3 0.010187, A4 6.55123e-6, A5 1.3633e-6, B1 0, B2 0, B6 0.00848, B7 0, C1 0, C2 3.6112e-6, C3 2.293e-5, C4 1.8873e-5, D 0.0028053
- Komponenten für die Wiederverwendung (CRU) [kg]: A1-A3 0, A4 0, A5 0, B1 0, B2 0, B6 0, B7 0, C1 0, C2 0, C3 0, C4 0, D 0
- Stoffe zum Recycling (MFR) [kg]: A1-A3 0, A4 0, A5 0, B1 0, B2 0, B6 0, B7 0, C1 0, C2 0, C3 0, C4 0, D 10.446
- Stoffe für die Energierückgewinnung (MER) [kg]: A1-A3 0, A4 0, A5 0, B1 0, B2 0, B6 0, B7 0, C1 0, C2 0, C3 0, C4 0, D 0
- Exportierte elektrische Energie (EEE) [MJ]: A1-A3 0, A4 0, A5 0.06376, B1 0, B2 0, B6 0, B7 0, C1 0, C2 0, C3 2.45, C4 0.00359, D 0
- Exportierte thermische Energie (EET) [MJ]: A1-A3 0, A4 0, A5 0.1486, B1 0, B2 0, B6 0, B7 0, C1 0, C2 0, C3 4.485, C4 0.00834, D 0

## Impact indicators
- Globales Erwärmungspotenzial (GWP) [kg CO_(2)-Äq.]: A1-A3 46.224, A4 0.40098, A5 0.06962, B1 0, B2 0, B6 6.63, B7 0, C1 0, C2 0.22106, C3 1.1624, C4 0.10183, D -20.507
- Abbau Potential der stratosphärischen Ozonschicht (ODP) [kg CFC11-Äq.]: A1-A3 1.9175e-10, A4 8.49024e-15, A5 1.5617e-15, B1 0, B2 0, B6 9.76e-12, B7 0, C1 0, C2 4.6817e-15, C3 2.957e-14, C4 2.1879e-14, D 3.01228e-12
- Versauerungspotenzial von Boden und Wasser (AP) [kg SO_(2)-Äq.]: A1-A3 0.15955, A4 0.0016171, A5 2.9124e-5, B1 0, B2 0, B6 0.0101, B7 0, C1 0, C2 0.0008906, C3 0.0002979, C4 0.00057973, D -0.04899
- Eutrophierungspotenzial (EP) [kg PO_(4)^(3)-Äq.]: A1-A3 0.012788, A4 0.000410393, A5 5.649e-6, B1 0, B2 0, B6 0.00165, B7 0, C1 0, C2 0.00022637, C3 3.01e-5, C4 8.0314e-5, D -0.004245
- Bildungspotential für troposphärisches Ozon (POCP) [kg Ethen-Äq.]: A1-A3 0.013072, A4 -0.000615589, A5 1.699e-6, B1 0, B2 0, B6 0.000671, B7 0, C1 0, C2 -0.00033985, C3 1.2529e-5, C4 4.4997e-5, D -0.006208
- Potenzial für den abiotischen Abbau nicht fossiler Ressourcen (ADPE) [kg Sb-Äq.]: A1-A3 0.0023396, A4 4.19806e-8, A5 6.212e-9, B1 0, B2 0, B6 4.52e-6, B7 0, C1 0, C2 2.3088e-8, C3 8.988e-8, C4 3.7958e-8, D -6.02037e-5
- Potenzial für den abiotischen Abbau fossiler Brennstoffe (ADPF) [MJ]: A1-A3 482, A4 5.4217, A5 0.029866, B1 0, B2 0, B6 64.3, B7 0, C1 0, C2 2.9769, C3 0.4151, C4 1.26649, D -166.97

## Use advice
Gültigkeitsbereich:
Dieses Dokument bezieht sich auf die Herstellung, den Transport, den Einbau, den Betrieb und die Entsorgung von Brandschutzklappen mit optionalem Zubehör für raumlufttechnische Anlagen. Die Produkte werden ausschließlich im Werk Weener produziert, in dem die Produktionsdaten des Jahres 2017 erhoben wurden.
Systemgrenze:
Die Systemgrenze der EPD vom Typ "Wiege bis Bahre" folgt dem modularen Aufbau nach /EN 15804/. Die Ökobilanz der betrachteten Produkte berück- sichtigt den kompletten Lebensweg des Produktes und somit alle Module:

A1-A3 (Produktionsstadium): Rohstoffbereitstellung, Transport zum Hersteller, Herstellung (inkl. Energie- und Wasserbereitstellung, Bereitstellung von Hilfs- stoffen, Entsorgung von Abfällen).

A4-A5 (Einrichten des Bauwerks): Transport zur Baustelle, Einbau in das Gebäude mithilfe des Ein- baurahmens, Verwertung von Verpackungsabfällen auf der Baustelle.

B1-B5 (Nutzungsstadium): Während der Nutzung der Brandschutzklappe (B1) auf Produktebene werden keine Emissionen freigesetzt. Die für den Betrieb der Brandschutzklappe mit elektrischem Antriebsmotor erforderliche elektrische Energie sowie die elektrische Energie für die halbjährlichen bzw. jährlichen Funktionsprüfungen sind dem Modul (B6) zugeordnet, da diese im Zusammenhang mit dem Betrieb des Gebäudes zu sehen sind. Eine Reparatur (B3) bzw. ein Austausch einzelner Komponenten (B4) ist während der betrachteten Nutzungsdauer nicht relevant. Während der RLS (Referenz-Nutzungsdauer) ist laut Herstellerangaben keine Erneuerung der Brandschutzklappe notwendig (B5). Die Module B3 bis B5 werden als Modul nicht Relevant „MNR“ deklariert.

B6-B7 (Nutzungsstadium – Betrieb des Gebäudes): Einsatz von elektrischer Energie für den Betrieb des Produktes.

C1-C4 (Entsorgungsstadium): Rückbau des Produkts,

Transport zur Abfallbehandlung, Abfallbehandlung,

Entsorgung.

D (Gutschriften): Recyclingpotential.

## Data sources
- Brandschutzklappe FK90.pdf
- GaBi Database (all versions)
- GaBi database SP36 2018
