# KLH Massivholzplatten (Kreuzlagenholz)

Dataset: ILCD process, EPD, specific dataset
Geography: AT
Reference year: 2019
Valid until: 2024
Classification: OEKOBAU.DAT: Holz / Vollholz / Brettschichtholzplatte
Classification: IBUCategories: 02 Bauprodukte / Produkte aus Bauholz / Vollholzprodukte
Method details: Vollholzprodukte.pdf
Registration number: EPD-KLH-20190027-ICA1-DE
Owner: KLH Massivholz GmbH
Compliance: DIN EN 15804; ISO 14025
Review: Accredited third party review by Institut Bauen und Umwelt e. V.
Amounts: rows without a unit in brackets have none in this file; such an amount is in the reference unit of its flow, which a separate flow dataset defines
copyright: true

## General comment
KLH-Massivholzplatten bestehen aus Nadelholzbrettern bzw. stabverleimten Platten oder Holzwerkstoffplatten, die zu Brettsperrholz (massive plattenförmige Holzbauelemente) verklebt werden. Generell sind die Nadelholzbretter der aufeinanderfolgenden Einzellagen senkrecht (Winkel von 90°) zueinander angeordnet.

## Technology and included processes
Es werden die Schmalseiten der Lamellen entweder miteinander verklebt oder die Längs- und Querlagen werden bei der Produktion seitlich gepresst. Die flächige Verleimung erfolgt mittels PUR – Klebstoff. Der Zuschnitt oder Abbund im Werk erfolgt mittels CNC – Technologie. Die Basis dafür bilden die vom Kunden bzw. bauausführenden Unternehmen freigegebenen Produktions- und Zuschnittspläne.
Technische Daten:
Bei den Materialkennwerten wird zwischen Beanspruchung als Platte und Beanspruchung als Scheibe unterschieden.
Für die Verwendung gelten die jeweiligen nationalen Bestimmungen.

Es gelten die Leistungswerte nach der Leistungserklärung.
Deklarierte Einheit:
Die deklarierte Einheit ist ein Kubikmeter (1 m³)

Kreuzlagenholz mit einer Rohdichte von 480 kg/m³.

## Technical purpose
KLH Massivholzplatten werden sowohl als tragende,
aussteifende, aber auch als nichttragende Elemente
eingesetzt.

## Reference product
- Kreuzlagenholz: 1

## Inputs
- Erneuerbare Primärenergie als Energieträger (PERE) [MJ]: A1-A3 1058.09, A4 12.8423, A5 5.38575, B1 0, B2 0, B6 0, B7 0, C1 1.0254, C2 0.733601, C3 1.76613, C4 0, D -367.611
- Erneuerbare Primärenergie zur stofflichen Nutzung (PERM) [MJ]: A1-A3 8210.45, A4 0, A5 0, B1 0, B2 0, B6 0, B7 0, C1 0, C2 0, C3 0, C4 0, D 0
- Total erneuerbare Primärenergie (PERT) [MJ]: A1-A3 9268.54, A4 12.8423, A5 5.38575, B1 0, B2 0, B6 0, B7 0, C1 1.0254, C2 0.733601, C3 1.76613, C4 0, D -367.611
- Nicht-erneuerbare Primärenergie als Energieträger (PENRE) [MJ]: A1-A3 2594.67, A4 1068.35, A5 243.128, B1 0, B2 0, B6 0, B7 0, C1 135.163, C2 61.0281, C3 47.7672, C4 0, D -3347.48
- Nicht-erneuerbare Primärenergie zur stofflichen Nutzung (PENRM) [MJ]: A1-A3 163.699, A4 0, A5 0, B1 0, B2 0, B6 0, B7 0, C1 0, C2 0, C3 0, C4 0, D 0
- Total nicht erneuerbare Primärenergie (PENRT) [MJ]: A1-A3 2756.8, A4 1068.35, A5 243.128, B1 0, B2 0, B6 0, B7 0, C1 135.163, C2 61.0281, C3 47.7672, C4 0, D -3347.48
- Einsatz von Sekundärstoffen (SM) [kg]: A1-A3 0, A4 0, A5 0, B1 0, B2 0, B6 0, B7 0, C1 0, C2 0, C3 0, C4 0, D 0
- Erneuerbare Sekundärbrennstoffe (RSF) [MJ]: A1-A3 0, A4 0, A5 0, B1 0, B2 0, B6 0, B7 0, C1 0, C2 0, C3 0, C4 0, D 0
- Nicht erneuerbare Sekundärbrennstoffe (NRSF) [MJ]: A1-A3 0, A4 0, A5 0, B1 0, B2 0, B6 0, B7 0, C1 0, C2 0, C3 0, C4 0, D 0
- Einsatz von Süßwasserressourcen (FW) [m^3]: A1-A3 0.0184587, A4 0.00259864, A5 0.00117642, B1 0, B2 0, B6 0, B7 0, C1 0.000153648, C2 0.000148444, C3 0.000241575, C4 0, D -0.00846685

## Outputs
- Gefährlicher Abfall zur Deponie (HWD) [kg]: A1-A3 0.00621242, A4 0.000657143, A5 0.0010845, B1 0, B2 0, B6 0, B7 0, C1 6.10597e-5, C2 3.75384e-5, C3 0.000139968, C4 0, D -0.0061161
- Entsorgter nicht gefährlicher Abfall (NHWD) [kg]: A1-A3 60.2727, A4 50.51, A5 2.24149, B1 0, B2 0, B6 0, B7 0, C1 0.149696, C2 2.88531, C3 4.83024, C4 0, D -7.65276
- Entsorgter radioaktiver Abfall (RWD) [kg]: A1-A3 0.023522, A4 0.0143854, A5 0.00265584, B1 0, B2 0, B6 0, B7 0, C1 0.00186733, C2 0.000821744, C3 0.000284202, C4 0, D -0.00518618
- Komponenten für die Wiederverwendung (CRU) [kg]: A1-A3 0, A4 0, A5 0, B1 0, B2 0, B6 0, B7 0, C1 0, C2 0, C3 0, C4 0, D 0
- Stoffe zum Recycling (MFR) [kg]: A1-A3 0, A4 0, A5 0, B1 0, B2 0, B6 0, B7 0, C1 0, C2 0, C3 2.5806, C4 0, D 0
- Stoffe für die Energierückgewinnung (MER) [kg]: A1-A3 0, A4 0, A5 0, B1 0, B2 0, B6 0, B7 0, C1 0, C2 0, C3 0, C4 0, D 0
- Exportierte elektrische Energie (EEE) [MJ]: A1-A3 0, A4 0, A5 1.56544, B1 0, B2 0, B6 0, B7 0, C1 0, C2 0, C3 471.202, C4 0, D 0
- Exportierte thermische Energie (EET) [MJ]: A1-A3 0, A4 0, A5 13.8127, B1 0, B2 0, B6 0, B7 0, C1 0, C2 0, C3 4157.66, C4 0, D 0

## Impact indicators
- Globales Erwärmungspotenzial (GWP) [kg CO_(2)-Äq.]: A1-A3 -601.291, A4 70.3839, A5 20.6863, B1 0, B2 0, B6 0, B7 0, C1 9.28283, C2 4.02059, C3 808.386, C4 0, D -203.386
- Abbau Potential der stratosphärischen Ozonschicht (ODP) [kg CFC11-Äq.]: A1-A3 1.93e-5, A4 1.27963e-5, A5 2.46233e-6, B1 0, B2 0, B6 0, B7 0, C1 1.67221e-6, C2 7.30969e-7, C3 5.66375e-7, C4 0, D -3.76595e-5
- Versauerungspotenzial von Boden und Wasser (AP) [kg SO_(2)-Äq.]: A1-A3 0.975342, A4 0.22908, A5 0.11449, B1 0, B2 0, B6 0, B7 0, C1 0.070275, C2 0.0130859, C3 0.107107, C4 0, D -0.375377
- Eutrophierungspotenzial (EP) [kg PO_(4)^(3)-Äq.]: A1-A3 0.334363, A4 0.0516793, A5 0.033197, B1 0, B2 0, B6 0, B7 0, C1 0.0163415, C2 0.00295211, C3 0.144756, C4 0, D -0.212682
- Bildungspotential für troposphärisches Ozon (POCP) [kg Ethen-Äq.]: A1-A3 0.149321, A4 0.0325306, A5 0.0183106, B1 0, B2 0, B6 0, B7 0, C1 0.00851682, C2 0.00185827, C3 0.0178678, C4 0, D -0.0562311
- Potenzial für den abiotischen Abbau nicht fossiler Ressourcen (ADPE) [kg Sb-Äq.]: A1-A3 0.000618764, A4 0.000209468, A5 0.0011173, B1 0, B2 0, B6 0, B7 0, C1 3.15917e-6, C2 1.19656e-5, C3 9.67714e-6, C4 0, D -0.000140316
- Potenzial für den abiotischen Abbau fossiler Brennstoffe (ADPF) [MJ]: A1-A3 2491.52, A4 1051.82, A5 234.781, B1 0, B2 0, B6 0, B7 0, C1 133.969, C2 60.08, C3 45.41, C4 0, D -3170.34

## Use advice
Gültigkeitsbereich:
Diese EPD gilt für die Produktion von Kreuzlagenholz im Werk Teufenbach-Katsch, Österreich.
Systemgrenze:
Typ der EPD: von der Wiege bis zur Bahre. Diese Ökobilanz adressiert die Lebenszyklusstadien A1–A3, A4, A5, B1, B2, B3, B4, B5, B6, B7, C1, C2, C3, C4 und D gemäß /EN 15804/. Da bei der Nutzung von KLH Massivholzplatten keine Emissionen oder Aufwendungen anfallen, werden B1 und B2 sowie B6 und B7 0 (null) gesetzt. B3 bis B5 werden als MNR Modul nicht relevant deklariert.
Das Produktstadium beginnt mit der Berücksichtigung der Produktion aller notwendigen Rohstoffe inklusive aller Vorketten sowie der CO2-Aufnahme der Rohstoffe (Holzwachstum im Wald). Für das verwendete Schnittholz wurde die CO2-Einspeicherung als Input bilanziert. Pro kg Holz atro wurden 1,833 kg aus der Atmosphäre entzogenes CO2 berücksichtigt.
Die weiteren Prozesse sind die Produktion des Kreuzlagenholzes im Werk samt der Energiebereitstellung unter Berücksichtigung der dazugehörigen Vorketten. Alle notwendigen dazugehörigen Transporte der Roh- und Hilfsstoffe sind in der Ökobilanz berücksichtigt. Ebenfalls in die Analyse eingeschlossen ist die Verpackung bis zum versandfertigen Produkt am Werkstor.
Darüber hinaus wird der Transport des fertigen Produktes bilanziert sowie die Energie und Materialerfordernisse beim Aufbau unter Berücksichtigung von erforderlichen Maschinen und metallischen Verbindungsmitteln. Die Produktverpackung wird hier thermisch verwertet.
Während der Nutzung fallen keine Emissionen oder Aufwendungen an.
Rückbau, Transport zum Entsorgungsunternehmen sowie die Verwertung werden ebenfalls deklariert. Verwertet wird das Produkt, wie in Österreich üblich, thermisch in Müllverbrennungsanlagen. Metallteile werden recycelt.
Die Bilanzierung der Verwertung erfolgt unter Berücksichtigung der Gutschriften auf Grundlage des österreichischen Strommix bzw. Wärme ab einer Gasfeuerung.

## Data sources
- KLH Massivholzplatten (Kreuzlagenholz).pdf
- ecoinvent database (all versions)
- ecoinvent 3.4 database
