# SINIAT AquaBoard

Dataset: ILCD process, EPD, specific dataset
Geography: IT
Reference year: 2019
Valid until: 2024
Classification: OEKOBAU.DAT: Mineralische Baustoffe / Steine und Elemente / Gipsplatten
Classification: IBUCategories: 02 Building products / Gypsum products / Plasterboard
Method details: Plasterboard.pdf
Generated by: Etex Building Performance International
Registration number: EPD-ETX-20180173-ICA1-EN
Owner: Etex Building Performance International
Compliance: DIN EN 15804; ISO 14025
Review: Accredited third party review by Institut Bauen und Umwelt e. V.
Amounts: rows without a unit in brackets have none in this file; such an amount is in the reference unit of its flow, which a separate flow dataset defines
copyright: true
licenseType: Free of charge for all users and uses
accessRestrictions: None

## General comment
Siniat AquaBoard covered by this EPD is an external sheathing panel made of a treated, water resistant core, surfaced with a water repellent liner. It provides protection from the elements and is resistant to decay, delamination and deterioration due to direct weather exposure during the jobsite and can be used as an external sheathing board substrate.

This EPD refers to 1 m² of AquaBoard BA13plasterboard. The following table presents the thickness and weight of the products covered by this EPD:

For the placing on the market of the product in the EU/EFTA (with the exception of Switzerland) Regulation (EU) No. 305/2011 (CPR) applies. The product needs a declaration of performance taking into consideration /EN15283-1/ type GM-H1, GM-Iand the CE-marking.

Aquaboard is compliant with /EN 520/ type DEFH1I/, due to the high density and impact resistance as well the improved core cohesion and the reduced water absorption.

For the application and use the respective national provisions apply.

## Technology and included processes
The manufacturing process is illustrated in the figure below. A preliminary stage consists in calcining the gypsum (natural gypsum + recycled gypsum) in a kiln to obtain the stucco, which is a calcium sulphate hemi hydrate. Plasterboards are then manufactured in a continuous automated production process by pouring from a mixer a slurry of stucco, water and additives, in-between two layers of a liner, composed of non woven tissue. The continuous laminated board is calibrated into a forming plate and transported on a conveyor belt to the knife, while the setting of the slurry occurs and the mechanical bond forms at the gypsum-paper interface. After cutting, the boards are introduced in a multilayer drier to remove the excess of water and increase strength. At the drier out-feed the boards are trimmed to the nominal length, pilled up on stacking units. The quality characteristics of the boards are controlled before storing pallets in the warehouse. The management system operated by the site is in compliance with the UNI EN ISO 9001:2015.
Technical data:
Detailed technical information is available in the specific product data sheets at www.siniat.it.

AquaBoard BA13 is compliant with types GM–H1 and GM–I of EN15283–1.

Performance data of the product in accordance with the declaration of performance with respect to its essential characteristics according to /EN15283–1/ Gypsum boards with fibrous reinforcement - Definitions, requirements and test methods.

Visit www.siniat.it for detailed technical documentation.
Declared unit:
The LCA results presented in this EPD are related to 1 m² of AquaBoard BA13 installed in the building, which is 12.5 mm thick and weights 11 kg approximately.

## Technical purpose
Siniat AquaBoard covered by this EPD is used in all construction types (residential, non-residential, new or refurbished).

AquaBoard can be used:

· as an external sheathing board substrate for the adhesion of insulation panels or direct render system

· as lining for external unexposed eaves, soffits and canopies,

· for any partition and lining exposed to direct weather exposure for a maximal period of 6 months (when buildings may not be weather tight yet).

Aquaboard is also suitable for partition, wall lining and ceiling in extremely humid internal environments such as swimming pools and health spas, as tile backer for bathrooms and shower rooms.

## Scenarios
- S1: 100% recycling
- S2: Scenario 2

## Reference product
- 1m² AquaBoardBA13 (): 1

## Inputs
- Renewable primary energy as energy carrier (PERE) [MJ]: A1-A3 3.21082, A4 0.122153, A5 0.666895, B1 0, C1 0, C2 (S1) 0.0661033, C2 (S2) 0.0661033, C3 (S1) 9.69763e-5, C3 (S2) 0.0854361, C4 (S1) 0.0444059, C4 (S2) 0.00147125, D 1.06688
- Renewable primary energy resources as material utilization (PERM) [MJ]: A1-A3 1.60812, A4 0, A5 0.0804061, B1 0, C1 0, C2 (S1) 0, C2 (S2) 0, C3 (S1) 0, C3 (S2) 0, C4 (S1) 0, C4 (S2) 0, D 0
- Total use of renewable primary energy resources (PERT) [MJ]: A1-A3 4.81894, A4 0.122153, A5 0.747301, B1 0, C1 0, C2 (S1) 0.0661033, C2 (S2) 0.0661033, C3 (S1) 9.69763e-5, C3 (S2) 0.0854361, C4 (S1) 0.0444059, C4 (S2) 0.00147125, D 1.06688
- Non renewable primary energy as energy carrier (PENRE) [MJ]: A1-A3 45.4691, A4 5.43723, A5 3.88233, B1 0, C1 0, C2 (S1) 2.99012, C2 (S2) 2.99012, C3 (S1) 0.00224567, C3 (S2) 1.97844, C4 (S1) 1.74904, C4 (S2) 0.0579492, D -0.585182
- Non renewable primary energy as material utilization (PENRM) [MJ]: A1-A3 0, A4 0, A5 0, B1 0, C1 0, C2 (S1) 0, C2 (S2) 0, C3 (S1) 0, C3 (S2) 0, C4 (S1) 0, C4 (S2) 0, D 0
- Total use of non renewable primary energy resources (PENRT) [MJ]: A1-A3 45.4691, A4 5.43723, A5 3.88233, B1 0, C1 0, C2 (S1) 2.99012, C2 (S2) 2.99012, C3 (S1) 0.00224567, C3 (S2) 1.97844, C4 (S1) 1.74904, C4 (S2) 0.0579492, D -0.585182
- Use of secondary material (SM) [kg]: A1-A3 4.0611, A4 0, A5 0.203055, B1 0, C1 0, C2 (S1) 0, C2 (S2) 0, C3 (S1) 0, C3 (S2) 0, C4 (S1) 0, C4 (S2) 0, D 5.28565
- Use of renewable secondary fuels (RSF) [MJ]: A1-A3 0, A4 0, A5 0, B1 0, C1 0, C2 (S1) 0, C2 (S2) 0, C3 (S1) 0, C3 (S2) 0, C4 (S1) 0, C4 (S2) 0, D 0
- Use of non renewable secondary fuels (NRSF) [MJ]: A1-A3 0, A4 0, A5 0, B1 0, C1 0, C2 (S1) 0, C2 (S2) 0, C3 (S1) 0, C3 (S2) 0, C4 (S1) 0, C4 (S2) 0, D 0
- Use of net fresh water (FW) [m^3]: A1-A3 0.00984188, A4 0.00132351, A5 0.00191056, B1 0, C1 0, C2 (S1) 0.000720898, C2 (S2) 0.000720898, C3 (S1) 5.27291e-7, C3 (S2) 0.000464544, C4 (S1) 0.00191843, C4 (S2) 6.35612e-5, D 0.000175737

## Outputs
- Hazardous waste disposed (HWD) [kg]: A1-A3 0.0344516, A4 0.00614419, A5 0.0033641, B1 0, C1 0, C2 (S1) 0.00328381, C2 (S2) 0.00328381, C3 (S1) 5.63174e-7, C3 (S2) 0.000496156, C4 (S1) 0.000880977, C4 (S2) 2.91885e-5, D -0.000106473
- Non hazardous waste disposed (NHWD) [kg]: A1-A3 0.453384, A4 0.357541, A5 0.634956, B1 0, C1 0, C2 (S1) 0.197674, C2 (S2) 0.197674, C3 (S1) 7.62155e-6, C3 (S2) 0.00671458, C4 (S1) 11.3811, C4 (S2) 0.377079, D 0.00274741
- Radioactive waste disposed (RWD) [kg]: A1-A3 8.02254e-5, A4 3.37686e-5, A5 9.92019e-6, B1 0, C1 0, C2 (S1) 1.86986e-5, C2 (S2) 1.86986e-5, C3 (S1) 2.62796e-8, C3 (S2) 2.31523e-5, C4 (S1) 1.13273e-5, C4 (S2) 3.75296e-7, D -2.91104e-6
- Components for re-use (CRU) [kg]: A1-A3 0, A4 0, A5 0, B1 0, C1 0, C2 (S1) 0, C2 (S2) 0, C3 (S1) 0, C3 (S2) 0, C4 (S1) 0, C4 (S2) 0, D 0
- Materials for recycling (MFR) [kg]: A1-A3 0, A4 0, A5 0.217037, B1 0, C1 0, C2 (S1) 0, C2 (S2) 0, C3 (S1) 0.01125, C3 (S2) 9.91125, C4 (S1) 0, C4 (S2) 0, D 0
- Materials for energy recovery (MER) [kg]: A1-A3 0, A4 0, A5 0, B1 0, C1 0, C2 (S1) 0, C2 (S2) 0, C3 (S1) 0, C3 (S2) 0, C4 (S1) 0, C4 (S2) 0, D 0
- Exported electrical energy (EEE) [MJ]: A1-A3 0, A4 0, A5 0, B1 0, C1 0, C2 (S1) 0, C2 (S2) 0, C3 (S1) 0, C3 (S2) 0, C4 (S1) 0, C4 (S2) 0, D 0
- Exported thermal energy (EET) [MJ]: A1-A3 0, A4 0, A5 0, B1 0, C1 0, C2 (S1) 0, C2 (S2) 0, C3 (S1) 0, C3 (S2) 0, C4 (S1) 0, C4 (S2) 0, D 0

## Impact indicators
- Global warming potential (GWP) [kg CO_(2)-Äq.]: A1-A3 2.56991, A4 0.339334, A5 0.232852, B1 0, C1 0, C2 (S1) 0.186635, C2 (S2) 0.186635, C3 (S1) 4.76072e-5, C3 (S2) 0.0419419, C4 (S1) 0.0603137, C4 (S2) 0.00199831, D -0.0469067
- Depletion potential of the stratospheric ozone layer (ODP) [kg CFC11-Äq.]: A1-A3 3.3465e-7, A4 5.95604e-8, A5 2.62935e-8, B1 0, C1 0, C2 (S1) 3.29577e-8, C2 (S2) 3.29577e-8, C3 (S1) 1.93995e-11, C3 (S2) 1.70909e-8, C4 (S1) 2.01163e-8, C4 (S2) 6.66492e-10, D -7.99638e-9
- Acidification potential of land and water (AP) [kg SO_(2)-Äq.]: A1-A3 0.0053849, A4 0.00139794, A5 0.00071799, B1 0, C1 0, C2 (S1) 0.00076665, C2 (S2) 0.00076665, C3 (S1) 3.49152e-7, C3 (S2) 0.000307603, C4 (S1) 0.000449107, C4 (S2) 1.48798e-5, D -0.000318841
- Eutrophication potential (EP) [kg PO_(4)^(3)-Äq.]: A1-A3 0.00125788, A4 0.000362754, A5 0.000132181, B1 0, C1 0, C2 (S1) 0.000197573, C2 (S2) 0.000197573, C3 (S1) 7.34015e-8, C3 (S2) 6.46668e-5, C4 (S1) 7.74521e-5, C4 (S2) 2.56614e-6, D -6.82479e-5
- Formation potential of tropospheric ozone photochemical oxidants (POCP) [kg Ethen-Äq.]: A1-A3 0.000763877, A4 0.000183991, A5 8.48171e-5, B1 0, C1 0, C2 (S1) 0.000100571, C2 (S2) 0.000100571, C3 (S1) 3.7021e-8, C3 (S2) 3.26155e-5, C4 (S1) 5.5918e-5, C4 (S2) 1.85267e-6, D -2.77104e-5
- Abiotic depletion potential for non fossil resources (ADPE) [kg Sb-Äq.]: A1-A3 2.3702e-5, A4 4.09662e-6, A5 1.59874e-6, B1 0, C1 0, C2 (S1) 2.1703e-6, C2 (S2) 2.1703e-6, C3 (S1) 8.99294e-11, C3 (S2) 7.92278e-8, C4 (S1) 7.61624e-8, C4 (S2) 2.52341e-9, D -2.02893e-7
- Abiotic depletion potential for fossil resources (ADPF) [MJ]: A1-A3 43.7382, A4 5.25636, A5 3.62679, B1 0, C1 0, C2 (S1) 2.89168, C2 (S2) 2.89168, C3 (S1) 0.000687328, C3 (S2) 0.605536, C4 (S1) 1.72349, C4 (S2) 0.0571026, D -0.670462

## Use advice
Scope:
The EPD applies for Siniat AquaBoard BA13.

It was developed from data collected at the Siniat Italy’s plasterboard factory located in Corfinio, producing 100 % of the total production of these products sold in the Italian market. The EPD is a cradle-to-gate with options EPD and covers Siniat plasterboards sold on the Italian market.
System boundary:
This EPD is a cradle-to-gate with options EPD, covering the following life cycle stages:

- plasterboards manufacturing (modules A1-A3), including the production of components, their transport to the manufacturing site, as well as impacts due to energy consumption, air and water emissions, as well as waste treatment and packaging material production,

- transport of the plasterboards from manufacturing to building site (module A4),

- installation (module A5), including the production of auxiliaries (screw, joint tape and coating). Due to the many possible applications of plasterboards, frames or suspended-ceiling systems are excluded from the system boundary,

- emissions during the use phase (modules B1). No emissions occur during Siniat plasterboards use phase,

- end-of-life (modules C1-C4), including impacts from manual deconstruction, transport of waste to treatment facility, and waste processing and waste disposal. Two scenarios were considered : For scenario 1 (100% landfill), the system boundaries include transport to the treatment facility (C2), sorting of screws (C3) and landfill (C4). For scenario 2 (100% recovery), the system boundaries include transport to the treatment facility (C2), sorting of gypsum, cardboard and other waste (C3), and landfill of other auxiliaries (joint tape, sealant).

- benefits and loads beyond the system boundaries (D). This module is included only for end-of-life scenario 2.

## Data sources
- ecoinvent database (all versions)
- ecoinvent 3.4 database
