# Gypsum fibre board (10 mm); 10 kg/m2

Dataset: ILCD process, EPD, generic dataset
Geography: DE
Reference year: 2021
Valid until: 2022
Classification: oekobau.dat: Mineralische Baustoffe / Steine und Elemente / Gipsplatten
Owner: Sphera Solutions GmbH
Compliance: EN 15804+A2
Review: Dependent internal review by Sphera Solutions GmbH; Independent external review by GaBi user forum
Amounts: rows without a unit in brackets have none in this file; such an amount is in the reference unit of its flow, which a separate flow dataset defines
copyright: true
licenseType: Free of charge for all users and uses
accessRestrictions: The license conditions as stated on https://www.oekobaudat.de/ apply.
accessRestrictions: Es gelten die Lizenzbedingungen wie sie auf https://www.oekobaudat.de/ genannt sind.

## General comment
This data set has been modeled according to the European Standard EN 15804+A2 for Sustainable Building. Results are depicted in modules that allow the structured expression of results over the entire life cycle.

## Geography
The data set represents the country specific situation in Germany, focusing on the main technologies, the region specific characteristics and / or import statistics.

## Time period
Annual average

## Technology and included processes
Gypsum is calcium sulphate that is available in various hydrate levels, hydrous or anhydrous. Natural gypsum stone is calcium sulphate dihydrate (CaSO4*2H2O). The naturally occurring anhydrous calcium sulphate is also known as Anhydrite (CaSO4). This gypsum (or anhydrate) accumulates as a by-product in industry in large quantities. Gypsum boards are manufactured building boards made essentially from gypsum (beta hemihydrate), whose surfaces and longitudinal edges are coated with a permanent board made from recycled paper.

In the disposal phase, a manual dismantling (no loads) is assumed in module C1. The transport in module C2 to the landfill site takes place with a truck (50km). In C3, if relevant, a packaging with PE foil is taken into account (for example, for mineral fiber products. 0.0125 kg foil per kg of discarded material). In module C4 the average landfill emissions corresponding to the product (reference country Germany) are shown. The use of landfill gas is not taken into account.

## Technical purpose
This product can be used in construction.

## Safety margin
10 %. Product system almost completely covered. Good technological, temporal and geographic representativeness.

## Reference product
- Gypsum fibre board (10 mm): 1

## Inputs
- Use of renewable primary energy as energy carrier (PERE) [MJ]: A1-A3 20.232, C2 0.0250352, C4 0.298181
- Use of renewable primary energy resources used as raw materials (PERM) [MJ]: A1-A3 0, C2 0, C4 0
- Total use of renewable primary energy (PERT) [MJ]: A1-A3 20.232, C2 0.0250352, C4 0.298181
- Use of non renewable primary energy as energy carrier (PENRE) [MJ]: A1-A3 51.7626, C2 0.431358, C4 2.20791
- Use of non renewable primary energy resources used as raw materials (PENRM) [MJ]: A1-A3 0, C2 0, C4 0
- Total use of non renewable primary energy resource (PENRT) [MJ]: A1-A3 51.7626, C2 0.431358, C4 2.20791
- Use of secondary material (SM) [kg]: A1-A3 0.85, C2 0, C4 0
- Use of renewable secondary fuels (SF) [MJ]: A1-A3 0, C2 0, C4 0
- Use of non renewable secondary fuels (NRSF) [MJ]: A1-A3 0, C2 0, C4 0
- Net use of fresh water (FW) [m3]: A1-A3 0.00785552, C2 2.22501e-5, C4 0.000543855

## Outputs
- Hazardous waste disposed (HWD) [kg]: A1-A3 1.43764e-8, C2 1.80294e-11, C4 2.34898e-10
- Non harzardous waste disposed (NHWD) [kg]: A1-A3 0.365655, C2 6.9631e-5, C4 11.0108
- Radioactive waste disposed (RWD) [kg]: A1-A3 0.000668323, C2 4.13944e-7, C4 2.27928e-5
- Components for re-use (CRU) [kg]: A1-A3 0, C2 0, C4 0
- Materials for recycling (MFR) [kg]: A1-A3 0, C2 0, C4 0
- Materials for energy recovery (MER) [kg]: A1-A3 0, C2 0, C4 0
- Exported electrical energy (EEE) [MJ]: A1-A3 0, C2 0, C4 0
- Exported thermal energy (EET) [MJ]: A1-A3 0, C2 0, C4 0

## Impact indicators
- Global Warming Potential - total (GWP-total) [kg CO2 eq.]: A1-A3 3.20113, C2 0.0328302, C4 0.162553
- Global Warming Potential - fossil fuels (GWP-fossil) [kg CO2 eq.]: A1-A3 3.18386, C2 0.0326065, C4 0.166455
- Global Warming Potential - biogenic (GWP-biogenic) [kg CO2 eq.]: A1-A3 0.0153208, C2 1.47059e-5, C4 -0.00439177
- Global Warming Potential - land use and land use change (GWP-luluc) [kg CO2 eq.]: A1-A3 0.00194899, C2 0.000208997, C4 0.000489387
- Depletion potenzial of the stratospheric ozone layer (ODP) [kg CFC-11 eq.]: A1-A3 2.68023e-14, C2 8.3268e-18, C4 6.53135e-16
- Acidifcation potential, Accumulated Exceedance (AP) [Mole of H+ eq.]: A1-A3 0.00332283, C2 0.000102241, C4 0.00118483
- Eutrophication potential - freshwater (EP-freshwater) [kg P eq.]: A1-A3 3.57303e-6, C2 6.69276e-8, C4 2.80155e-7
- Eutrophication potential - marine (EP-marine) [kg N eq.]: A1-A3 0.00118139, C2 4.77293e-5, C4 0.000307591
- Eutrophication potential - terrestrial (EP-terrestrial) [Mole of N eq.]: A1-A3 0.0129824, C2 0.000532938, C4 0.0033794
- Photochemical Ozone Creation Potential (POCP) [kg NMVOC eq.]: A1-A3 0.00324774, C2 9.20431e-5, C4 0.000932028
- Abiotic depletion potential - non-fossil resources (ADPE) [kg Sb eq.]: A1-A3 5.0257e-7, C2 2.83075e-9, C4 1.57775e-8
- Abiotic depletion potential - fossil resources (ADPF) [MJ]: A1-A3 51.7579, C2 0.43134, C4 2.20674
- Water (user) deprivation potential (WDP) [m³ world equiv.]: A1-A3 0.232283, C2 0.000126504, C4 0.0178142

## Use advice
The data set represents a cradle to gate inventory. It can be used to characterise the supply chain situation of the respective commodity in a representative manner. Combination with individual unit processes using this commodity enables the generation of user-specific (product) LCAs.

## Data sources
- Ökologische Bilanzierung von Baustoffen und Gebäuden, 2000
- Gips-Datenbuch, 1995
- Ganzheitliche Bilanzierung Gips-Baustoffe , 2001
- Documentation of data quality management
- GaBi Database Edition 2021, CUP2021.01
- GaBi database (all versions)
