# Mauermörtel-Vormauermörtel/Mörtel mit besonderen Eigenschaften

Dataset: ILCD process, EPD, average dataset
Geography: DE
Reference year: 2019
Valid until: 2024
Classification: OEKOBAU.DAT: Mineralische Baustoffe / Mörtel und Beton / Mauermörtel
Classification: IBUCategories: 02 Bauprodukte / Mauerwerk und Mörtel / Mineralische Werkmörtel
Method details: Mineralische Werkmörtel.pdf
Registration number: 12338
Owner: thinkstep AG
Compliance: DIN EN 15804; ISO 14025
Review: Accredited third party review by Institut Bauen und Umwelt e. V.
Amounts: rows without a unit in brackets have none in this file; such an amount is in the reference unit of its flow, which a separate flow dataset defines
copyright: true

## General comment
Mineralische Werkmörtel sind Mörtel, deren Bestandteile im Werk und nicht auf der Baustelle gemischt werden. Sie werden in Abhängigkeit von der Art der Verwendung in die drei Werkmörtelarten Mauermörtel, Putzmörtel und Estrichmörtel unterteilt.

Mineralische Mauermörtel sind Gemische aus einem oder mehreren anorganischen Bindemitteln, Zuschlägen, Wasser und ggf. Zusatzstoffen bzw. Zusatzmitteln zur Herstellung von Lager-, Stoß- und Längsfugen, Fugenglattstrich und zum nachträglichen Verfugen von Mauerwerk. Abhängig von den technischen Daten, den eingesetzten Grund- und Hilfsstoffen und der praktischen Anwendung werden Mauermörtel in die Produktgruppen Normalmauermörtel, Leichtmauermörtel, Vormauermörtel / Mörtel mit besonderen Eigenschaften und Dünnbettmörtel / Mörtel mit besonderen Eigenschaften unterteilt.

Je nach Herstellung unterscheidet man Werk-Trockenmörtel, Werk-Frischmörtel, Mehrkammer-Silomörtel und Werk-Vormörtel.

## Technology and included processes
In der Graphik ist der Herstellungsprozess dargestellt. Mineralische Mauermörtel werden in Mischwerken in folgenden Arbeitsschritten hergestellt: Füllen der Vorrats- bzw. Wägebehälter, Förderung der Einsatzstoffe/des Mischgutes in den Mischer, Mischen, Förderung des Fertigproduktes, Verpackung, Verladung des Fertigproduktes und Auslieferung. Die Rohstoffe – Sand, Bindemittel, Leichtzuschläge, Hilfsstoffe, Zusatzmittel und -stoffe (siehe Grundstoffe) – werden im Herstellwerk in Silos gelagert. Aus den Silos werden die Rohstoffe entsprechend der jeweiligen Rezeptur gravimetrisch dosiert und intensiv miteinander vermischt. Anschließend wird das Mischgut abgepackt und entweder als Werk-Trockenmörtel trocken in Gebinden oder Silos oder als Werk-Frischmörtel fertig gemischt mit Wasser ausgeliefert. Die Grundstoffe können im Werk auch ohne Mischen getrennt voneinander in Spezialsilos gefüllt, ausgeliefert und direkt auf der Baustelle unter Zugabe von Wasser zu gebrauchsfertigem Mörtel gemischt werden. Weiterhin besteht die Möglichkeit, bestimmte Grundstoffe vorzumischen, auszuliefern, dieser Vormischung auf der Baustelle weitere Bestandteile beizufügen und unter Zugabe von Wasser zu gebrauchsfertigem Mörtel zu mischen. Graphik 1: Herstellungsprozess (grün: Input; rot: Input der verschiedenen Sorten; blau: Einheitsprozess)
Deklarierte Einheit:
Abhängig von den technischen Daten, den eingesetzten Grund- und Hilfsstoffen und der praktischen Anwendung werden Mauermörtel in die Produktgruppen Normalmauermörtel, Leichtmauermörtel, Vormauermörtel/Mörtel mit besonderen Eigenschaften und Dünnbettmörtel/Mörtel mit besonderen Eigenschaften unterteilt. Diese Deklaration bezieht sich auf die Herstellung von einem Kilogramm typischer Mauermörtel der Produktgruppe Vormauermörtel/Mörtel mit besonderen Eigenschaften. Es werden sowohl Frisch- als auch Trockenmörtel betrachtet. Auch bei Frischmörtelprodukten wird die deklarierte Einheit auf 1 kg Trockenmasse bezogen, um die Vergleichbarkeit zu gewährleisten.

## Technical purpose
Im Werk hergestellte Mauermörtel zur Verwendung in Wänden, Pfeilern und Trennwänden aus Mauerwerk: Vormauermörtel zur Herstellung von Mauerwerk, für tragende und nicht tragende Mauerwerkskonstruktionen in Hoch- und Tiefbauten oder Mörtel mit besonderen Eigenschaften für Mörtelanwendungen vergleichbarer Zusammensetzung, die nicht in den Anwendungsbereich anderer Werkmörtel (Putz- und Estrichmörtel) fallen.

## Reference product
- 1 kg Mauermörtel-Vormauermörtel / Mörtel mit besonderen Eigenschaften (): 1

## Inputs
- Erneuerbare Primärenergie als Energieträger (PERE) [MJ]: A1-A3 0.314, A4 0.00663, A5 0.41168, B1 0, C4 0.0291, D -0.0743
- Erneuerbare Primärenergie zur stofflichen Nutzung (PERM) [MJ]: A1-A3 0.409, A4 0, A5 -0.409, B1 0, C4 0, D 0
- Total erneuerbare Primärenergie (PERT) [MJ]: A1-A3 0.723, A4 0.00663, A5 0.00268, B1 0, C4 0.0291, D -0.0743
- Nicht-erneuerbare Primärenergie als Energieträger (PENRE) [MJ]: A1-A3 1.357, A4 0.0985, A5 0.0679, B1 0, C4 0.235, D -0.355
- Nicht-erneuerbare Primärenergie zur stofflichen Nutzung (PENRM) [MJ]: A1-A3 0.053, A4 0, A5 -0.053, B1 0, C4 0, D 0
- Total nicht erneuerbare Primärenergie (PENRT) [MJ]: A1-A3 1.41, A4 0.0985, A5 0.0149, B1 0, C4 0.235, D -0.355
- Einsatz von Sekundärstoffen (SM) [kg]: A1-A3 0, A4 0, A5 0, B1 0, C4 0, D 0
- Erneuerbare Sekundärbrennstoffe (RSF) [MJ]: A1-A3 0, A4 0, A5 0, B1 0, C4 0, D 0
- Nicht erneuerbare Sekundärbrennstoffe (NRSF) [MJ]: A1-A3 0, A4 0, A5 0, B1 0, C4 0, D 0
- Einsatz von Süßwasserressourcen (FW) [m^3]: A1-A3 0.000249, A4 7.69e-6, A5 0.000294, B1 0, C4 4.48e-5, D -4.74e-5

## Outputs
- Gefährlicher Abfall zur Deponie (HWD) [kg]: A1-A3 1.41e-8, A4 6.32e-9, A5 1.39e-11, B1 0, C4 4.04e-9, D -1.99e-10
- Entsorgter nicht gefährlicher Abfall (NHWD) [kg]: A1-A3 0.00535, A4 7.35e-6, A5 0.000202, B1 0, C4 1.1, D -0.000188
- Entsorgter radioaktiver Abfall (RWD) [kg]: A1-A3 4.53e-5, A4 1.19e-7, A5 5.65e-7, B1 0, C4 3.37e-6, D -1.57e-5
- Komponenten für die Wiederverwendung (CRU) [kg]: A1-A3 0, A4 0, A5 0, B1 0, C4 0, D 0
- Stoffe zum Recycling (MFR) [kg]: A1-A3 0, A4 0, A5 0, B1 0, C4 0, D 0
- Stoffe für die Energierückgewinnung (MER) [kg]: A1-A3 0, A4 0, A5 0.0323, B1 0, C4 0, D 0
- Exportierte elektrische Energie (EEE) [MJ]: A1-A3 0, A4 0, A5 0.0746, B1 0, C4 0, D 0
- Exportierte thermische Energie (EET) [MJ]: A1-A3 0, A4 0, A5 0.174, B1 0, C4 0, D 0

## Impact indicators
- Globales Erwärmungspotenzial (GWP) [kg CO_(2)-Äq.]: A1-A3 0.226, A4 0.00734, A5 0.0594, B1 -0.09225, C4 0.0175, D -0.0243
- Abbau Potential der stratosphärischen Ozonschicht (ODP) [kg CFC11-Äq.]: A1-A3 9.78e-14, A4 1.54e-16, A5 6.45e-16, B1 0, C4 3.9e-15, D -1.8e-14
- Versauerungspotenzial von Boden und Wasser (AP) [kg SO_(2)-Äq.]: A1-A3 0.00037, A4 5.59e-6, A5 7.44e-6, B1 0, C4 0.000104, D -2.57e-5
- Eutrophierungspotenzial (EP) [kg PO_(4)^(3)-Äq.]: A1-A3 5.99e-5, A4 1.26e-6, A5 1.64e-6, B1 0, C4 1.43e-5, D -4.31e-6
- Bildungspotential für troposphärisches Ozon (POCP) [kg Ethen-Äq.]: A1-A3 4.17e-5, A4 -7.92e-8, A5 4.94e-7, B1 0, C4 8.06e-6, D -2.22e-6
- Potenzial für den abiotischen Abbau nicht fossiler Ressourcen (ADPE) [kg Sb-Äq.]: A1-A3 3.64e-7, A4 7.61e-10, A5 9.09e-10, B1 0, C4 6.74e-9, D -8.98e-9
- Potenzial für den abiotischen Abbau fossiler Brennstoffe (ADPF) [MJ]: A1-A3 1.29, A4 0.0982, A5 0.0134, B1 0, C4 0.226, D -0.316

## Use advice
Gültigkeitsbereich:
Bei diesem Dokument handelt es sich um eine Muster-EPD, bei der für die Berechnung der Ökobilanz das Produkt einer Gruppe ausgewählt wurde, welches die höchsten Umweltlasten dieser Gruppe aufweist. Sie gilt ausschließlich für Mauermörtel-Normalmauermörtel als mineralische Werkmörtel für Verbandsmitglieder; diese können der Verbandshomepage entnommen werden. Bei den Zahlenangaben, zum Beispiel für bautechnische Daten oder Konzentrationsangaben, handelt es sich um durchschnittliche praxisübliche Werte für diese Produktgruppe.
Systemgrenze:
Die Lebenszyklusanalyse der untersuchten Produkte umfasst die Produktion des Mörtels einschließlich der Rohstoffgewinnung und Energieträgerbereitstellung bis zum fertig verpackten Produkt (Modul A1-A3), den Einbau des Produktes inkl. Transport zur Baustelle (Modul A4-A5), die Nutzungsphase (Modul B1) sowie die Entsorgung des Mörtels (Modul C4). Für Siloware werden die anteiligen Aufwendungen für den Transport und die Herstellung des Silos berücksichtigt. Gutschriften für die Verpackung einschließlich Energierückgewinnung (Modul D) gehen ebenfalls in die Ökobilanz ein.

## Data sources
- Mauermörtel-Vormauermörtel/Mörtel mit besonderen Eigenschaften.pdf
- GaBi Database (all versions)
- GaBi database SP35 2018
