# Tor - Hörmann Legnica Sp. z o.o - Schwingtor N 500; 28,3 kg/m²

Dataset: ILCD process, EPD, specific dataset
Geography: PL
Reference year: 2018
Valid until: 2024
Classification: OEKOBAU.DAT: Komponenten von Fenstern und Vorhangfassaden / Türen und Tore / Stahl
Synonyms: Doppelgaragentor; Sammelgaragentor
Method details: Produktkategorieregeln Teil A; Produktkategorieregeln Teil B – für Türen und Tore; EPD Doppelgaratentore / Sporthallentore
Owner: Hörmann Legnica Sp. z o.o
Compliance: EN 15804
Review: Independent external review by Susanne Volz
Amounts: rows without a unit in brackets have none in this file; such an amount is in the reference unit of its flow, which a separate flow dataset defines
copyright: true

## General comment
Alle Tore bestehen hauptsächlich aus einem Torblattrahmen, Zargenrahmen, Zubehörbauteilen.

A1-A3 sowie Module C1, C2, C3, C4, D. Das Umweltprofil beinhaltet die Aufwendungen für die Lebenszyklus-Stadien cradle to gate mit Optionen (Modul A1-A3). Die Herstellung der Verpackung wurde innerhalb der Module A1-A3 berücksichtigt.

## Geography
Dieser Datensatz repräsentiert die Situation des Unternehmens Hörmann Legnica Sp. z o.o in 59-706 Gromadka im Hinblick auf die wichtigsten Technologien und die gesetzlichen Rahmenbedingungen.

## Time period
jährlicher Durchschnitt

## Technology and included processes
Die Ökobilanzergebnisse umfassen die Lebenszyklusstadien der Herstellung der Vorprodukte bis hin zur Rohstoffgewinnung und Verarbeitungsprozesse von als Input dienenden Sekundärstoffen (z.B. Recyclingprozesse), deren Transporte zum Werk sowie die Produktion selbst, einschließlich der Bereitstellung von allen Hilfs- und Betriebsstoffen, Energie, sowie die vollständige Abfallbehandlung oder die Deponierung der Restabfälle während des Stadiums der Produktion. Die Module A1, A2 und A3 sind hier als ein aggregiertes Modul A1-A3 ausgewiesen. Falls für diesen Datensatz weitere Module berechnet wurden, sind diese separat zu finden und können für eine Betrachtung des gesamten Lebenszyklus zusammengeführt werden.

## Technical purpose
Doppelgaragentore finden Anwendung im privaten und öffentlichen Bereich.

## Reference product
- Tor - Hörmann Legnica Sp. z o.o - Schwingtor N 500: 1

## Inputs
- Use of net fresh water (FW) [m3]: A1-A3 0.75, A4 0.000204, A5 0.00591, B2 0, B6 0.0712, C1 0, C2 0.000185, C3 0.000441, C4 0.00193, D -0.4
- Use of non renewable primary energy (PENRE) [MJ]: A1-A3 1245.51, A4 2.08, A5 2.09, B2 0, B6 252, C1 0, C2 1.88, C4 2.67, D -650
- Use of non renewable primary energy resources used as raw materials (PENRM) [MJ]: A1-A3 14.49, A4 0, A5 -1.52, B2 0, B6 0, C1 0, C2 0, C3 -12.32, C4 -2.16, D 0
- Use of non renewable secondary fuels (NRSF) [MJ]: A1-A3 3.65e-30, A4 0, A5 0, B2 0, B6 0, C1 0, C2 0, C3 0, C4 0, D 0
- Use of renewable primary energy (PERE) [MJ]: A1-A3 304.57, A4 0.12, A5 20.55, B2 0, B6 140, C1 0, C2 0.11, C3 0.37, C4 0.0815, D -166
- Use of renewable primary energy resources used as raw materials (PERM) [MJ]: A1-A3 20.43, A4 0, A5 -20.43, B2 0, B6 0, C1 0, C2 0, C3 0, C4 0, D 0
- Use of renewable secondary fuels (RSF) [MJ]: A1-A3 2.4e-31, A4 0, A5 0, B2 0, B6 0, C1 0, C2 0, C3 0, C4 0, D 0
- Use of secondary material (SM) [kg]: A1-A3 0, A4 0, A5 0, B2 0, B6 0, C1 0, C2 0, C3 0, C4 0, D 0
- Total use of non renewable primary energy resource (PENRT) [MJ]: A1-A3 1260, A4 2.08, A5 0.57, B2 0, B6 252, C1 0, C2 1.88, C3 0.93, C4 0.6, D -650
- Total use of renewable primary energy resources (PERT) [MJ]: A1-A3 325, A4 0.12, A5 0.12, B2 0, B6 140, C1 0, C2 0.11, C3 0.37, C4 0.0815, D -166

## Outputs
- Components for re-use (CRU) [kg]: A1-A3 0, A4 0, A5 0, B2 0, B6 0, C1 0, C2 0, C3 0, C4 0, D 0
- Exported electrical energy (EEE) [MJ]: A1-A3 0, A4 0, A5 3.15, B2 0, B6 0, C1 0, C2 0, C3 0, C4 1.78, D 0
- Exported thermal energy (EET) [MJ]: A1-A3 0, A4 0, A5 7.16, B2 0, B6 0, C1 0, C2 0, C3 0, C4 3.17, D 0
- Hazardous waste disposed (HWD) [kg]: A1-A3 1.41e-6, A4 1.16e-7, A5 8.54e-10, B2 0, B6 2.03e-7, C1 0, C2 1.05e-7, C3 4.44e-10, C4 8.55e-9, D -4.4e-7
- Materials for energy recovery (MER) [kg]: A1-A3 0, A4 0, A5 0, B2 0, B6 0, C1 0, C2 0, C3 0, C4 0, D 0
- Materials for recycling (MFR) [kg]: A1-A3 0, A4 0, A5 0, B2 0, B6 0, C1 0, C2 0, C3 25.5, C4 0, D 0
- Non hazardous waste dispose (NHWD) [kg]: A1-A3 14.2, A4 0.000169, A5 0.0329, B2 0, B6 0.27, C1 0, C2 0.000153, C3 0.000677, C4 2.31, D -7.6
- Radioactive waste disposed (RWD) [kg]: A1-A3 0.0483, A4 2.82e-6, A5 1.93e-5, B2 0, B6 0.0212, C1 0, C2 2.56e-6, C3 0.00015, C4 1.34e-5, D -0.0268

## Impact indicators
- Abiotic depletion potential for non fossil resources (ADPE) [kg Sb-Äqv.]: A1-A3 2.21e-5, A4 1.18e-8, A5 3.76e-8, B2 0, B6 8.57e-6, C1 0, C2 1.07e-8, C3 1.64e-8, C4 1.72e-8, D -0.00164
- Abiotic depletion potential for fossil resources (ADPF) [MJ]: A1-A3 1140, A4 2.07, A5 0.52, B2 0, B6 198, C1 0, C2 1.88, C3 0.55, C4 0.57, D -583
- Acidification potential of soil and water (AP) [kg SO2-Äqv.]: A1-A3 0.39, A4 0.000879, A5 0.000295, B2 0, B6 0.0309, C1 0, C2 0.000798, C3 0.000146, C4 0.000259, D -0.19
- Eutrophication potential (EP) [kg Phosphat-Äqv.]: A1-A3 0.0272, A4 0.000225, A5 6.21e-5, B2 0, B6 0.00511, C1 0, C2 0.000204, C3 1.37e-5, C4 3.47e-5, D -0.014
- Global warming potential (GWP) [kg CO2-Äqv.]: A1-A3 105, A4 0.15, A5 2.45, B2 0, B6 20.4, C1 0, C2 0.14, C3 0.0514, C4 0.87, D -56.9
- Depletion potential of the stratospheric ozone layer (ODP) [kg CFC 11 eq.]: A1-A3 4.86e-10, A4 2.52e-17, A5 -2.52e-10, B2 0, B6 8.63e-13, C1 0, C2 2.29e-17, C3 1.44e-15, C4 2.77e-16, D -1.57e-13
- Formation potential of tropospheric ozone (POCP) [kg Ethen-Äqv.]: A1-A3 0.0283, A4 -0.000393, A5 1.9e-5, B2 0, B6 0.00203, C1 0, C2 -0.000356, C3 9.26e-6, C4 2.13e-5, D -0.0153

## Use advice
Dieser Datensatz beinhaltet die Ergebnisse für die Module A1-A3 sowie die Module C1, C2, C3, C4, D gemäß EN 15804.
Ein Vergleich mit anderen Produkten ist nur mit einer vergleichbaren Anwendung im Gebäude zulässig. Grundsätzlich ist eine Gegenüberstellung oder die Bewertung von EPD Daten nur möglich, wenn alle zu vergleichenden Datensätze nach EN 15804 erstellt wurden und der Gebäudekontext, bzw. die produktspezifischen Leistungsmerkmale berücksichtigt werden.

## Review details
Die angewendete LCI Methode ist in Übereinstimmung mit ISO 14040 und 14044. Die Dokumentation enthält alle relevanten Informationen im Hinblick auf die Datenqualität und den Umfang der Anwendung der jeweiligen LCI Ergebnisse bzw. der Datensätze. Der Datensatz repräsentiert den Stand der Technik bezogen auf die funktionelle Einheit.

## Data sources
- GaBi database (all versions)
