# KXT Combar

Dataset: ILCD process, EPD, specific dataset
Geography: DE
Reference year: 2017
Valid until: 2022
Classification: OEKOBAU.DAT: Dämmstoffe / Dämmelemente / Isokörbe
Classification: IBUCategories: 02 Bauprodukte / Wärmedämmungsprodukte / Tragende Wärmedämmelemente
Method details: Tragende Wärmedämmelemente.pdf
Owner: Schöck Bauteile GmbH
Compliance: DIN EN 15804; ISO 14025
Review: Accredited third party review by IBU
Amounts: rows without a unit in brackets have none in this file; such an amount is in the reference unit of its flow, which a separate flow dataset defines
copyright: true

## General comment
Schöck Isokorb® Type KXT15-Combar-CV26-V6-H200-REI120 is a load-bearing thermal insulation element for thermal separation of reinforcement concrete elements projecting from the inner slab construction. It comprises a thermal insulation layer 120 mm in thickness made of polystyrene rigid foam (Neopor®) as well as an effective static framework system of glassfibre-reinforced plastic tension bars (Combar), welded steel bars (shear bars) and a system of compression modules made of ultra-high-strength concrete (high thermal performance (HTE) compact compression modules). The forces are transferred to the respective adjacent components via bond stress and pressure.

Schöck Isokorb® Type KXT is available in several load-bearing capacities which are aligned towards the required load capacities. The number of tension bars, shear bars and HTE compression modules depends on the load-bearing capacity. The exact fittings displayed by Schöck Isokorb® Type KXT15-Combar-CV26-V6-H200-REI120 are indicated in the table in section 2.3.

The declared product is supplied in a fire-resistant version with fire-resistant slabs attached on the top and bottom in the factory, and displays a fire-resistance duration of 120 minutes (REI120).

The EPD results for manufacturing Schöck Isokorb® Type KXT15-Combar-CV26-V6-H200-REI120 are applicable to all Isokorb® types with higher load-bearing capacity. The products with the respective load-bearing capacities (KXT15-Combar to KXT95-Combar) have identical components which vary depending on their mass (number of bars and compression modules). The manufacturing process for the products with load-bearing capacities (KXT15-Combar to KXT95-Combar) is the same.

## Technology and included processes
Processing raw materials The bars made of glassfibre-reinforced plastic (Combar) are produced by Fiberline in Denmark from where they are transported to the Landsberg (Halle) plant before being cut to size and then transported to the Baden-Baden plant as preliminary materials. The base material for the welded reinforcement steel-stainless steel compounds in the Schöck Isokorb® is wound as "metal wire" on coils, delivered and decoiled in special plants, aligned and cut to the required length or manufactured straight from the coil using recognised and certified welding processes on special automatic welding machines within in-house production in Baden-Baden. The shear bars are bent on in-house bending machines and bundled using retaining clips. The HTE compression modules made of high-performance concrete are cast in prefabricated plastic moulds which serve as integrated formwork in the plant in Landsberg in accordance with the mixtures stored at Deutsches Institut für Bautechnik. End assembly The materials required for final assembly of the various Schöck Isokorb® models are produced in-house and procured from selected suppliers. The various Schöck Isokorb® models are assembled on special manufacturing lines according to type and depending on specific customer requests. During final assembly in the plant in Baden-Baden, the requisite components (tension and shear bars, compression modules, plastic rails, foam parts and fire-resistant slabs) are bonded in accordance with the applicable manufacturing drawing and the corresponding quality guidelines using mechanical bonding technology as well as a special hot-melt adhesive.
Declared unit:
This Declaration refers to one metre of specific load-bearing thermal insulation elements manufactured by Schöck Bauteile GmbH – Schöck Isokorb® Type KXT15-Combar-CV26-V6-H200-REI120.

## Technical purpose
Schöck Isokorb® Type KXT-Combar serves as static transfer of bending torques and shear forces, and is used on projecting reinforcement concrete constructions such as balconies, for example. It is arranged linearly in the external thermal insulation level (e.g. composite heat insulation system) in such a way that the thermal flow between the interior and exterior area is minimised locally and thermal bridges reduced.

Because of its thermal and statically optimised design, the Isokorb® ensures effective thermal insulation which is indicated by the equivalent thermal conductivity (λeq).

## Reference product
- 1 m Schöck Isokorb® Typ KXT15 Combar-CV26-V6-h200-REI120: 1

## Inputs
- Erneuerbare Primärenergie als Energieträger (PERE) [MJ]: A1-A3 32.2
- Erneuerbare Primärenergie zur stofflichen Nutzung (PERM) [MJ]: A1-A3 31.6
- Total erneuerbare Primärenergie (PERT) [MJ]: A1-A3 63.8, C4 0.148, D 0.0691
- Nicht-erneuerbare Primärenergie als Energieträger (PENRE) [MJ]: A1-A3 166
- Nicht-erneuerbare Primärenergie zur stofflichen Nutzung (PENRM) [MJ]: A1-A3 28.6
- Total nicht erneuerbare Primärenergie (PENRT) [MJ]: A1-A3 195, C4 1.3, D -1.26
- Einsatz von Sekundärstoffen (SM) [kg]: A1-A3 2.373, C4 0, D 0
- Erneuerbare Sekundärbrennstoffe (RSF) [MJ]: A1-A3 0, C4 0, D 0
- Nicht erneuerbare Sekundärbrennstoffe (NRSF) [MJ]: A1-A3 0, C4 0, D 0
- Einsatz von Süßwasserressourcen (FW) [m^3]

## Outputs
- Gefährlicher Abfall zur Deponie (HWD) [kg]
- Entsorgter nicht gefährlicher Abfall (NHWD) [kg]
- Entsorgter radioaktiver Abfall (RWD) [kg]
- Komponenten für die Wiederverwendung (CRU) [kg]: A1-A3 0, C4 0, D 0
- Stoffe zum Recycling (MFR) [kg]: A1-A3 0.124, C4 0.884, D 0
- Stoffe für die Energierückgewinnung (MER) [kg]: A1-A3 0.029, C4 0, D 0
- Exportierte elektrische Energie (EEE) [MJ]: A1-A3 0, C4 0, D 0
- Exportierte thermische Energie (EET) [MJ]: A1-A3 0, C4 0, D 0

## Impact indicators
- Globales Erwärmungspotenzial (GWP) [kg CO_(2)-Äq.]: A1-A3 10.5, C4 0.0968, D -0.141
- Abbau Potential der stratosphärischen Ozonschicht (ODP) [kg CFC11-Äq.]: A1-A3 1.42e-7, C4 9.52e-13, D 6.29e-13
- Versauerungspotenzial von Boden und Wasser (AP) [kg SO_(2)-Äq.]: A1-A3 0.0445, C4 0.00058, D -0.00054
- Eutrophierungspotenzial (EP) [kg PO_(4)^(3)-Äq.]: A1-A3 0.00364, C4 7.89e-5, D -4.26e-5
- Bildungspotential für troposphärisches Ozon (POCP) [kg Ethen-Äq.]: A1-A3 0.00383, C4 5.57e-5, D -7.9e-5
- Potenzial für den abiotischen Abbau nicht fossiler Ressourcen (ADPE) [kg Sb-Äq.]: A1-A3 0.000178, C4 3.35e-8, D 1.16e-8
- Potenzial für den abiotischen Abbau fossiler Brennstoffe (ADPF) [MJ]: A1-A3 174, C4 1.26, D -1.32

## Use advice
Scope:
This EPD refers to a specific load-bearing thermal insulation element manufactured by Schöck Bauteile GmbH – Schöck Isokorb® Type KXT15-Combar-CV26-V6-H200-REI120. The compression modules required for Schöck Isokorb® Type KXT are manufactured in the Schöck plant in Landsberg (near Halle, Germany). Final assembly of all required components takes place in the Schöck plant in Baden-Baden.

The EPD results for manufacturing Schöck Isokorb® Type KXT15-Combar-CV26-V6-H200-REI120 are applicable for all other load-bearing capacities of this Isokorb® type (Combar 25 to Combar 95) using the factors indicated in section 6.

This document is translated from the German Environmental Product Declaration into English. It is based on the German original version EPD-SBG-20160213-IBC1-DE. The verifier has no influence on the quality of the translation.
System boundary:
Type of EPD: cradle to gate – with options

The Environmental Product Declaration refers to the product stage (A1-A3), the end-of-life stage (C4) and recycling stage which is declared in the module governing benefits and loads outside the system boundaries (D). The consumption values associated with landfilling non-recyclable materials are outlined in Module C4.

## Data sources
- KXT Combar.pdf
- GaBi Database (all versions)
- GaBi database SP29 2016
